#ifndef FORCE_VIEW
AnyDrawVector Resultant = { Vec = -.F/1000; Line.Style=Line3DStyleFull; Line.RGB = {0,0,1}; Line.Thickness = 0.002; AnyRefFrame &ref = .ref; };
#endif

#ifdef FORCE_VIEW
  AnyDrawForce DrwForce ={
    ForceScale=Main.HumanModel.DrawSettings.ForceScale;
    ReactionForceColor = {0,0,0};
    AppliedForceColor = ReactionForceColor;
  };
#endif
