#path __BM_PLUGIN_FILE__ "BodyModelConfiguration.any"
#define BM_CONFIG_PLUGIN __BM_PLUGIN_FILE__

// ----------------------------------------------------------
// Model configuration:
// For more info on body model configuration options please load the model and double click on:
// #path HTML_DOC "<AMMR_PATH_DOC>/bm_config/index.html"
// To modify the body model configuration, manually edit this file or use the
// BM Configurator Plugin.
// ----------------------------------------------------------

// Use TLEM2 or TLEM leg model the model
// The application is not designed use with the old Leg model
#define BM_LEG_MODEL _LEG_MODEL_TLEM_

#define BM_FOOT_MODEL _FOOT_MODEL_LEG_FOOT_
#ifdef BM_FOOT_MODEL
  #if BM_FOOT_MODEL != _FOOT_MODEL_LEG_FOOT_
    AnyMessage unsupported_foot_model = {
      TriggerPreProcess = On;
      Type = MSG_ErrorFatal;
      Message = "The Bike model does not support the newer GM based foot models! use #define BM_FOOT_MODEL _FOOT_MODEL_LEG_FOOT_";
    };
  #endif
#endif


// use 3 element hill muscles for arms and legs
#define BM_LEG_MUSCLES_RIGHT _MUSCLES_3E_HILL_
#define BM_LEG_MUSCLES_LEFT _MUSCLES_3E_HILL_

#define BM_ARM_MUSCLES_RIGHT _MUSCLES_3E_HILL_
#define BM_ARM_MUSCLES_LEFT _MUSCLES_3E_HILL_

// scaling
#define BM_SCALING _SCALING_LENGTHMASSFAT_
#path BM_SCALING_ANTHRO_FILE "Model\AnyMan.any"
