AnyFolder BikeModel = {


  /*
  This folder contains the definition of the bike
  - GlobalRefFrame
  - BikeFrame
  - Crank motion and loading
  - Rear wheel definition

*/
  //Bike Segment
  AnySeg BikeFrame = {
    Jii = {0.00,0.00,0.00};
    Mass =0.0;
    AnyRefNode SaddlePos = {
      sRel = {Main.BikeParameters.SaddlePos-0.03,Main.BikeParameters.SaddleHeight,0};
    };
    AnyRefNode Crank = { sRel = {0, 0, 0}; };

    AnyRefNode RearWheel = { sRel = {-0.452,0.009,0}; };
    AnyRefNode FrontWheel = { sRel = {0.720,-0.005,0.0}; };

    AnyRefNode Handlebar = {
      sRel = {0.500,0.630,-0.0};
      AnyDrawSurf Handlebar ={
        FileName = ANYBODY_PATH_MODELUTILS + "/BikeSTL/Handlebar";
        ScaleXYZ={1,1,1};
        RGB=Main.HumanModel.DrawSettings.Colors.AnyBodyGreen;
      };

      // Right and left hand points
      AnyRefNode RightHand={
        sRel={-0.02,0.05,0.21};
      };
      AnyRefNode LeftHand={
        sRel={-0.02,0.05,-0.21};
      };
    };

    // Locate handlebar on the frame
    AnyRefNode FramePt = {sRel = {0.42, 0.56, 0.0}; };
    AnyKinPLine HB_to_Frame = {
      AnyRefNode &ref1 = .Handlebar;
      AnyRefNode &ref2 = .FramePt;

      AnyDrawPLine drw = {
        Thickness = 0.02;
        RGB = Main.HumanModel.DrawSettings.Colors.AnyBodyGreen;
        Opacity = 1;
      };
    };

    // Saddle pin location on the frame
    AnyRefNode SaddlePin = {
       sRel = {-tan(24.5*pi/180)*Main.BikeParameters.SaddleHeight+0.176,Main.BikeParameters.SaddleHeight-0.460,0};
    };

    // Saddle location on the pin
    AnyRefNode SaddleOnPin = {
       sRel = {Main.BikeParameters.SaddlePos-0.05,Main.BikeParameters.SaddleHeight-0.092,0};
    };

    AnyRefNode ElbowPosRight={
      sRel={0.0,0,0.25};
    };
    AnyRefNode ElbowPosLeft={
      sRel={0.0,0,-0.25};
    };

    AnyDrawSurf BikeFrameSurf ={
      FileName = ANYBODY_PATH_MODELUTILS + "/BikeSTL/Frame";
      ScaleXYZ={1,1,1};
      RGB=Main.HumanModel.DrawSettings.Colors.AnyBodyBlue;
    };
  };  // BikeFrame

  AnySeg Crank = {
    Mass=0.5;
    Jii = {0.001,0.001,0.001};
    AnyRefNode CrankJoint = { sRel = {0,0,0}; };
    AnyRefNode RPedal = { sRel = {0,....BikeParameters.PedalArmLength,....BikeParameters.PedalArmWidth}; };
    AnyRefNode LPedal = { sRel = {0,-....BikeParameters.PedalArmLength,-....BikeParameters.PedalArmWidth}; };
    AnyDrawSurf CrankSurf ={
      FileName = ANYBODY_PATH_MODELUTILS + "/BikeSTL/Sprocket";
      ScaleXYZ={1,1,1};
      RGB=Main.HumanModel.DrawSettings.Colors.AnyBodyGreen;
    };
  };//Crank

  AnyRevoluteJoint CrankJoint ={
    Axis = z;
    AnyRefNode &Ground = .BikeFrame.Crank;
    AnyRefNode &Crank = .Crank.CrankJoint;
  };

  AnyKinEqSimpleDriver CrankRotation = {
    AnyRevoluteJoint &Jnt = .CrankJoint;
    DriverPos = {0};
    DriverVel = {-(...BikeParameters.Cadence/60)*pi*2};
    Reaction.Type = {Off}; //This has to be zero otherwise the crank driver will carry the applied load
  };

  //This is the definiton of the crank moment
  AnyForce CrankMoment ={
    AnyJoint &Jnt=.CrankJoint;
    F={...BikeParameters.CrankMomentOffset-...BikeParameters.CrankMomentAmp*cos(4*pi*t/...BikeParameters.T+ ...BikeParameters.CrankMomentPhase)};
  };

  //This is the definition of the rear wheel its pure graphics!
  AnySeg RearWheel = {
    Mass=0.0;
    Jii = {0.00,0.00,0.00};
    AnyRefNode Wheel = { sRel = {0,0,0}; };
//    r0 ={0.550000, 0.010000, 0.000000};

    AnyDrawSurf Crank ={
      FileName = ANYBODY_PATH_MODELUTILS + "/BikeSTL/BackWheel";
      ScaleXYZ={1,1,1};
      RGB=Main.HumanModel.DrawSettings.Colors.AnyBodyGreen;
      RelRotMat = RotMat(pi, x);
    };
  };

  AnyRevoluteJoint RearWheelJoint ={
    Axis = z;
    AnyRefNode& Ground = .BikeFrame.RearWheel;
    AnyRefNode &Wheel = .RearWheel.Wheel;
  };

  AnyKinEqSimpleDriver RearWheelRotation = {
    AnyRevoluteJoint &Jnt = .RearWheelJoint;
    DriverPos = {0};
    DriverVel = -{0.9*(...BikeParameters.Cadence/60)*pi*2};
    Reaction.Type = {On}; //Setting Reaction.Type=1 means the joint should provide the needed moment to turn the wheel
  };

  //This is the definition of the front wheel its pure graphics!
  AnySeg FrontWheel = {
    Mass=0.0;
    Jii = {0.00,0.00,0.00};
    AnyRefNode Wheel = { sRel = {0,0,0}; };
    AnyDrawSurf Crank ={
      FileName = ANYBODY_PATH_MODELUTILS + "/BikeSTL/FrontWheel";
      ScaleXYZ={1,1,1};
      RGB=Main.HumanModel.DrawSettings.Colors.AnyBodyGreen;
    };
  };

  AnyRevoluteJoint FrontWheelJoint ={
    Axis = z;
    AnyRefNode &Ground = .BikeFrame.FrontWheel;
    AnyRefNode &Wheel = .FrontWheel.Wheel;
  };

  AnyKinEqSimpleDriver WheelRotation = {
    AnyRevoluteJoint &Jnt = .FrontWheelJoint;
    DriverPos = {0};
    DriverVel = -{0.9*(...BikeParameters.Cadence/60)*pi*2};
    Reaction.Type = {On}; //Setting Reaction.Type=1 means the joint should provide the needed moment to turn the wheel
  };

  //This is the definition of the saddle pin its pure graphics!
  AnySeg SaddlePin = {
    Mass=0.0;
    Jii = {0.00,0.00,0.00};
    AnyRefNode Pin = { sRel = {0,0,0}; };
    AnyDrawSurf SaddlePin ={
      FileName = ANYBODY_PATH_MODELUTILS + "/BikeSTL/SaddlePin";
      ScaleXYZ={1,1,1};
      RGB=Main.HumanModel.DrawSettings.Colors.AnyBodyGreen;
    };
  };

  AnyPrismaticJoint SaddlePinJoint ={
    Axis = y;
    AnyRefNode &Ground = .BikeFrame.SaddlePin;
    AnyRefNode &SaddlePin = .SaddlePin.Pin;
  };

  AnyKinEqSimpleDriver PinHeight = {
    AnyPrismaticJoint &Jnt = .SaddlePinJoint;
    DriverPos = {0};
    DriverVel = {0};
    Reaction.Type = {On}; //Setting Reaction.Type=1 means the joint should provide the needed moment to turn the wheel
  };

  //This is the definition of the saddle its pure graphics!
  AnySeg Saddle = {
    Mass=0.0;
    Jii = {0.00,0.00,0.00};
    AnyRefNode SaddleNode = { sRel = {0,0,0}; };
    AnyDrawSurf SaddleDrw ={
      FileName = ANYBODY_PATH_MODELUTILS + "/BikeSTL/Saddle";
      ScaleXYZ={1,1,1};
      RGB=Main.HumanModel.DrawSettings.Colors.AnyBodyGreen;
    };
  };

  AnyPrismaticJoint SaddleJoint ={
    Axis = x;
    AnyRefNode &Ground = .BikeFrame.SaddleOnPin;
    AnyRefNode &SaddlePin = .Saddle.SaddleNode;
  };

  AnyKinEqSimpleDriver SaddleHeightDrv = {
    AnyPrismaticJoint &Jnt = .SaddleJoint;
    DriverPos = {0};
    DriverVel = {0};
    Reaction.Type = {On}; //Setting Reaction.Type=1 means the joint should provide the needed moment to turn the wheel
  };

}; //Bikemodel
