/**    Drivers for a box lift model.
       The posture is controlled by the Mannequin.any file.
*/
AnyFolder Joints = {

  AnyKinEq RHBoxDriver = {
    AnyKinMeasureOrg Lin = {
      MeasureOrganizer = {0,1,2};
      AnyKinLinear Lin = { Ref = 0;
    AnyRefNode &Box = Main.Model.EnvironmentModel.Box.Right;
    AnySeg &Hand = Main.HumanModel.BodyModel.Right.ShoulderArm.Segments.Glove;
      };
    };
  Reaction.Type = {Off,Off,Off};
  };
  AnyKinEq LHBoxDriver = {
    AnyKinMeasureOrg Lin = {
      MeasureOrganizer = {0,1,2};
      AnyKinLinear Lin = { Ref = 0;
    AnyRefNode &Box = Main.Model.EnvironmentModel.Box.Left;
    AnySeg &Hand = Main.HumanModel.BodyModel.Left.ShoulderArm.Segments.Glove;
      };
    };
  Reaction.Type = {Off,Off,Off};
  };

  AnyKinEq BoxGlobalDriver = {
      AnyKinMeasureLinComb Measure = {
        OutDim = 1;
        Coef = {{0,1,0,0,-1,0}};
        AnyKinLinear Front = { Ref=0;
          AnyRefFrame &Global = Main.Model.EnvironmentModel.GlobalRef;
          AnyRefNode &Box = Main.Model.EnvironmentModel.Box.Front;
        };
        AnyKinLinear Back = { Ref=0;
          AnyRefFrame &Global = Main.Model.EnvironmentModel.GlobalRef;
          AnyRefNode &Box = Main.Model.EnvironmentModel.Box.Back;
        };
      };
  Reaction.Type = {Off};
  };

  AnyKinEq SymmetricGlenohumeralAbduction = {
    AnyKinMeasureLinComb Measure = {
      OutDim = 1;
      Coef = {{1,-1}};
      AnyKinMeasure &right =Main.HumanModel.BodyModel.Interface.Right.GlenohumeralAbduction;
      AnyKinMeasure &left =Main.HumanModel.BodyModel.Interface.Left.GlenohumeralAbduction;
    };
  Reaction.Type = {Off};
  };

  AnyReacForce RHBoxRot ={
    AnyKinRotational Rot = {
      AnyRefNode &Box = Main.Model.EnvironmentModel.Box.Right;
      AnySeg &Hand = Main.Model.BodyModel.Right.ShoulderArm.Segments.Glove;
      Type=RotVector;
    };
  };

  AnyReacForce LHBoxRot={
    AnyKinRotational Rot = {
      AnyRefNode &Box = Main.Model.EnvironmentModel.Box.Left;
      AnySeg &Hand = Main.Model.BodyModel.Left.ShoulderArm.Segments.Glove;
      Type=RotVector;
    };
  };


  AnyVar FrictionStrength=200;
  AnyVar Strength =4000;

  AnyFolder HandSupportLeft = {
    AnyRefNode &StartNode = Main.Model.EnvironmentModel.Box.Left2;
    AnySeg &EndNode = Main.Model.BodyModel.Left.ShoulderArm.Segments.Glove;    //The terms push and pull are determined wrt. the coordinate system of the StartNode!

    AnyVector StrengthOfReactionsLin = {.FrictionStrength,.FrictionStrength,.Strength,.FrictionStrength,.FrictionStrength,.FrictionStrength}; //List of strengths for the linear muscles
    AnyFolder &DrawRef=Main.HumanModel.DrawSettings;
    AnyVar ScaleFactor =0.5;
    #include "<ANYBODY_PATH_MODELUTILS>/Reactions/XPush.any"
    #include "<ANYBODY_PATH_MODELUTILS>/Reactions/XPull.any"
    #include "<ANYBODY_PATH_MODELUTILS>/Reactions/YPush.any"
    #include "<ANYBODY_PATH_MODELUTILS>/Reactions/YPull.any"
    //#include "<ANYBODY_PATH_MODELUTILS>/Reactions/ZPush.any"
    #include "<ANYBODY_PATH_MODELUTILS>/Reactions/ZPull.any"

  };

  AnyFolder HandSupportRight = {
    AnyRefNode &StartNode = Main.Model.EnvironmentModel.Box.Right2;

    AnySeg &EndNode = Main.Model.BodyModel.Right.ShoulderArm.Segments.Glove;    //The terms push and pull are determined wrt. the coordinate system of the StartNode!

    AnyVector StrengthOfReactionsLin = {.FrictionStrength,.FrictionStrength,.Strength,.FrictionStrength,.FrictionStrength,.FrictionStrength}; //List of strengths for the linear muscles
    AnyFolder &DrawRef=Main.HumanModel.DrawSettings;
    AnyVar ScaleFactor =0.5;
    #include "<ANYBODY_PATH_MODELUTILS>/Reactions/XPush.any"
    #include "<ANYBODY_PATH_MODELUTILS>/Reactions/XPull.any"
    #include "<ANYBODY_PATH_MODELUTILS>/Reactions/YPush.any"
    #include "<ANYBODY_PATH_MODELUTILS>/Reactions/YPull.any"
    #include "<ANYBODY_PATH_MODELUTILS>/Reactions/ZPush.any"
    //#include "<ANYBODY_PATH_MODELUTILS>/Reactions/ZPull.any"

  };
};

AnyFolder Drivers = {

  // Aliases for convenient referencing
  AnyFolder &JntPos=..Mannequin.Posture;
  AnyFolder &JntVel=..Mannequin.PostureVel;
  AnyFolder &LegR = ..BodyModel.Right.Leg;
  AnyFolder &LegL = ..BodyModel.Left.Leg;


//  AnyKinEqSimpleDriver ToesDisConstraint ={
//    AnyKinLinear ToesDis = {
//      AnyRefNode &Right = Main.Model.BodyModel.Right.Leg.Segments.Foot.Metatarsal1.ToeJoint;
//      AnyRefNode &Left = Main.Model.BodyModel.Left.Leg.Segments.Foot.Metatarsal1.ToeJoint;
//    };
//    MeasureOrganizer = {2};  // Only the z coordinate
//    DriverPos = {-0.467};
//    DriverVel = {0};
//    Reaction.Type = {Off};   // Provide ground reaction forces
//  };
//  AnyKinEqSimpleDriver HeelsDisConstraint ={
//    AnyKinLinear HeelsDis = {
//      AnyRefNode &Right = Main.Model.BodyModel.Right.Leg.Segments.Foot.Calcaneus.HeelContactNodeLow;
//      AnyRefNode &Left = Main.Model.BodyModel.Left.Leg.Segments.Foot.Calcaneus.HeelContactNodeLow;
//    };
//    MeasureOrganizer = {2};  // Only the z coordinate
//    DriverPos = {-0.5};
//    DriverVel = {0};
//    Reaction.Type = {Off};   // Provide ground reaction forces
//  };
  AnyKinEqSimpleDriver RHeelDisConstraint ={
    AnyKinLinear HeelsDis = {
      AnyFixedRefFrame &Ground = Main.Model.EnvironmentModel.GlobalRef;
      AnyRefNode &Right = Main.Model.BodyModel.Right.Leg.Segments.Foot.Calcaneus.HeelContactNodeLow;
    };
    MeasureOrganizer = {2};  // Only the z coordinate
    DriverPos = {0.25};
    DriverVel = {0};
    Reaction.Type = {Off};   // Provide ground reaction forces
  };
  AnyKinEqSimpleDriver LHeelDisConstraint ={
    AnyKinLinear HeelsDis = {
      AnyFixedRefFrame &Ground = Main.Model.EnvironmentModel.GlobalRef;
      AnyRefNode &Left = Main.Model.BodyModel.Left.Leg.Segments.Foot.Calcaneus.HeelContactNodeLow;
    };
    MeasureOrganizer = {2};  // Only the z coordinate
    DriverPos = {-0.25};
    DriverVel = {0};
    Reaction.Type = {Off};   // Provide ground reaction forces
  };


  // Place the right toe and heel on the ground
  AnyKinEqSimpleDriver RToeGroundConstraint ={
    AnyKinLinear ToePos = {
      AnyFixedRefFrame &Ground = Main.Model.EnvironmentModel.GlobalRef;
      AnyRefNode &Ball = Main.Model.BodyModel.Right.Leg.Segments.Foot.Metatarsal1.ToeJoint;
    };
   MeasureOrganizer = {1};  // Only the y coordinate
    DriverPos = {0.0};
    DriverVel = {0};
    Reaction.Type = {Off};   // Provide ground reaction forces

  };

  AnyKinEqSimpleDriver RHeelGroundConstraint ={
    AnyKinLinear HeelPos = {
      AnyFixedRefFrame &Ground = Main.Model.EnvironmentModel.GlobalRef;
      AnyRefNode &Ball = Main.Model.BodyModel.Right.Leg.Segments.Foot.Calcaneus.HeelContactNodeLow;
    };
    MeasureOrganizer = {1};  // Only the y coordinate
    DriverPos = {0.0};
    DriverVel = {0};
    Reaction.Type = {Off};   // Provide ground reaction forces
  };

  // Place the left toe and heel on the ground
AnyKinEqSimpleDriver LToeGroundConstraint ={
    AnyKinLinear ToePos = {
      AnyFixedRefFrame &Ground = Main.Model.EnvironmentModel.GlobalRef;
      AnyRefNode &Ball = Main.Model.BodyModel.Left.Leg.Segments.Foot.Metatarsal1.ToeJoint;
    };
    MeasureOrganizer = {1};  // Only the y coordinate
    DriverPos = {0.0};
    DriverVel = {0};
    Reaction.Type = {Off};  // Provide ground reaction

  };

  AnyKinEqSimpleDriver LHeelGroundConstraint ={
    AnyKinLinear HeelPos = {
      AnyFixedRefFrame &Ground = Main.Model.EnvironmentModel.GlobalRef;
      AnyRefNode &Ball = Main.Model.BodyModel.Left.Leg.Segments.Foot.Calcaneus.HeelContactNodeLow;
    };
    MeasureOrganizer = {1};  // Only the y coordinate
    DriverPos = {0.0};
  DriverVel = {0};
    Reaction.Type = {Off};  // Provide ground reaction
  };

  // Position the Ankles right above the z axis
  AnyKinEqSimpleDriver RAnkleX = {
    AnyKinLinear AnklePos = {
      AnyFixedRefFrame &Ground = Main.Model.EnvironmentModel.GlobalRef;
      AnyRefNode &Ankle = ..LegR.Segments.Talus.AnkleJoint;
    };
    MeasureOrganizer = {0};  // Only the x coordinate
    DriverPos = {0.0};
    DriverVel = {0.0};
    Reaction.Type = {Off};
  };
  AnyKinEqSimpleDriver LAnkleX ={
    AnyKinLinear AnklePos = {
      AnyFixedRefFrame &Ground = Main.Model.EnvironmentModel.GlobalRef;
      AnyRefNode &Ankle = ..LegL.Segments.Talus.AnkleJoint;
    };
    MeasureOrganizer = {0};  // Only the x coordinate
    DriverPos = {0.0};
    DriverVel = {0.0};
    Reaction.Type = {Off};
  };
  //Constraint the collective CoM to be right above the GlobalRef
  AnyKinEqSimpleDriver CoMDriver = {
    AnyKinCoM CoM = {
      AnyFolder &Body = Main.Model.BodyModel;
//      AnyFolder &Environment = Main.Model.EnvironmentModel;
    };
    MeasureOrganizer = {0,2};  // Only the x and z directions
    DriverPos = {0,0};
    DriverVel = {0,0};
    Reaction.Type = {Off,Off};
  };

  AnyFolder &RefHM = Main.Model.BodyModel;


  AnyFolder &ref=Main.Model.BodyModel.Trunk;

  //Neck driver
  AnyKinEqSimpleDriver NeckJntDriver = {
    AnyKinMeasure& lb = ...BodyModel.Interface.Trunk.SkullThoraxLateralBending;
    AnyKinMeasure& ar = ...BodyModel.Interface.Trunk.SkullThoraxRotation;
    AnyKinMeasure& fe = ...BodyModel.Interface.Trunk.SkullThoraxFlexion;
    DriverPos = pi/180*{.JntPos.NeckLateralBending, .JntPos.NeckRotation, -1*.JntPos.NeckExtension};
    DriverVel = pi/180*{.JntVel.NeckLateralBending, .JntVel.NeckRotation, -1*.JntVel.NeckExtension};
    Reaction.Type = {Off, Off, Off};
  };

  //Thorax pelvis rotation driver
  AnyKinEqSimpleDriver PostureDriver ={
    AnyKinMeasure& Ref2 = ...BodyModel.Interface.Trunk.PelvisThoraxLateralBending;
    AnyKinMeasure& Ref3 = ...BodyModel.Interface.Trunk.PelvisThoraxRotation;
    AnyKinMeasure& Ref1 = ...BodyModel.Interface.Trunk.PelvisThoraxExtension;

    DriverPos = pi/180*{
          .JntPos.PelvisThoraxLateralBending,
      .JntPos.PelvisThoraxRotation,
      .JntPos.PelvisThoraxExtension
    };
    DriverVel = pi/180*{
      .JntVel.PelvisThoraxLateralBending,
      .JntVel.PelvisThoraxRotation,
      .JntVel.PelvisThoraxExtension
    };
    Reaction.Type = {Off,Off,Off};
  };


  // ************************************
  // Drivers for the right arm
  // ************************************


  //Sterno clavicular joint driver
  AnyKinEqSimpleDriver SCDriverRight ={
    AnyKinMeasure& ref1 =...BodyModel.Interface.Right.SternoClavicularProtraction;
    AnyKinMeasure& ref2 =...BodyModel.Interface.Right.SternoClavicularElevation;
    DriverPos = pi/180*{
      .JntPos.Right.SternoClavicularProtraction,
      .JntPos.Right.SternoClavicularElevation
    };
    DriverVel = {
      .JntVel.Right.SternoClavicularProtraction,
      .JntVel.Right.SternoClavicularElevation
    };
    Reaction.Type={Off,Off};
  };


  //Glenohumeral joint
  AnyKinEqSimpleDriver GHDriverRight={
//    AnyKinMeasure& ref1 =...BodyModel.Interface.Right.GlenohumeralAbduction;
    AnyKinMeasure& ref2 =...BodyModel.Interface.Right.GlenohumeralFlexion;
    AnyKinMeasure& ref3 =...BodyModel.Interface.Right.GlenohumeralExternalRotation;

     DriverPos=pi/180*{
//      .JntPos.Right.GlenohumeralAbduction,  //GH joint
      .JntPos.Right.GlenohumeralFlexion,  //GH joint
      .JntPos.Right.GlenohumeralExternalRotation  //GH joint
     };
     DriverVel = pi/180*{
//      .JntVel.Right.GlenohumeralAbduction,  //GH joint
      .JntVel.Right.GlenohumeralFlexion,  //GH joint
      .JntVel.Right.GlenohumeralExternalRotation  //GH joint
     };
     Reaction.Type={Off,Off};
  };


  //Elbow flexion driver
  AnyKinEqSimpleDriver ElbowFEDriverRight={
    AnyKinMeasureOrg  &Elbow =...BodyModel.Interface.Right.ElbowFlexion;
    DriverPos=pi/180*{.JntPos.Right.ElbowFlexion};
    DriverVel = pi/180*{.JntVel.Right.ElbowFlexion};
    Reaction.Type={Off};
  };

  //Elbow pronation driver
  AnyKinEqSimpleDriver ElbowPSDriverRight={
    AnyKinMeasure& Elbow =...BodyModel.Interface.Right.ElbowPronation;
    DriverPos = pi/180*{.JntPos.Right.ElbowPronation };

    DriverVel=pi/180*{.JntVel.Right.ElbowPronation };
    Reaction.Type={Off};
  };

  //Wrist driver
  AnyKinEqSimpleDriver WristDriverRight ={
    AnyKinMeasure& ref1 =...BodyModel.Interface.Right.WristFlexion;
    AnyKinMeasure& ref2 =...BodyModel.Interface.Right.WristAbduction;
    DriverPos = pi/180*{
         .JntPos.Right.WristFlexion,
         .JntPos.Right.WristAbduction
       };

    DriverVel = pi/180*{
         .JntVel.Right.WristFlexion,
         .JntVel.Right.WristAbduction};
    Reaction.Type={Off,Off};
  };


  // ************************************
  // Drivers for the left arm
  // ************************************

  //Sterno clavicular joint driver
  AnyKinEqSimpleDriver SCDriverLeft ={
    AnyKinMeasure& ref1 =...BodyModel.Interface.Left.SternoClavicularProtraction;
    AnyKinMeasure& ref2 =...BodyModel.Interface.Left.SternoClavicularElevation;

    DriverPos = pi/180*{
      .JntPos.Left.SternoClavicularProtraction,
      .JntPos.Left.SternoClavicularElevation
    };

    DriverVel = pi/180*{
      .JntVel.Left.SternoClavicularProtraction,
      .JntVel.Left.SternoClavicularElevation
    };

    Reaction.Type={Off,Off};
  };

  //Glenohumeral joint driver
  AnyKinEqSimpleDriver GHDriverLeft={
//    AnyKinMeasure& ref1 =...BodyModel.Interface.Left.GlenohumeralAbduction;
    AnyKinMeasure& ref2 =...BodyModel.Interface.Left.GlenohumeralFlexion;
    AnyKinMeasure& ref3 =...BodyModel.Interface.Left.GlenohumeralExternalRotation;
    DriverPos=pi/180*{
//      .JntPos.Left.GlenohumeralAbduction,  //GH joint
      .JntPos.Left.GlenohumeralFlexion,  //GH joint
      .JntPos.Left.GlenohumeralExternalRotation  //GH joint
    };
    DriverVel = pi/180*{
//      .JntVel.Left.GlenohumeralAbduction,  //GH joint
      .JntVel.Left.GlenohumeralFlexion,  //GH joint
      .JntVel.Left.GlenohumeralExternalRotation  //GH joint
    };
    Reaction.Type={Off,Off};
  };

  //Elbow flexion driver
  AnyKinEqSimpleDriver ElbowFEDriverLeft={
  AnyKinMeasureOrg  &Elbow =...BodyModel.Interface.Left.ElbowFlexion;
    DriverPos=pi/180*{.JntPos.Left.ElbowFlexion};
    DriverVel = pi/180*{.JntVel.Left.ElbowFlexion};
    Reaction.Type={Off};
  };

  //Elbow pronation driver
  AnyKinEqSimpleDriver ElbowPSDriverLeft={
    AnyKinMeasure& Elbow =...BodyModel.Interface.Left.ElbowPronation;
    DriverPos= pi/180*{.JntPos.Left.ElbowPronation };
    DriverVel = pi/180*{.JntVel.Left.ElbowPronation };
    Reaction.Type={Off};
  };


  //Wrist driver
 //Wrist driver
  AnyKinEqSimpleDriver WristDriverLeft ={
    AnyKinMeasure& ref1 =...BodyModel.Interface.Left.WristFlexion;
    AnyKinMeasure& ref2 =...BodyModel.Interface.Left.WristAbduction;
    DriverPos = pi/180*{
      .JntPos.Left.WristFlexion,
      .JntPos.Left.WristAbduction};

    DriverVel = pi/180*{
      .JntVel.Left.WristFlexion,
      .JntVel.Left.WristAbduction};
    Reaction.Type={Off,Off};
  };


  // ************************************
  // Drivers for the right leg
  // ************************************

   //Hip driver
  AnyKinEqSimpleDriver HipDriverRight={
    AnyKinMeasure& ref1 =...BodyModel.Interface.Right.HipFlexion;
    AnyKinMeasure& ref2 =...BodyModel.Interface.Right.HipExternalRotation;
//    AnyKinMeasure& ref3 =...BodyModel.Interface.Right.HipAbduction;
    DriverPos= pi/180*{
      .JntPos.Right.HipFlexion,
      .JntPos.Right.HipExternalRotation,
//      .JntPos.Right.HipAbduction
    };
    DriverVel = pi/180*{
      .JntVel.Right.HipFlexion,
      .JntVel.Right.HipExternalRotation,
//      .JntVel.Right.HipAbduction
    };
    Reaction.Type={Off,Off};

  };

  //Knee driver
  AnyKinEqSimpleDriver KneeDriverRight={
    AnyKinMeasureOrg  &Knee = ...BodyModel.Interface.Right.KneeFlexion;
    DriverPos=pi/180*{.JntPos.Right.KneeFlexion};
    DriverVel = pi/180*{.JntVel.Right.KneeFlexion};
    Reaction.Type={Off};
  };

  //Ankle driver
  AnyKinEqSimpleDriver AnkleDriverRight={
    AnyKinMeasure& ref1=...BodyModel.Interface.Right.AnklePlantarFlexion;
    AnyKinMeasure& ref2=...BodyModel.Interface.Right.SubTalarEversion;
    DriverPos = pi/180*{.JntPos.Right.SubTalarEversion};
    DriverVel=pi/180*{.JntVel.Right.SubTalarEversion};
    Reaction.Type={Off};
    MeasureOrganizer={1};
  };


  // ************************************
  // Drivers for the Left leg
  // ************************************

  //Left hip driver
  AnyKinEqSimpleDriver HipDriverLeft={
    AnyKinMeasure& ref1 =...BodyModel.Interface.Left.HipFlexion;
    AnyKinMeasure& ref2 =...BodyModel.Interface.Left.HipExternalRotation;
//    AnyKinMeasure& ref3 =...BodyModel.Interface.Left.HipAbduction;
    DriverPos=pi/180*{
      .JntPos.Left.HipFlexion,
      .JntPos.Left.HipExternalRotation,
//      .JntPos.Left.HipAbduction
    };
    DriverVel = pi/180*{
      .JntVel.Left.HipFlexion,
      .JntVel.Left.HipExternalRotation,
//      .JntVel.Left.HipAbduction
    };
    Reaction.Type={Off,Off};
  };

  //Knee driver
  AnyKinEqSimpleDriver KneeDriverLeft={
    AnyKinMeasure& Knee =...BodyModel.Interface.Left.KneeFlexion;
    DriverPos=pi/180*{      .JntPos.Left.KneeFlexion   };
    DriverVel = pi/180*{      .JntVel.Left.KneeFlexion   };
    Reaction.Type={Off};
  };


//Ankle driver
  AnyKinEqSimpleDriver AnkleDriverLeft={
    AnyKinMeasure& ref1=...BodyModel.Interface.Left.AnklePlantarFlexion;
    AnyKinMeasure& ref2=...BodyModel.Interface.Left.SubTalarEversion;
    DriverPos = pi/180*{.JntPos.Left.SubTalarEversion};
    DriverVel=pi/180*{.JntVel.Left.SubTalarEversion};
    Reaction.Type={Off};
    MeasureOrganizer={1};
  };

  // Create reaction forces below the feet. Thi provides reactions
  // for the feet regardless of their positions.

  AnyReacForce RightFootReaction = {


    AnyKinRotational rot = {
      AnyRefFrame &ref1=..LegR.Segments.Foot.Calcaneus;
      AnyFixedRefFrame &ref2 = ....EnvironmentModel.GlobalRef;
      Type = RotVector;
    };

    AnyKinLinear RightFootLinMeasure = {
      AnyRefFrame &ref1=..LegR.Segments.Foot.Calcaneus;
      AnyFixedRefFrame &ref2 = ....EnvironmentModel.GlobalRef;
    };

  };

  AnyReacForce LeftFootReaction = {

    AnyKinLinear LeftFootLinMeasure = {
      AnyRefFrame &ref1=..LegL.Segments.Foot.Calcaneus;
      AnyFixedRefFrame &ref2 = ....EnvironmentModel.GlobalRef;
    };
    AnyKinRotational LeftFootRotMeasure = {
      AnyRefFrame &ref1=..LegL.Segments.Foot.Calcaneus;
      AnyFixedRefFrame &ref2 = ....EnvironmentModel.GlobalRef;
      Type = RotVector;
    };


  };

};//Drivers
