#if USE_LIGAMENT_CALIBRATION == 1
AnyOperationSequence LigamentCalibrationSequence = {
  AnyOperation& EvaluateLigamentLength = Main.EvaluateLigamentLength.UpdateDesign;
  /// This operation updates the values based on the dependancies.
  AnyOperationMacro UpdateValues = {
    MacroStr = {
      "classoperation Main" + strquote("Update Values")
    };
  };
};
#endif

AnyOperationSequence RunApplication = {
  #if USE_LIGAMENT_CALIBRATION == 1
  AnyOperation& LigamentCalibrationSequence = .LigamentCalibrationSequence;
  #endif

  AnyOperation &KneeSimulatorStudy=Main.KneeSimulatorStudy.InverseDynamics;

  #if SAVE_H5 == 1
  /// This operation saves the output of the study to an h5 file in the Output folder
  AnyOperationClassOpr SaveResult = {
        Object = &Main.KneeSimulatorStudy.Output;
        OperationName = "Save data";
        ArgList = {
          AnyStringVar file = ANYBODY_PATH_OUTPUT + OutputFileNamePrefix + "-Result.anydata.h5";
          AnyStringVar type = "Deep";
        };
  };
  #endif
};
