Main.ModelSetup.TrialSpecificData =
{

  LoadParametersFrom = {"2014009_ST" };


  AnyStringVar WalkingCondition = "C4";

  // Special configuration/exception for this trial
  // SXS and JNJ are swapped in this trial
  #define EXCLUDE_SXS
  #define EXCLUDE_SJN
  Main.ModelSetup.MocapDrivers = {
    // Marker on the Sternum
    CreateMarkerDriver SXS (
      MarkerName= SJN,
      MarkerPlacement=Trunk.Segments.ThoraxSeg,
      OptX=ON,OptY=ON,OptZ=OFF,
      WeightX=1,WeightY=1,WeightZ=1
    ) = {
      sRelOpt = {0.180,0.25,0.0};
    };
    // Marker on the Clavicle
    CreateMarkerDriver SJN (
      MarkerName= SXS,
      MarkerPlacement=Trunk.Segments.SternumSeg,
      PlaceMarkerAt=ij,
      OptX=ON,OptY=OFF,OptZ=OFF
    ) = {
      sRelOpt = {0.01,0.015,0.0};
    };
  };


  TrialFileName = MOCAP_NAME_MAINFILEDIR;

  /// Uniqe ID for each trial
  AnyStringVar TrialID = MOCAP_NAME_MAINFILEDIR;
  //nStep = 1+(tEnd-tStart)*.C3DFileData.Header.VideoFrameRate;


   // This class_template calculates the load time position and orientation of
   // the pelvis based on markers.
   AutoPelvisPos AutoPos(RASIS=R_IAS, LASIS=L_IAS, BACK=L_IPS) = {};

};
