// EXAMPLE of MarkerProcol file for the plug-in-gait protocol.

//Pelvis===============
#define _LPSI
#define _RPSI
#define _RASI
#define _LASI
////#define _RSIC
//////new
////#define _LSIC
//////new

//Head===============
//#define _RFHD
//#define _LFHD
//#define _RBHD
//#define _LBHD
#define _RSPH
//new
#define _LSPH
//new
#define _GLAB
//new

//Sternum===============
//#define _STRN
//#define _CLAV
#define _MSTR
//new
//#define _RCLA
////new
//#define _LCLA
////new

////Spine===============
#define _C7
#define _T3
//new
#define _T7
//new
#define _T11
//new
#define _L4
//new

//Legs===============
#define _RTHI
#define _RKNE
#define _RTIB
#define _RANK
#define _RTOE
#define _RHEE
#define _RMT5
#define _LTHI
#define _LKNE
#define _LTIB
#define _LANK
#define _LTOE
#define _LHEE
#define _LMT5

////Arms===============
////#if INCLUDE_UPPERBODY == ON
//#define _RSHO
//#define _RUPA
//#define _RELB
////#define _RFRA
//#define _RWRA
//#define _RWRB
//#define _RFIN
//#define _LSHO
//#define _LUPA
//#define _LELB
////#define _LFRA
//#define _LWRA
//#define _LWRB
//#define _LFIN
////#endif


//// Pelvis---------------------------------------------------

#ifdef _LPSI
// Marker on the Left Posterior Superior Iliac
CreateMarkerDriver LPSI (
MarkerName= LPSI,
UseC3DWeightResiduals = ON,
MarkerPlacement=Trunk.Segments.PelvisSeg,
OptX=OFF, OptY=OFF, OptZ=ON
//OptX=OFF, OptY=OFF, OptZ=OFF
) = {
  sRelOpt = {-0.145,0.04, -0.04};//{-0.145,0.02, -0.04};
};
#endif

#ifdef _RPSI
// Marker on the Right Posterior Superior Iliac
CreateMarkerDriver RPSI (
MarkerName= RPSI,
MarkerPlacement=Trunk.Segments.PelvisSeg,
OptX=OFF, OptY=OFF, OptZ=ON
//OptX=OFF, OptY=OFF, OptZ=OFF
) = {
  sRelOpt = {-0.145,0.04, 0.04};//{-0.145,0.02, 0.04};
};
#endif

#ifdef _RASI
// Marker on the Right Anterior Superior Iliac
CreateMarkerDriver RASI (
MarkerName= RASI,
MarkerPlacement=Trunk.Segments.PelvisSeg
) = {
  sRelOpt = {0.035, 0.005, 0.125};
};
#endif

#ifdef _LASI
// Marker on the Left Anterior Superior Iliac
CreateMarkerDriver LASI (
MarkerName= LASI ,
MarkerPlacement=Trunk.Segments.PelvisSeg
) = {
  sRelOpt = {0.035,0.005, -0.125};
};
#endif

#ifdef _RSIC
// Marker on the Left Anterior Superior Iliac
CreateMarkerDriver RSIC (
MarkerName= RSIC,
MarkerPlacement=Trunk.Segments.PelvisSeg,
OptX=ON, OptY=OFF, OptZ=ON
//OptX=OFF, OptY=OFF, OptZ=OFF
) = {
  sRelOpt = {0.01,0.03, 0.16};
};
#endif

#ifdef _LSIC
// Marker on the Left Anterior Superior Iliac
CreateMarkerDriver LSIC (
MarkerName= LSIC,
MarkerPlacement=Trunk.Segments.PelvisSeg,
OptX=ON, OptY=OFF, OptZ=ON
//OptX=OFF, OptY=OFF, OptZ=OFF
) = {
  sRelOpt = {0.01,0.03, -0.16};
};
#endif

//// Head---------------------------------------------------

#ifdef _RSPH
// Marker on the Right sphenoidal Head
CreateMarkerDriver RSPH (
MarkerName= RSPH,
MarkerPlacement=Trunk.Segments.SkullSeg,
OptX=OFF,OptY=OFF,OptZ=OFF
) = {
  sRelOpt = {0.07,0.06,0.08};
};
#endif

#ifdef _LSPH
// Marker on the Left sphenoidal Head
CreateMarkerDriver LSPH (
MarkerName= LSPH,
MarkerPlacement=Trunk.Segments.SkullSeg,
OptX=OFF,OptY=OFF,OptZ=OFF
) = {
  sRelOpt = {0.07,0.06,-0.08};
};
#endif

#ifdef _GLAB
// Marker on the Glabella
CreateMarkerDriver GLAB (
MarkerName= GLAB,
MarkerPlacement=Trunk.Segments.SkullSeg,
OptX=OFF ,OptY=OFF ,OptZ=OFF
//OptX=OFF ,OptY=OFF ,OptZ=OFF
) = {
  sRelOpt = {0.13,0.06,0.0};
};
#endif

//#ifdef _LBHD
//// Marker on the Left Back Head
//CreateMarkerDriver LBHD (
//MarkerName= LBHD,
//MarkerPlacement=Trunk.Segments.SkullSeg,
//OptX=ON,OptY=OFF,OptZ= ON ,
//WeightX=1.0,WeightY=1.0,WeightZ=1.0
//) = {
//  sRelOpt = {-0.07,0.09,-0.08};
//};
//#endif

//// Sternum---------------------------------------------------

#ifdef _MSTR
// Marker on the Sternum
CreateMarkerDriver MSTR (
MarkerName= MSTR,
MarkerPlacement=Trunk.Segments.SternalBodySeg,
//OptX=OFF,OptY=ON,OptZ=ON,
OptX=OFF,OptY=ON,OptZ=OFF,
WeightX=1.0,WeightY=1.0,WeightZ=1.0
) = {
  sRelOpt = {0.14,0.34,0.0};
};
#endif

#ifdef _RCLA
// Marker on the Clavicle
CreateMarkerDriver RCLA (
MarkerName= RCLA,
MarkerPlacement=Trunk.Segments.SternumSeg,
OptX=ON,OptY=ON,OptZ=ON,
WeightX=1.0,WeightY=1.0,WeightZ=1.0
) = {
  sRelOpt = {0.09,0.43,0.02};//{0.08,0.42,0.02};
};
#endif

#ifdef _LCLA
// Marker on the Clavicle
CreateMarkerDriver LCLA (
MarkerName= LCLA,
MarkerPlacement=Trunk.Segments.SternumSeg,
OptX=ON,OptY=ON,OptZ=ON,
WeightX=1.0,WeightY=1.0,WeightZ=1.0
) = {
  sRelOpt = {0.09,0.43,-0.02};//{0.08,0.42,-0.02};
};
#endif

//// Spine---------------------------------------------------

//#ifdef _T10
//// Marker on the Thoracic Vertebra T10
//CreateMarkerDriver T10 (
//MarkerName= T10,
//MarkerPlacement=Trunk.Segments.ThoraxSeg,
//OptX=OFF,OptY=ON,OptZ=OFF
//) = {
//  sRelOpt = {-0.03,0.187,0};
//};
//#endif

#ifdef _C7
// Marker on the Cervical Vertebra C7
CreateMarkerDriver C7 (
MarkerName= C7,
MarkerPlacement=Trunk.Segments.C7Seg,
PlaceMarkerAt = T1C7JntNode,
// SCOLIOSIS_DRIVERS_SETUP
//OptX=ON,OptY=ON,OptZ=ON
OptX=OFF,OptY=ON,OptZ=OFF
//OptX=OFF,OptY=OFF,OptZ=OFF
) = {
  sRelOpt = {-0.048,0.033,-0.003}; //{-0.06,0.017,0};
};
#endif

#ifdef _T3
// Marker on the Thoracic Vertebra T3
CreateMarkerDriver T3 (
MarkerName= T3,
MarkerPlacement=Trunk.Segments.T3Seg,
// SCOLIOSIS_DRIVERS_SETUP
//OptX=ON,OptY=ON,OptZ=ON
OptX=OFF,OptY=ON,OptZ=OFF
//OptX=OFF,OptY=OFF,OptZ=OFF
) = {
  sRelOpt = {-0.053,0.43,0};//{-0.07,0.4,0};
};
#endif

#ifdef _T7
// Marker on the Thoracic Vertebra T7
CreateMarkerDriver T7 (
MarkerName= T7,
MarkerPlacement=Trunk.Segments.T7Seg,
// SCOLIOSIS_DRIVERS_SETUP
//OptX=ON,OptY=ON,OptZ=ON
OptX=OFF,OptY=ON,OptZ=OFF
//OptX=OFF,OptY=OFF,OptZ=OFF
) = {
  sRelOpt = {-0.083,0.31,0};//{-0.08,0.28,0};
};
#endif

#ifdef _T11
// Marker on the Thoracic Vertebra T11
CreateMarkerDriver T11 (
MarkerName= T11,
MarkerPlacement=Trunk.Segments.T11Seg,
// SCOLIOSIS_DRIVERS_SETUP
//OptX=ON,OptY=ON,OptZ=ON
OptX=OFF,OptY=ON,OptZ=OFF
//OptX=OFF,OptY=OFF,OptZ=OFF
) = {
  sRelOpt = {-0.058,0.16,0};
};
#endif

//#ifdef _L3
//// Marker on the Thoracic Vertebra T10
//CreateMarkerDriver L3 (
//MarkerName= L3,
//MarkerPlacement=Trunk.Segments.ThoraxSeg,
//OptX=OFF,OptY=ON,OptZ=OFF
//) = {
//  sRelOpt = {-0.03,0.187,0};
//};
//#endif
#ifdef _L4
// Marker on the Lumbar Vertebra L4
CreateMarkerDriver L4 (
MarkerName= L3,
MarkerPlacement=Trunk.Segments.L4Seg,
// SCOLIOSIS_DRIVERS_SETUP
//OptX=ON,OptY=ON,OptZ=ON
OptX=OFF,OptY=ON,OptZ=OFF
//OptX=OFF,OptY=OFF,OptZ=OFF
) = {
  sRelOpt = {-0.048, 0.05, 0}; //{-0.02,0.05,0};
};
#endif

//// Lower Extremity Markers---------------------------------------------------
#ifdef _RTHI
// Marker on the Right Thigh
CreateMarkerDriver RTHI (
MarkerName=  RTHI,
OptX=ON,OptY=ON,OptZ=ON,
//OptX=OFF,OptY=OFF,OptZ=OFF,
MarkerPlacement =Right.Leg.Segments.Thigh)= {
  sRelOpt = {0.00, -0.15, 0.1};
};
#endif

#ifdef _RKNE
// Marker on the Right Knee
CreateMarkerDriver RKNE (
MarkerName= RKNE,
MarkerPlacement= Right.Leg.Segments.Thigh,
PlaceMarkerAt = EpicondylusFemorisLateralis,
OptX=OFF,OptY=OFF,OptZ=OFF,
WeightX=1.0,WeightY=1.0,WeightZ=1.0

) = {
  sRelOpt = {0.01, 0.0, 0.015};
};
#endif

#ifdef _RTIB
// Marker on the Right Tibia
CreateMarkerDriver RTIB (
MarkerName= RTIB,
MarkerPlacement=Right.Leg.Segments.Shank,
OptX=ON,OptY=ON,OptZ=ON
//OptX=OFF,OptY=OFF,OptZ=OFF
) = {
  sRelOpt = {0.0, -0.1, 0.05};
};
#endif

#ifdef _RANK
// Marker on the Right Lateral Ankle
CreateMarkerDriver RANK (
MarkerName= RANK ,
MarkerPlacement=Right.Leg.Segments.Shank,
PlaceMarkerAt = LateralMalleolus,
OptX=ON,OptY=ON,OptZ=ON
//OptX=OFF,OptY=OFF,OptZ=OFF
) = {
  sRelOpt = {-0.00, -0.0, 0.015};
};
#endif

#ifdef _RTOE
// Marker on the Right Toe
CreateMarkerDriver RTOE (
MarkerName= RTOE,
MarkerPlacement=Right.Leg.Segments.Foot.Metatarsal1,
PlaceMarkerAt = MetatarsalJoint1Node,
OptX=OFF , OptY=OFF , OptZ=OFF,
WeightX=1.0,WeightY=1.0,WeightZ=1.0
) = {
  sRelOpt = {0.022, 0.019, 0.001};
};
#endif

#ifdef _RHEE
// Marker on the Right Heel
CreateMarkerDriver RHEE (
MarkerName= RHEE ,
MarkerPlacement=Right.Leg.Segments.Foot.Calcaneus,
PlaceMarkerAt = HeelNode,
OptX=OFF, OptY=OFF , OptZ=OFF,
WeightX=1.0,WeightY=1.0,WeightZ=1.0
) = {
  sRelOpt =  {-0.025, 0.01, -0.0};
};
#endif

#ifdef _RMT5
// Marker on the Right Metatarsal 5
CreateMarkerDriver RMT5 (
MarkerName= RMT5,
MarkerPlacement=Right.Leg.Segments.Foot.Metatarsal5,
PlaceMarkerAt = MetatarsalJoint5Node,
OptX=OFF,OptY=OFF,OptZ=OFF,
WeightX=1.0,WeightY=1.0,WeightZ=1.0) = {
  sRelOpt =  {0.007, 0.009, 0.014};
};
#endif

#ifdef _LTHI
// Marker on the Left Thigh
CreateMarkerDriver LTHI (
MarkerName= LTHI ,
MarkerPlacement=Left.Leg.Segments.Thigh,
OptX=ON,OptY=ON,OptZ=ON
//OptX=OFF,OptY=OFF,OptZ=OFF
) = {
  sRelOpt = {0.0, -0.28, -0.1};
};
#endif

#ifdef _LKNE
// Marker on the Left Knee
CreateMarkerDriver LKNE (
MarkerName= LKNE ,
MarkerPlacement=Left.Leg.Segments.Thigh,
PlaceMarkerAt = EpicondylusFemorisLateralis,
OptX=OFF,OptY=OFF,OptZ=OFF
) = {
  sRelOpt = {0.01, -0.0, -0.015};
};
#endif

#ifdef _LTIB
// Marker on the Left Tibia
CreateMarkerDriver LTIB (
MarkerName= LTIB,
MarkerPlacement=Left.Leg.Segments.Shank,
OptX=ON,OptY=ON,OptZ=ON
//OptX=OFF,OptY=OFF,OptZ=OFF
) = {
  sRelOpt = {0.0, -0.1, -0.05};
};
#endif

#ifdef _LANK
// Marker on the Left Ankle
CreateMarkerDriver LANK (
MarkerName= LANK,
MarkerPlacement=Left.Leg.Segments.Shank,
PlaceMarkerAt = LateralMalleolus,
OptX=ON,OptY=ON,OptZ=ON
//OptX=OFF,OptY=OFF,OptZ=OFF
) = {
  sRelOpt = {-0.0, -0.0, -0.015};
};
#endif

#ifdef _LTOE
// Marker on the Left Toe
CreateMarkerDriver LTOE (
MarkerName= LTOE,
MarkerPlacement=Left.Leg.Segments.Foot.Metatarsal1,
PlaceMarkerAt = MetatarsalJoint1Node,
OptX=OFF,OptY=OFF ,OptZ=OFF
) = {
  sRelOpt = {0.022, 0.019, -0.001};
};
#endif

#ifdef _LHEE
// Marker on the Left Heel
CreateMarkerDriver LHEE(
MarkerName= LHEE,
MarkerPlacement=Left.Leg.Segments.Foot.Calcaneus,
PlaceMarkerAt = HeelNode,
OptX=OFF, OptY=OFF, OptZ=OFF,
WeightX=1.0,WeightY=1.0,WeightZ=1.0
) = {
  sRelOpt =  {-0.025, 0.01, 0.0};
};
#endif

#ifdef _LMT5
// Marker on the Left Metatarsal 5
CreateMarkerDriver LMT5 (
MarkerName= LMT5,
MarkerPlacement=Left.Leg.Segments.Foot.Metatarsal5,
PlaceMarkerAt = MetatarsalJoint5Node,
OptX=OFF,OptY=OFF,OptZ=OFF,
WeightX=1.0,WeightY=1.0,WeightZ=1.0) = {
  sRelOpt =  {0.007, 0.009, -0.014};
};
#endif

//// Hands---------------------------------------------------

#ifdef _RSHO
CreateMarkerDriver RSHO (
MarkerName= RSHO,
MarkerPlacement=Right.ShoulderArm.Segments.Scapula,
OptX=ON,OptY=OFF,OptZ=OFF
//OptX=OFF,OptY=OFF,OptZ=OFF
) = {
  sRelOpt = {0.00,-0.005,0.015};
};
#endif

#ifdef _LSHO
// Marker on the Left Acromio-clavicular joint
CreateMarkerDriver LSHO (
MarkerName= LSHO,
MarkerPlacement=Left.ShoulderArm.Segments.Scapula,
OptX=ON,OptY=OFF,OptZ=OFF
//OptX=OFF,OptY=OFF,OptZ=OFF
) = {
  sRelOpt = {0.00,0.005,0.015};
};
#endif


#ifdef _RUPA
// Marker on the Right Upper Arm
CreateMarkerDriver RUPA (
MarkerName= RUPA,
MarkerPlacement=Right.ShoulderArm.Segments.Humerus,
OptX=ON,OptY=ON,OptZ=ON
//OptX=OFF,OptY=OFF,OptZ=OFF
) = {
  sRelOpt ={0.03,-0.24,0.01};
};
#endif


#ifdef _LUPA
// Marker on the Left Upper Arm
CreateMarkerDriver LUPA (
MarkerName= LUPA,
MarkerPlacement=Left.ShoulderArm.Segments.Humerus,
OptX=ON,OptY=ON,OptZ=ON
//OptX=OFF,OptY=OFF,OptZ=OFF
) = {
  sRelOpt ={-0.03,-0.19,0.01};
};
#endif


#ifdef _RELB
// Marker on the Right Elbow
CreateMarkerDriver RELB (
MarkerName= RELB,
MarkerPlacement=Right.ShoulderArm.Segments.Humerus,
OptX=OFF,OptY=OFF,OptZ=OFF
) = {
  sRelOpt = {0.045,-0.325, 0.010};
};
#endif


#ifdef _LELB
// Marker on the Left Elbow
CreateMarkerDriver LELB (
MarkerName= LELB,
MarkerPlacement=Left.ShoulderArm.Segments.Humerus,
OptX=OFF,OptY=OFF,OptZ=OFF
) = {
  sRelOpt = {-0.045,-0.325, 0.010};
};
#endif


//#ifdef _LFRA
//// Marker on the Left Radius
//CreateMarkerDriver LFRA (
//MarkerName= LFRA,
//MarkerPlacement=Left.ShoulderArm.Segments.Radius,
//OptX=ON,OptY=ON,OptZ=ON
//) = {
//  sRelOpt = {-0.13, 0.03, 0.01};
//};
//#endif
//
//#ifdef _RFRA
//// Marker on the Right Radius
//CreateMarkerDriver RFRA (
//MarkerName= RFRA,
//MarkerPlacement=Right.ShoulderArm.Segments.Radius,
//OptX=ON,OptY=ON,OptZ=ON
//) = {
//  sRelOpt = {-0.13, -0.03, 0.01};
//};
//#endif

#ifdef _RWRA
// Marker on the Right Wrist A
CreateMarkerDriver RWRA (
MarkerName= RWRA,
MarkerPlacement=Right.ShoulderArm.Segments.Radius,
OptX=OFF,OptY=OFF,OptZ=OFF
) = {
  sRelOpt = 0*{-0.21, -0.05, 0.01};
};
#endif

#ifdef _RWRB
// Marker on the Right Wrist B
CreateMarkerDriver RWRB (
MarkerName= RWRB,
MarkerPlacement=Right.ShoulderArm.Segments.Radius,
OptX=ON ,OptY=ON,OptZ=OFF,
//OptX=OFF ,OptY=OFF,OptZ=OFF,
WeightX=0.1,WeightY=0.1,WeightZ=0.1
) = {
  sRelOpt =0* {-0.22, 0.05, 0.025};
};
#endif

#ifdef _LWRA
// Marker on the Left Wrist A
CreateMarkerDriver LWRA (
MarkerName= LWRA,
MarkerPlacement=Left.ShoulderArm.Segments.Radius,
PlaceMarkerAt=RadiusStylo,
OptX=OFF,OptY=OFF,OptZ=OFF,
UseC3DWeightResiduals=ON
) = {
  sRelOpt = 0*{-0.21, 0.05, 0.01};
};
#endif

#ifdef _LWRB
// Marker on the Left Wrist B
CreateMarkerDriver LWRB (
MarkerName= LWRB,
MarkerPlacement=Left.ShoulderArm.Segments.Radius,
OptX=ON ,OptY=ON,OptZ=OFF,
//OptX=OFF  ,OptY=OFF ,OptZ=OFF,
WeightX=0.1,WeightY=0.1,WeightZ=0.1
) = {
  sRelOpt = 0*{-0.22, -0.05, 0.025};
};
#endif


#ifdef _RFIN
// Marker on the Right Finger
CreateMarkerDriver RFIN (
MarkerName= RFIN,
MarkerPlacement=Right.ShoulderArm.Segments.Hand,
OptX=OFF ,OptY=OFF,OptZ=OFF
) = {
  //sRelOpt = {-0.065,-0.03,0.02};
  sRelOpt = {-0.02,-0.065,-0.0};
};
#endif


#ifdef _LFIN
// Marker on the Left Finger
CreateMarkerDriver LFIN (
MarkerName= LFIN,
MarkerPlacement=Left.ShoulderArm.Segments.Hand,
OptX=OFF ,OptY=OFF,OptZ=OFF
) = {
 // sRelOpt = {-0.065,-0.03,-0.02};
 sRelOpt = {-0.02,-0.065,0.0};

};
#endif
