AnyFolder C1C0jnt = {
    spine_muscle_folder_side.Left.SemispinalisCapitis.SemispinalisCapitisC7C0;
    spine_muscle_folder_side.Left.SemispinalisCapitis.SemispinalisCapitisC6C0;
    spine_muscle_folder_side.Left.SemispinalisCapitis.SemispinalisCapitisT4C0;
    spine_muscle_folder_side.Left.SemispinalisCapitis.SemispinalisCapitisT3C0;
    spine_muscle_folder_side.Left.LongissimusCapitis.LongissimusCapitisC4C0;
    spine_muscle_folder_side.Left.LongissimusCapitis.LongissimusCapitisC5C0;
    spine_muscle_folder_side.Left.LongissimusCapitis.LongissimusCapitisC3C0;
    spine_muscle_folder_side.Right.LongissimusCapitis.LongissimusCapitisC5C0;
    spine_muscle_folder_side.Right.SemispinalisCapitis.SemispinalisCapitisT3C0;
    spine_muscle_folder_side.Left.LongissimusCapitis.LongissimusCapitisC6C0;
    spine_muscle_folder_side.Right.LongissimusCapitis.LongissimusCapitisC4C0;
    spine_muscle_folder_side.Left.SemispinalisCapitis.SemispinalisCapitisT5C0;
    spine_muscle_folder_side.Right.SemispinalisCapitis.SemispinalisCapitisT4C0;
    spine_muscle_folder_side.Right.LongissimusCapitis.LongissimusCapitisC6C0;
    spine_muscle_folder_side.Right.LongissimusCapitis.LongissimusCapitisC3C0;
    spine_muscle_folder_side.Left.SemispinalisCapitis.SemispinalisCapitisC5C0;
    spine_muscle_folder_side.Right.SemispinalisCapitis.SemispinalisCapitisT5C0;
    spine_muscle_folder_side.Right.SemispinalisCapitis.SemispinalisCapitisT2C0;
    spine_muscle_folder_side.Left.SemispinalisCapitis.SemispinalisCapitisT2C0;
    spine_muscle_folder_side.Right.SemispinalisCapitis.SemispinalisCapitisC5C0;
    spine_muscle_folder_side.Right.SemispinalisCapitis.SemispinalisCapitisC6C0;
    spine_muscle_folder_side.Right.SemispinalisCapitis.SemispinalisCapitisC7C0;
    spine_muscle_folder_side.Left.SemispinalisCapitis.SemispinalisCapitisC4C0;
    spine_muscle_folder_side.Left.SemispinalisCapitis.SemispinalisCapitisT6C0;
    spine_muscle_folder_side.Right.SemispinalisCapitis.SemispinalisCapitisT1C0;
    spine_muscle_folder_side.Right.SemispinalisCapitis.SemispinalisCapitisC4C0;
    spine_muscle_folder_side.Left.SemispinalisCapitis.SemispinalisCapitisT1C0;
    spine_muscle_folder_side.Right.SemispinalisCapitis.SemispinalisCapitisT6C0;
};

AnyFolder C3C2jnt = {
    spine_muscle_folder_side.Left.SemispinalisCapitis.SemispinalisCapitisC7C0;
    spine_muscle_folder_side.Left.LongissimusCervicis.LongissimusCervicisT1C2;
    spine_muscle_folder_side.Right.SpleniusCapitis.SpleniusCapitisT1C0;
    spine_muscle_folder_side.Right.LongissimusCapitis.LongissimusCapitisT3C0;
    spine_muscle_folder_side.Right.Scalenus.ScalenusMediusR1C2;
    spine_muscle_folder_side.Left.LongissimusCapitis.LongissimusCapitisT2C0;
    spine_muscle_folder_side.Right.LongissimusCapitis.LongissimusCapitisT4C0;
    spine_muscle_folder_side.Left.MultifidusCervicis.MultifidusCervicisC5C2;
    spine_muscle_folder_side.Left.SemispinalisCapitis.SemispinalisCapitisC6C0;
    spine_muscle_folder_side.Right.SemispinalisCapitis.SemispinalisCapitisT1C0;
    spine_muscle_folder_side.Left.SemispinalisCervicis.SemispinalisCervicisT1C2;
    spine_muscle_folder_side.Left.SemispinalisCapitis.SemispinalisCapitisT4C0;
    spine_muscle_folder_side.Left.SemispinalisCapitis.SemispinalisCapitisT3C0;
    spine_muscle_folder_side.Left.LongissimusCapitis.LongissimusCapitisC4C0;
    spine_muscle_folder_side.Left.LongissimusCapitis.LongissimusCapitisT1C0;
    spine_muscle_folder_side.Left.LongissimusCapitis.LongissimusCapitisC5C0;
    spine_muscle_folder_side.Left.LongissimusCapitis.LongissimusCapitisC3C0;
    spine_muscle_folder_side.Right.LongissimusCapitis.LongissimusCapitisC5C0;
    spine_muscle_folder_side.Right.SemispinalisCapitis.SemispinalisCapitisT3C0;
    spine_muscle_folder_side.Left.LongissimusCapitis.LongissimusCapitisC6C0;
    spine_muscle_folder_side.Right.LongissimusCapitis.LongissimusCapitisC4C0;
    spine_muscle_folder_side.Right.SpleniusCervicis.SpleniusCervicisT3C1;
    spine_muscle_folder_side.Left.MultifidusCervicis.MultifidusCervicisC6C2;
    spine_muscle_folder_side.Right.SpleniusCapitis.SpleniusCapitisT2C0;
    spine_muscle_folder_side.Left.SpleniusCapitis.SpleniusCapitisT1C0;
    spine_muscle_folder_side.Left.SemispinalisCapitis.SemispinalisCapitisT5C0;
    spine_muscle_folder_side.Right.SemispinalisCapitis.SemispinalisCapitisT4C0;
    spine_muscle_folder_side.Right.LongissimusCapitis.LongissimusCapitisC7C0;
    spine_muscle_folder_side.Right.LongissimusCapitis.LongissimusCapitisC6C0;
    spine_muscle_folder_side.Right.LongissimusCapitis.LongissimusCapitisC3C0;
    spine_muscle_folder_side.Left.Scalenus.ScalenusMediusR1C2;
    spine_muscle_folder_side.Left.LongissimusCapitis.LongissimusCapitisT3C0;
    spine_muscle_folder_side.Left.LongissimusCapitis.LongissimusCapitisC7C0;
    spine_muscle_folder_side.Right.SemispinalisCervicis.SemispinalisCervicisT1C2;
    spine_muscle_folder_side.Right.MultifidusCervicis.MultifidusCervicisC6C2;
    spine_muscle_folder_side.Right.SpleniusCapitis.SpleniusCapitisT3C0;
    spine_muscle_folder_side.Left.SemispinalisCapitis.SemispinalisCapitisC5C0;
    spine_muscle_folder_side.Left.SpleniusCervicis.SpleniusCervicisT3C1;
    spine_muscle_folder_side.Right.LongissimusCapitis.LongissimusCapitisT2C0;
    spine_muscle_folder_side.Right.LongissimusCervicis.LongissimusCervicisT1C2;
    spine_muscle_folder_side.Right.LongissimusCapitis.LongissimusCapitisT1C0;
    spine_muscle_folder_side.Right.SpleniusCervicis.SpleniusCervicisT4C2;
    spine_muscle_folder_side.Right.SemispinalisCapitis.SemispinalisCapitisT5C0;
    spine_muscle_folder_side.Right.MultifidusCervicis.MultifidusCervicisC5C2;
    spine_muscle_folder_side.Right.SpleniusCapitis.SpleniusCapitisC7C0;
    spine_muscle_folder_side.Right.SemispinalisCapitis.SemispinalisCapitisT2C0;
    spine_muscle_folder_side.Left.SemispinalisCapitis.SemispinalisCapitisT2C0;
    spine_muscle_folder_side.Left.SpleniusCervicis.SpleniusCervicisT4C2;
    spine_muscle_folder_side.Right.SemispinalisCapitis.SemispinalisCapitisC5C0;
    spine_muscle_folder_side.Right.SemispinalisCapitis.SemispinalisCapitisC6C0;
    spine_muscle_folder_side.Left.SpleniusCapitis.SpleniusCapitisT3C0;
    spine_muscle_folder_side.Right.SemispinalisCapitis.SemispinalisCapitisC7C0;
    spine_muscle_folder_side.Left.SemispinalisCapitis.SemispinalisCapitisC4C0;
    spine_muscle_folder_side.Left.LongissimusCapitis.LongissimusCapitisT4C0;
    spine_muscle_folder_side.Left.SemispinalisCapitis.SemispinalisCapitisT6C0;
    spine_muscle_folder_side.Left.SpleniusCapitis.SpleniusCapitisC7C0;
    spine_muscle_folder_side.Right.LongissimusCapitis.LongissimusCapitisT5C0;
    spine_muscle_folder_side.Right.SemispinalisCapitis.SemispinalisCapitisC4C0;
    spine_muscle_folder_side.Left.SpleniusCapitis.SpleniusCapitisT2C0;
    spine_muscle_folder_side.Left.SemispinalisCapitis.SemispinalisCapitisT1C0;
    spine_muscle_folder_side.Right.SemispinalisCapitis.SemispinalisCapitisT6C0;
    spine_muscle_folder_side.Left.LongissimusCapitis.LongissimusCapitisT5C0;
};

AnyFolder C4C3jnt = {
    spine_muscle_folder_side.Left.SemispinalisCapitis.SemispinalisCapitisC7C0;
    spine_muscle_folder_side.Left.LongissimusCervicis.LongissimusCervicisT1C2;
    spine_muscle_folder_side.Right.SpleniusCapitis.SpleniusCapitisT1C0;
    spine_muscle_folder_side.Right.LongissimusCapitis.LongissimusCapitisT3C0;
    spine_muscle_folder_side.Right.Scalenus.ScalenusMediusR1C2;
    spine_muscle_folder_side.Left.LongissimusCapitis.LongissimusCapitisT2C0;
    spine_muscle_folder_side.Right.LongissimusCapitis.LongissimusCapitisT4C0;
    spine_muscle_folder_side.Left.MultifidusCervicis.MultifidusCervicisC5C2;
    spine_muscle_folder_side.Left.SemispinalisCapitis.SemispinalisCapitisC6C0;
    spine_muscle_folder_side.Right.SemispinalisCapitis.SemispinalisCapitisT1C0;
    spine_muscle_folder_side.Left.SemispinalisCervicis.SemispinalisCervicisT1C2;
    spine_muscle_folder_side.Left.SemispinalisCapitis.SemispinalisCapitisT4C0;
    spine_muscle_folder_side.Right.SemispinalisCervicis.SemispinalisCervicisT2C3;
    spine_muscle_folder_side.Right.SpleniusCervicis.SpleniusCervicisT5C3;
    spine_muscle_folder_side.Left.SemispinalisCapitis.SemispinalisCapitisT3C0;
    spine_muscle_folder_side.Right.LongissimusCervicis.LongissimusCervicisT2C3;
    spine_muscle_folder_side.Left.LongissimusCapitis.LongissimusCapitisC4C0;
    spine_muscle_folder_side.Left.LongissimusCapitis.LongissimusCapitisT1C0;
    spine_muscle_folder_side.Left.LongissimusCapitis.LongissimusCapitisC5C0;
    spine_muscle_folder_side.Right.LongissimusCapitis.LongissimusCapitisC5C0;
    spine_muscle_folder_side.Right.SemispinalisCapitis.SemispinalisCapitisT3C0;
    spine_muscle_folder_side.Right.SpleniusCervicis.SpleniusCervicisT3C1;
    spine_muscle_folder_side.Left.LongissimusCapitis.LongissimusCapitisC6C0;
    spine_muscle_folder_side.Right.LongissimusCapitis.LongissimusCapitisC4C0;
    spine_muscle_folder_side.Left.MultifidusCervicis.MultifidusCervicisC6C2;
    spine_muscle_folder_side.Right.MultifidusCervicis.MultifidusCervicisC6C3;
    spine_muscle_folder_side.Right.SemispinalisCapitis.SemispinalisCapitisT6C0;
    spine_muscle_folder_side.Right.SpleniusCapitis.SpleniusCapitisT2C0;
    spine_muscle_folder_side.Left.SpleniusCapitis.SpleniusCapitisT1C0;
    spine_muscle_folder_side.Left.SemispinalisCapitis.SemispinalisCapitisT5C0;
    spine_muscle_folder_side.Right.SemispinalisCapitis.SemispinalisCapitisC4C0;
    spine_muscle_folder_side.Right.SemispinalisCapitis.SemispinalisCapitisT4C0;
    spine_muscle_folder_side.Right.LongissimusCapitis.LongissimusCapitisC7C0;
    spine_muscle_folder_side.Right.LongissimusCapitis.LongissimusCapitisC6C0;
    spine_muscle_folder_side.Right.SpleniusCervicis.SpleniusCervicisT6C3;
    spine_muscle_folder_side.Left.Scalenus.ScalenusMediusR1C2;
    spine_muscle_folder_side.Left.LongissimusCapitis.LongissimusCapitisT3C0;
    spine_muscle_folder_side.Left.LongissimusCapitis.LongissimusCapitisC7C0;
    spine_muscle_folder_side.Right.SemispinalisCervicis.SemispinalisCervicisT1C2;
    spine_muscle_folder_side.Right.MultifidusCervicis.MultifidusCervicisC6C2;
    spine_muscle_folder_side.Right.SpleniusCapitis.SpleniusCapitisT3C0;
    spine_muscle_folder_side.Left.SemispinalisCapitis.SemispinalisCapitisC5C0;
    spine_muscle_folder_side.Left.SpleniusCervicis.SpleniusCervicisT3C1;
    spine_muscle_folder_side.Right.LongissimusCapitis.LongissimusCapitisT2C0;
    spine_muscle_folder_side.Right.LongissimusCervicis.LongissimusCervicisT1C2;
    spine_muscle_folder_side.Left.SemispinalisCervicis.SemispinalisCervicisT2C3;
    spine_muscle_folder_side.Left.SpleniusCervicis.SpleniusCervicisT5C3;
    spine_muscle_folder_side.Right.LongissimusCapitis.LongissimusCapitisT1C0;
    spine_muscle_folder_side.Right.Scalenus.ScalenusMediusR1C3;
    spine_muscle_folder_side.Right.SpleniusCervicis.SpleniusCervicisT4C2;
    spine_muscle_folder_side.Left.MultifidusCervicis.MultifidusCervicisC7C3;
    spine_muscle_folder_side.Right.MultifidusCervicis.MultifidusCervicisC7C3;
    spine_muscle_folder_side.Right.SemispinalisCapitis.SemispinalisCapitisT5C0;
    spine_muscle_folder_side.Right.MultifidusCervicis.MultifidusCervicisC5C2;
    spine_muscle_folder_side.Right.SpleniusCapitis.SpleniusCapitisC7C0;
    spine_muscle_folder_side.Right.SemispinalisCapitis.SemispinalisCapitisT2C0;
    spine_muscle_folder_side.Left.SemispinalisCapitis.SemispinalisCapitisT2C0;
    spine_muscle_folder_side.Left.SpleniusCervicis.SpleniusCervicisT4C2;
    spine_muscle_folder_side.Left.LongissimusCervicis.LongissimusCervicisT2C3;
    spine_muscle_folder_side.Right.SemispinalisCapitis.SemispinalisCapitisC5C0;
    spine_muscle_folder_side.Right.SemispinalisCapitis.SemispinalisCapitisC6C0;
    spine_muscle_folder_side.Left.SpleniusCapitis.SpleniusCapitisT3C0;
    spine_muscle_folder_side.Right.SemispinalisCapitis.SemispinalisCapitisC7C0;
    spine_muscle_folder_side.Left.Scalenus.ScalenusMediusR1C3;
    spine_muscle_folder_side.Left.LongissimusCapitis.LongissimusCapitisT4C0;
    spine_muscle_folder_side.Left.SemispinalisCapitis.SemispinalisCapitisC4C0;
    spine_muscle_folder_side.Left.SemispinalisCapitis.SemispinalisCapitisT6C0;
    spine_muscle_folder_side.Left.SpleniusCapitis.SpleniusCapitisC7C0;
    spine_muscle_folder_side.Right.LongissimusCapitis.LongissimusCapitisT5C0;
    spine_muscle_folder_side.Left.MultifidusCervicis.MultifidusCervicisC6C3;
    spine_muscle_folder_side.Left.SpleniusCapitis.SpleniusCapitisT2C0;
    spine_muscle_folder_side.Left.SemispinalisCapitis.SemispinalisCapitisT1C0;
    spine_muscle_folder_side.Left.SpleniusCervicis.SpleniusCervicisT6C3;
    spine_muscle_folder_side.Left.LongissimusCapitis.LongissimusCapitisT5C0;
};

AnyFolder C5C4jnt = {
    spine_muscle_folder_side.Left.SemispinalisCapitis.SemispinalisCapitisC7C0;
    spine_muscle_folder_side.Left.SemispinalisCervicis.SemispinalisCervicisT3C4;
    spine_muscle_folder_side.Right.LongissimusCapitis.LongissimusCapitisC5C0;
    spine_muscle_folder_side.Right.SemispinalisCervicis.SemispinalisCervicisT1C2;
    spine_muscle_folder_side.Right.LongissimusCervicis.LongissimusCervicisT3C4;
    spine_muscle_folder_side.Right.LongissimusCapitis.LongissimusCapitisT2C0;
    spine_muscle_folder_side.Left.SemispinalisCervicis.SemispinalisCervicisT2C3;
    spine_muscle_folder_side.Left.SpleniusCervicis.SpleniusCervicisT5C3;
    spine_muscle_folder_side.Left.MultifidusCervicis.MultifidusCervicisC7C3;
    spine_muscle_folder_side.Right.SpleniusCapitis.SpleniusCapitisC7C0;
    spine_muscle_folder_side.Right.MultifidusCervicis.MultifidusCervicisT1C4;
    spine_muscle_folder_side.Left.LongissimusCervicis.LongissimusCervicisT2C3;
    spine_muscle_folder_side.Right.MultifidusCervicis.MultifidusCervicisC7C4;
    spine_muscle_folder_side.Right.SemispinalisCapitis.SemispinalisCapitisC6C0;
    spine_muscle_folder_side.Left.LongissimusCapitis.LongissimusCapitisT4C0;
    spine_muscle_folder_side.Right.LongissimusCervicis.LongissimusCervicisT2C3;
    spine_muscle_folder_side.Left.LongissimusCervicis.LongissimusCervicisT1C2;
    spine_muscle_folder_side.Right.SpleniusCapitis.SpleniusCapitisT1C0;
    spine_muscle_folder_side.Right.LongissimusCapitis.LongissimusCapitisT3C0;
    spine_muscle_folder_side.Right.LongissimusCapitis.LongissimusCapitisT4C0;
    spine_muscle_folder_side.Left.SemispinalisCapitis.SemispinalisCapitisT4C0;
    spine_muscle_folder_side.Right.SpleniusCervicis.SpleniusCervicisT5C3;
    spine_muscle_folder_side.Left.LongissimusCapitis.LongissimusCapitisT1C0;
    spine_muscle_folder_side.Left.LongissimusCapitis.LongissimusCapitisC5C0;
    spine_muscle_folder_side.Right.SemispinalisCapitis.SemispinalisCapitisT3C0;
    spine_muscle_folder_side.Right.SpleniusCervicis.SpleniusCervicisT3C1;
    spine_muscle_folder_side.Left.MultifidusCervicis.MultifidusCervicisC6C2;
    spine_muscle_folder_side.Left.SemispinalisCapitis.SemispinalisCapitisT5C0;
    spine_muscle_folder_side.Right.SemispinalisCapitis.SemispinalisCapitisT4C0;
    spine_muscle_folder_side.Right.SpleniusCervicis.SpleniusCervicisT6C3;
    spine_muscle_folder_side.Right.LongissimusCapitis.LongissimusCapitisC7C0;
    spine_muscle_folder_side.Right.LongissimusCapitis.LongissimusCapitisC6C0;
    spine_muscle_folder_side.Right.SemispinalisCervicis.SemispinalisCervicisT3C4;
    spine_muscle_folder_side.Left.SpleniusCervicis.SpleniusCervicisT3C1;
    spine_muscle_folder_side.Right.MultifidusCervicis.MultifidusCervicisC7C3;
    spine_muscle_folder_side.Right.SemispinalisCapitis.SemispinalisCapitisT5C0;
    spine_muscle_folder_side.Right.MultifidusCervicis.MultifidusCervicisC5C2;
    spine_muscle_folder_side.Left.SemispinalisCapitis.SemispinalisCapitisT2C0;
    spine_muscle_folder_side.Right.SemispinalisCapitis.SemispinalisCapitisC5C0;
    spine_muscle_folder_side.Right.SemispinalisCapitis.SemispinalisCapitisC7C0;
    spine_muscle_folder_side.Left.SemispinalisCapitis.SemispinalisCapitisT6C0;
    spine_muscle_folder_side.Left.SpleniusCapitis.SpleniusCapitisC7C0;
    spine_muscle_folder_side.Right.SemispinalisCapitis.SemispinalisCapitisT1C0;
    spine_muscle_folder_side.Right.LongissimusCapitis.LongissimusCapitisT5C0;
    spine_muscle_folder_side.Left.LongissimusCervicis.LongissimusCervicisT3C4;
    spine_muscle_folder_side.Left.LongissimusCapitis.LongissimusCapitisT2C0;
    spine_muscle_folder_side.Left.MultifidusCervicis.MultifidusCervicisC5C2;
    spine_muscle_folder_side.Left.SemispinalisCervicis.SemispinalisCervicisT1C2;
    spine_muscle_folder_side.Right.SemispinalisCervicis.SemispinalisCervicisT2C3;
    spine_muscle_folder_side.Left.SemispinalisCapitis.SemispinalisCapitisT3C0;
    spine_muscle_folder_side.Left.MultifidusCervicis.MultifidusCervicisC7C4;
    spine_muscle_folder_side.Left.LongissimusCapitis.LongissimusCapitisC6C0;
    spine_muscle_folder_side.Right.MultifidusCervicis.MultifidusCervicisC6C3;
    spine_muscle_folder_side.Right.SpleniusCapitis.SpleniusCapitisT2C0;
    spine_muscle_folder_side.Left.LongissimusCapitis.LongissimusCapitisT3C0;
    spine_muscle_folder_side.Right.MultifidusCervicis.MultifidusCervicisC6C2;
    spine_muscle_folder_side.Right.LongissimusCervicis.LongissimusCervicisT1C2;
    spine_muscle_folder_side.Right.LongissimusCapitis.LongissimusCapitisT1C0;
    spine_muscle_folder_side.Left.MultifidusCervicis.MultifidusCervicisT1C4;
    spine_muscle_folder_side.Right.SemispinalisCapitis.SemispinalisCapitisT2C0;
    spine_muscle_folder_side.Left.MultifidusCervicis.MultifidusCervicisC6C3;
    spine_muscle_folder_side.Left.SemispinalisCapitis.SemispinalisCapitisT1C0;
    spine_muscle_folder_side.Right.SemispinalisCapitis.SemispinalisCapitisT6C0;
    spine_muscle_folder_side.Left.LongissimusCapitis.LongissimusCapitisT5C0;
    spine_muscle_folder_side.Right.Scalenus.ScalenusMediusR1C2;
    spine_muscle_folder_side.Left.SemispinalisCapitis.SemispinalisCapitisC6C0;
    spine_muscle_folder_side.Left.SpleniusCapitis.SpleniusCapitisT1C0;
    spine_muscle_folder_side.Left.Scalenus.ScalenusMediusR1C2;
    spine_muscle_folder_side.Left.LongissimusCapitis.LongissimusCapitisC7C0;
    spine_muscle_folder_side.Left.LongusCapitis.LongusCapitisC5C0;
    spine_muscle_folder_side.Right.SpleniusCapitis.SpleniusCapitisT3C0;
    spine_muscle_folder_side.Left.SemispinalisCapitis.SemispinalisCapitisC5C0;
    spine_muscle_folder_side.Right.SpleniusCervicis.SpleniusCervicisT4C2;
    spine_muscle_folder_side.Left.SpleniusCervicis.SpleniusCervicisT4C2;
    spine_muscle_folder_side.Left.SpleniusCapitis.SpleniusCapitisT3C0;
    spine_muscle_folder_side.Right.LongusCapitis.LongusCapitisC5C0;
    spine_muscle_folder_side.Left.SpleniusCervicis.SpleniusCervicisT6C3;
    spine_muscle_folder_side.Left.SpleniusCapitis.SpleniusCapitisT2C0;
};

AnyFolder C6C5jnt = {
    spine_muscle_folder_side.Left.SemispinalisCapitis.SemispinalisCapitisC7C0;
    spine_muscle_folder_side.Left.MultifidusCervicis.MultifidusCervicisT1C5;
    spine_muscle_folder_side.Right.MultifidusCervicis.MultifidusCervicisT1C5;
    spine_muscle_folder_side.Left.SemispinalisCervicis.SemispinalisCervicisT3C4;
    spine_muscle_folder_side.Right.SemispinalisCervicis.SemispinalisCervicisT1C2;
    spine_muscle_folder_side.Right.LongissimusCervicis.LongissimusCervicisT3C4;
    spine_muscle_folder_side.Right.LongissimusCapitis.LongissimusCapitisT2C0;
    spine_muscle_folder_side.Left.MultifidusCervicis.MultifidusCervicisT2C5;
    spine_muscle_folder_side.Left.SemispinalisCervicis.SemispinalisCervicisT2C3;
    spine_muscle_folder_side.Left.SpleniusCervicis.SpleniusCervicisT5C3;
    spine_muscle_folder_side.Left.MultifidusCervicis.MultifidusCervicisC7C3;
    spine_muscle_folder_side.Right.SpleniusCapitis.SpleniusCapitisC7C0;
    spine_muscle_folder_side.Right.MultifidusCervicis.MultifidusCervicisT1C4;
    spine_muscle_folder_side.Left.LongissimusCervicis.LongissimusCervicisT2C3;
    spine_muscle_folder_side.Right.MultifidusCervicis.MultifidusCervicisC7C4;
    spine_muscle_folder_side.Right.SemispinalisCapitis.SemispinalisCapitisC6C0;
    spine_muscle_folder_side.Left.LongissimusCapitis.LongissimusCapitisT4C0;
    spine_muscle_folder_side.Right.LongissimusCervicis.LongissimusCervicisT2C3;
    spine_muscle_folder_side.Left.LongusCapitis.LongusCapitisC6C0;
    spine_muscle_folder_side.Left.LongissimusCervicis.LongissimusCervicisT1C2;
    spine_muscle_folder_side.Right.SpleniusCapitis.SpleniusCapitisT1C0;
    spine_muscle_folder_side.Right.LongissimusCapitis.LongissimusCapitisT3C0;
    spine_muscle_folder_side.Right.LongissimusCapitis.LongissimusCapitisT4C0;
    spine_muscle_folder_side.Left.SemispinalisCapitis.SemispinalisCapitisT4C0;
    spine_muscle_folder_side.Right.SpleniusCervicis.SpleniusCervicisT5C3;
    spine_muscle_folder_side.Left.LongissimusCapitis.LongissimusCapitisT1C0;
    spine_muscle_folder_side.Right.SemispinalisCapitis.SemispinalisCapitisT3C0;
    spine_muscle_folder_side.Right.SpleniusCervicis.SpleniusCervicisT3C1;
    spine_muscle_folder_side.Left.MultifidusCervicis.MultifidusCervicisC6C2;
    spine_muscle_folder_side.Left.SemispinalisCapitis.SemispinalisCapitisT5C0;
    spine_muscle_folder_side.Right.SemispinalisCapitis.SemispinalisCapitisT4C0;
    spine_muscle_folder_side.Right.SpleniusCervicis.SpleniusCervicisT6C3;
    spine_muscle_folder_side.Right.LongissimusCapitis.LongissimusCapitisC7C0;
    spine_muscle_folder_side.Right.LongissimusCapitis.LongissimusCapitisC6C0;
    spine_muscle_folder_side.Right.SemispinalisCervicis.SemispinalisCervicisT3C4;
    spine_muscle_folder_side.Left.SpleniusCervicis.SpleniusCervicisT3C1;
    spine_muscle_folder_side.Right.LongusCapitis.LongusCapitisC6C0;
    spine_muscle_folder_side.Right.MultifidusCervicis.MultifidusCervicisC7C3;
    spine_muscle_folder_side.Right.SemispinalisCapitis.SemispinalisCapitisT5C0;
    spine_muscle_folder_side.Left.SemispinalisCapitis.SemispinalisCapitisT2C0;
    spine_muscle_folder_side.Right.SemispinalisCapitis.SemispinalisCapitisC7C0;
    spine_muscle_folder_side.Left.SemispinalisCapitis.SemispinalisCapitisT6C0;
    spine_muscle_folder_side.Left.SpleniusCapitis.SpleniusCapitisC7C0;
    spine_muscle_folder_side.Right.SemispinalisCapitis.SemispinalisCapitisT1C0;
    spine_muscle_folder_side.Right.LongissimusCapitis.LongissimusCapitisT5C0;
    spine_muscle_folder_side.Left.LongissimusCervicis.LongissimusCervicisT3C4;
    spine_muscle_folder_side.Left.LongissimusCapitis.LongissimusCapitisT2C0;
    spine_muscle_folder_side.Left.SemispinalisCervicis.SemispinalisCervicisT1C2;
    spine_muscle_folder_side.Right.SemispinalisCervicis.SemispinalisCervicisT2C3;
    spine_muscle_folder_side.Left.SemispinalisCapitis.SemispinalisCapitisT3C0;
    spine_muscle_folder_side.Left.MultifidusCervicis.MultifidusCervicisC7C4;
    spine_muscle_folder_side.Left.LongissimusCapitis.LongissimusCapitisC6C0;
    spine_muscle_folder_side.Right.MultifidusCervicis.MultifidusCervicisC6C3;
    spine_muscle_folder_side.Right.SpleniusCapitis.SpleniusCapitisT2C0;
    spine_muscle_folder_side.Left.LongissimusCervicis.LongissimusCervicisT4C5;
    spine_muscle_folder_side.Left.LongissimusCapitis.LongissimusCapitisT3C0;
    spine_muscle_folder_side.Right.MultifidusCervicis.MultifidusCervicisC6C2;
    spine_muscle_folder_side.Left.Scalenus.ScalenusPosteriorR2C5;
    spine_muscle_folder_side.Right.SemispinalisCervicis.SemispinalisCervicisT4C5;
    spine_muscle_folder_side.Right.LongissimusCervicis.LongissimusCervicisT1C2;
    spine_muscle_folder_side.Right.LongissimusCervicis.LongissimusCervicisT4C5;
    spine_muscle_folder_side.Right.LongissimusCapitis.LongissimusCapitisT1C0;
    spine_muscle_folder_side.Left.MultifidusCervicis.MultifidusCervicisT1C4;
    spine_muscle_folder_side.Right.SemispinalisCapitis.SemispinalisCapitisT2C0;
    spine_muscle_folder_side.Left.MultifidusCervicis.MultifidusCervicisC6C3;
    spine_muscle_folder_side.Left.SemispinalisCapitis.SemispinalisCapitisT1C0;
    spine_muscle_folder_side.Right.SemispinalisCapitis.SemispinalisCapitisT6C0;
    spine_muscle_folder_side.Left.LongissimusCapitis.LongissimusCapitisT5C0;
    spine_muscle_folder_side.Left.SemispinalisCapitis.SemispinalisCapitisC6C0;
    spine_muscle_folder_side.Right.Scalenus.ScalenusPosteriorR2C5;
    spine_muscle_folder_side.Left.SemispinalisCervicis.SemispinalisCervicisT4C5;
    spine_muscle_folder_side.Left.SpleniusCapitis.SpleniusCapitisT1C0;
    spine_muscle_folder_side.Right.MultifidusCervicis.MultifidusCervicisT2C5;
    spine_muscle_folder_side.Left.LongissimusCapitis.LongissimusCapitisC7C0;
    spine_muscle_folder_side.Right.SpleniusCapitis.SpleniusCapitisT3C0;
    spine_muscle_folder_side.Right.SpleniusCervicis.SpleniusCervicisT4C2;
    spine_muscle_folder_side.Left.SpleniusCervicis.SpleniusCervicisT4C2;
    spine_muscle_folder_side.Left.SpleniusCapitis.SpleniusCapitisT3C0;
    spine_muscle_folder_side.Left.SpleniusCervicis.SpleniusCervicisT6C3;
    spine_muscle_folder_side.Left.SpleniusCapitis.SpleniusCapitisT2C0;
};

AnyFolder C7C6jnt = {
    spine_muscle_folder_side.Left.SemispinalisCapitis.SemispinalisCapitisC7C0;
    spine_muscle_folder_side.Left.MultifidusCervicis.MultifidusCervicisT1C5;
    spine_muscle_folder_side.Right.MultifidusCervicis.MultifidusCervicisT1C5;
    spine_muscle_folder_side.Left.SemispinalisCervicis.SemispinalisCervicisT3C4;
    spine_muscle_folder_side.Left.MultifidusCervicis.MultifidusCervicisT3C6;
    spine_muscle_folder_side.Left.SemispinalisThoracis.SSTT7C6;
    spine_muscle_folder_side.Right.SemispinalisCervicis.SemispinalisCervicisT1C2;
    spine_muscle_folder_side.Right.LongissimusCervicis.LongissimusCervicisT3C4;
    spine_muscle_folder_side.Right.LongissimusCapitis.LongissimusCapitisT2C0;
    spine_muscle_folder_side.Left.MultifidusCervicis.MultifidusCervicisT2C5;
    spine_muscle_folder_side.Left.SemispinalisCervicis.SemispinalisCervicisT2C3;
    spine_muscle_folder_side.Left.SpleniusCervicis.SpleniusCervicisT5C3;
    spine_muscle_folder_side.Left.MultifidusCervicis.MultifidusCervicisC7C3;
    spine_muscle_folder_side.Right.SpleniusCapitis.SpleniusCapitisC7C0;
    spine_muscle_folder_side.Right.MultifidusCervicis.MultifidusCervicisT1C4;
    spine_muscle_folder_side.Left.LongissimusCervicis.LongissimusCervicisT2C3;
    spine_muscle_folder_side.Right.MultifidusCervicis.MultifidusCervicisC7C4;
    spine_muscle_folder_side.Left.LongissimusCapitis.LongissimusCapitisT4C0;
    spine_muscle_folder_side.Right.LongissimusCervicis.LongissimusCervicisT2C3;
    spine_muscle_folder_side.Left.LongissimusCervicis.LongissimusCervicisT1C2;
    spine_muscle_folder_side.Right.SpleniusCapitis.SpleniusCapitisT1C0;
    spine_muscle_folder_side.Right.LongissimusCapitis.LongissimusCapitisT3C0;
    spine_muscle_folder_side.Right.LongissimusCapitis.LongissimusCapitisT4C0;
    spine_muscle_folder_side.Left.SemispinalisCapitis.SemispinalisCapitisT4C0;
    spine_muscle_folder_side.Right.SpleniusCervicis.SpleniusCervicisT5C3;
    spine_muscle_folder_side.Left.LongissimusCapitis.LongissimusCapitisT1C0;
    spine_muscle_folder_side.Right.SemispinalisCapitis.SemispinalisCapitisT3C0;
    spine_muscle_folder_side.Right.SpleniusCervicis.SpleniusCervicisT3C1;
    spine_muscle_folder_side.Right.MultifidusCervicis.MultifidusCervicisT2C6;
    spine_muscle_folder_side.Right.MultifidusCervicis.MultifidusCervicisT3C6;
    spine_muscle_folder_side.Left.SemispinalisCapitis.SemispinalisCapitisT5C0;
    spine_muscle_folder_side.Right.SemispinalisCapitis.SemispinalisCapitisT4C0;
    spine_muscle_folder_side.Right.SpleniusCervicis.SpleniusCervicisT6C3;
    spine_muscle_folder_side.Right.LongissimusCapitis.LongissimusCapitisC7C0;
    spine_muscle_folder_side.Right.SemispinalisCervicis.SemispinalisCervicisT3C4;
    spine_muscle_folder_side.Left.SpleniusCervicis.SpleniusCervicisT3C1;
    spine_muscle_folder_side.Right.MultifidusCervicis.MultifidusCervicisC7C3;
    spine_muscle_folder_side.Right.SemispinalisCapitis.SemispinalisCapitisT5C0;
    spine_muscle_folder_side.Left.SemispinalisCapitis.SemispinalisCapitisT2C0;
    spine_muscle_folder_side.Right.SemispinalisCervicis.SemispinalisCervicisT5C6;
    spine_muscle_folder_side.Right.SemispinalisCapitis.SemispinalisCapitisC7C0;
    spine_muscle_folder_side.Left.SemispinalisCapitis.SemispinalisCapitisT6C0;
    spine_muscle_folder_side.Left.SpleniusCapitis.SpleniusCapitisC7C0;
    spine_muscle_folder_side.Right.SemispinalisCapitis.SemispinalisCapitisT1C0;
    spine_muscle_folder_side.Right.LongissimusCapitis.LongissimusCapitisT5C0;
    spine_muscle_folder_side.Left.LongissimusCervicis.LongissimusCervicisT3C4;
    spine_muscle_folder_side.Left.LongissimusCapitis.LongissimusCapitisT2C0;
    spine_muscle_folder_side.Left.MultifidusCervicis.MultifidusCervicisT2C6;
    spine_muscle_folder_side.Left.SemispinalisCervicis.SemispinalisCervicisT5C6;
    spine_muscle_folder_side.Left.SemispinalisCervicis.SemispinalisCervicisT1C2;
    spine_muscle_folder_side.Right.SemispinalisCervicis.SemispinalisCervicisT2C3;
    spine_muscle_folder_side.Left.SemispinalisCapitis.SemispinalisCapitisT3C0;
    spine_muscle_folder_side.Left.MultifidusCervicis.MultifidusCervicisC7C4;
    spine_muscle_folder_side.Right.SpleniusCapitis.SpleniusCapitisT2C0;
    spine_muscle_folder_side.Left.LongissimusCervicis.LongissimusCervicisT4C5;
    spine_muscle_folder_side.Left.LongissimusCapitis.LongissimusCapitisT3C0;
    spine_muscle_folder_side.Right.SemispinalisCervicis.SemispinalisCervicisT4C5;
    spine_muscle_folder_side.Right.LongissimusCervicis.LongissimusCervicisT1C2;
    spine_muscle_folder_side.Right.LongissimusCervicis.LongissimusCervicisT4C5;
    spine_muscle_folder_side.Right.LongissimusCapitis.LongissimusCapitisT1C0;
    spine_muscle_folder_side.Left.MultifidusCervicis.MultifidusCervicisT1C4;
    spine_muscle_folder_side.Right.SemispinalisCapitis.SemispinalisCapitisT2C0;
    spine_muscle_folder_side.Right.SemispinalisThoracis.SSTT7C6;
    spine_muscle_folder_side.Left.SemispinalisCapitis.SemispinalisCapitisT1C0;
    spine_muscle_folder_side.Right.SemispinalisCapitis.SemispinalisCapitisT6C0;
    spine_muscle_folder_side.Left.LongissimusCapitis.LongissimusCapitisT5C0;
    spine_muscle_folder_side.Right.LongissimusCervicis.LongissimusCervicisT5C6;
    spine_muscle_folder_side.Left.SemispinalisCervicis.SemispinalisCervicisT4C5;
    spine_muscle_folder_side.Left.SpleniusCapitis.SpleniusCapitisT1C0;
    spine_muscle_folder_side.Right.MultifidusCervicis.MultifidusCervicisT2C5;
    spine_muscle_folder_side.Left.LongissimusCapitis.LongissimusCapitisC7C0;
    spine_muscle_folder_side.Left.LongissimusCervicis.LongissimusCervicisT5C6;
    spine_muscle_folder_side.Right.SpleniusCapitis.SpleniusCapitisT3C0;
    spine_muscle_folder_side.Right.SpleniusCervicis.SpleniusCervicisT4C2;
    spine_muscle_folder_side.Left.SpleniusCervicis.SpleniusCervicisT4C2;
    spine_muscle_folder_side.Left.SpleniusCapitis.SpleniusCapitisT3C0;
    spine_muscle_folder_side.Left.SpleniusCervicis.SpleniusCervicisT6C3;
    spine_muscle_folder_side.Left.SpleniusCapitis.SpleniusCapitisT2C0;
};

AnyFolder L1L2jnt = {
    spine_muscle_folder_side.Right.QuadratusLumborum.QLC12InterMedian_CILat;
    spine_muscle_folder_side.Right.QuadratusLumborum.QLL1_CILat;
    spine_muscle_folder_side.Left.ErectorSpinae.ILptC11CI;
    spine_muscle_folder_side.Right.ErectorSpinae.ILptC8CI;
    spine_muscle_folder_side.Left.ErectorSpinae.LTptT6S1;
    spine_muscle_folder_side.Left.ErectorSpinae.LTptT10Sacrum;
    spine_muscle_folder_side.Right.ThoracicMultifidi.MFL2T11;
    spine_muscle_folder_side.Right.ThoracicMultifidi.MFL3T11;
    spine_muscle_folder_side.Right.QuadratusLumborum.QLC12InterMedian_CIInterMedian;
    spine_muscle_folder_side.Left.ErectorSpinae.LTptT9S4;
    spine_muscle_folder_side.Right.ErectorSpinae.LTptT4L4;
    spine_muscle_folder_side.Right.ErectorSpinae.LTptT8S3;
    spine_muscle_folder_side.Right.QuadratusLumborum.QLL1_CIMedian;
    spine_muscle_folder_side.Right.QuadratusLumborum.QLC12Median_CILat;
    spine_muscle_folder_side.Right.ErectorSpinae.LTptC3L3;
    spine_muscle_folder_side.Left.ThoracicMultifidi.MFL4T12;
    spine_muscle_folder_side.Right.ThoracicMultifidi.MFL2T10;
    spine_muscle_folder_side.Right.ErectorSpinae.ILptC7CI;
    spine_muscle_folder_side.Left.ErectorSpinae.LTptC3L3;
    spine_muscle_folder_side.Left.QuadratusLumborum.QLC12Median_CIInterMedian;
    spine_muscle_folder_side.Left.QuadratusLumborum.QLT12_CIInterMedian;
    spine_muscle_folder_side.Left.ErectorSpinae.LTptT2L2;
    spine_muscle_folder_side.Left.ErectorSpinae.ILptC5SIPS;
    spine_muscle_folder_side.Right.QuadratusLumborum.QLC12InterMedian_L2;
    spine_muscle_folder_side.Left.ErectorSpinae.ILptC6SIPS;
    spine_muscle_folder_side.Left.SerratusPosteriorInferior.SPIL2R12;
    spine_muscle_folder_side.Right.QuadratusLumborum.QLC12Lat_L4;
    spine_muscle_folder_side.Left.ObliquusInternus.OIC_2;
    spine_muscle_folder_side.Left.QuadratusLumborum.QLC12Lat_L2;
    spine_muscle_folder_side.Right.ErectorSpinae.ILptC12CI;
    spine_muscle_folder_side.Right.ObliquusExternus.OEC_11;
    spine_muscle_folder_side.Right.ThoracicMultifidi.MFL3T12;
    spine_muscle_folder_side.Left.QuadratusLumborum.QLC12Median_L4;
    spine_muscle_folder_side.Left.ThoracicMultifidi.MFL5T12;
    spine_muscle_folder_side.Left.ErectorSpinae.ILptC7CI;
    spine_muscle_folder_side.Left.QuadratusLumborum.QLL1_CILat;
    spine_muscle_folder_side.Left.ErectorSpinae.LTptC6S1;
    spine_muscle_folder_side.Right.ObliquusInternus.OIC_1;
    spine_muscle_folder_side.Left.ThoracicMultifidi.MFL3T10;
    spine_muscle_folder_side.Right.ErectorSpinae.LTptC7S2;
    spine_muscle_folder_side.Right.QuadratusLumborum.QLC12Lat_CILat;
    spine_muscle_folder_side.Left.ErectorSpinae.LTptC7S2;
    spine_muscle_folder_side.Left.ErectorSpinae.ILptC12CI;
    spine_muscle_folder_side.Left.QuadratusLumborum.QLL1_CIMedian;
    spine_muscle_folder_side.Right.ErectorSpinae.LTptT5L5;
    spine_muscle_folder_side.Left.Multifidi.MFtsL1L5;
    spine_muscle_folder_side.Right.PsoasMajor.PML1T_TM;
    spine_muscle_folder_side.Left.QuadratusLumborum.QLC12Lat_CILat;
    spine_muscle_folder_side.Left.ErectorSpinae.ILptC9CI;
    spine_muscle_folder_side.Right.ErectorSpinae.LTptC9S4;
    spine_muscle_folder_side.Left.ErectorSpinae.LTptT7S2;
    spine_muscle_folder_side.Right.ThoracicMultifidi.MFL5T12;
    spine_muscle_folder_side.Left.QuadratusLumborum.QLC12Median_L2;
    spine_muscle_folder_side.Right.QuadratusLumborum.QLC12Median_CIInterMedian;
    spine_muscle_folder_side.Left.ErectorSpinae.ILptC8CI;
    spine_muscle_folder_side.Right.ErectorSpinae.LTptT6S1;
    spine_muscle_folder_side.Right.ErectorSpinae.ILplL1CI;
    spine_muscle_folder_side.Right.ErectorSpinae.LTptT10Sacrum;
    spine_muscle_folder_side.Right.ErectorSpinae.ILptC11CI;
    spine_muscle_folder_side.Right.ThoracicMultifidi.MFL3T10;
    spine_muscle_folder_side.Left.ErectorSpinae.LTptT5L5;
    spine_muscle_folder_side.Left.ErectorSpinae.ILplL1CI;
    spine_muscle_folder_side.Left.ErectorSpinae.LTptC9S4;
    spine_muscle_folder_side.Right.ErectorSpinae.LTptC6S1;
    spine_muscle_folder_side.Left.ErectorSpinae.LTptC4L4;
    spine_muscle_folder_side.Right.Multifidi.MFmL1L4;
    spine_muscle_folder_side.Left.ErectorSpinae.ILptC10CI;
    spine_muscle_folder_side.Left.QuadratusLumborum.QLL1_CIInterMedian;
    spine_muscle_folder_side.Left.Multifidi.MFmL1L4;
    spine_muscle_folder_side.Left.QuadratusLumborum.QLC12InterMedian_L2;
    spine_muscle_folder_side.Right.QuadratusLumborum.QLL1_CIInterMedian;
    spine_muscle_folder_side.Right.QuadratusLumborum.QLC12Lat_L2;
    spine_muscle_folder_side.Right.ObliquusInternus.OIC_2;
    spine_muscle_folder_side.Left.ObliquusExternus.OEC_11;
    spine_muscle_folder_side.Right.ErectorSpinae.ILptC5SIPS;
    spine_muscle_folder_side.Right.Multifidi.MFdL1L3;
    spine_muscle_folder_side.Left.ErectorSpinae.LTplL1SIPS;
    spine_muscle_folder_side.Left.ThoracicMultifidi.MFL4T11;
    spine_muscle_folder_side.Left.ErectorSpinae.LTptT12Sacrum;
    spine_muscle_folder_side.Left.ErectorSpinae.LTptT8S3;
    spine_muscle_folder_side.Left.ThoracicMultifidi.MFL2T11;
    spine_muscle_folder_side.Right.ErectorSpinae.LTptC4L4;
    spine_muscle_folder_side.Right.ThoracicMultifidi.MFL4T12;
    spine_muscle_folder_side.Spinalis.SPL2T1;
    spine_muscle_folder_side.Left.QuadratusLumborum.QLC12InterMedian_CIInterMedian;
    spine_muscle_folder_side.Left.Multifidi.MFtstL1SIPS;
    spine_muscle_folder_side.Right.Multifidi.MFtsL1S1;
    spine_muscle_folder_side.Left.Multifidi.MFtsL1S1;
    spine_muscle_folder_side.Right.QuadratusLumborum.QLT12_CIInterMedian;
    spine_muscle_folder_side.Right.QuadratusLumborum.QLT12_CILat;
    spine_muscle_folder_side.Right.QuadratusLumborum.QLC12InterMedian_L4;
    spine_muscle_folder_side.Right.QuadratusLumborum.QLC12Median_L4;
    spine_muscle_folder_side.Right.ErectorSpinae.LTptT2L2;
    spine_muscle_folder_side.Right.ErectorSpinae.LTptC5L5;
    spine_muscle_folder_side.Right.ErectorSpinae.LTptT12Sacrum;
    spine_muscle_folder_side.Left.ObliquusExternus.OEC_12;
    spine_muscle_folder_side.Left.ThoracicMultifidi.MFL3T11;
    spine_muscle_folder_side.Right.QuadratusLumborum.QLC12InterMedian_L3;
    spine_muscle_folder_side.Left.ErectorSpinae.LTptC5L5;
    spine_muscle_folder_side.Left.PsoasMajor.PML1T_TM;
    spine_muscle_folder_side.Right.ErectorSpinae.LTptT9S4;
    spine_muscle_folder_side.Right.QuadratusLumborum.QLC12Median_L3;
    spine_muscle_folder_side.Right.ErectorSpinae.LTptT3L3;
    spine_muscle_folder_side.Left.ErectorSpinae.LTptT4L4;
    spine_muscle_folder_side.Left.QuadratusLumborum.QLC12Median_L3;
    spine_muscle_folder_side.Right.ErectorSpinae.ILptC6SIPS;
    spine_muscle_folder_side.Right.ErectorSpinae.LTptC8S3;
    spine_muscle_folder_side.Right.ThoracicMultifidi.MFL2T9;
    spine_muscle_folder_side.Right.ErectorSpinae.LTptT11Sacrum;
    spine_muscle_folder_side.Left.ThoracicMultifidi.MFL3T12;
    spine_muscle_folder_side.Left.ErectorSpinae.LTptT3L3;
    spine_muscle_folder_side.Right.ErectorSpinae.LTptT7S2;
    spine_muscle_folder_side.Left.QuadratusLumborum.QLT12_CILat;
    spine_muscle_folder_side.Right.SerratusPosteriorInferior.SPIL2R12;
    spine_muscle_folder_side.Right.Multifidi.MFtsL1L5;
    spine_muscle_folder_side.Left.ThoracicMultifidi.MFL2T10;
    spine_muscle_folder_side.Left.QuadratusLumborum.QLC12InterMedian_L3;
    spine_muscle_folder_side.Left.QuadratusLumborum.QLT12_CIMedian;
    spine_muscle_folder_side.Left.ErectorSpinae.LTptT11Sacrum;
    spine_muscle_folder_side.Right.ErectorSpinae.ILptC10CI;
    spine_muscle_folder_side.Right.ErectorSpinae.LTplL1SIPS;
    spine_muscle_folder_side.Left.Multifidi.MFdL1L3;
    spine_muscle_folder_side.Right.QuadratusLumborum.QLT12_CIMedian;
    spine_muscle_folder_side.Left.QuadratusLumborum.QLC12Median_CILat;
    spine_muscle_folder_side.Right.ObliquusExternus.OEC_12;
    spine_muscle_folder_side.Right.Multifidi.MFtstL1SIPS;
    spine_muscle_folder_side.Right.QuadratusLumborum.QLC12Lat_L3;
    spine_muscle_folder_side.Right.ThoracicMultifidi.MFL4T11;
    spine_muscle_folder_side.Left.QuadratusLumborum.QLC12InterMedian_L4;
    spine_muscle_folder_side.Left.QuadratusLumborum.QLC12Lat_L4;
    spine_muscle_folder_side.Left.ThoracicMultifidi.MFL2T9;
    spine_muscle_folder_side.Left.QuadratusLumborum.QLC12InterMedian_CILat;
    spine_muscle_folder_side.Right.ErectorSpinae.LTptC10Sacrum;
    spine_muscle_folder_side.Right.ErectorSpinae.ILptC9CI;
    spine_muscle_folder_side.Left.ErectorSpinae.LTptC10Sacrum;
    spine_muscle_folder_side.Left.ErectorSpinae.LTptC8S3;
    spine_muscle_folder_side.Left.QuadratusLumborum.QLC12Lat_L3;
    spine_muscle_folder_side.Right.QuadratusLumborum.QLC12Median_L2;
    spine_muscle_folder_side.Left.ObliquusInternus.OIC_1;
};

AnyFolder L2L3jnt = {
    spine_muscle_folder_side.Right.QuadratusLumborum.QLC12InterMedian_CILat;
    spine_muscle_folder_side.Right.QuadratusLumborum.QLL1_CILat;
    spine_muscle_folder_side.Left.ErectorSpinae.ILptC11CI;
    spine_muscle_folder_side.Right.ErectorSpinae.ILptC8CI;
    spine_muscle_folder_side.Left.QuadratusLumborum.QLL2_CILat;
    spine_muscle_folder_side.Left.ErectorSpinae.LTptT6S1;
    spine_muscle_folder_side.Left.ErectorSpinae.LTptT10Sacrum;
    spine_muscle_folder_side.Right.ThoracicMultifidi.MFL3T11;
    spine_muscle_folder_side.Right.QuadratusLumborum.QLC12InterMedian_CIInterMedian;
    spine_muscle_folder_side.Left.ErectorSpinae.LTptT9S4;
    spine_muscle_folder_side.Right.ErectorSpinae.LTptT4L4;
    spine_muscle_folder_side.Right.ErectorSpinae.LTptT8S3;
    spine_muscle_folder_side.Right.QuadratusLumborum.QLL1_CIMedian;
    spine_muscle_folder_side.Left.Multifidi.MFtstL2SIPS;
    spine_muscle_folder_side.Right.Multifidi.MFmL2L5;
    spine_muscle_folder_side.Right.QuadratusLumborum.QLC12Median_CILat;
    spine_muscle_folder_side.Right.ErectorSpinae.LTptC3L3;
    spine_muscle_folder_side.Left.ThoracicMultifidi.MFL4T12;
    spine_muscle_folder_side.Right.ErectorSpinae.ILptC7CI;
    spine_muscle_folder_side.Left.ErectorSpinae.ILplL2CI;
    spine_muscle_folder_side.Left.ErectorSpinae.LTptC3L3;
    spine_muscle_folder_side.Left.QuadratusLumborum.QLC12Median_CIInterMedian;
    spine_muscle_folder_side.Left.QuadratusLumborum.QLT12_CIInterMedian;
    spine_muscle_folder_side.Left.ErectorSpinae.ILptC5SIPS;
    spine_muscle_folder_side.Left.ErectorSpinae.ILptC6SIPS;
    spine_muscle_folder_side.Right.QuadratusLumborum.QLC12Lat_L4;
    spine_muscle_folder_side.Left.ObliquusInternus.OIC_2;
    spine_muscle_folder_side.Right.ErectorSpinae.ILptC12CI;
    spine_muscle_folder_side.Left.Multifidi.MFdL2L4;
    spine_muscle_folder_side.Right.ThoracicMultifidi.MFL3T12;
    spine_muscle_folder_side.Left.QuadratusLumborum.QLC12Median_L4;
    spine_muscle_folder_side.Right.QuadratusLumborum.QLL2_CILat;
    spine_muscle_folder_side.Left.ThoracicMultifidi.MFL5T12;
    spine_muscle_folder_side.Left.ErectorSpinae.ILptC7CI;
    spine_muscle_folder_side.Left.QuadratusLumborum.QLL1_CILat;
    spine_muscle_folder_side.Left.ErectorSpinae.LTptC6S1;
    spine_muscle_folder_side.Right.ObliquusInternus.OIC_1;
    spine_muscle_folder_side.Left.ThoracicMultifidi.MFL3T10;
    spine_muscle_folder_side.Right.ErectorSpinae.LTptC7S2;
    spine_muscle_folder_side.Right.QuadratusLumborum.QLC12Lat_CILat;
    spine_muscle_folder_side.Left.ErectorSpinae.LTptC7S2;
    spine_muscle_folder_side.Right.Multifidi.MFtsL2L5;
    spine_muscle_folder_side.Left.ErectorSpinae.ILptC12CI;
    spine_muscle_folder_side.Left.QuadratusLumborum.QLL1_CIMedian;
    spine_muscle_folder_side.Right.ErectorSpinae.LTptT5L5;
    spine_muscle_folder_side.Left.Multifidi.MFtsL1L5;
    spine_muscle_folder_side.Right.Multifidi.MFtstL2SIPS;
    spine_muscle_folder_side.Right.PsoasMajor.PML1T_TM;
    spine_muscle_folder_side.Left.QuadratusLumborum.QLC12Lat_CILat;
    spine_muscle_folder_side.Left.ErectorSpinae.ILptC9CI;
    spine_muscle_folder_side.Right.ErectorSpinae.LTptC9S4;
    spine_muscle_folder_side.Left.ErectorSpinae.LTptT7S2;
    spine_muscle_folder_side.Right.ThoracicMultifidi.MFL5T12;
    spine_muscle_folder_side.Right.Multifidi.MFtsL2S1;
    spine_muscle_folder_side.Right.QuadratusLumborum.QLC12Median_CIInterMedian;
    spine_muscle_folder_side.Left.ErectorSpinae.ILptC8CI;
    spine_muscle_folder_side.Right.ErectorSpinae.LTptT6S1;
    spine_muscle_folder_side.Right.ErectorSpinae.ILplL1CI;
    spine_muscle_folder_side.Left.Multifidi.MFmL2L5;
    spine_muscle_folder_side.Right.ErectorSpinae.ILptC11CI;
    spine_muscle_folder_side.Right.ErectorSpinae.LTptT10Sacrum;
    spine_muscle_folder_side.Left.ErectorSpinae.LTptT5L5;
    spine_muscle_folder_side.Right.ThoracicMultifidi.MFL3T10;
    spine_muscle_folder_side.Left.ErectorSpinae.ILplL1CI;
    spine_muscle_folder_side.Left.ErectorSpinae.LTptC9S4;
    spine_muscle_folder_side.Right.ErectorSpinae.LTptC6S1;
    spine_muscle_folder_side.Left.ErectorSpinae.LTptC4L4;
    spine_muscle_folder_side.Right.Multifidi.MFmL1L4;
    spine_muscle_folder_side.Left.ErectorSpinae.ILptC10CI;
    spine_muscle_folder_side.Left.QuadratusLumborum.QLL1_CIInterMedian;
    spine_muscle_folder_side.Left.Multifidi.MFmL1L4;
    spine_muscle_folder_side.Right.QuadratusLumborum.QLL1_CIInterMedian;
    spine_muscle_folder_side.Right.PsoasMajor.PML2T_TM;
    spine_muscle_folder_side.Right.ErectorSpinae.ILplL2CI;
    spine_muscle_folder_side.Right.ObliquusInternus.OIC_2;
    spine_muscle_folder_side.Right.ErectorSpinae.LTplL2SIPS;
    spine_muscle_folder_side.Right.ErectorSpinae.ILptC5SIPS;
    spine_muscle_folder_side.Right.Multifidi.MFdL1L3;
    spine_muscle_folder_side.Left.ErectorSpinae.LTplL1SIPS;
    spine_muscle_folder_side.Left.ErectorSpinae.LTplL2SIPS;
    spine_muscle_folder_side.Left.ThoracicMultifidi.MFL4T11;
    spine_muscle_folder_side.Left.ErectorSpinae.LTptT12Sacrum;
    spine_muscle_folder_side.Left.ErectorSpinae.LTptT8S3;
    spine_muscle_folder_side.Right.ErectorSpinae.LTptC4L4;
    spine_muscle_folder_side.Right.ThoracicMultifidi.MFL4T12;
    spine_muscle_folder_side.Left.QuadratusLumborum.QLC12InterMedian_CIInterMedian;
    spine_muscle_folder_side.Left.Multifidi.MFtstL1SIPS;
    spine_muscle_folder_side.Right.Multifidi.MFtsL1S1;
    spine_muscle_folder_side.Left.Multifidi.MFtsL1S1;
    spine_muscle_folder_side.Right.QuadratusLumborum.QLT12_CIInterMedian;
    spine_muscle_folder_side.Right.QuadratusLumborum.QLT12_CILat;
    spine_muscle_folder_side.Left.PsoasMajor.PML2T_TM;
    spine_muscle_folder_side.Right.QuadratusLumborum.QLC12InterMedian_L4;
    spine_muscle_folder_side.Right.QuadratusLumborum.QLL2_CIMedian;
    spine_muscle_folder_side.Right.QuadratusLumborum.QLC12Median_L4;
    spine_muscle_folder_side.Right.ErectorSpinae.LTptC5L5;
    spine_muscle_folder_side.Right.QuadratusLumborum.QLL2_CIInterMedian;
    spine_muscle_folder_side.Right.ErectorSpinae.LTptT12Sacrum;
    spine_muscle_folder_side.Left.ObliquusExternus.OEC_12;
    spine_muscle_folder_side.Left.ThoracicMultifidi.MFL3T11;
    spine_muscle_folder_side.Right.QuadratusLumborum.QLC12InterMedian_L3;
    spine_muscle_folder_side.Left.ErectorSpinae.LTptC5L5;
    spine_muscle_folder_side.Left.PsoasMajor.PML1T_TM;
    spine_muscle_folder_side.Right.Multifidi.MFdL2L4;
    spine_muscle_folder_side.Right.ErectorSpinae.LTptT9S4;
    spine_muscle_folder_side.Right.QuadratusLumborum.QLC12Median_L3;
    spine_muscle_folder_side.Right.ErectorSpinae.LTptT3L3;
    spine_muscle_folder_side.Left.ErectorSpinae.LTptT4L4;
    spine_muscle_folder_side.Left.QuadratusLumborum.QLC12Median_L3;
    spine_muscle_folder_side.Right.ErectorSpinae.ILptC6SIPS;
    spine_muscle_folder_side.Right.ErectorSpinae.LTptC8S3;
    spine_muscle_folder_side.Right.ErectorSpinae.LTptT11Sacrum;
    spine_muscle_folder_side.Left.ThoracicMultifidi.MFL3T12;
    spine_muscle_folder_side.Left.QuadratusLumborum.QLL2_CIInterMedian;
    spine_muscle_folder_side.Left.ErectorSpinae.LTptT3L3;
    spine_muscle_folder_side.Right.ErectorSpinae.LTptT7S2;
    spine_muscle_folder_side.Left.QuadratusLumborum.QLT12_CILat;
    spine_muscle_folder_side.Right.Multifidi.MFtsL1L5;
    spine_muscle_folder_side.Left.Multifidi.MFtsL2L5;
    spine_muscle_folder_side.Left.QuadratusLumborum.QLC12InterMedian_L3;
    spine_muscle_folder_side.Left.QuadratusLumborum.QLT12_CIMedian;
    spine_muscle_folder_side.Left.ErectorSpinae.LTptT11Sacrum;
    spine_muscle_folder_side.Right.ErectorSpinae.ILptC10CI;
    spine_muscle_folder_side.Right.ErectorSpinae.LTplL1SIPS;
    spine_muscle_folder_side.Left.Multifidi.MFdL1L3;
    spine_muscle_folder_side.Right.QuadratusLumborum.QLT12_CIMedian;
    spine_muscle_folder_side.Left.QuadratusLumborum.QLC12Median_CILat;
    spine_muscle_folder_side.Left.QuadratusLumborum.QLL2_CIMedian;
    spine_muscle_folder_side.Right.ObliquusExternus.OEC_12;
    spine_muscle_folder_side.Right.Multifidi.MFtstL1SIPS;
    spine_muscle_folder_side.Right.QuadratusLumborum.QLC12Lat_L3;
    spine_muscle_folder_side.Right.ThoracicMultifidi.MFL4T11;
    spine_muscle_folder_side.Left.Multifidi.MFtsL2S1;
    spine_muscle_folder_side.Left.QuadratusLumborum.QLC12InterMedian_L4;
    spine_muscle_folder_side.Left.QuadratusLumborum.QLC12Lat_L4;
    spine_muscle_folder_side.Left.QuadratusLumborum.QLC12InterMedian_CILat;
    spine_muscle_folder_side.Right.ErectorSpinae.LTptC10Sacrum;
    spine_muscle_folder_side.Right.ErectorSpinae.ILptC9CI;
    spine_muscle_folder_side.Left.ErectorSpinae.LTptC10Sacrum;
    spine_muscle_folder_side.Left.ErectorSpinae.LTptC8S3;
    spine_muscle_folder_side.Left.QuadratusLumborum.QLC12Lat_L3;
    spine_muscle_folder_side.Left.ObliquusInternus.OIC_1;
};

AnyFolder L3L4jnt = {
    spine_muscle_folder_side.Right.QuadratusLumborum.QLC12InterMedian_CILat;
    spine_muscle_folder_side.Right.QuadratusLumborum.QLL1_CILat;
    spine_muscle_folder_side.Left.ErectorSpinae.ILptC11CI;
    spine_muscle_folder_side.Right.QuadratusLumborum.QLL3_CIInterMedian;
    spine_muscle_folder_side.Right.ErectorSpinae.ILptC8CI;
    spine_muscle_folder_side.Left.QuadratusLumborum.QLL2_CILat;
    spine_muscle_folder_side.Left.ErectorSpinae.LTptT6S1;
    spine_muscle_folder_side.Left.ErectorSpinae.LTptT10Sacrum;
    spine_muscle_folder_side.Right.QuadratusLumborum.QLC12InterMedian_CIInterMedian;
    spine_muscle_folder_side.Left.ErectorSpinae.LTptT9S4;
    spine_muscle_folder_side.Right.ErectorSpinae.LTptT4L4;
    spine_muscle_folder_side.Right.ErectorSpinae.LTptT8S3;
    spine_muscle_folder_side.Right.Multifidi.MFdL3L5;
    spine_muscle_folder_side.Right.QuadratusLumborum.QLL1_CIMedian;
    spine_muscle_folder_side.Right.Multifidi.MFtsL3Ligament;
    spine_muscle_folder_side.Left.Multifidi.MFtstL2SIPS;
    spine_muscle_folder_side.Right.Multifidi.MFmL2L5;
    spine_muscle_folder_side.Right.QuadratusLumborum.QLC12Median_CILat;
    spine_muscle_folder_side.Left.ThoracicMultifidi.MFL4T12;
    spine_muscle_folder_side.Right.ErectorSpinae.ILptC7CI;
    spine_muscle_folder_side.Left.ErectorSpinae.ILplL2CI;
    spine_muscle_folder_side.Left.QuadratusLumborum.QLC12Median_CIInterMedian;
    spine_muscle_folder_side.Left.QuadratusLumborum.QLT12_CIInterMedian;
    spine_muscle_folder_side.Left.ErectorSpinae.ILptC5SIPS;
    spine_muscle_folder_side.Left.Multifidi.MFmL3S1;
    spine_muscle_folder_side.Left.ErectorSpinae.ILptC6SIPS;
    spine_muscle_folder_side.Right.QuadratusLumborum.QLC12Lat_L4;
    spine_muscle_folder_side.Left.ObliquusInternus.OIC_2;
    spine_muscle_folder_side.Right.ErectorSpinae.ILptC12CI;
    spine_muscle_folder_side.Left.Multifidi.MFdL2L4;
    spine_muscle_folder_side.Left.QuadratusLumborum.QLC12Median_L4;
    spine_muscle_folder_side.Right.QuadratusLumborum.QLL2_CILat;
    spine_muscle_folder_side.Left.ThoracicMultifidi.MFL5T12;
    spine_muscle_folder_side.Left.QuadratusLumborum.QLL3_CIMedian;
    spine_muscle_folder_side.Left.ErectorSpinae.ILptC7CI;
    spine_muscle_folder_side.Left.QuadratusLumborum.QLL1_CILat;
    spine_muscle_folder_side.Left.ErectorSpinae.LTptC6S1;
    spine_muscle_folder_side.Right.ObliquusInternus.OIC_1;
    spine_muscle_folder_side.Right.ErectorSpinae.LTptC7S2;
    spine_muscle_folder_side.Right.QuadratusLumborum.QLC12Lat_CILat;
    spine_muscle_folder_side.Left.ErectorSpinae.LTptC7S2;
    spine_muscle_folder_side.Right.Multifidi.MFtsL2L5;
    spine_muscle_folder_side.Left.ErectorSpinae.ILptC12CI;
    spine_muscle_folder_side.Left.QuadratusLumborum.QLL1_CIMedian;
    spine_muscle_folder_side.Right.ErectorSpinae.LTptT5L5;
    spine_muscle_folder_side.Left.Multifidi.MFtsL1L5;
    spine_muscle_folder_side.Right.Multifidi.MFtstL2SIPS;
    spine_muscle_folder_side.Right.PsoasMajor.PML1T_TM;
    spine_muscle_folder_side.Left.QuadratusLumborum.QLC12Lat_CILat;
    spine_muscle_folder_side.Left.ErectorSpinae.ILptC9CI;
    spine_muscle_folder_side.Right.ErectorSpinae.LTptC9S4;
    spine_muscle_folder_side.Right.ErectorSpinae.LTplL3SIPS;
    spine_muscle_folder_side.Right.QuadratusLumborum.QLL3_CIMedian;
    spine_muscle_folder_side.Left.ErectorSpinae.LTptT7S2;
    spine_muscle_folder_side.Left.Multifidi.MFtsL3Ligament;
    spine_muscle_folder_side.Right.ThoracicMultifidi.MFL5T12;
    spine_muscle_folder_side.Right.Multifidi.MFtsL2S1;
    spine_muscle_folder_side.Right.QuadratusLumborum.QLC12Median_CIInterMedian;
    spine_muscle_folder_side.Left.ErectorSpinae.ILptC8CI;
    spine_muscle_folder_side.Right.ErectorSpinae.LTptT6S1;
    spine_muscle_folder_side.Right.ErectorSpinae.ILplL1CI;
    spine_muscle_folder_side.Left.Multifidi.MFmL2L5;
    spine_muscle_folder_side.Right.ErectorSpinae.ILptC11CI;
    spine_muscle_folder_side.Right.ErectorSpinae.LTptT10Sacrum;
    spine_muscle_folder_side.Left.ErectorSpinae.LTptT5L5;
    spine_muscle_folder_side.Left.ErectorSpinae.ILplL1CI;
    spine_muscle_folder_side.Left.ErectorSpinae.LTptC9S4;
    spine_muscle_folder_side.Right.ErectorSpinae.LTptC6S1;
    spine_muscle_folder_side.Left.ErectorSpinae.LTptC4L4;
    spine_muscle_folder_side.Right.ErectorSpinae.ILplL3CI;
    spine_muscle_folder_side.Left.ErectorSpinae.ILptC10CI;
    spine_muscle_folder_side.Right.Multifidi.MFmL1L4;
    spine_muscle_folder_side.Left.QuadratusLumborum.QLL1_CIInterMedian;
    spine_muscle_folder_side.Left.Multifidi.MFmL1L4;
    spine_muscle_folder_side.Right.QuadratusLumborum.QLL1_CIInterMedian;
    spine_muscle_folder_side.Right.PsoasMajor.PML2T_TM;
    spine_muscle_folder_side.Right.ErectorSpinae.ILplL2CI;
    spine_muscle_folder_side.Right.ObliquusInternus.OIC_2;
    spine_muscle_folder_side.Right.ErectorSpinae.LTplL2SIPS;
    spine_muscle_folder_side.Right.ErectorSpinae.ILptC5SIPS;
    spine_muscle_folder_side.Left.ErectorSpinae.LTplL1SIPS;
    spine_muscle_folder_side.Left.ErectorSpinae.LTplL2SIPS;
    spine_muscle_folder_side.Left.ThoracicMultifidi.MFL4T11;
    spine_muscle_folder_side.Left.ErectorSpinae.LTptT12Sacrum;
    spine_muscle_folder_side.Left.ErectorSpinae.LTptT8S3;
    spine_muscle_folder_side.Left.QuadratusLumborum.QLL3_CIInterMedian;
    spine_muscle_folder_side.Right.ErectorSpinae.LTptC4L4;
    spine_muscle_folder_side.Right.ThoracicMultifidi.MFL4T12;
    spine_muscle_folder_side.Left.QuadratusLumborum.QLC12InterMedian_CIInterMedian;
    spine_muscle_folder_side.Right.Multifidi.MFmL3S1;
    spine_muscle_folder_side.Left.QuadratusLumborum.QLL3_CILat;
    spine_muscle_folder_side.Left.Multifidi.MFtstL1SIPS;
    spine_muscle_folder_side.Right.Multifidi.MFtsL1S1;
    spine_muscle_folder_side.Left.Multifidi.MFtsL1S1;
    spine_muscle_folder_side.Right.QuadratusLumborum.QLT12_CIInterMedian;
    spine_muscle_folder_side.Right.QuadratusLumborum.QLT12_CILat;
    spine_muscle_folder_side.Left.PsoasMajor.PML2T_TM;
    spine_muscle_folder_side.Right.QuadratusLumborum.QLC12InterMedian_L4;
    spine_muscle_folder_side.Right.QuadratusLumborum.QLL2_CIMedian;
    spine_muscle_folder_side.Right.QuadratusLumborum.QLC12Median_L4;
    spine_muscle_folder_side.Right.ErectorSpinae.LTptC5L5;
    spine_muscle_folder_side.Right.QuadratusLumborum.QLL2_CIInterMedian;
    spine_muscle_folder_side.Right.QuadratusLumborum.QLL3_CILat;
    spine_muscle_folder_side.Right.ErectorSpinae.LTptT12Sacrum;
    spine_muscle_folder_side.Left.ErectorSpinae.LTptC5L5;
    spine_muscle_folder_side.Left.PsoasMajor.PML1T_TM;
    spine_muscle_folder_side.Right.Multifidi.MFdL2L4;
    spine_muscle_folder_side.Right.ErectorSpinae.LTptT9S4;
    spine_muscle_folder_side.Left.Multifidi.MFdL3L5;
    spine_muscle_folder_side.Left.ErectorSpinae.LTptT4L4;
    spine_muscle_folder_side.Right.ErectorSpinae.ILptC6SIPS;
    spine_muscle_folder_side.Right.ErectorSpinae.LTptC8S3;
    spine_muscle_folder_side.Right.ErectorSpinae.LTptT11Sacrum;
    spine_muscle_folder_side.Left.QuadratusLumborum.QLL2_CIInterMedian;
    spine_muscle_folder_side.Right.ErectorSpinae.LTptT7S2;
    spine_muscle_folder_side.Left.QuadratusLumborum.QLT12_CILat;
    spine_muscle_folder_side.Right.Multifidi.MFtsL1L5;
    spine_muscle_folder_side.Left.Multifidi.MFtsL2L5;
    spine_muscle_folder_side.Left.QuadratusLumborum.QLT12_CIMedian;
    spine_muscle_folder_side.Left.ErectorSpinae.LTptT11Sacrum;
    spine_muscle_folder_side.Right.ErectorSpinae.ILptC10CI;
    spine_muscle_folder_side.Right.ErectorSpinae.LTplL1SIPS;
    spine_muscle_folder_side.Right.QuadratusLumborum.QLT12_CIMedian;
    spine_muscle_folder_side.Left.QuadratusLumborum.QLC12Median_CILat;
    spine_muscle_folder_side.Left.QuadratusLumborum.QLL2_CIMedian;
    spine_muscle_folder_side.Right.PsoasMajor.PML3T_TM;
    spine_muscle_folder_side.Right.Multifidi.MFtstL1SIPS;
    spine_muscle_folder_side.Right.ThoracicMultifidi.MFL4T11;
    spine_muscle_folder_side.Left.Multifidi.MFtsL2S1;
    spine_muscle_folder_side.Left.QuadratusLumborum.QLC12InterMedian_L4;
    spine_muscle_folder_side.Left.QuadratusLumborum.QLC12Lat_L4;
    spine_muscle_folder_side.Left.QuadratusLumborum.QLC12InterMedian_CILat;
    spine_muscle_folder_side.Right.ErectorSpinae.LTptC10Sacrum;
    spine_muscle_folder_side.Left.PsoasMajor.PML3T_TM;
    spine_muscle_folder_side.Right.ErectorSpinae.ILptC9CI;
    spine_muscle_folder_side.Left.ErectorSpinae.LTptC10Sacrum;
    spine_muscle_folder_side.Left.ErectorSpinae.LTptC8S3;
    spine_muscle_folder_side.Left.ErectorSpinae.ILplL3CI;
    spine_muscle_folder_side.Left.ObliquusInternus.OIC_1;
    spine_muscle_folder_side.Left.ErectorSpinae.LTplL3SIPS;
};

AnyFolder L4L5jnt = {
    spine_muscle_folder_side.Right.QuadratusLumborum.QLC12InterMedian_CILat;
    spine_muscle_folder_side.Right.QuadratusLumborum.QLL1_CILat;
    spine_muscle_folder_side.Left.ErectorSpinae.ILptC11CI;
    spine_muscle_folder_side.Right.QuadratusLumborum.QLL3_CIInterMedian;
    spine_muscle_folder_side.Right.ErectorSpinae.ILptC8CI;
    spine_muscle_folder_side.Left.QuadratusLumborum.QLL4_CIMedian;
    spine_muscle_folder_side.Left.QuadratusLumborum.QLL2_CILat;
    spine_muscle_folder_side.Left.ErectorSpinae.LTptT6S1;
    spine_muscle_folder_side.Left.ErectorSpinae.LTptT10Sacrum;
    spine_muscle_folder_side.Right.QuadratusLumborum.QLC12InterMedian_CIInterMedian;
    spine_muscle_folder_side.Left.ErectorSpinae.LTptT9S4;
    spine_muscle_folder_side.Right.ErectorSpinae.LTptT8S3;
    spine_muscle_folder_side.Right.Multifidi.MFdL3L5;
    spine_muscle_folder_side.Right.QuadratusLumborum.QLL1_CIMedian;
    spine_muscle_folder_side.Left.ErectorSpinae.LTplL4SIPS;
    spine_muscle_folder_side.Right.Multifidi.MFtsL3Ligament;
    spine_muscle_folder_side.Left.Multifidi.MFtstL2SIPS;
    spine_muscle_folder_side.Right.Multifidi.MFmL2L5;
    spine_muscle_folder_side.Right.QuadratusLumborum.QLC12Median_CILat;
    spine_muscle_folder_side.Right.ErectorSpinae.ILptC7CI;
    spine_muscle_folder_side.Left.QuadratusLumborum.QLC12Median_CIInterMedian;
    spine_muscle_folder_side.Left.QuadratusLumborum.QLT12_CIInterMedian;
    spine_muscle_folder_side.Left.ErectorSpinae.ILptC5SIPS;
    spine_muscle_folder_side.Left.Multifidi.MFmL3S1;
    spine_muscle_folder_side.Left.ErectorSpinae.ILptC6SIPS;
    spine_muscle_folder_side.Left.ObliquusInternus.OIC_2;
    spine_muscle_folder_side.Right.ErectorSpinae.ILptC12CI;
    spine_muscle_folder_side.Right.QuadratusLumborum.QLL2_CILat;
    spine_muscle_folder_side.Left.ThoracicMultifidi.MFL5T12;
    spine_muscle_folder_side.Left.Multifidi.MFdL4S1;
    spine_muscle_folder_side.Left.QuadratusLumborum.QLL3_CIMedian;
    spine_muscle_folder_side.Left.ErectorSpinae.ILptC7CI;
    spine_muscle_folder_side.Left.QuadratusLumborum.QLL1_CILat;
    spine_muscle_folder_side.Left.ErectorSpinae.LTptC6S1;
    spine_muscle_folder_side.Right.ObliquusInternus.OIC_1;
    spine_muscle_folder_side.Left.ErectorSpinae.ILplL4CI;
    spine_muscle_folder_side.Right.ErectorSpinae.LTptC7S2;
    spine_muscle_folder_side.Left.Multifidi.MFtsL4Sacrum;
    spine_muscle_folder_side.Left.ErectorSpinae.LTptC7S2;
    spine_muscle_folder_side.Right.QuadratusLumborum.QLC12Lat_CILat;
    spine_muscle_folder_side.Right.Multifidi.MFtsL2L5;
    spine_muscle_folder_side.Left.ErectorSpinae.ILptC12CI;
    spine_muscle_folder_side.Left.QuadratusLumborum.QLL1_CIMedian;
    spine_muscle_folder_side.Right.ErectorSpinae.LTptT5L5;
    spine_muscle_folder_side.Left.Multifidi.MFtsL1L5;
    spine_muscle_folder_side.Right.Multifidi.MFtstL2SIPS;
    spine_muscle_folder_side.Right.PsoasMajor.PML1T_TM;
    spine_muscle_folder_side.Left.QuadratusLumborum.QLC12Lat_CILat;
    spine_muscle_folder_side.Left.ErectorSpinae.ILptC9CI;
    spine_muscle_folder_side.Right.ErectorSpinae.LTptC9S4;
    spine_muscle_folder_side.Right.ErectorSpinae.LTplL3SIPS;
    spine_muscle_folder_side.Right.QuadratusLumborum.QLL3_CIMedian;
    spine_muscle_folder_side.Left.ErectorSpinae.LTptT7S2;
    spine_muscle_folder_side.Left.Multifidi.MFtsL3Ligament;
    spine_muscle_folder_side.Right.ThoracicMultifidi.MFL5T12;
    spine_muscle_folder_side.Right.Multifidi.MFtsL2S1;
    spine_muscle_folder_side.Right.QuadratusLumborum.QLC12Median_CIInterMedian;
    spine_muscle_folder_side.Left.ErectorSpinae.ILptC8CI;
    spine_muscle_folder_side.Right.ErectorSpinae.LTptT6S1;
    spine_muscle_folder_side.Right.ErectorSpinae.LTptT10Sacrum;
    spine_muscle_folder_side.Left.Multifidi.MFmL2L5;
    spine_muscle_folder_side.Right.ErectorSpinae.ILptC11CI;
    spine_muscle_folder_side.Left.ErectorSpinae.LTptT5L5;
    spine_muscle_folder_side.Left.ErectorSpinae.LTptC9S4;
    spine_muscle_folder_side.Right.ErectorSpinae.LTptC6S1;
    spine_muscle_folder_side.Right.ErectorSpinae.ILplL3CI;
    spine_muscle_folder_side.Left.ErectorSpinae.ILptC10CI;
    spine_muscle_folder_side.Left.QuadratusLumborum.QLL1_CIInterMedian;
    spine_muscle_folder_side.Right.QuadratusLumborum.QLL1_CIInterMedian;
    spine_muscle_folder_side.Left.Multifidi.MFmL4Sacrum;
    spine_muscle_folder_side.Right.PsoasMajor.PML4T_TM;
    spine_muscle_folder_side.Right.PsoasMajor.PML2T_TM;
    spine_muscle_folder_side.Right.ObliquusInternus.OIC_2;
    spine_muscle_folder_side.Right.ErectorSpinae.LTplL2SIPS;
    spine_muscle_folder_side.Right.ErectorSpinae.ILptC5SIPS;
    spine_muscle_folder_side.Left.ErectorSpinae.LTplL1SIPS;
    spine_muscle_folder_side.Left.ErectorSpinae.LTplL2SIPS;
    spine_muscle_folder_side.Left.ErectorSpinae.LTptT12Sacrum;
    spine_muscle_folder_side.Left.ErectorSpinae.LTptT8S3;
    spine_muscle_folder_side.Left.QuadratusLumborum.QLL3_CIInterMedian;
    spine_muscle_folder_side.Left.QuadratusLumborum.QLC12InterMedian_CIInterMedian;
    spine_muscle_folder_side.Right.Multifidi.MFmL3S1;
    spine_muscle_folder_side.Left.QuadratusLumborum.QLL4_CIInterMedian;
    spine_muscle_folder_side.Left.QuadratusLumborum.QLL3_CILat;
    spine_muscle_folder_side.Left.Multifidi.MFtstL1SIPS;
    spine_muscle_folder_side.Right.Multifidi.MFtsL1S1;
    spine_muscle_folder_side.Right.Multifidi.MFtsL4Sacrum;
    spine_muscle_folder_side.Left.Multifidi.MFtsL1S1;
    spine_muscle_folder_side.Right.QuadratusLumborum.QLT12_CIInterMedian;
    spine_muscle_folder_side.Right.ErectorSpinae.LTplL4SIPS;
    spine_muscle_folder_side.Left.PsoasMajor.PML2T_TM;
    spine_muscle_folder_side.Right.QuadratusLumborum.QLT12_CILat;
    spine_muscle_folder_side.Right.Multifidi.MFmL4Sacrum;
    spine_muscle_folder_side.Right.QuadratusLumborum.QLL2_CIMedian;
    spine_muscle_folder_side.Right.ErectorSpinae.LTptC5L5;
    spine_muscle_folder_side.Right.QuadratusLumborum.QLL2_CIInterMedian;
    spine_muscle_folder_side.Right.QuadratusLumborum.QLL3_CILat;
    spine_muscle_folder_side.Right.ErectorSpinae.LTptT12Sacrum;
    spine_muscle_folder_side.Left.ErectorSpinae.LTptC5L5;
    spine_muscle_folder_side.Left.PsoasMajor.PML1T_TM;
    spine_muscle_folder_side.Right.ErectorSpinae.LTptT9S4;
    spine_muscle_folder_side.Left.Multifidi.MFdL3L5;
    spine_muscle_folder_side.Right.ErectorSpinae.ILptC6SIPS;
    spine_muscle_folder_side.Right.ErectorSpinae.LTptC8S3;
    spine_muscle_folder_side.Right.ErectorSpinae.LTptT11Sacrum;
    spine_muscle_folder_side.Right.QuadratusLumborum.QLL4_CIInterMedian;
    spine_muscle_folder_side.Left.QuadratusLumborum.QLL2_CIInterMedian;
    spine_muscle_folder_side.Right.ErectorSpinae.LTptT7S2;
    spine_muscle_folder_side.Left.QuadratusLumborum.QLT12_CILat;
    spine_muscle_folder_side.Right.Multifidi.MFtsL1L5;
    spine_muscle_folder_side.Right.Multifidi.MFdL4S1;
    spine_muscle_folder_side.Right.ErectorSpinae.ILplL4CI;
    spine_muscle_folder_side.Left.Multifidi.MFtsL2L5;
    spine_muscle_folder_side.Left.QuadratusLumborum.QLT12_CIMedian;
    spine_muscle_folder_side.Left.ErectorSpinae.LTptT11Sacrum;
    spine_muscle_folder_side.Right.ErectorSpinae.ILptC10CI;
    spine_muscle_folder_side.Right.ErectorSpinae.LTplL1SIPS;
    spine_muscle_folder_side.Right.QuadratusLumborum.QLL4_CIMedian;
    spine_muscle_folder_side.Right.QuadratusLumborum.QLT12_CIMedian;
    spine_muscle_folder_side.Left.QuadratusLumborum.QLC12Median_CILat;
    spine_muscle_folder_side.Left.QuadratusLumborum.QLL2_CIMedian;
    spine_muscle_folder_side.Right.PsoasMajor.PML3T_TM;
    spine_muscle_folder_side.Right.Multifidi.MFtstL1SIPS;
    spine_muscle_folder_side.Left.Multifidi.MFtsL2S1;
    spine_muscle_folder_side.Left.QuadratusLumborum.QLC12InterMedian_CILat;
    spine_muscle_folder_side.Right.ErectorSpinae.LTptC10Sacrum;
    spine_muscle_folder_side.Left.PsoasMajor.PML3T_TM;
    spine_muscle_folder_side.Right.ErectorSpinae.ILptC9CI;
    spine_muscle_folder_side.Left.PsoasMajor.PML4T_TM;
    spine_muscle_folder_side.Left.ErectorSpinae.LTptC10Sacrum;
    spine_muscle_folder_side.Left.ErectorSpinae.LTptC8S3;
    spine_muscle_folder_side.Left.ErectorSpinae.ILplL3CI;
    spine_muscle_folder_side.Left.ObliquusInternus.OIC_1;
    spine_muscle_folder_side.Left.ErectorSpinae.LTplL3SIPS;
};

AnyFolder L5Sacrumjnt = {
    spine_muscle_folder_side.Right.QuadratusLumborum.QLL3_CIInterMedian;
    spine_muscle_folder_side.Right.ErectorSpinae.ILptC8CI;
    spine_muscle_folder_side.Left.QuadratusLumborum.QLL4_CIMedian;
    spine_muscle_folder_side.Left.QuadratusLumborum.QLL2_CILat;
    spine_muscle_folder_side.Left.ErectorSpinae.LTptT10Sacrum;
    spine_muscle_folder_side.Right.ErectorSpinae.LTplL5Ilium;
    spine_muscle_folder_side.Left.ErectorSpinae.LTptT9S4;
    spine_muscle_folder_side.Right.ErectorSpinae.LTptT8S3;
    spine_muscle_folder_side.Right.QuadratusLumborum.QLL1_CIMedian;
    spine_muscle_folder_side.Left.ErectorSpinae.LTplL4SIPS;
    spine_muscle_folder_side.Right.Multifidi.MFtsL3Ligament;
    spine_muscle_folder_side.Left.Multifidi.MFtstL2SIPS;
    spine_muscle_folder_side.Right.ErectorSpinae.ILptC7CI;
    spine_muscle_folder_side.Left.QuadratusLumborum.QLC12Median_CIInterMedian;
    spine_muscle_folder_side.Left.QuadratusLumborum.QLT12_CIInterMedian;
    spine_muscle_folder_side.Left.ErectorSpinae.ILptC6SIPS;
    spine_muscle_folder_side.Right.QuadratusLumborum.QLL2_CILat;
    spine_muscle_folder_side.Left.QuadratusLumborum.QLL3_CIMedian;
    spine_muscle_folder_side.Left.ErectorSpinae.ILptC7CI;
    spine_muscle_folder_side.Right.ObliquusInternus.OIC_1;
    spine_muscle_folder_side.Left.ErectorSpinae.ILplL4CI;
    spine_muscle_folder_side.Right.ErectorSpinae.LTptC7S2;
    spine_muscle_folder_side.Left.Multifidi.MFtsL4Sacrum;
    spine_muscle_folder_side.Left.ErectorSpinae.LTptC7S2;
    spine_muscle_folder_side.Left.QuadratusLumborum.QLL1_CIMedian;
    spine_muscle_folder_side.Right.Multifidi.MFtstL2SIPS;
    spine_muscle_folder_side.Right.PsoasMajor.PML1T_TM;
    spine_muscle_folder_side.Left.ErectorSpinae.ILptC9CI;
    spine_muscle_folder_side.Right.ErectorSpinae.LTptC9S4;
    spine_muscle_folder_side.Right.ErectorSpinae.LTplL3SIPS;
    spine_muscle_folder_side.Right.QuadratusLumborum.QLL3_CIMedian;
    spine_muscle_folder_side.Left.ErectorSpinae.LTptT7S2;
    spine_muscle_folder_side.Left.Multifidi.MFtsL3Ligament;
    spine_muscle_folder_side.Right.Multifidi.MFtsL5Sacrum;
    spine_muscle_folder_side.Right.QuadratusLumborum.QLC12Median_CIInterMedian;
    spine_muscle_folder_side.Left.ErectorSpinae.ILptC8CI;
    spine_muscle_folder_side.Right.ErectorSpinae.LTptT10Sacrum;
    spine_muscle_folder_side.Left.ErectorSpinae.LTptC9S4;
    spine_muscle_folder_side.Right.ErectorSpinae.ILplL3CI;
    spine_muscle_folder_side.Left.ErectorSpinae.ILptC10CI;
    spine_muscle_folder_side.Left.QuadratusLumborum.QLL1_CIInterMedian;
    spine_muscle_folder_side.Right.QuadratusLumborum.QLL1_CIInterMedian;
    spine_muscle_folder_side.Left.Multifidi.MFmL4Sacrum;
    spine_muscle_folder_side.Right.PsoasMajor.PML4T_TM;
    spine_muscle_folder_side.Right.PsoasMajor.PML2T_TM;
    spine_muscle_folder_side.Left.ErectorSpinae.LTptT12Sacrum;
    spine_muscle_folder_side.Left.ErectorSpinae.LTptT8S3;
    spine_muscle_folder_side.Left.QuadratusLumborum.QLL3_CIInterMedian;
    spine_muscle_folder_side.Left.QuadratusLumborum.QLL4_CIInterMedian;
    spine_muscle_folder_side.Left.QuadratusLumborum.QLL3_CILat;
    spine_muscle_folder_side.Left.Multifidi.MFtstL1SIPS;
    spine_muscle_folder_side.Right.Multifidi.MFtsL4Sacrum;
    spine_muscle_folder_side.Right.QuadratusLumborum.QLT12_CIInterMedian;
    spine_muscle_folder_side.Right.ErectorSpinae.LTplL4SIPS;
    spine_muscle_folder_side.Left.PsoasMajor.PML2T_TM;
    spine_muscle_folder_side.Right.Multifidi.MFmL4Sacrum;
    spine_muscle_folder_side.Right.QuadratusLumborum.QLL2_CIMedian;
    spine_muscle_folder_side.Right.QuadratusLumborum.QLL2_CIInterMedian;
    spine_muscle_folder_side.Right.QuadratusLumborum.QLL3_CILat;
    spine_muscle_folder_side.Right.ErectorSpinae.LTptT12Sacrum;
    spine_muscle_folder_side.Left.PsoasMajor.PML1T_TM;
    spine_muscle_folder_side.Right.ErectorSpinae.LTptT9S4;
    spine_muscle_folder_side.Right.ErectorSpinae.ILptC6SIPS;
    spine_muscle_folder_side.Right.ErectorSpinae.LTptC8S3;
    spine_muscle_folder_side.Right.ErectorSpinae.LTptT11Sacrum;
    spine_muscle_folder_side.Right.QuadratusLumborum.QLL4_CIInterMedian;
    spine_muscle_folder_side.Left.QuadratusLumborum.QLL2_CIInterMedian;
    spine_muscle_folder_side.Right.ErectorSpinae.LTptT7S2;
    spine_muscle_folder_side.Right.ErectorSpinae.ILplL4CI;
    spine_muscle_folder_side.Left.ErectorSpinae.LTplL5Ilium;
    spine_muscle_folder_side.Left.QuadratusLumborum.QLT12_CIMedian;
    spine_muscle_folder_side.Left.ErectorSpinae.LTptT11Sacrum;
    spine_muscle_folder_side.Right.ErectorSpinae.ILptC10CI;
    spine_muscle_folder_side.Right.QuadratusLumborum.QLL4_CIMedian;
    spine_muscle_folder_side.Right.QuadratusLumborum.QLT12_CIMedian;
    spine_muscle_folder_side.Left.QuadratusLumborum.QLL2_CIMedian;
    spine_muscle_folder_side.Right.PsoasMajor.PML3T_TM;
    spine_muscle_folder_side.Right.Multifidi.MFtstL1SIPS;
    spine_muscle_folder_side.Right.ErectorSpinae.LTptC10Sacrum;
    spine_muscle_folder_side.Left.PsoasMajor.PML3T_TM;
    spine_muscle_folder_side.Right.ErectorSpinae.ILptC9CI;
    spine_muscle_folder_side.Left.Multifidi.MFtsL5Sacrum;
    spine_muscle_folder_side.Left.PsoasMajor.PML4T_TM;
    spine_muscle_folder_side.Left.ErectorSpinae.LTptC10Sacrum;
    spine_muscle_folder_side.Left.ErectorSpinae.LTptC8S3;
    spine_muscle_folder_side.Left.ErectorSpinae.ILplL3CI;
    spine_muscle_folder_side.Left.ObliquusInternus.OIC_1;
    spine_muscle_folder_side.Left.ErectorSpinae.LTplL3SIPS;
};

AnyFolder PelvisSacrumjnt = {
    spine_muscle_folder_side.Right.ObliquusInternus.OIC_1;
    spine_muscle_folder_side.Right.QuadratusLumborum.QLL3_CIInterMedian;
    spine_muscle_folder_side.Left.ErectorSpinae.ILplL4CI;
    spine_muscle_folder_side.Right.ErectorSpinae.ILptC8CI;
    spine_muscle_folder_side.Right.QuadratusLumborum.QLL4_CIInterMedian;
    spine_muscle_folder_side.Left.QuadratusLumborum.QLL1_CIMedian;
    spine_muscle_folder_side.Left.PelvicFloor.Pupococcygeus1;
    spine_muscle_folder_side.Left.QuadratusLumborum.QLL2_CIInterMedian;
    spine_muscle_folder_side.Left.QuadratusLumborum.QLL4_CIMedian;
    spine_muscle_folder_side.Right.Multifidi.MFtstL2SIPS;
    spine_muscle_folder_side.Left.QuadratusLumborum.QLL3_CIInterMedian;
    spine_muscle_folder_side.Left.PelvicFloor.Pupococcygeus2;
    spine_muscle_folder_side.Left.ErectorSpinae.ILptC7CI;
    spine_muscle_folder_side.Right.QuadratusLumborum.QLL1_CIMedian;
    spine_muscle_folder_side.Right.ErectorSpinae.ILplL4CI;
    spine_muscle_folder_side.Left.QuadratusLumborum.QLL4_CIInterMedian;
    spine_muscle_folder_side.Right.ErectorSpinae.LTplL3SIPS;
    spine_muscle_folder_side.Left.ErectorSpinae.LTplL4SIPS;
    spine_muscle_folder_side.Right.QuadratusLumborum.QLL3_CIMedian;
    spine_muscle_folder_side.Left.PelvicFloor.Puporectalis1;
    spine_muscle_folder_side.Left.Multifidi.MFtstL2SIPS;
    spine_muscle_folder_side.Left.QuadratusLumborum.QLT12_CIMedian;
    spine_muscle_folder_side.Right.PelvicFloor.Pupococcygeus1;
    spine_muscle_folder_side.Left.ErectorSpinae.ILptC8CI;
    spine_muscle_folder_side.Right.QuadratusLumborum.QLL4_CIMedian;
    spine_muscle_folder_side.Right.QuadratusLumborum.QLT12_CIMedian;
    spine_muscle_folder_side.Right.ErectorSpinae.ILptC7CI;
    spine_muscle_folder_side.Left.PelvicFloor.Puporectalis2;
    spine_muscle_folder_side.Left.QuadratusLumborum.QLL2_CIMedian;
    spine_muscle_folder_side.Right.ErectorSpinae.ILplL3CI;
    spine_muscle_folder_side.Right.ErectorSpinae.LTplL4SIPS;
    spine_muscle_folder_side.Right.PelvicFloor.Puporectalis1;
    spine_muscle_folder_side.Right.PelvicFloor.Puporectalis2;
    spine_muscle_folder_side.Right.QuadratusLumborum.QLL2_CIMedian;
    spine_muscle_folder_side.Right.QuadratusLumborum.QLL2_CIInterMedian;
    spine_muscle_folder_side.Right.PelvicFloor.Pupococcygeus2;
    spine_muscle_folder_side.Left.ErectorSpinae.ILplL3CI;
    spine_muscle_folder_side.Left.QuadratusLumborum.QLL3_CIMedian;
    spine_muscle_folder_side.Left.ObliquusInternus.OIC_1;
    spine_muscle_folder_side.Left.ErectorSpinae.LTplL3SIPS;
};

AnyFolder T10T11jnt = {
    spine_muscle_folder_side.Right.QuadratusLumborum.QLC12InterMedian_CILat;
    spine_muscle_folder_side.Right.SemispinalisThoracis.SSTT12T4;
    spine_muscle_folder_side.Right.Subcostalis.SCR9R11;
    spine_muscle_folder_side.Right.ErectorSpinae.ILptC8CI;
    spine_muscle_folder_side.Right.ErectorSpinae.ITR6R12;
    spine_muscle_folder_side.Left.Subcostalis.SCR8R11;
    spine_muscle_folder_side.Left.ErectorSpinae.LTptT6S1;
    spine_muscle_folder_side.Left.ErectorSpinae.LTptT10Sacrum;
    spine_muscle_folder_side.Left.ThoracicMultifidi.MFL1T10;
    spine_muscle_folder_side.Left.ThoracicMultifidi.MFL1T9;
    spine_muscle_folder_side.Right.QuadratusLumborum.QLC12InterMedian_CIInterMedian;
    spine_muscle_folder_side.Left.ErectorSpinae.LTptT9S4;
    spine_muscle_folder_side.Right.ErectorSpinae.LTptT4L4;
    spine_muscle_folder_side.Left.ErectorSpinae.LTptT1L1;
    spine_muscle_folder_side.Right.ErectorSpinae.LTptT8S3;
    spine_muscle_folder_side.Left.InnermostInterCostalis.IC_Inn_R10R11.elem2;
    spine_muscle_folder_side.Right.ThoracicMultifidi.MFT12T9;
    spine_muscle_folder_side.Left.LevatorCostarum.LCBrT10R11;
    spine_muscle_folder_side.Right.QuadratusLumborum.QLC12Median_CILat;
    spine_muscle_folder_side.Right.ErectorSpinae.LTptC3L3;
    spine_muscle_folder_side.Right.ThoracicMultifidi.MFL2T10;
    spine_muscle_folder_side.Left.ExternalInterCostalis.IC_Ext_R10R11.elem2;
    spine_muscle_folder_side.Right.ErectorSpinae.ILptC7CI;
    spine_muscle_folder_side.Right.ThoracicMultifidi.MFT12T7;
    spine_muscle_folder_side.Right.ExternalInterCostalis.IC_Ext_R11R12.elem2;
    spine_muscle_folder_side.Spinalis.SPT11T6;
    spine_muscle_folder_side.Left.ErectorSpinae.LTptC3L3;
    spine_muscle_folder_side.Left.QuadratusLumborum.QLC12Median_CIInterMedian;
    spine_muscle_folder_side.Right.ExternalInterCostalis.IC_Ext_R10R11.elem5;
    spine_muscle_folder_side.Left.ErectorSpinae.LTptT2L2;
    spine_muscle_folder_side.Left.ErectorSpinae.ILptC5SIPS;
    spine_muscle_folder_side.Left.InternalInterCostalis.IC_Int_R10R11.elem3;
    spine_muscle_folder_side.Left.ErectorSpinae.ILptC6SIPS;
    spine_muscle_folder_side.Left.InnermostInterCostalis.IC_Inn_R10R11.elem4;
    spine_muscle_folder_side.Left.ThoracicMultifidi.MFT11T6;
    spine_muscle_folder_side.Right.ExternalInterCostalis.IC_Ext_R10R11.elem6;
    spine_muscle_folder_side.Right.QuadratusLumborum.QLC12InterMedian_L2;
    spine_muscle_folder_side.Left.RotatoresLongus.RotatoresLongusT12T10;
    spine_muscle_folder_side.Right.InnermostInterCostalis.IC_Inn_R10R11.elem2;
    spine_muscle_folder_side.Right.SemispinalisThoracis.SSTT11T3;
    spine_muscle_folder_side.Spinalis.SPT12T4;
    spine_muscle_folder_side.Right.LevatorCostarum.LCLgT9R11;
    spine_muscle_folder_side.Left.QuadratusLumborum.QLC12Median_L4;
    spine_muscle_folder_side.Left.ErectorSpinae.ILptC7CI;
    spine_muscle_folder_side.Left.Diaphragm.R11_Diaphragm2;
    spine_muscle_folder_side.Left.ErectorSpinae.LTptC6S1;
    spine_muscle_folder_side.Left.ThoracicMultifidi.MFL3T10;
    spine_muscle_folder_side.Right.ErectorSpinae.LTptC7S2;
    spine_muscle_folder_side.Left.ErectorSpinae.LTptC7S2;
    spine_muscle_folder_side.Right.ErectorSpinae.LTptT5L5;
    spine_muscle_folder_side.Spinalis.SPL1T3;
    spine_muscle_folder_side.Left.SemispinalisThoracis.SSTT11T3;
    spine_muscle_folder_side.Left.ErectorSpinae.ILptC9CI;
    spine_muscle_folder_side.Right.ErectorSpinae.LTptC9S4;
    spine_muscle_folder_side.Right.InnermostInterCostalis.IC_Inn_R10R11.elem3;
    spine_muscle_folder_side.Left.ErectorSpinae.LTptT7S2;
    spine_muscle_folder_side.Left.ErectorSpinae.ITR6R12;
    spine_muscle_folder_side.Left.RotatoresLongus.RotatoresLongusT11T9;
    spine_muscle_folder_side.Left.SerratusPosteriorInferior.SPIT12R10;
    spine_muscle_folder_side.Left.ThoracicMultifidi.MFT12T8;
    spine_muscle_folder_side.Left.QuadratusLumborum.QLC12Median_L2;
    spine_muscle_folder_side.Right.QuadratusLumborum.QLC12Median_CIInterMedian;
    spine_muscle_folder_side.Right.ThoracicMultifidi.MFT11T7;
    spine_muscle_folder_side.Spinalis.SPL1T2;
    spine_muscle_folder_side.Left.ErectorSpinae.ILptC8CI;
    spine_muscle_folder_side.Left.LevatorCostarum.LCLgT9R11;
    spine_muscle_folder_side.Right.ErectorSpinae.LTptT1L1;
    spine_muscle_folder_side.Right.ErectorSpinae.LTptT6S1;
    spine_muscle_folder_side.Left.InnermostInterCostalis.IC_Inn_R10R11.elem1;
    spine_muscle_folder_side.Right.ErectorSpinae.LTptT10Sacrum;
    spine_muscle_folder_side.Right.ThoracicMultifidi.MFL3T10;
    spine_muscle_folder_side.Left.ErectorSpinae.LTptT5L5;
    spine_muscle_folder_side.Left.ExternalInterCostalis.IC_Ext_R10R11.elem6;
    spine_muscle_folder_side.Left.ErectorSpinae.LTptC9S4;
    spine_muscle_folder_side.Left.ThoracicMultifidi.MFT11T7;
    spine_muscle_folder_side.Left.ErectorSpinae.LTptC4L4;
    spine_muscle_folder_side.Right.ErectorSpinae.LTptC6S1;
    spine_muscle_folder_side.Left.ErectorSpinae.ILptC10CI;
    spine_muscle_folder_side.Right.ExternalInterCostalis.IC_Ext_R10R11.elem3;
    spine_muscle_folder_side.Right.RotatoresBrevis.RotatoresBrevisT11T10;
    spine_muscle_folder_side.Left.QuadratusLumborum.QLC12InterMedian_L2;
    spine_muscle_folder_side.Right.SerratusPosteriorInferior.SPIT11R9;
    spine_muscle_folder_side.Left.LevatorCostarum.LCLgT10R12;
    spine_muscle_folder_side.Left.ErectorSpinae.ITR5R11;
    spine_muscle_folder_side.Spinalis.SPT12T5;
    spine_muscle_folder_side.Left.Diaphragm.R11_Diaphragm3;
    spine_muscle_folder_side.Left.ThoracicMultifidi.MFT12T9;
    spine_muscle_folder_side.Right.Diaphragm.R11_Diaphragm1;
    spine_muscle_folder_side.Right.Diaphragm.R11_Diaphragm2;
    spine_muscle_folder_side.Right.ExternalInterCostalis.IC_Ext_R10R11.elem4;
    spine_muscle_folder_side.Right.ErectorSpinae.ILptC5SIPS;
    spine_muscle_folder_side.Right.ThoracicMultifidi.MFT12T8;
    spine_muscle_folder_side.Left.SemispinalisThoracis.SSTT12T4;
    spine_muscle_folder_side.Right.InternalInterCostalis.IC_Int_R10R11.elem3;
    spine_muscle_folder_side.Left.ErectorSpinae.LTptT8S3;
    spine_muscle_folder_side.Right.ErectorSpinae.LTptC4L4;
    spine_muscle_folder_side.Spinalis.SPL2T1;
    spine_muscle_folder_side.Left.ExternalInterCostalis.IC_Ext_R10R11.elem4;
    spine_muscle_folder_side.Left.QuadratusLumborum.QLC12InterMedian_CIInterMedian;
    spine_muscle_folder_side.Left.InnermostInterCostalis.IC_Inn_R10R11.elem3;
    spine_muscle_folder_side.Left.Subcostalis.SCR9R11;
    spine_muscle_folder_side.Right.InternalInterCostalis.IC_Int_R10R11.elem2;
    spine_muscle_folder_side.Right.Diaphragm.R11_Diaphragm3;
    spine_muscle_folder_side.Right.InternalInterCostalis.IC_Int_R10R11.elem1;
    spine_muscle_folder_side.Left.Diaphragm.R11_Diaphragm1;
    spine_muscle_folder_side.Right.ThoracicMultifidi.MFT11T6;
    spine_muscle_folder_side.Left.RotatoresBrevis.RotatoresBrevisT11T10;
    spine_muscle_folder_side.Right.ErectorSpinae.ITR5R11;
    spine_muscle_folder_side.Right.ExternalInterCostalis.IC_Ext_R10R11.elem1;
    spine_muscle_folder_side.Right.LevatorCostarum.LCBrT10R11;
    spine_muscle_folder_side.Right.ThoracicMultifidi.MFL1T9;
    spine_muscle_folder_side.Right.QuadratusLumborum.QLC12InterMedian_L4;
    spine_muscle_folder_side.Right.QuadratusLumborum.QLC12Median_L4;
    spine_muscle_folder_side.Right.ThoracicMultifidi.MFT11T8;
    spine_muscle_folder_side.Right.LevatorCostarum.LCLgT10R12;
    spine_muscle_folder_side.Right.ErectorSpinae.LTptT2L2;
    spine_muscle_folder_side.Right.ErectorSpinae.LTptC5L5;
    spine_muscle_folder_side.Right.SerratusPosteriorInferior.SPIT12R10;
    spine_muscle_folder_side.Left.ObliquusExternus.OEC_12;
    spine_muscle_folder_side.Left.SerratusPosteriorInferior.SPIT11R9;
    spine_muscle_folder_side.Right.QuadratusLumborum.QLC12InterMedian_L3;
    spine_muscle_folder_side.Left.ThoracicMultifidi.MFT11T8;
    spine_muscle_folder_side.Left.ErectorSpinae.LTptC5L5;
    spine_muscle_folder_side.Left.ThoracicMultifidi.MFT12T7;
    spine_muscle_folder_side.Right.ThoracicMultifidi.MFL1T10;
    spine_muscle_folder_side.Right.ErectorSpinae.LTptT9S4;
    spine_muscle_folder_side.Right.QuadratusLumborum.QLC12Median_L3;
    spine_muscle_folder_side.Right.ErectorSpinae.LTptT3L3;
    spine_muscle_folder_side.Left.ErectorSpinae.LTptT4L4;
    spine_muscle_folder_side.Left.QuadratusLumborum.QLC12Median_L3;
    spine_muscle_folder_side.Right.ErectorSpinae.ILptC6SIPS;
    spine_muscle_folder_side.Right.ErectorSpinae.LTptC8S3;
    spine_muscle_folder_side.Right.RotatoresLongus.RotatoresLongusT12T10;
    spine_muscle_folder_side.Right.ThoracicMultifidi.MFL2T9;
    spine_muscle_folder_side.Right.ErectorSpinae.LTptT11Sacrum;
    spine_muscle_folder_side.Left.InternalInterCostalis.IC_Int_R10R11.elem2;
    spine_muscle_folder_side.Left.ErectorSpinae.LTptT3L3;
    spine_muscle_folder_side.Right.ThoracicMultifidi.MFL1T8;
    spine_muscle_folder_side.Right.Subcostalis.SCR8R11;
    spine_muscle_folder_side.Right.ErectorSpinae.LTptT7S2;
    spine_muscle_folder_side.Right.InnermostInterCostalis.IC_Inn_R10R11.elem4;
    spine_muscle_folder_side.Left.ThoracicMultifidi.MFL2T10;
    spine_muscle_folder_side.Left.QuadratusLumborum.QLC12InterMedian_L3;
    spine_muscle_folder_side.Left.ErectorSpinae.LTptT11Sacrum;
    spine_muscle_folder_side.Right.ErectorSpinae.ILptC10CI;
    spine_muscle_folder_side.Right.RotatoresLongus.RotatoresLongusT11T9;
    spine_muscle_folder_side.Left.QuadratusLumborum.QLC12Median_CILat;
    spine_muscle_folder_side.Right.ObliquusExternus.OEC_12;
    spine_muscle_folder_side.Left.QuadratusLumborum.QLC12InterMedian_L4;
    spine_muscle_folder_side.Left.ThoracicMultifidi.MFL2T9;
    spine_muscle_folder_side.Right.ExternalInterCostalis.IC_Ext_R10R11.elem2;
    spine_muscle_folder_side.Left.ExternalInterCostalis.IC_Ext_R10R11.elem5;
    spine_muscle_folder_side.Left.QuadratusLumborum.QLC12InterMedian_CILat;
    spine_muscle_folder_side.Right.ErectorSpinae.LTptC10Sacrum;
    spine_muscle_folder_side.Right.ErectorSpinae.ILptC9CI;
    spine_muscle_folder_side.Left.InternalInterCostalis.IC_Int_R10R11.elem1;
    spine_muscle_folder_side.Left.ExternalInterCostalis.IC_Ext_R10R11.elem1;
    spine_muscle_folder_side.Left.ExternalInterCostalis.IC_Ext_R10R11.elem3;
    spine_muscle_folder_side.Left.ErectorSpinae.LTptC10Sacrum;
    spine_muscle_folder_side.Left.ErectorSpinae.LTptC8S3;
    spine_muscle_folder_side.Left.ThoracicMultifidi.MFL1T8;
    spine_muscle_folder_side.Right.QuadratusLumborum.QLC12Median_L2;
    spine_muscle_folder_side.Left.ExternalInterCostalis.IC_Ext_R11R12.elem2;
    spine_muscle_folder_side.Right.InnermostInterCostalis.IC_Inn_R10R11.elem1;
};

AnyFolder T11T12jnt = {
    spine_muscle_folder_side.Right.QuadratusLumborum.QLC12InterMedian_CILat;
    spine_muscle_folder_side.Left.ErectorSpinae.ILptC11CI;
    spine_muscle_folder_side.Right.SemispinalisThoracis.SSTT12T4;
    spine_muscle_folder_side.Right.SerratusPosteriorInferior.SPIL1R11;
    spine_muscle_folder_side.Right.ErectorSpinae.ILptC8CI;
    spine_muscle_folder_side.Right.ErectorSpinae.ITR6R12;
    spine_muscle_folder_side.Right.InnermostInterCostalis.IC_Inn_R11R12.elem2;
    spine_muscle_folder_side.Left.ErectorSpinae.LTptT6S1;
    spine_muscle_folder_side.Left.ErectorSpinae.LTptT10Sacrum;
    spine_muscle_folder_side.Right.ThoracicMultifidi.MFL2T11;
    spine_muscle_folder_side.Left.ThoracicMultifidi.MFL1T10;
    spine_muscle_folder_side.Left.ThoracicMultifidi.MFL1T9;
    spine_muscle_folder_side.Right.QuadratusLumborum.QLC12InterMedian_CIInterMedian;
    spine_muscle_folder_side.Left.ErectorSpinae.LTptT9S4;
    spine_muscle_folder_side.Right.ErectorSpinae.LTptT4L4;
    spine_muscle_folder_side.Left.ErectorSpinae.LTptT1L1;
    spine_muscle_folder_side.Right.ErectorSpinae.LTptT8S3;
    spine_muscle_folder_side.Right.InternalInterCostalis.IC_Int_R11R12.elem1;
    spine_muscle_folder_side.Right.ThoracicMultifidi.MFL3T11;
    spine_muscle_folder_side.Left.Diaphragm.R12_Diaphragm1;
    spine_muscle_folder_side.Left.LevatorCostarum.LCBrT11R12;
    spine_muscle_folder_side.Right.ThoracicMultifidi.MFT12T9;
    spine_muscle_folder_side.Right.QuadratusLumborum.QLC12Median_CILat;
    spine_muscle_folder_side.Right.ErectorSpinae.LTptC3L3;
    spine_muscle_folder_side.Right.ThoracicMultifidi.MFL2T10;
    spine_muscle_folder_side.Right.ErectorSpinae.ILptC7CI;
    spine_muscle_folder_side.Right.ThoracicMultifidi.MFT12T7;
    spine_muscle_folder_side.Right.ExternalInterCostalis.IC_Ext_R11R12.elem2;
    spine_muscle_folder_side.Left.ErectorSpinae.LTptC3L3;
    spine_muscle_folder_side.Left.QuadratusLumborum.QLC12Median_CIInterMedian;
    spine_muscle_folder_side.Left.ErectorSpinae.LTptT2L2;
    spine_muscle_folder_side.Left.ErectorSpinae.ILptC5SIPS;
    spine_muscle_folder_side.Right.QuadratusLumborum.QLC12InterMedian_L2;
    spine_muscle_folder_side.Left.ErectorSpinae.ILptC6SIPS;
    spine_muscle_folder_side.Left.RotatoresLongus.RotatoresLongusT12T10;
    spine_muscle_folder_side.Right.Diaphragm.R12_Diaphragm1;
    spine_muscle_folder_side.Right.QuadratusLumborum.QLC12Lat_L4;
    spine_muscle_folder_side.Spinalis.SPT12T4;
    spine_muscle_folder_side.Left.QuadratusLumborum.QLC12Lat_L2;
    spine_muscle_folder_side.Right.ObliquusExternus.OEC_11;
    spine_muscle_folder_side.Left.QuadratusLumborum.QLC12Median_L4;
    spine_muscle_folder_side.Left.ErectorSpinae.ILptC7CI;
    spine_muscle_folder_side.Left.ExternalInterCostalis.IC_Ext_R11R12.elem1;
    spine_muscle_folder_side.Left.ErectorSpinae.LTptC6S1;
    spine_muscle_folder_side.Left.ThoracicMultifidi.MFL3T10;
    spine_muscle_folder_side.Right.ErectorSpinae.LTptC7S2;
    spine_muscle_folder_side.Right.QuadratusLumborum.QLC12Lat_CILat;
    spine_muscle_folder_side.Left.ErectorSpinae.LTptC7S2;
    spine_muscle_folder_side.Right.ErectorSpinae.LTptT5L5;
    spine_muscle_folder_side.Spinalis.SPL1T3;
    spine_muscle_folder_side.Left.QuadratusLumborum.QLC12Lat_CILat;
    spine_muscle_folder_side.Left.ErectorSpinae.ILptC9CI;
    spine_muscle_folder_side.Right.ErectorSpinae.LTptC9S4;
    spine_muscle_folder_side.Right.InternalInterCostalis.IC_Int_R11R12.elem2;
    spine_muscle_folder_side.Left.InternalInterCostalis.IC_Int_R11R12.elem2;
    spine_muscle_folder_side.Left.ErectorSpinae.LTptT7S2;
    spine_muscle_folder_side.Left.ErectorSpinae.ITR6R12;
    spine_muscle_folder_side.Left.SerratusPosteriorInferior.SPIT12R10;
    spine_muscle_folder_side.Left.ThoracicMultifidi.MFT12T8;
    spine_muscle_folder_side.Left.QuadratusLumborum.QLC12Median_L2;
    spine_muscle_folder_side.Right.QuadratusLumborum.QLC12Median_CIInterMedian;
    spine_muscle_folder_side.Spinalis.SPL1T2;
    spine_muscle_folder_side.Left.ErectorSpinae.ILptC8CI;
    spine_muscle_folder_side.Right.ErectorSpinae.LTptT1L1;
    spine_muscle_folder_side.Right.ErectorSpinae.LTptT6S1;
    spine_muscle_folder_side.Right.ErectorSpinae.LTptT10Sacrum;
    spine_muscle_folder_side.Right.ThoracicMultifidi.MFL3T10;
    spine_muscle_folder_side.Right.ErectorSpinae.ILptC11CI;
    spine_muscle_folder_side.Left.ErectorSpinae.LTptT5L5;
    spine_muscle_folder_side.Left.ErectorSpinae.LTptC9S4;
    spine_muscle_folder_side.Right.ErectorSpinae.LTptC6S1;
    spine_muscle_folder_side.Left.ErectorSpinae.LTptC4L4;
    spine_muscle_folder_side.Left.ErectorSpinae.ILptC10CI;
    spine_muscle_folder_side.Right.ExternalInterCostalis.IC_Ext_R11R12.elem1;
    spine_muscle_folder_side.Left.QuadratusLumborum.QLC12InterMedian_L2;
    spine_muscle_folder_side.Right.QuadratusLumborum.QLC12Lat_L2;
    spine_muscle_folder_side.Left.Diaphragm.R12_Diaphragm2;
    spine_muscle_folder_side.Left.InternalInterCostalis.IC_Int_R11R12.elem1;
    spine_muscle_folder_side.Left.LevatorCostarum.LCLgT10R12;
    spine_muscle_folder_side.Spinalis.SPT12T5;
    spine_muscle_folder_side.Left.ThoracicMultifidi.MFT12T9;
    spine_muscle_folder_side.Left.ObliquusExternus.OEC_11;
    spine_muscle_folder_side.Right.ErectorSpinae.ILptC5SIPS;
    spine_muscle_folder_side.Left.InnermostInterCostalis.IC_Inn_R11R12.elem2;
    spine_muscle_folder_side.Left.ThoracicMultifidi.MFL4T11;
    spine_muscle_folder_side.Right.ThoracicMultifidi.MFT12T8;
    spine_muscle_folder_side.Left.SemispinalisThoracis.SSTT12T4;
    spine_muscle_folder_side.Left.ErectorSpinae.LTptT12Sacrum;
    spine_muscle_folder_side.Left.ErectorSpinae.LTptT8S3;
    spine_muscle_folder_side.Left.ThoracicMultifidi.MFL2T11;
    spine_muscle_folder_side.Left.InnermostInterCostalis.IC_Inn_R11R12.elem1;
    spine_muscle_folder_side.Left.RotatoresBrevis.RotatoresBrevisT12T11;
    spine_muscle_folder_side.Right.ErectorSpinae.LTptC4L4;
    spine_muscle_folder_side.Spinalis.SPL2T1;
    spine_muscle_folder_side.Left.QuadratusLumborum.QLC12InterMedian_CIInterMedian;
    spine_muscle_folder_side.Right.ThoracicMultifidi.MFL1T9;
    spine_muscle_folder_side.Right.Diaphragm.R12_Diaphragm2;
    spine_muscle_folder_side.Right.QuadratusLumborum.QLC12InterMedian_L4;
    spine_muscle_folder_side.Right.QuadratusLumborum.QLC12Median_L4;
    spine_muscle_folder_side.Right.LevatorCostarum.LCLgT10R12;
    spine_muscle_folder_side.Right.ErectorSpinae.LTptT2L2;
    spine_muscle_folder_side.Right.ErectorSpinae.LTptC5L5;
    spine_muscle_folder_side.Right.SerratusPosteriorInferior.SPIT12R10;
    spine_muscle_folder_side.Right.ErectorSpinae.LTptT12Sacrum;
    spine_muscle_folder_side.Left.ObliquusExternus.OEC_12;
    spine_muscle_folder_side.Left.ThoracicMultifidi.MFL3T11;
    spine_muscle_folder_side.Right.QuadratusLumborum.QLC12InterMedian_L3;
    spine_muscle_folder_side.Left.ErectorSpinae.LTptC5L5;
    spine_muscle_folder_side.Left.ThoracicMultifidi.MFT12T7;
    spine_muscle_folder_side.Right.ThoracicMultifidi.MFL1T10;
    spine_muscle_folder_side.Right.ErectorSpinae.LTptT9S4;
    spine_muscle_folder_side.Right.QuadratusLumborum.QLC12Median_L3;
    spine_muscle_folder_side.Right.LevatorCostarum.LCBrT11R12;
    spine_muscle_folder_side.Right.ErectorSpinae.LTptT3L3;
    spine_muscle_folder_side.Left.ErectorSpinae.LTptT4L4;
    spine_muscle_folder_side.Left.QuadratusLumborum.QLC12Median_L3;
    spine_muscle_folder_side.Right.ErectorSpinae.ILptC6SIPS;
    spine_muscle_folder_side.Right.ErectorSpinae.LTptC8S3;
    spine_muscle_folder_side.Right.RotatoresLongus.RotatoresLongusT12T10;
    spine_muscle_folder_side.Right.ThoracicMultifidi.MFL2T9;
    spine_muscle_folder_side.Right.ErectorSpinae.LTptT11Sacrum;
    spine_muscle_folder_side.Left.ErectorSpinae.LTptT3L3;
    spine_muscle_folder_side.Right.ThoracicMultifidi.MFL1T8;
    spine_muscle_folder_side.Right.ErectorSpinae.LTptT7S2;
    spine_muscle_folder_side.Right.RotatoresBrevis.RotatoresBrevisT12T11;
    spine_muscle_folder_side.Left.SerratusPosteriorInferior.SPIL1R11;
    spine_muscle_folder_side.Left.ThoracicMultifidi.MFL2T10;
    spine_muscle_folder_side.Left.QuadratusLumborum.QLC12InterMedian_L3;
    spine_muscle_folder_side.Left.ErectorSpinae.LTptT11Sacrum;
    spine_muscle_folder_side.Right.ErectorSpinae.ILptC10CI;
    spine_muscle_folder_side.Left.QuadratusLumborum.QLC12Median_CILat;
    spine_muscle_folder_side.Right.ObliquusExternus.OEC_12;
    spine_muscle_folder_side.Right.QuadratusLumborum.QLC12Lat_L3;
    spine_muscle_folder_side.Right.ThoracicMultifidi.MFL4T11;
    spine_muscle_folder_side.Left.QuadratusLumborum.QLC12InterMedian_L4;
    spine_muscle_folder_side.Left.QuadratusLumborum.QLC12Lat_L4;
    spine_muscle_folder_side.Left.ThoracicMultifidi.MFL2T9;
    spine_muscle_folder_side.Left.QuadratusLumborum.QLC12InterMedian_CILat;
    spine_muscle_folder_side.Right.ErectorSpinae.LTptC10Sacrum;
    spine_muscle_folder_side.Right.InnermostInterCostalis.IC_Inn_R11R12.elem1;
    spine_muscle_folder_side.Right.ErectorSpinae.ILptC9CI;
    spine_muscle_folder_side.Left.ErectorSpinae.LTptC10Sacrum;
    spine_muscle_folder_side.Left.ErectorSpinae.LTptC8S3;
    spine_muscle_folder_side.Left.ThoracicMultifidi.MFL1T8;
    spine_muscle_folder_side.Left.QuadratusLumborum.QLC12Lat_L3;
    spine_muscle_folder_side.Right.QuadratusLumborum.QLC12Median_L2;
    spine_muscle_folder_side.Left.ExternalInterCostalis.IC_Ext_R11R12.elem2;
};
AnyFolder T12L1jnt = {
    spine_muscle_folder_side.Right.QuadratusLumborum.QLC12InterMedian_CILat;
    spine_muscle_folder_side.Left.ErectorSpinae.ILptC11CI;
    spine_muscle_folder_side.Right.SerratusPosteriorInferior.SPIL1R11;
    spine_muscle_folder_side.Right.ErectorSpinae.ILptC8CI;
    spine_muscle_folder_side.Left.ErectorSpinae.LTptT6S1;
    spine_muscle_folder_side.Left.ErectorSpinae.LTptT10Sacrum;
    spine_muscle_folder_side.Right.ThoracicMultifidi.MFL2T11;
    spine_muscle_folder_side.Left.ThoracicMultifidi.MFL1T10;
    spine_muscle_folder_side.Left.ThoracicMultifidi.MFL1T9;
    spine_muscle_folder_side.Right.QuadratusLumborum.QLC12InterMedian_CIInterMedian;
    spine_muscle_folder_side.Left.ErectorSpinae.LTptT9S4;
    spine_muscle_folder_side.Right.ErectorSpinae.LTptT4L4;
    spine_muscle_folder_side.Left.ErectorSpinae.LTptT1L1;
    spine_muscle_folder_side.Right.ErectorSpinae.LTptT8S3;
    spine_muscle_folder_side.Right.ThoracicMultifidi.MFL3T11;
    spine_muscle_folder_side.Right.QuadratusLumborum.QLC12Median_CILat;
    spine_muscle_folder_side.Right.ErectorSpinae.LTptC3L3;
    spine_muscle_folder_side.Left.ThoracicMultifidi.MFL4T12;
    spine_muscle_folder_side.Right.ThoracicMultifidi.MFL2T10;
    spine_muscle_folder_side.Right.ErectorSpinae.ILptC7CI;
    spine_muscle_folder_side.Left.ErectorSpinae.LTptC3L3;
    spine_muscle_folder_side.Left.QuadratusLumborum.QLC12Median_CIInterMedian;
    spine_muscle_folder_side.Left.QuadratusLumborum.QLT12_CIInterMedian;
    spine_muscle_folder_side.Left.ErectorSpinae.LTptT2L2;
    spine_muscle_folder_side.Left.ErectorSpinae.ILptC5SIPS;
    spine_muscle_folder_side.Right.QuadratusLumborum.QLC12InterMedian_L2;
    spine_muscle_folder_side.Left.ErectorSpinae.ILptC6SIPS;
    spine_muscle_folder_side.Left.SerratusPosteriorInferior.SPIL2R12;
    spine_muscle_folder_side.Right.QuadratusLumborum.QLC12Lat_L4;
    spine_muscle_folder_side.Left.QuadratusLumborum.QLC12Lat_L2;
    spine_muscle_folder_side.Right.ErectorSpinae.ILptC12CI;
    spine_muscle_folder_side.Right.ObliquusExternus.OEC_11;
    spine_muscle_folder_side.Right.ThoracicMultifidi.MFL3T12;
    spine_muscle_folder_side.Left.QuadratusLumborum.QLC12Median_L4;
    spine_muscle_folder_side.Left.ThoracicMultifidi.MFL5T12;
    spine_muscle_folder_side.Left.ErectorSpinae.ILptC7CI;
    spine_muscle_folder_side.Left.ErectorSpinae.LTptC6S1;
    spine_muscle_folder_side.Right.ObliquusInternus.OIC_1;
    spine_muscle_folder_side.Left.ThoracicMultifidi.MFL3T10;
    spine_muscle_folder_side.Right.ErectorSpinae.LTptC7S2;
    spine_muscle_folder_side.Right.QuadratusLumborum.QLC12Lat_CILat;
    spine_muscle_folder_side.Left.ErectorSpinae.LTptC7S2;
    spine_muscle_folder_side.Left.ErectorSpinae.ILptC12CI;
    spine_muscle_folder_side.Right.ErectorSpinae.LTptT5L5;
    spine_muscle_folder_side.Spinalis.SPL1T3;
    spine_muscle_folder_side.Left.QuadratusLumborum.QLC12Lat_CILat;
    spine_muscle_folder_side.Left.ErectorSpinae.ILptC9CI;
    spine_muscle_folder_side.Right.ErectorSpinae.LTptC9S4;
    spine_muscle_folder_side.Left.ErectorSpinae.LTptT7S2;
    spine_muscle_folder_side.Right.ThoracicMultifidi.MFL5T12;
    spine_muscle_folder_side.Right.Diaphragm.L1TransverseProcess_Diaphragm;
    spine_muscle_folder_side.Left.QuadratusLumborum.QLC12Median_L2;
    spine_muscle_folder_side.Right.QuadratusLumborum.QLC12Median_CIInterMedian;
    spine_muscle_folder_side.Spinalis.SPL1T2;
    spine_muscle_folder_side.Left.ErectorSpinae.ILptC8CI;
    spine_muscle_folder_side.Right.ErectorSpinae.LTptT1L1;
    spine_muscle_folder_side.Right.ErectorSpinae.LTptT6S1;
    spine_muscle_folder_side.Right.ErectorSpinae.LTptT10Sacrum;
    spine_muscle_folder_side.Right.ThoracicMultifidi.MFL3T10;
    spine_muscle_folder_side.Right.ErectorSpinae.ILptC11CI;
    spine_muscle_folder_side.Left.ErectorSpinae.LTptT5L5;
    spine_muscle_folder_side.Left.ErectorSpinae.LTptC9S4;
    spine_muscle_folder_side.Right.ErectorSpinae.LTptC6S1;
    spine_muscle_folder_side.Left.ErectorSpinae.LTptC4L4;
    spine_muscle_folder_side.Left.ErectorSpinae.ILptC10CI;
    spine_muscle_folder_side.Left.QuadratusLumborum.QLC12InterMedian_L2;
    spine_muscle_folder_side.Right.QuadratusLumborum.QLC12Lat_L2;
    spine_muscle_folder_side.Left.ObliquusExternus.OEC_11;
    spine_muscle_folder_side.Right.ErectorSpinae.ILptC5SIPS;
    spine_muscle_folder_side.Left.ThoracicMultifidi.MFL4T11;
    spine_muscle_folder_side.Left.ErectorSpinae.LTptT12Sacrum;
    spine_muscle_folder_side.Left.ErectorSpinae.LTptT8S3;
    spine_muscle_folder_side.Left.ThoracicMultifidi.MFL2T11;
    spine_muscle_folder_side.Right.ErectorSpinae.LTptC4L4;
    spine_muscle_folder_side.Right.ThoracicMultifidi.MFL4T12;
    spine_muscle_folder_side.Spinalis.SPL2T1;
    spine_muscle_folder_side.Left.QuadratusLumborum.QLC12InterMedian_CIInterMedian;
    spine_muscle_folder_side.Right.ThoracicMultifidi.MFL1T9;
    spine_muscle_folder_side.Right.QuadratusLumborum.QLT12_CIInterMedian;
    spine_muscle_folder_side.Right.QuadratusLumborum.QLT12_CILat;
    spine_muscle_folder_side.Left.Diaphragm.L1TransverseProcess_Diaphragm;
    spine_muscle_folder_side.Right.QuadratusLumborum.QLC12InterMedian_L4;
    spine_muscle_folder_side.Right.QuadratusLumborum.QLC12Median_L4;
    spine_muscle_folder_side.Right.ErectorSpinae.LTptT2L2;
    spine_muscle_folder_side.Right.ErectorSpinae.LTptC5L5;
    spine_muscle_folder_side.Right.ErectorSpinae.LTptT12Sacrum;
    spine_muscle_folder_side.Left.ObliquusExternus.OEC_12;
    spine_muscle_folder_side.Left.ThoracicMultifidi.MFL3T11;
    spine_muscle_folder_side.Right.QuadratusLumborum.QLC12InterMedian_L3;
    spine_muscle_folder_side.Left.ErectorSpinae.LTptC5L5;
    spine_muscle_folder_side.Right.ThoracicMultifidi.MFL1T10;
    spine_muscle_folder_side.Right.ErectorSpinae.LTptT9S4;
    spine_muscle_folder_side.Right.QuadratusLumborum.QLC12Median_L3;
    spine_muscle_folder_side.Right.ErectorSpinae.LTptT3L3;
    spine_muscle_folder_side.Left.ErectorSpinae.LTptT4L4;
    spine_muscle_folder_side.Left.QuadratusLumborum.QLC12Median_L3;
    spine_muscle_folder_side.Right.ErectorSpinae.ILptC6SIPS;
    spine_muscle_folder_side.Right.ErectorSpinae.LTptC8S3;
    spine_muscle_folder_side.Right.ThoracicMultifidi.MFL2T9;
    spine_muscle_folder_side.Right.ErectorSpinae.LTptT11Sacrum;
    spine_muscle_folder_side.Left.ThoracicMultifidi.MFL3T12;
    spine_muscle_folder_side.Left.ErectorSpinae.LTptT3L3;
    spine_muscle_folder_side.Right.ThoracicMultifidi.MFL1T8;
    spine_muscle_folder_side.Right.ErectorSpinae.LTptT7S2;
    spine_muscle_folder_side.Left.QuadratusLumborum.QLT12_CILat;
    spine_muscle_folder_side.Right.SerratusPosteriorInferior.SPIL2R12;
    spine_muscle_folder_side.Left.SerratusPosteriorInferior.SPIL1R11;
    spine_muscle_folder_side.Left.ThoracicMultifidi.MFL2T10;
    spine_muscle_folder_side.Left.QuadratusLumborum.QLC12InterMedian_L3;
    spine_muscle_folder_side.Left.QuadratusLumborum.QLT12_CIMedian;
    spine_muscle_folder_side.Left.ErectorSpinae.LTptT11Sacrum;
    spine_muscle_folder_side.Right.ErectorSpinae.ILptC10CI;
    spine_muscle_folder_side.Right.QuadratusLumborum.QLT12_CIMedian;
    spine_muscle_folder_side.Left.QuadratusLumborum.QLC12Median_CILat;
    spine_muscle_folder_side.Right.ObliquusExternus.OEC_12;
    spine_muscle_folder_side.Right.QuadratusLumborum.QLC12Lat_L3;
    spine_muscle_folder_side.Right.ThoracicMultifidi.MFL4T11;
    spine_muscle_folder_side.Left.QuadratusLumborum.QLC12InterMedian_L4;
    spine_muscle_folder_side.Left.QuadratusLumborum.QLC12Lat_L4;
    spine_muscle_folder_side.Left.ThoracicMultifidi.MFL2T9;
    spine_muscle_folder_side.Left.QuadratusLumborum.QLC12InterMedian_CILat;
    spine_muscle_folder_side.Right.ErectorSpinae.LTptC10Sacrum;
    spine_muscle_folder_side.Right.ErectorSpinae.ILptC9CI;
    spine_muscle_folder_side.Left.ErectorSpinae.LTptC10Sacrum;
    spine_muscle_folder_side.Left.ErectorSpinae.LTptC8S3;
    spine_muscle_folder_side.Left.ThoracicMultifidi.MFL1T8;
    spine_muscle_folder_side.Left.QuadratusLumborum.QLC12Lat_L3;
    spine_muscle_folder_side.Right.QuadratusLumborum.QLC12Median_L2;
    spine_muscle_folder_side.Left.ObliquusInternus.OIC_1;
};

AnyFolder T1C7jnt = {
    spine_muscle_folder_side.Left.MultifidusCervicis.MultifidusCervicisT1C5;
    spine_muscle_folder_side.Right.MultifidusCervicis.MultifidusCervicisT1C5;
    spine_muscle_folder_side.Left.SemispinalisCervicis.SemispinalisCervicisT3C4;
    spine_muscle_folder_side.Left.MultifidusCervicis.MultifidusCervicisT3C6;
    spine_muscle_folder_side.Left.SemispinalisThoracis.SSTT7C6;
    spine_muscle_folder_side.Right.SemispinalisThoracis.SSTT8C7;
    spine_muscle_folder_side.Right.SemispinalisCervicis.SemispinalisCervicisT1C2;
    spine_muscle_folder_side.Right.LongissimusCervicis.LongissimusCervicisT3C4;
    spine_muscle_folder_side.Right.LongissimusCapitis.LongissimusCapitisT2C0;
    spine_muscle_folder_side.Left.MultifidusCervicis.MultifidusCervicisT2C5;
    spine_muscle_folder_side.Left.SemispinalisCervicis.SemispinalisCervicisT2C3;
    spine_muscle_folder_side.Right.SerratusPosteriorSuperior.SPSR2C7;
    spine_muscle_folder_side.Left.SpleniusCervicis.SpleniusCervicisT5C3;
    spine_muscle_folder_side.Left.SerratusPosteriorSuperior.SPSR2C7;
    spine_muscle_folder_side.Right.MultifidusCervicis.MultifidusCervicisT1C4;
    spine_muscle_folder_side.Left.LongissimusCervicis.LongissimusCervicisT2C3;
    spine_muscle_folder_side.Left.LongissimusCapitis.LongissimusCapitisT4C0;
    spine_muscle_folder_side.Right.LongissimusCervicis.LongissimusCervicisT2C3;
    spine_muscle_folder_side.Left.LongissimusCervicis.LongissimusCervicisT1C2;
    spine_muscle_folder_side.Right.SpleniusCapitis.SpleniusCapitisT1C0;
    spine_muscle_folder_side.Right.LongissimusCapitis.LongissimusCapitisT3C0;
    spine_muscle_folder_side.Right.LongissimusCapitis.LongissimusCapitisT4C0;
    spine_muscle_folder_side.Left.SemispinalisCapitis.SemispinalisCapitisT4C0;
    spine_muscle_folder_side.Right.SpleniusCervicis.SpleniusCervicisT5C3;
    spine_muscle_folder_side.Left.LongissimusCapitis.LongissimusCapitisT1C0;
    spine_muscle_folder_side.Right.SemispinalisCapitis.SemispinalisCapitisT3C0;
    spine_muscle_folder_side.Right.SpleniusCervicis.SpleniusCervicisT3C1;
    spine_muscle_folder_side.Right.MultifidusCervicis.MultifidusCervicisT2C6;
    spine_muscle_folder_side.Right.MultifidusCervicis.MultifidusCervicisT3C6;
    spine_muscle_folder_side.Left.SemispinalisCapitis.SemispinalisCapitisT5C0;
    spine_muscle_folder_side.Right.SemispinalisCapitis.SemispinalisCapitisT4C0;
    spine_muscle_folder_side.Right.SpleniusCervicis.SpleniusCervicisT6C3;
    spine_muscle_folder_side.Right.SemispinalisCervicis.SemispinalisCervicisT3C4;
    spine_muscle_folder_side.Left.SpleniusCervicis.SpleniusCervicisT3C1;
    spine_muscle_folder_side.Right.RotatoresLongus.RotatoresLongusT2C7;
    spine_muscle_folder_side.Right.LevatorCostarum.LCBrC7R1;
    spine_muscle_folder_side.Right.SemispinalisCapitis.SemispinalisCapitisT5C0;
    spine_muscle_folder_side.Left.SemispinalisCapitis.SemispinalisCapitisT2C0;
    spine_muscle_folder_side.Right.SemispinalisCervicis.SemispinalisCervicisT5C6;
    spine_muscle_folder_side.Left.SemispinalisCapitis.SemispinalisCapitisT6C0;
    spine_muscle_folder_side.Right.SemispinalisCapitis.SemispinalisCapitisT1C0;
    spine_muscle_folder_side.Right.LongissimusCapitis.LongissimusCapitisT5C0;
    spine_muscle_folder_side.Left.LongissimusCervicis.LongissimusCervicisT3C4;
    spine_muscle_folder_side.Left.LongissimusCapitis.LongissimusCapitisT2C0;
    spine_muscle_folder_side.Left.MultifidusCervicis.MultifidusCervicisT2C6;
    spine_muscle_folder_side.Left.SemispinalisCervicis.SemispinalisCervicisT5C6;
    spine_muscle_folder_side.Left.SemispinalisCervicis.SemispinalisCervicisT1C2;
    spine_muscle_folder_side.Right.SemispinalisCervicis.SemispinalisCervicisT2C3;
    spine_muscle_folder_side.Left.SemispinalisCapitis.SemispinalisCapitisT3C0;
    spine_muscle_folder_side.Left.MultifidusCervicis.MultifidusCervicisT3C7;
    spine_muscle_folder_side.Right.SemispinalisCervicis.SemispinalisCervicisT6C7;
    spine_muscle_folder_side.Right.SpleniusCapitis.SpleniusCapitisT2C0;
    spine_muscle_folder_side.Left.LongissimusCervicis.LongissimusCervicisT4C5;
    spine_muscle_folder_side.Left.LongissimusCapitis.LongissimusCapitisT3C0;
    spine_muscle_folder_side.Right.SemispinalisCervicis.SemispinalisCervicisT4C5;
    spine_muscle_folder_side.Right.LongissimusCervicis.LongissimusCervicisT1C2;
    spine_muscle_folder_side.Right.LongissimusCervicis.LongissimusCervicisT4C5;
    spine_muscle_folder_side.Right.LongissimusCapitis.LongissimusCapitisT1C0;
    spine_muscle_folder_side.Left.MultifidusCervicis.MultifidusCervicisT1C4;
    spine_muscle_folder_side.Left.RotatoresBrevis.RotatoresBrevisT1C7;
    spine_muscle_folder_side.Left.SemispinalisThoracis.SSTT8C7;
    spine_muscle_folder_side.Right.MultifidusCervicis.MultifidusCervicisT3C7;
    spine_muscle_folder_side.Right.SemispinalisCapitis.SemispinalisCapitisT2C0;
    spine_muscle_folder_side.Left.LevatorCostarum.LCBrC7R1;
    spine_muscle_folder_side.Right.SemispinalisThoracis.SSTT7C6;
    spine_muscle_folder_side.Left.SemispinalisCapitis.SemispinalisCapitisT1C0;
    spine_muscle_folder_side.Right.SemispinalisCapitis.SemispinalisCapitisT6C0;
    spine_muscle_folder_side.Left.RotatoresLongus.RotatoresLongusT2C7;
    spine_muscle_folder_side.Left.LongissimusCapitis.LongissimusCapitisT5C0;
    spine_muscle_folder_side.Right.RotatoresBrevis.RotatoresBrevisT1C7;
    spine_muscle_folder_side.Right.MultifidusCervicis.MultifidusCervicisT4C7;
    spine_muscle_folder_side.Left.SemispinalisCervicis.SemispinalisCervicisT6C7;
    spine_muscle_folder_side.Right.LongissimusCervicis.LongissimusCervicisT5C6;
    spine_muscle_folder_side.Left.SemispinalisCervicis.SemispinalisCervicisT4C5;
    spine_muscle_folder_side.Left.SpleniusCapitis.SpleniusCapitisT1C0;
    spine_muscle_folder_side.Right.MultifidusCervicis.MultifidusCervicisT2C5;
    spine_muscle_folder_side.Left.LongissimusCervicis.LongissimusCervicisT5C6;
    spine_muscle_folder_side.Right.SpleniusCapitis.SpleniusCapitisT3C0;
    spine_muscle_folder_side.Left.MultifidusCervicis.MultifidusCervicisT4C7;
    spine_muscle_folder_side.Right.SpleniusCervicis.SpleniusCervicisT4C2;
    spine_muscle_folder_side.Left.SpleniusCervicis.SpleniusCervicisT4C2;
    spine_muscle_folder_side.Left.SpleniusCapitis.SpleniusCapitisT3C0;
    spine_muscle_folder_side.Left.SpleniusCervicis.SpleniusCervicisT6C3;
    spine_muscle_folder_side.Left.SpleniusCapitis.SpleniusCapitisT2C0;
};

AnyFolder T1T2jnt = {
    spine_muscle_folder_side.Left.ExternalInterCostalis.IC_Ext_R1R2.elem1;
    spine_muscle_folder_side.Right.InnermostInterCostalis.IC_Inn_R4R5.elem9;
    spine_muscle_folder_side.Left.InnermostInterCostalis.IC_Inn_R2R3.elem9;
    spine_muscle_folder_side.Right.ExternalInterCostalis.IC_Ext_R4R5.elem5;
    spine_muscle_folder_side.Left.ExternalInterCostalis.IC_Ext_R2R3.elem2;
    spine_muscle_folder_side.Right.ExternalInterCostalis.IC_Ext_R4R5.elem2;
    spine_muscle_folder_side.Left.InnermostInterCostalis.IC_Inn_R2R3.elem1;
    spine_muscle_folder_side.Right.ExternalInterCostalis.IC_Ext_R3R4.elem2;
    spine_muscle_folder_side.Left.SemispinalisCervicis.SemispinalisCervicisT3C4;
    spine_muscle_folder_side.Left.ErectorSpinae.LTptT10Sacrum;
    spine_muscle_folder_side.Left.MultifidusCervicis.MultifidusCervicisT3C6;
    spine_muscle_folder_side.Left.SemispinalisThoracis.SSTT7C6;
    spine_muscle_folder_side.Left.Diaphragm.R10_Diaphragm2;
    spine_muscle_folder_side.Right.InnermostInterCostalis.IC_Inn_R2R3.elem7;
    spine_muscle_folder_side.Left.InnermostInterCostalis.IC_Inn_R2R3.elem5;
    spine_muscle_folder_side.Right.ErectorSpinae.LTptT4L4;
    spine_muscle_folder_side.Left.ErectorSpinae.LTptT1L1;
    spine_muscle_folder_side.Left.ExternalInterCostalis.IC_Ext_R5R6.elem2;
    spine_muscle_folder_side.Right.SemispinalisThoracis.SSTT8C7;
    spine_muscle_folder_side.Left.ErectorSpinae.ITR1R7;
    spine_muscle_folder_side.Right.TransversusThoracis.TrThR2S;
    spine_muscle_folder_side.Right.ErectorSpinae.LTptC3L3;
    spine_muscle_folder_side.Left.ExternalInterCostalis.IC_Ext_R10R11.elem2;
    spine_muscle_folder_side.Left.ExternalInterCostalis.IC_Ext_R2R3.elem6;
    spine_muscle_folder_side.Left.ExternalInterCostalis.IC_Ext_R2R3.elem3;
    spine_muscle_folder_side.Left.ErectorSpinae.ITC7R7;
    spine_muscle_folder_side.Right.SerratusPosteriorSuperior.SPSR3T1;
    spine_muscle_folder_side.Right.LongissimusCervicis.LongissimusCervicisT3C4;
    spine_muscle_folder_side.Right.ExternalInterCostalis.IC_Ext_R6R7.elem3;
    spine_muscle_folder_side.Right.LongissimusCapitis.LongissimusCapitisT2C0;
    spine_muscle_folder_side.Left.MultifidusCervicis.MultifidusCervicisT2C5;
    spine_muscle_folder_side.Left.SemispinalisCervicis.SemispinalisCervicisT2C3;
    spine_muscle_folder_side.Left.ErectorSpinae.LTptC3L3;
    spine_muscle_folder_side.Right.ExternalInterCostalis.IC_Ext_R4R5.elem7;
    spine_muscle_folder_side.Right.SerratusPosteriorSuperior.SPSR2C7;
    spine_muscle_folder_side.Left.ExternalInterCostalis.IC_Ext_R5R6.elem3;
    spine_muscle_folder_side.Right.ExternalInterCostalis.IC_Ext_R7R8.elem3;
    spine_muscle_folder_side.Right.ExternalInterCostalis.IC_Ext_R10R11.elem5;
    spine_muscle_folder_side.Left.SpleniusCervicis.SpleniusCervicisT5C3;
    spine_muscle_folder_side.Right.Diaphragm.CC_DiaphragmNode7;
    spine_muscle_folder_side.Left.Diaphragm.R10_Diaphragm1;
    spine_muscle_folder_side.Left.ThoracicMultifidi.MFT5T1;
    spine_muscle_folder_side.Left.InnermostInterCostalis.IC_Inn_R1R2.elem1;
    spine_muscle_folder_side.Left.SerratusPosteriorSuperior.SPSR2C7;
    spine_muscle_folder_side.Right.ExternalInterCostalis.IC_Ext_R1R2.elem1;
    spine_muscle_folder_side.Right.InnermostInterCostalis.IC_Inn_R2R3.elem9;
    spine_muscle_folder_side.Right.ExternalInterCostalis.IC_Ext_R7R8.elem2;
    spine_muscle_folder_side.Left.ExternalInterCostalis.IC_Ext_R3R4.elem3;
    spine_muscle_folder_side.Left.LongissimusCervicis.LongissimusCervicisT2C3;
    spine_muscle_folder_side.Left.ExternalInterCostalis.IC_Ext_R6R7.elem3;
    spine_muscle_folder_side.Left.LongissimusCapitis.LongissimusCapitisT4C0;
    spine_muscle_folder_side.Right.LongissimusCervicis.LongissimusCervicisT2C3;
    spine_muscle_folder_side.Left.ExternalInterCostalis.IC_Ext_R2R3.elem5;
    spine_muscle_folder_side.Left.SpleniusCapitis.SpleniusCapitisT2C0;
    spine_muscle_folder_side.Right.ExternalInterCostalis.IC_Ext_R2R3.elem6;
    spine_muscle_folder_side.Left.Diaphragm.R11_Diaphragm2;
    spine_muscle_folder_side.Right.LongissimusCapitis.LongissimusCapitisT3C0;
    spine_muscle_folder_side.Right.ErectorSpinae.ITR3R9;
    spine_muscle_folder_side.Left.InnermostInterCostalis.IC_Inn_R2R3.elem6;
    spine_muscle_folder_side.Right.LongissimusCapitis.LongissimusCapitisT4C0;
    spine_muscle_folder_side.Right.InnermostInterCostalis.IC_Inn_R1R2.elem1;
    spine_muscle_folder_side.Left.SemispinalisCapitis.SemispinalisCapitisT4C0;
    spine_muscle_folder_side.Left.ErectorSpinae.ITR3R9;
    spine_muscle_folder_side.Right.ExternalInterCostalis.IC_Ext_R7R8.elem6;
    spine_muscle_folder_side.Left.InnermostInterCostalis.IC_Inn_R3R4.elem9;
    spine_muscle_folder_side.Right.InnermostInterCostalis.IC_Inn_R2R3.elem6;
    spine_muscle_folder_side.Right.InnermostInterCostalis.IC_Inn_R2R3.elem8;
    spine_muscle_folder_side.Right.SpleniusCervicis.SpleniusCervicisT5C3;
    spine_muscle_folder_side.Right.ExternalInterCostalis.IC_Ext_R3R4.elem5;
    spine_muscle_folder_side.Left.Diaphragm.R10_Diaphragm3;
    spine_muscle_folder_side.Left.ExternalInterCostalis.IC_Ext_R4R5.elem6;
    spine_muscle_folder_side.Right.ExternalInterCostalis.IC_Ext_R5R6.elem4;
    spine_muscle_folder_side.Right.SemispinalisCapitis.SemispinalisCapitisT3C0;
    spine_muscle_folder_side.Right.SpleniusCervicis.SpleniusCervicisT3C1;
    spine_muscle_folder_side.Right.ExternalInterCostalis.IC_Ext_R2R3.elem5;
    spine_muscle_folder_side.Right.MultifidusCervicis.MultifidusCervicisT2C6;
    spine_muscle_folder_side.Right.MultifidusCervicis.MultifidusCervicisT3C6;
    spine_muscle_folder_side.Left.ExternalInterCostalis.IC_Ext_R3R4.elem5;
    spine_muscle_folder_side.Left.SemispinalisCapitis.SemispinalisCapitisT5C0;
    spine_muscle_folder_side.Right.SemispinalisCapitis.SemispinalisCapitisT4C0;
    spine_muscle_folder_side.Right.ErectorSpinae.LTptT1L1;
    spine_muscle_folder_side.Right.SpleniusCervicis.SpleniusCervicisT6C3;
    spine_muscle_folder_side.Right.SemispinalisCervicis.SemispinalisCervicisT3C4;
    spine_muscle_folder_side.Left.InnermostInterCostalis.IC_Inn_R1R2.elem2;
    spine_muscle_folder_side.Right.ErectorSpinae.LTptT10Sacrum;
    spine_muscle_folder_side.Left.ExternalInterCostalis.IC_Ext_R3R4.elem6;
    spine_muscle_folder_side.Left.SpleniusCervicis.SpleniusCervicisT3C1;
    spine_muscle_folder_side.Left.ErectorSpinae.LTptC4L4;
    spine_muscle_folder_side.Right.RotatoresLongus.RotatoresLongusT2C7;
    spine_muscle_folder_side.Right.ExternalInterCostalis.IC_Ext_R10R11.elem3;
    spine_muscle_folder_side.Left.ExternalInterCostalis.IC_Ext_R2R3.elem7;
    spine_muscle_folder_side.Left.SerratusPosteriorSuperior.SPSR3T1;
    spine_muscle_folder_side.Right.ExternalInterCostalis.IC_Ext_R5R6.elem3;
    spine_muscle_folder_side.Left.ExternalInterCostalis.IC_Ext_R4R5.elem4;
    spine_muscle_folder_side.Right.ExternalInterCostalis.IC_Ext_R3R4.elem7;
    spine_muscle_folder_side.Right.LevatorCostarum.LCBrC7R1;
    spine_muscle_folder_side.Right.InnermostInterCostalis.IC_Inn_R3R4.elem8;
    spine_muscle_folder_side.Right.Subcostalis.SCR1R3;
    spine_muscle_folder_side.Left.ExternalInterCostalis.IC_Ext_R7R8.elem2;
    spine_muscle_folder_side.Right.SemispinalisCapitis.SemispinalisCapitisT5C0;
    spine_muscle_folder_side.Left.SemispinalisCapitis.SemispinalisCapitisT2C0;
    spine_muscle_folder_side.Left.ThoracicMultifidi.MFT6T1;
    spine_muscle_folder_side.Right.InnermostInterCostalis.IC_Inn_R3R4.elem9;
    spine_muscle_folder_side.Right.SemispinalisCervicis.SemispinalisCervicisT5C6;
    spine_muscle_folder_side.Left.Subcostalis.SCR1R4;
    spine_muscle_folder_side.Right.ErectorSpinae.ITR1R7;
    spine_muscle_folder_side.Right.InnermostInterCostalis.IC_Inn_R3R4.elem7;
    spine_muscle_folder_side.Left.SemispinalisCapitis.SemispinalisCapitisT6C0;
    spine_muscle_folder_side.Left.SemispinalisThoracis.SSTT9T1;
    spine_muscle_folder_side.Left.ExternalInterCostalis.IC_Ext_R7R8.elem4;
    spine_muscle_folder_side.Right.Diaphragm.R11_Diaphragm1;
    spine_muscle_folder_side.Right.Diaphragm.R11_Diaphragm2;
    spine_muscle_folder_side.Right.Diaphragm.R10_Diaphragm2;
    spine_muscle_folder_side.Right.ExternalInterCostalis.IC_Ext_R10R11.elem4;
    spine_muscle_folder_side.Right.ExternalInterCostalis.IC_Ext_R4R5.elem6;
    spine_muscle_folder_side.Right.LongissimusCapitis.LongissimusCapitisT5C0;
    spine_muscle_folder_side.Left.InnermostInterCostalis.IC_Inn_R2R3.elem8;
    spine_muscle_folder_side.Left.LongissimusCervicis.LongissimusCervicisT3C4;
    spine_muscle_folder_side.Left.ErectorSpinae.ITR2R8;
    spine_muscle_folder_side.Left.ExternalInterCostalis.IC_Ext_R9R10.elem4;
    spine_muscle_folder_side.Left.LongissimusCapitis.LongissimusCapitisT2C0;
    spine_muscle_folder_side.Left.MultifidusCervicis.MultifidusCervicisT2C6;
    spine_muscle_folder_side.Right.LevatorCostarum.LCBrT1R2;
    spine_muscle_folder_side.Right.InnermostInterCostalis.IC_Inn_R3R4.elem6;
    spine_muscle_folder_side.Left.ExternalInterCostalis.IC_Ext_R7R8.elem3;
    spine_muscle_folder_side.Left.SemispinalisCervicis.SemispinalisCervicisT5C6;
    spine_muscle_folder_side.Right.SemispinalisCervicis.SemispinalisCervicisT2C3;
    spine_muscle_folder_side.Right.Diaphragm.R10_Diaphragm1;
    spine_muscle_folder_side.Left.Subcostalis.SCR1R3;
    spine_muscle_folder_side.Right.ErectorSpinae.LTptC4L4;
    spine_muscle_folder_side.Left.SemispinalisCapitis.SemispinalisCapitisT3C0;
    spine_muscle_folder_side.Spinalis.SPL2T1;
    spine_muscle_folder_side.Left.TransversusThoracis.TrThR2S;
    spine_muscle_folder_side.Left.ExternalInterCostalis.IC_Ext_R10R11.elem4;
    spine_muscle_folder_side.Left.MultifidusCervicis.MultifidusCervicisT3C7;
    spine_muscle_folder_side.Right.RotatoresLongus.RotatoresLongusT3T1;
    spine_muscle_folder_side.Left.ExternalInterCostalis.IC_Ext_R5R6.elem7;
    spine_muscle_folder_side.Right.ThoracicMultifidi.MFT4T1;
    spine_muscle_folder_side.Right.ThoracicMultifidi.MFT6T1;
    spine_muscle_folder_side.Right.SemispinalisCervicis.SemispinalisCervicisT6C7;
    spine_muscle_folder_side.Right.InnermostInterCostalis.IC_Inn_R2R3.elem1;
    spine_muscle_folder_side.Left.LevatorCostarum.LCBrT1R2;
    spine_muscle_folder_side.Right.SpleniusCapitis.SpleniusCapitisT2C0;
    spine_muscle_folder_side.Right.ExternalInterCostalis.IC_Ext_R2R3.elem3;
    spine_muscle_folder_side.Left.Diaphragm.R11_Diaphragm1;
    spine_muscle_folder_side.Left.LongissimusCervicis.LongissimusCervicisT4C5;
    spine_muscle_folder_side.Left.InnermostInterCostalis.IC_Inn_R3R4.elem7;
    spine_muscle_folder_side.Left.InnermostInterCostalis.IC_Inn_R3R4.elem6;
    spine_muscle_folder_side.Left.LongissimusCapitis.LongissimusCapitisT3C0;
    spine_muscle_folder_side.Right.ExternalInterCostalis.IC_Ext_R8R9.elem3;
    spine_muscle_folder_side.Right.SemispinalisCervicis.SemispinalisCervicisT4C5;
    spine_muscle_folder_side.Left.InnermostInterCostalis.IC_Inn_R4R5.elem9;
    spine_muscle_folder_side.Right.ExternalInterCostalis.IC_Ext_R5R6.elem7;
    spine_muscle_folder_side.Right.ExternalInterCostalis.IC_Ext_R3R4.elem3;
    spine_muscle_folder_side.Left.ExternalInterCostalis.IC_Ext_R5R6.elem4;
    spine_muscle_folder_side.Left.RotatoresLongus.RotatoresLongusT3T1;
    spine_muscle_folder_side.Right.LongissimusCervicis.LongissimusCervicisT4C5;
    spine_muscle_folder_side.Left.ExternalInterCostalis.IC_Ext_R3R4.elem7;
    spine_muscle_folder_side.Right.ExternalInterCostalis.IC_Ext_R4R5.elem1;
    spine_muscle_folder_side.Left.ExternalInterCostalis.IC_Ext_R3R4.elem2;
    spine_muscle_folder_side.Right.ErectorSpinae.ITC7R7;
    spine_muscle_folder_side.Left.InnermostInterCostalis.IC_Inn_R2R3.elem7;
    spine_muscle_folder_side.Left.SemispinalisThoracis.SSTT8C7;
    spine_muscle_folder_side.Left.ThoracicMultifidi.MFT4T1;
    spine_muscle_folder_side.Right.MultifidusCervicis.MultifidusCervicisT3C7;
    spine_muscle_folder_side.Right.SemispinalisCapitis.SemispinalisCapitisT2C0;
    spine_muscle_folder_side.Right.ThoracicMultifidi.MFT5T1;
    spine_muscle_folder_side.Left.LevatorCostarum.LCBrC7R1;
    spine_muscle_folder_side.Left.ExternalInterCostalis.IC_Ext_R7R8.elem6;
    spine_muscle_folder_side.Right.ExternalInterCostalis.IC_Ext_R5R6.elem2;
    spine_muscle_folder_side.Right.SemispinalisThoracis.SSTT7C6;
    spine_muscle_folder_side.Left.RotatoresLongus.RotatoresLongusT2C7;
    spine_muscle_folder_side.Left.LongissimusCapitis.LongissimusCapitisT5C0;
    spine_muscle_folder_side.Right.ErectorSpinae.LTptT3L3;
    spine_muscle_folder_side.Right.SemispinalisCapitis.SemispinalisCapitisT6C0;
    spine_muscle_folder_side.Left.ErectorSpinae.LTptT4L4;
    spine_muscle_folder_side.Left.InnermostInterCostalis.IC_Inn_R4R5.elem8;
    spine_muscle_folder_side.Right.MultifidusCervicis.MultifidusCervicisT4C7;
    spine_muscle_folder_side.Left.ErectorSpinae.LTptT3L3;
    spine_muscle_folder_side.Left.SemispinalisCervicis.SemispinalisCervicisT6C7;
    spine_muscle_folder_side.Right.ErectorSpinae.ITR2R8;
    spine_muscle_folder_side.Right.InnermostInterCostalis.IC_Inn_R2R3.elem5;
    spine_muscle_folder_side.Left.ExternalInterCostalis.IC_Ext_R2R3.elem4;
    spine_muscle_folder_side.Left.ExternalInterCostalis.IC_Ext_R4R5.elem5;
    spine_muscle_folder_side.Left.ExternalInterCostalis.IC_Ext_R4R5.elem3;
    spine_muscle_folder_side.Right.LongissimusCervicis.LongissimusCervicisT5C6;
    spine_muscle_folder_side.Right.ExternalInterCostalis.IC_Ext_R4R5.elem4;
    spine_muscle_folder_side.Left.SemispinalisCervicis.SemispinalisCervicisT4C5;
    spine_muscle_folder_side.Right.ExternalInterCostalis.IC_Ext_R3R4.elem4;
    spine_muscle_folder_side.Left.Diaphragm.CC_DiaphragmNode7;
    spine_muscle_folder_side.Left.ExternalInterCostalis.IC_Ext_R4R5.elem2;
    spine_muscle_folder_side.Right.ExternalInterCostalis.IC_Ext_R7R8.elem4;
    spine_muscle_folder_side.Right.MultifidusCervicis.MultifidusCervicisT2C5;
    spine_muscle_folder_side.Left.LongissimusCervicis.LongissimusCervicisT5C6;
    spine_muscle_folder_side.Right.SpleniusCapitis.SpleniusCapitisT3C0;
    spine_muscle_folder_side.Right.ExternalInterCostalis.IC_Ext_R9R10.elem4;
    spine_muscle_folder_side.Right.ExternalInterCostalis.IC_Ext_R10R11.elem2;
    spine_muscle_folder_side.Right.InnermostInterCostalis.IC_Inn_R4R5.elem8;
    spine_muscle_folder_side.Left.ExternalInterCostalis.IC_Ext_R10R11.elem5;
    spine_muscle_folder_side.Right.ErectorSpinae.LTptC10Sacrum;
    spine_muscle_folder_side.Left.ExternalInterCostalis.IC_Ext_R4R5.elem1;
    spine_muscle_folder_side.Right.SemispinalisThoracis.SSTT9T1;
    spine_muscle_folder_side.Left.MultifidusCervicis.MultifidusCervicisT4C7;
    spine_muscle_folder_side.Right.InnermostInterCostalis.IC_Inn_R1R2.elem2;
    spine_muscle_folder_side.Right.ExternalInterCostalis.IC_Ext_R2R3.elem7;
    spine_muscle_folder_side.Right.SpleniusCervicis.SpleniusCervicisT4C2;
    spine_muscle_folder_side.Left.ExternalInterCostalis.IC_Ext_R1R2.elem2;
    spine_muscle_folder_side.Left.ExternalInterCostalis.IC_Ext_R10R11.elem3;
    spine_muscle_folder_side.Right.ExternalInterCostalis.IC_Ext_R2R3.elem2;
    spine_muscle_folder_side.Left.SpleniusCervicis.SpleniusCervicisT4C2;
    spine_muscle_folder_side.Left.ExternalInterCostalis.IC_Ext_R3R4.elem4;
    spine_muscle_folder_side.Left.ErectorSpinae.LTptC10Sacrum;
    spine_muscle_folder_side.Right.ExternalInterCostalis.IC_Ext_R4R5.elem3;
    spine_muscle_folder_side.Right.Subcostalis.SCR1R4;
    spine_muscle_folder_side.Left.ExternalInterCostalis.IC_Ext_R4R5.elem7;
    spine_muscle_folder_side.Left.SpleniusCapitis.SpleniusCapitisT3C0;
    spine_muscle_folder_side.Right.ExternalInterCostalis.IC_Ext_R2R3.elem4;
    spine_muscle_folder_side.Right.ExternalInterCostalis.IC_Ext_R1R2.elem2;
    spine_muscle_folder_side.Right.ExternalInterCostalis.IC_Ext_R3R4.elem6;
    spine_muscle_folder_side.Right.Diaphragm.R10_Diaphragm3;
    spine_muscle_folder_side.Left.ExternalInterCostalis.IC_Ext_R8R9.elem3;
    spine_muscle_folder_side.Left.SpleniusCervicis.SpleniusCervicisT6C3;
    spine_muscle_folder_side.Left.InnermostInterCostalis.IC_Inn_R3R4.elem8;
};

AnyFolder T2T3jnt = {
    spine_muscle_folder_side.Left.Subcostalis.SCR2R5;
    spine_muscle_folder_side.Right.ExternalInterCostalis.IC_Ext_R9R10.elem3;
    spine_muscle_folder_side.Right.ExternalInterCostalis.IC_Ext_R4R5.elem5;
    spine_muscle_folder_side.Right.ExternalInterCostalis.IC_Ext_R3R4.elem2;
    spine_muscle_folder_side.Right.InternalInterCostalis.IC_Int_R2R3.elem3;
    spine_muscle_folder_side.Left.SemispinalisCervicis.SemispinalisCervicisT3C4;
    spine_muscle_folder_side.Left.MultifidusCervicis.MultifidusCervicisT3C6;
    spine_muscle_folder_side.Right.InnermostInterCostalis.IC_Inn_R2R3.elem3;
    spine_muscle_folder_side.Left.ExternalInterCostalis.IC_Ext_R5R6.elem2;
    spine_muscle_folder_side.Left.ErectorSpinae.ITR1R7;
    spine_muscle_folder_side.Right.QuadratusLumborum.QLC12Median_CILat;
    spine_muscle_folder_side.Left.ExternalInterCostalis.IC_Ext_R2R3.elem3;
    spine_muscle_folder_side.Right.SerratusPosteriorSuperior.SPSR3T1;
    spine_muscle_folder_side.Right.ExternalInterCostalis.IC_Ext_R6R7.elem3;
    spine_muscle_folder_side.Right.ExternalInterCostalis.IC_Ext_R4R5.elem7;
    spine_muscle_folder_side.Left.ErectorSpinae.ILptC6SIPS;
    spine_muscle_folder_side.Left.ThoracicMultifidi.MFT6T2;
    spine_muscle_folder_side.Left.ExternalInterCostalis.IC_Ext_R8R9.elem4;
    spine_muscle_folder_side.Left.InnermostInterCostalis.IC_Inn_R4R5.elem7;
    spine_muscle_folder_side.Right.InnermostInterCostalis.IC_Inn_R4R5.elem5;
    spine_muscle_folder_side.Right.InnermostInterCostalis.IC_Inn_R2R3.elem4;
    spine_muscle_folder_side.Right.TransversusThoracis.TrThR3S;
    spine_muscle_folder_side.Left.Diaphragm.R11_Diaphragm2;
    spine_muscle_folder_side.Right.LongissimusCapitis.LongissimusCapitisT3C0;
    spine_muscle_folder_side.Right.InnermostInterCostalis.IC_Inn_R7R8.elem8;
    spine_muscle_folder_side.Right.ErectorSpinae.LTptT5L5;
    spine_muscle_folder_side.Left.ExternalInterCostalis.IC_Ext_R2R3.elem1;
    spine_muscle_folder_side.Right.ErectorSpinae.LTptC9S4;
    spine_muscle_folder_side.Left.InnermostInterCostalis.IC_Inn_R2R3.elem3;
    spine_muscle_folder_side.Left.ErectorSpinae.LTptT7S2;
    spine_muscle_folder_side.Left.QuadratusLumborum.QLC12Median_L2;
    spine_muscle_folder_side.Left.ExternalInterCostalis.IC_Ext_R3R4.elem5;
    spine_muscle_folder_side.Right.SemispinalisCapitis.SemispinalisCapitisT4C0;
    spine_muscle_folder_side.Right.ThoracicMultifidi.MFT7T2;
    spine_muscle_folder_side.Left.InnermostInterCostalis.IC_Inn_R5R6.elem9;
    spine_muscle_folder_side.Left.ErectorSpinae.LTptC9S4;
    spine_muscle_folder_side.Left.ErectorSpinae.LTptC4L4;
    spine_muscle_folder_side.Right.ExternalInterCostalis.IC_Ext_R10R11.elem3;
    spine_muscle_folder_side.Right.InnermostInterCostalis.IC_Inn_R3R4.elem8;
    spine_muscle_folder_side.Left.ExternalInterCostalis.IC_Ext_R7R8.elem2;
    spine_muscle_folder_side.Right.SemispinalisCapitis.SemispinalisCapitisT5C0;
    spine_muscle_folder_side.Left.ErectorSpinae.ITR5R11;
    spine_muscle_folder_side.Left.SemispinalisThoracis.SSTT9T1;
    spine_muscle_folder_side.Right.Diaphragm.R11_Diaphragm1;
    spine_muscle_folder_side.Right.ExternalInterCostalis.IC_Ext_R10R11.elem4;
    spine_muscle_folder_side.Right.ExternalInterCostalis.IC_Ext_R4R5.elem6;
    spine_muscle_folder_side.Right.LongissimusCapitis.LongissimusCapitisT5C0;
    spine_muscle_folder_side.Right.ExternalInterCostalis.IC_Ext_R5R6.elem5;
    spine_muscle_folder_side.Right.Subcostalis.SCR3R5;
    spine_muscle_folder_side.Right.InnermostInterCostalis.IC_Inn_R3R4.elem6;
    spine_muscle_folder_side.Left.ExternalInterCostalis.IC_Ext_R7R8.elem3;
    spine_muscle_folder_side.Left.InternalInterCostalis.IC_Int_R3R4.elem7;
    spine_muscle_folder_side.Left.MultifidusCervicis.MultifidusCervicisT3C7;
    spine_muscle_folder_side.Left.ExternalInterCostalis.IC_Ext_R5R6.elem7;
    spine_muscle_folder_side.Right.ThoracicMultifidi.MFT4T1;
    spine_muscle_folder_side.Right.ThoracicMultifidi.MFT6T1;
    spine_muscle_folder_side.Left.ExternalInterCostalis.IC_Ext_R6R7.elem5;
    spine_muscle_folder_side.Right.Subcostalis.SCR2R5;
    spine_muscle_folder_side.Left.InnermostInterCostalis.IC_Inn_R3R4.elem6;
    spine_muscle_folder_side.Right.ExternalInterCostalis.IC_Ext_R3R4.elem3;
    spine_muscle_folder_side.Left.LevatorCostarum.LCBrT2R3;
    spine_muscle_folder_side.Left.ExternalInterCostalis.IC_Ext_R3R4.elem7;
    spine_muscle_folder_side.Right.TransversusThoracis.TrThR4S;
    spine_muscle_folder_side.Right.ErectorSpinae.LTptT2L2;
    spine_muscle_folder_side.Right.ErectorSpinae.ITC7R7;
    spine_muscle_folder_side.Left.ExternalInterCostalis.IC_Ext_R7R8.elem6;
    spine_muscle_folder_side.Right.ExternalInterCostalis.IC_Ext_R5R6.elem2;
    spine_muscle_folder_side.Right.SemispinalisThoracis.SSTT7C6;
    spine_muscle_folder_side.Left.ExternalInterCostalis.IC_Ext_R7R8.elem7;
    spine_muscle_folder_side.Left.ExternalInterCostalis.IC_Ext_R9R10.elem7;
    spine_muscle_folder_side.Left.ExternalInterCostalis.IC_Ext_R4R5.elem5;
    spine_muscle_folder_side.Left.ExternalInterCostalis.IC_Ext_R9R10.elem3;
    spine_muscle_folder_side.Left.ExternalInterCostalis.IC_Ext_R4R5.elem2;
    spine_muscle_folder_side.Left.SerratusPosteriorSuperior.SPSR4T2;
    spine_muscle_folder_side.Right.ExternalInterCostalis.IC_Ext_R6R7.elem6;
    spine_muscle_folder_side.Right.ExternalInterCostalis.IC_Ext_R9R10.elem4;
    spine_muscle_folder_side.Left.ExternalInterCostalis.IC_Ext_R10R11.elem5;
    spine_muscle_folder_side.Left.RotatoresBrevis.RotatoresBrevisT3T2;
    spine_muscle_folder_side.Left.ExternalInterCostalis.IC_Ext_R3R4.elem4;
    spine_muscle_folder_side.Right.QuadratusLumborum.QLC12Median_L2;
    spine_muscle_folder_side.Right.ErectorSpinae.ITR1R7;
    spine_muscle_folder_side.Right.InnermostInterCostalis.IC_Inn_R10R11.elem1;
    spine_muscle_folder_side.Left.InnermostInterCostalis.IC_Inn_R3R4.elem8;
    spine_muscle_folder_side.Right.InnermostInterCostalis.IC_Inn_R4R5.elem9;
    spine_muscle_folder_side.Left.ExternalInterCostalis.IC_Ext_R2R3.elem2;
    spine_muscle_folder_side.Right.ExternalInterCostalis.IC_Ext_R4R5.elem2;
    spine_muscle_folder_side.Left.InnermostInterCostalis.IC_Inn_R2R3.elem1;
    spine_muscle_folder_side.Right.QuadratusLumborum.QLC12InterMedian_CIInterMedian;
    spine_muscle_folder_side.Left.ErectorSpinae.LTptT9S4;
    spine_muscle_folder_side.Left.ExternalInterCostalis.IC_Ext_R10R11.elem2;
    spine_muscle_folder_side.Left.ErectorSpinae.ITC7R7;
    spine_muscle_folder_side.Right.LongissimusCervicis.LongissimusCervicisT3C4;
    spine_muscle_folder_side.Left.InnermostInterCostalis.IC_Inn_R7R8.elem9;
    spine_muscle_folder_side.Left.QuadratusLumborum.QLC12Median_CIInterMedian;
    spine_muscle_folder_side.Right.Diaphragm.CC_DiaphragmNode7;
    spine_muscle_folder_side.Right.ExternalInterCostalis.IC_Ext_R10R11.elem5;
    spine_muscle_folder_side.Left.Diaphragm.R10_Diaphragm1;
    spine_muscle_folder_side.Right.QuadratusLumborum.QLC12InterMedian_L2;
    spine_muscle_folder_side.Right.ExternalInterCostalis.IC_Ext_R1R2.elem1;
    spine_muscle_folder_side.Left.InnermostInterCostalis.IC_Inn_R7R8.elem8;
    spine_muscle_folder_side.Right.InnermostInterCostalis.IC_Inn_R6R7.elem9;
    spine_muscle_folder_side.Right.ErectorSpinae.LTptC7S2;
    spine_muscle_folder_side.Left.ErectorSpinae.LTptC7S2;
    spine_muscle_folder_side.Left.TransversusThoracis.TrThR8S;
    spine_muscle_folder_side.Left.ExternalInterCostalis.IC_Ext_R5R6.elem6;
    spine_muscle_folder_side.Left.ErectorSpinae.ITR3R9;
    spine_muscle_folder_side.Right.InnermostInterCostalis.IC_Inn_R3R4.elem4;
    spine_muscle_folder_side.Right.InnermostInterCostalis.IC_Inn_R5R6.elem8;
    spine_muscle_folder_side.Left.Diaphragm.R10_Diaphragm3;
    spine_muscle_folder_side.Right.SpleniusCervicis.SpleniusCervicisT3C1;
    spine_muscle_folder_side.Left.SemispinalisCapitis.SemispinalisCapitisT5C0;
    spine_muscle_folder_side.Right.ErectorSpinae.LTptT1L1;
    spine_muscle_folder_side.Right.SpleniusCervicis.SpleniusCervicisT6C3;
    spine_muscle_folder_side.Right.SemispinalisCervicis.SemispinalisCervicisT3C4;
    spine_muscle_folder_side.Left.InnermostInterCostalis.IC_Inn_R10R11.elem1;
    spine_muscle_folder_side.Left.ErectorSpinae.LTptT5L5;
    spine_muscle_folder_side.Left.InnermostInterCostalis.IC_Inn_R6R7.elem8;
    spine_muscle_folder_side.Left.ExternalInterCostalis.IC_Ext_R3R4.elem6;
    spine_muscle_folder_side.Right.InternalInterCostalis.IC_Int_R3R4.elem7;
    spine_muscle_folder_side.Left.SerratusPosteriorSuperior.SPSR3T1;
    spine_muscle_folder_side.Left.ExternalInterCostalis.IC_Ext_R4R5.elem4;
    spine_muscle_folder_side.Right.SemispinalisCervicis.SemispinalisCervicisT5C6;
    spine_muscle_folder_side.Left.ExternalInterCostalis.IC_Ext_R6R7.elem2;
    spine_muscle_folder_side.Left.LongissimusCervicis.LongissimusCervicisT3C4;
    spine_muscle_folder_side.Right.LevatorCostarum.LCBrT1R2;
    spine_muscle_folder_side.Right.InnermostInterCostalis.IC_Inn_R4R5.elem1;
    spine_muscle_folder_side.Left.SemispinalisCapitis.SemispinalisCapitisT3C0;
    spine_muscle_folder_side.Right.ExternalInterCostalis.IC_Ext_R9R10.elem7;
    spine_muscle_folder_side.Right.InnermostInterCostalis.IC_Inn_R2R3.elem1;
    spine_muscle_folder_side.Left.LevatorCostarum.LCBrT1R2;
    spine_muscle_folder_side.Right.RotatoresLongus.RotatoresLongusT4T2;
    spine_muscle_folder_side.Left.InnermostInterCostalis.IC_Inn_R4R5.elem9;
    spine_muscle_folder_side.Right.LongissimusCervicis.LongissimusCervicisT4C5;
    spine_muscle_folder_side.Right.ErectorSpinae.LTptC5L5;
    spine_muscle_folder_side.Left.Subcostalis.SCR3R5;
    spine_muscle_folder_side.Left.InnermostInterCostalis.IC_Inn_R6R7.elem9;
    spine_muscle_folder_side.Right.ThoracicMultifidi.MFT5T1;
    spine_muscle_folder_side.Right.QuadratusLumborum.QLC12InterMedian_L3;
    spine_muscle_folder_side.Right.InnermostInterCostalis.IC_Inn_R2R3.elem2;
    spine_muscle_folder_side.Right.ErectorSpinae.LTptT3L3;
    spine_muscle_folder_side.Left.Subcostalis.SCR2R4;
    spine_muscle_folder_side.Left.ExternalInterCostalis.IC_Ext_R6R7.elem7;
    spine_muscle_folder_side.Left.ExternalInterCostalis.IC_Ext_R8R9.elem2;
    spine_muscle_folder_side.Right.ErectorSpinae.LTptT7S2;
    spine_muscle_folder_side.Right.LevatorCostarum.LCBrT2R3;
    spine_muscle_folder_side.Right.ErectorSpinae.ITR2R8;
    spine_muscle_folder_side.Left.ExternalInterCostalis.IC_Ext_R2R3.elem4;
    spine_muscle_folder_side.Right.ExternalInterCostalis.IC_Ext_R4R5.elem4;
    spine_muscle_folder_side.Right.ExternalInterCostalis.IC_Ext_R3R4.elem4;
    spine_muscle_folder_side.Right.ThoracicMultifidi.MFT6T2;
    spine_muscle_folder_side.Left.ExternalInterCostalis.IC_Ext_R4R5.elem1;
    spine_muscle_folder_side.Left.ExternalInterCostalis.IC_Ext_R10R11.elem3;
    spine_muscle_folder_side.Left.SpleniusCervicis.SpleniusCervicisT4C2;
    spine_muscle_folder_side.Right.Subcostalis.SCR1R4;
    spine_muscle_folder_side.Left.ErectorSpinae.LTptC10Sacrum;
    spine_muscle_folder_side.Right.ExternalInterCostalis.IC_Ext_R2R3.elem4;
    spine_muscle_folder_side.Right.ExternalInterCostalis.IC_Ext_R6R7.elem7;
    spine_muscle_folder_side.Right.ExternalInterCostalis.IC_Ext_R7R8.elem7;
    spine_muscle_folder_side.Left.SpleniusCervicis.SpleniusCervicisT6C3;
    spine_muscle_folder_side.Right.ThoracicMultifidi.MFT5T2;
    spine_muscle_folder_side.Left.Diaphragm.R10_Diaphragm2;
    spine_muscle_folder_side.Left.InnermostInterCostalis.IC_Inn_R2R3.elem5;
    spine_muscle_folder_side.Right.ErectorSpinae.LTptT4L4;
    spine_muscle_folder_side.Left.TransversusThoracis.TrThR4S;
    spine_muscle_folder_side.Left.InnermostInterCostalis.IC_Inn_R4R5.elem6;
    spine_muscle_folder_side.Right.ExternalInterCostalis.IC_Ext_R6R7.elem2;
    spine_muscle_folder_side.Left.ExternalInterCostalis.IC_Ext_R6R7.elem6;
    spine_muscle_folder_side.Left.ErectorSpinae.LTptC3L3;
    spine_muscle_folder_side.Right.ExternalInterCostalis.IC_Ext_R7R8.elem3;
    spine_muscle_folder_side.Left.SpleniusCervicis.SpleniusCervicisT5C3;
    spine_muscle_folder_side.Left.ErectorSpinae.LTptT2L2;
    spine_muscle_folder_side.Left.ErectorSpinae.ILptC5SIPS;
    spine_muscle_folder_side.Left.InnermostInterCostalis.IC_Inn_R3R4.elem5;
    spine_muscle_folder_side.Right.ExternalInterCostalis.IC_Ext_R10R11.elem6;
    spine_muscle_folder_side.Left.RotatoresLongus.RotatoresLongusT4T2;
    spine_muscle_folder_side.Left.SemispinalisThoracis.SSTT10T2;
    spine_muscle_folder_side.Right.ExternalInterCostalis.IC_Ext_R7R8.elem2;
    spine_muscle_folder_side.Left.InternalInterCostalis.IC_Int_R3R4.elem6;
    spine_muscle_folder_side.Left.ExternalInterCostalis.IC_Ext_R9R10.elem5;
    spine_muscle_folder_side.Left.ExternalInterCostalis.IC_Ext_R3R4.elem3;
    spine_muscle_folder_side.Left.QuadratusLumborum.QLC12Median_L4;
    spine_muscle_folder_side.Left.LongissimusCapitis.LongissimusCapitisT4C0;
    spine_muscle_folder_side.Right.ExternalInterCostalis.IC_Ext_R8R9.elem5;
    spine_muscle_folder_side.Right.ErectorSpinae.ITR3R9;
    spine_muscle_folder_side.Left.ExternalInterCostalis.IC_Ext_R6R7.elem4;
    spine_muscle_folder_side.Right.SerratusPosteriorSuperior.SPSR4T2;
    spine_muscle_folder_side.Right.InnermostInterCostalis.IC_Inn_R3R4.elem2;
    spine_muscle_folder_side.Right.ExternalInterCostalis.IC_Ext_R7R8.elem6;
    spine_muscle_folder_side.Left.InnermostInterCostalis.IC_Inn_R3R4.elem9;
    spine_muscle_folder_side.Right.SpleniusCervicis.SpleniusCervicisT5C3;
    spine_muscle_folder_side.Left.ExternalInterCostalis.IC_Ext_R4R5.elem6;
    spine_muscle_folder_side.Right.ExternalInterCostalis.IC_Ext_R5R6.elem4;
    spine_muscle_folder_side.Right.SemispinalisCapitis.SemispinalisCapitisT3C0;
    spine_muscle_folder_side.Left.Subcostalis.SCR4R6;
    spine_muscle_folder_side.Left.InnermostInterCostalis.IC_Inn_R3R4.elem4;
    spine_muscle_folder_side.Left.ExternalInterCostalis.IC_Ext_R10R11.elem6;
    spine_muscle_folder_side.Right.InnermostInterCostalis.IC_Inn_R4R5.elem7;
    spine_muscle_folder_side.Left.ExternalInterCostalis.IC_Ext_R8R9.elem5;
    spine_muscle_folder_side.Right.ExternalInterCostalis.IC_Ext_R5R6.elem3;
    spine_muscle_folder_side.Left.ThoracicMultifidi.MFT6T1;
    spine_muscle_folder_side.Right.InnermostInterCostalis.IC_Inn_R3R4.elem9;
    spine_muscle_folder_side.Left.InnermostInterCostalis.IC_Inn_R5R6.elem8;
    spine_muscle_folder_side.Left.Subcostalis.SCR1R4;
    spine_muscle_folder_side.Left.Diaphragm.R11_Diaphragm3;
    spine_muscle_folder_side.Left.ExternalInterCostalis.IC_Ext_R7R8.elem4;
    spine_muscle_folder_side.Left.ExternalInterCostalis.IC_Ext_R9R10.elem6;
    spine_muscle_folder_side.Left.ErectorSpinae.ITR2R8;
    spine_muscle_folder_side.Left.ExternalInterCostalis.IC_Ext_R9R10.elem4;
    spine_muscle_folder_side.Left.InnermostInterCostalis.IC_Inn_R3R4.elem3;
    spine_muscle_folder_side.Right.Diaphragm.R10_Diaphragm1;
    spine_muscle_folder_side.Left.Subcostalis.SCR1R3;
    spine_muscle_folder_side.Right.ErectorSpinae.LTptC4L4;
    spine_muscle_folder_side.Left.ExternalInterCostalis.IC_Ext_R10R11.elem4;
    spine_muscle_folder_side.Left.QuadratusLumborum.QLC12InterMedian_CIInterMedian;
    spine_muscle_folder_side.Right.Diaphragm.R11_Diaphragm3;
    spine_muscle_folder_side.Right.ExternalInterCostalis.IC_Ext_R2R3.elem3;
    spine_muscle_folder_side.Left.Subcostalis.SCR4R7;
    spine_muscle_folder_side.Right.ExternalInterCostalis.IC_Ext_R10R11.elem1;
    spine_muscle_folder_side.Right.ExternalInterCostalis.IC_Ext_R8R9.elem2;
    spine_muscle_folder_side.Left.TransversusThoracis.TrThR3S;
    spine_muscle_folder_side.Left.ExternalInterCostalis.IC_Ext_R5R6.elem4;
    spine_muscle_folder_side.Right.QuadratusLumborum.QLC12Median_L4;
    spine_muscle_folder_side.Right.ExternalInterCostalis.IC_Ext_R4R5.elem1;
    spine_muscle_folder_side.Left.ExternalInterCostalis.IC_Ext_R3R4.elem2;
    spine_muscle_folder_side.Left.SemispinalisThoracis.SSTT8C7;
    spine_muscle_folder_side.Right.ExternalInterCostalis.IC_Ext_R2R3.elem1;
    spine_muscle_folder_side.Right.MultifidusCervicis.MultifidusCervicisT3C7;
    spine_muscle_folder_side.Left.ErectorSpinae.LTptC5L5;
    spine_muscle_folder_side.Right.SemispinalisThoracis.SSTT10T2;
    spine_muscle_folder_side.Right.ErectorSpinae.LTptT9S4;
    spine_muscle_folder_side.Right.QuadratusLumborum.QLC12Median_L3;
    spine_muscle_folder_side.Left.Subcostalis.SCR3R6;
    spine_muscle_folder_side.Right.InnermostInterCostalis.IC_Inn_R4R5.elem6;
    spine_muscle_folder_side.Right.InnermostInterCostalis.IC_Inn_R3R4.elem5;
    spine_muscle_folder_side.Left.InnermostInterCostalis.IC_Inn_R4R5.elem8;
    spine_muscle_folder_side.Right.InnermostInterCostalis.IC_Inn_R6R7.elem8;
    spine_muscle_folder_side.Right.InternalInterCostalis.IC_Int_R3R4.elem6;
    spine_muscle_folder_side.Left.ErectorSpinae.LTptT3L3;
    spine_muscle_folder_side.Left.SemispinalisCervicis.SemispinalisCervicisT6C7;
    spine_muscle_folder_side.Left.ExternalInterCostalis.IC_Ext_R4R5.elem3;
    spine_muscle_folder_side.Right.LongissimusCervicis.LongissimusCervicisT5C6;
    spine_muscle_folder_side.Right.Subcostalis.SCR3R6;
    spine_muscle_folder_side.Left.SemispinalisCervicis.SemispinalisCervicisT4C5;
    spine_muscle_folder_side.Left.Diaphragm.CC_DiaphragmNode7;
    spine_muscle_folder_side.Right.ExternalInterCostalis.IC_Ext_R7R8.elem4;
    spine_muscle_folder_side.Left.QuadratusLumborum.QLC12Median_CILat;
    spine_muscle_folder_side.Left.InnermostInterCostalis.IC_Inn_R2R3.elem2;
    spine_muscle_folder_side.Right.SpleniusCapitis.SpleniusCapitisT3C0;
    spine_muscle_folder_side.Left.InternalInterCostalis.IC_Int_R2R3.elem1;
    spine_muscle_folder_side.Right.ExternalInterCostalis.IC_Ext_R10R11.elem2;
    spine_muscle_folder_side.Right.InnermostInterCostalis.IC_Inn_R4R5.elem8;
    spine_muscle_folder_side.Right.ErectorSpinae.LTptC10Sacrum;
    spine_muscle_folder_side.Left.MultifidusCervicis.MultifidusCervicisT4C7;
    spine_muscle_folder_side.Left.InnermostInterCostalis.IC_Inn_R4R5.elem1;
    spine_muscle_folder_side.Right.SpleniusCervicis.SpleniusCervicisT4C2;
    spine_muscle_folder_side.Right.InternalInterCostalis.IC_Int_R2R3.elem2;
    spine_muscle_folder_side.Left.ErectorSpinae.LTptC8S3;
    spine_muscle_folder_side.Left.ExternalInterCostalis.IC_Ext_R4R5.elem7;
    spine_muscle_folder_side.Left.ExternalInterCostalis.IC_Ext_R11R12.elem2;
    spine_muscle_folder_side.Right.Diaphragm.R10_Diaphragm3;
    spine_muscle_folder_side.Left.ExternalInterCostalis.IC_Ext_R8R9.elem3;
    spine_muscle_folder_side.Left.ExternalInterCostalis.IC_Ext_R1R2.elem1;
    spine_muscle_folder_side.Right.ExternalInterCostalis.IC_Ext_R6R7.elem5;
    spine_muscle_folder_side.Left.ErectorSpinae.LTptT10Sacrum;
    spine_muscle_folder_side.Right.ExternalInterCostalis.IC_Ext_R9R10.elem5;
    spine_muscle_folder_side.Left.SemispinalisThoracis.SSTT7C6;
    spine_muscle_folder_side.Right.ErectorSpinae.LTptT8S3;
    spine_muscle_folder_side.Left.ErectorSpinae.LTptT1L1;
    spine_muscle_folder_side.Right.SemispinalisThoracis.SSTT8C7;
    spine_muscle_folder_side.Right.ExternalInterCostalis.IC_Ext_R9R10.elem6;
    spine_muscle_folder_side.Right.ErectorSpinae.LTptC3L3;
    spine_muscle_folder_side.Right.InnermostInterCostalis.IC_Inn_R3R4.elem3;
    spine_muscle_folder_side.Right.ExternalInterCostalis.IC_Ext_R11R12.elem2;
    spine_muscle_folder_side.Left.ExternalInterCostalis.IC_Ext_R5R6.elem3;
    spine_muscle_folder_side.Left.ThoracicMultifidi.MFT5T1;
    spine_muscle_folder_side.Left.InternalInterCostalis.IC_Int_R2R3.elem3;
    spine_muscle_folder_side.Left.ExternalInterCostalis.IC_Ext_R6R7.elem3;
    spine_muscle_folder_side.Right.ExternalInterCostalis.IC_Ext_R8R9.elem4;
    spine_muscle_folder_side.Right.LongissimusCapitis.LongissimusCapitisT4C0;
    spine_muscle_folder_side.Left.SemispinalisCapitis.SemispinalisCapitisT4C0;
    spine_muscle_folder_side.Right.InnermostInterCostalis.IC_Inn_R7R8.elem9;
    spine_muscle_folder_side.Right.ExternalInterCostalis.IC_Ext_R3R4.elem5;
    spine_muscle_folder_side.Left.InnermostInterCostalis.IC_Inn_R3R4.elem1;
    spine_muscle_folder_side.Right.MultifidusCervicis.MultifidusCervicisT3C6;
    spine_muscle_folder_side.Right.QuadratusLumborum.QLC12Median_CIInterMedian;
    spine_muscle_folder_side.Spinalis.SPL1T2;
    spine_muscle_folder_side.Right.ErectorSpinae.LTptT10Sacrum;
    spine_muscle_folder_side.Left.ThoracicMultifidi.MFT5T2;
    spine_muscle_folder_side.Left.SpleniusCervicis.SpleniusCervicisT3C1;
    spine_muscle_folder_side.Right.TransversusThoracis.TrThR8S;
    spine_muscle_folder_side.Left.InnermostInterCostalis.IC_Inn_R2R3.elem4;
    spine_muscle_folder_side.Right.InnermostInterCostalis.IC_Inn_R5R6.elem9;
    spine_muscle_folder_side.Left.QuadratusLumborum.QLC12InterMedian_L2;
    spine_muscle_folder_side.Right.ExternalInterCostalis.IC_Ext_R3R4.elem7;
    spine_muscle_folder_side.Right.ErectorSpinae.ITR4R10;
    spine_muscle_folder_side.Right.Subcostalis.SCR1R3;
    spine_muscle_folder_side.Right.ExternalInterCostalis.IC_Ext_R5R6.elem6;
    spine_muscle_folder_side.Right.InnermostInterCostalis.IC_Inn_R3R4.elem7;
    spine_muscle_folder_side.Left.InternalInterCostalis.IC_Int_R4R5.elem7;
    spine_muscle_folder_side.Left.SemispinalisCapitis.SemispinalisCapitisT6C0;
    spine_muscle_folder_side.Right.Subcostalis.SCR4R7;
    spine_muscle_folder_side.Right.Diaphragm.R11_Diaphragm2;
    spine_muscle_folder_side.Right.Diaphragm.R10_Diaphragm2;
    spine_muscle_folder_side.Right.ErectorSpinae.ILptC5SIPS;
    spine_muscle_folder_side.Left.InternalInterCostalis.IC_Int_R2R3.elem2;
    spine_muscle_folder_side.Right.Subcostalis.SCR4R6;
    spine_muscle_folder_side.Right.InnermostInterCostalis.IC_Inn_R3R4.elem1;
    spine_muscle_folder_side.Left.SemispinalisCervicis.SemispinalisCervicisT5C6;
    spine_muscle_folder_side.Left.ErectorSpinae.LTptT8S3;
    spine_muscle_folder_side.Spinalis.SPL2T1;
    spine_muscle_folder_side.Right.Subcostalis.SCR2R4;
    spine_muscle_folder_side.Right.RotatoresLongus.RotatoresLongusT3T1;
    spine_muscle_folder_side.Right.SemispinalisCervicis.SemispinalisCervicisT6C7;
    spine_muscle_folder_side.Left.Diaphragm.R11_Diaphragm1;
    spine_muscle_folder_side.Left.LongissimusCervicis.LongissimusCervicisT4C5;
    spine_muscle_folder_side.Left.InnermostInterCostalis.IC_Inn_R3R4.elem7;
    spine_muscle_folder_side.Left.LongissimusCapitis.LongissimusCapitisT3C0;
    spine_muscle_folder_side.Right.ErectorSpinae.ITR5R11;
    spine_muscle_folder_side.Right.InnermostInterCostalis.IC_Inn_R7R8.elem7;
    spine_muscle_folder_side.Right.ExternalInterCostalis.IC_Ext_R8R9.elem3;
    spine_muscle_folder_side.Right.SemispinalisCervicis.SemispinalisCervicisT4C5;
    spine_muscle_folder_side.Left.ExternalInterCostalis.IC_Ext_R5R6.elem5;
    spine_muscle_folder_side.Right.ExternalInterCostalis.IC_Ext_R5R6.elem7;
    spine_muscle_folder_side.Left.RotatoresLongus.RotatoresLongusT3T1;
    spine_muscle_folder_side.Left.ErectorSpinae.ITR4R10;
    spine_muscle_folder_side.Left.ThoracicMultifidi.MFT4T1;
    spine_muscle_folder_side.Right.ExternalInterCostalis.IC_Ext_R6R7.elem4;
    spine_muscle_folder_side.Left.ThoracicMultifidi.MFT7T2;
    spine_muscle_folder_side.Right.SemispinalisCapitis.SemispinalisCapitisT6C0;
    spine_muscle_folder_side.Left.LongissimusCapitis.LongissimusCapitisT5C0;
    spine_muscle_folder_side.Left.InnermostInterCostalis.IC_Inn_R7R8.elem7;
    spine_muscle_folder_side.Left.ErectorSpinae.LTptT4L4;
    spine_muscle_folder_side.Left.QuadratusLumborum.QLC12Median_L3;
    spine_muscle_folder_side.Right.ErectorSpinae.ILptC6SIPS;
    spine_muscle_folder_side.Right.ErectorSpinae.LTptC8S3;
    spine_muscle_folder_side.Right.MultifidusCervicis.MultifidusCervicisT4C7;
    spine_muscle_folder_side.Right.RotatoresBrevis.RotatoresBrevisT3T2;
    spine_muscle_folder_side.Right.InnermostInterCostalis.IC_Inn_R2R3.elem5;
    spine_muscle_folder_side.Left.QuadratusLumborum.QLC12InterMedian_L3;
    spine_muscle_folder_side.Right.InternalInterCostalis.IC_Int_R2R3.elem1;
    spine_muscle_folder_side.Right.ExternalInterCostalis.IC_Ext_R7R8.elem5;
    spine_muscle_folder_side.Left.LongissimusCervicis.LongissimusCervicisT5C6;
    spine_muscle_folder_side.Left.InnermostInterCostalis.IC_Inn_R4R5.elem5;
    spine_muscle_folder_side.Right.InternalInterCostalis.IC_Int_R4R5.elem7;
    spine_muscle_folder_side.Right.SemispinalisThoracis.SSTT9T1;
    spine_muscle_folder_side.Left.ExternalInterCostalis.IC_Ext_R7R8.elem5;
    spine_muscle_folder_side.Left.InnermostInterCostalis.IC_Inn_R3R4.elem2;
    spine_muscle_folder_side.Left.ExternalInterCostalis.IC_Ext_R10R11.elem1;
    spine_muscle_folder_side.Right.ExternalInterCostalis.IC_Ext_R2R3.elem2;
    spine_muscle_folder_side.Right.ExternalInterCostalis.IC_Ext_R4R5.elem3;
    spine_muscle_folder_side.Left.SpleniusCapitis.SpleniusCapitisT3C0;
    spine_muscle_folder_side.Right.ExternalInterCostalis.IC_Ext_R3R4.elem6;
};

AnyFolder T3T4jnt = {
    spine_muscle_folder_side.Left.Subcostalis.SCR2R5;
    spine_muscle_folder_side.Right.ExternalInterCostalis.IC_Ext_R9R10.elem3;
    spine_muscle_folder_side.Right.ExternalInterCostalis.IC_Ext_R4R5.elem5;
    spine_muscle_folder_side.Right.ExternalInterCostalis.IC_Ext_R3R4.elem2;
    spine_muscle_folder_side.Right.InternalInterCostalis.IC_Int_R2R3.elem3;
    spine_muscle_folder_side.Right.InnermostInterCostalis.IC_Inn_R2R3.elem3;
    spine_muscle_folder_side.Left.ExternalInterCostalis.IC_Ext_R5R6.elem2;
    spine_muscle_folder_side.Left.ErectorSpinae.ITR1R7;
    spine_muscle_folder_side.Right.QuadratusLumborum.QLC12Median_CILat;
    spine_muscle_folder_side.Left.ExternalInterCostalis.IC_Ext_R2R3.elem3;
    spine_muscle_folder_side.Right.SerratusPosteriorSuperior.SPSR3T1;
    spine_muscle_folder_side.Right.ExternalInterCostalis.IC_Ext_R6R7.elem3;
    spine_muscle_folder_side.Right.LevatorCostarum.LCBrT3R4;
    spine_muscle_folder_side.Right.ExternalInterCostalis.IC_Ext_R4R5.elem7;
    spine_muscle_folder_side.Left.ErectorSpinae.ILptC6SIPS;
    spine_muscle_folder_side.Left.ThoracicMultifidi.MFT6T2;
    spine_muscle_folder_side.Left.ExternalInterCostalis.IC_Ext_R8R9.elem4;
    spine_muscle_folder_side.Left.InnermostInterCostalis.IC_Inn_R4R5.elem7;
    spine_muscle_folder_side.Right.InnermostInterCostalis.IC_Inn_R4R5.elem5;
    spine_muscle_folder_side.Right.InternalInterCostalis.IC_Int_R5R6.elem7;
    spine_muscle_folder_side.Right.InnermostInterCostalis.IC_Inn_R2R3.elem4;
    spine_muscle_folder_side.Right.TransversusThoracis.TrThR3S;
    spine_muscle_folder_side.Left.Diaphragm.R11_Diaphragm2;
    spine_muscle_folder_side.Left.ThoracicMultifidi.MFT8T3;
    spine_muscle_folder_side.Right.InnermostInterCostalis.IC_Inn_R7R8.elem8;
    spine_muscle_folder_side.Right.ErectorSpinae.LTptT5L5;
    spine_muscle_folder_side.Left.ExternalInterCostalis.IC_Ext_R2R3.elem1;
    spine_muscle_folder_side.Right.ErectorSpinae.LTptC9S4;
    spine_muscle_folder_side.Left.InnermostInterCostalis.IC_Inn_R2R3.elem3;
    spine_muscle_folder_side.Left.ErectorSpinae.LTptT7S2;
    spine_muscle_folder_side.Right.InnermostInterCostalis.IC_Inn_R4R5.elem3;
    spine_muscle_folder_side.Left.QuadratusLumborum.QLC12Median_L2;
    spine_muscle_folder_side.Left.ExternalInterCostalis.IC_Ext_R3R4.elem5;
    spine_muscle_folder_side.Right.SemispinalisCapitis.SemispinalisCapitisT4C0;
    spine_muscle_folder_side.Right.ThoracicMultifidi.MFT7T2;
    spine_muscle_folder_side.Right.ThoracicMultifidi.MFT8T3;
    spine_muscle_folder_side.Left.InnermostInterCostalis.IC_Inn_R5R6.elem9;
    spine_muscle_folder_side.Left.ErectorSpinae.LTptC9S4;
    spine_muscle_folder_side.Left.ErectorSpinae.LTptC4L4;
    spine_muscle_folder_side.Right.ExternalInterCostalis.IC_Ext_R10R11.elem3;
    spine_muscle_folder_side.Left.ExternalInterCostalis.IC_Ext_R7R8.elem2;
    spine_muscle_folder_side.Right.SemispinalisCapitis.SemispinalisCapitisT5C0;
    spine_muscle_folder_side.Left.ErectorSpinae.ITR5R11;
    spine_muscle_folder_side.Left.SemispinalisThoracis.SSTT9T1;
    spine_muscle_folder_side.Right.Diaphragm.R11_Diaphragm1;
    spine_muscle_folder_side.Right.ExternalInterCostalis.IC_Ext_R10R11.elem4;
    spine_muscle_folder_side.Right.ExternalInterCostalis.IC_Ext_R4R5.elem6;
    spine_muscle_folder_side.Right.LongissimusCapitis.LongissimusCapitisT5C0;
    spine_muscle_folder_side.Right.ExternalInterCostalis.IC_Ext_R5R6.elem5;
    spine_muscle_folder_side.Left.ThoracicMultifidi.MFT7T3;
    spine_muscle_folder_side.Right.Subcostalis.SCR3R5;
    spine_muscle_folder_side.Right.InnermostInterCostalis.IC_Inn_R3R4.elem6;
    spine_muscle_folder_side.Left.ExternalInterCostalis.IC_Ext_R7R8.elem3;
    spine_muscle_folder_side.Right.InternalInterCostalis.IC_Int_R7R8.elem_sternum;
    spine_muscle_folder_side.Left.ExternalInterCostalis.IC_Ext_R5R6.elem7;
    spine_muscle_folder_side.Left.InternalInterCostalis.IC_Int_R7R8.elem7;
    spine_muscle_folder_side.Right.ThoracicMultifidi.MFT4T1;
    spine_muscle_folder_side.Right.ThoracicMultifidi.MFT6T1;
    spine_muscle_folder_side.Left.ExternalInterCostalis.IC_Ext_R6R7.elem5;
    spine_muscle_folder_side.Right.Subcostalis.SCR2R5;
    spine_muscle_folder_side.Left.InnermostInterCostalis.IC_Inn_R3R4.elem6;
    spine_muscle_folder_side.Right.InnermostInterCostalis.IC_Inn_R4R5.elem2;
    spine_muscle_folder_side.Right.ExternalInterCostalis.IC_Ext_R3R4.elem3;
    spine_muscle_folder_side.Left.LevatorCostarum.LCBrT2R3;
    spine_muscle_folder_side.Left.InnermostInterCostalis.IC_Inn_R5R6.elem1;
    spine_muscle_folder_side.Right.ErectorSpinae.LTptT2L2;
    spine_muscle_folder_side.Right.TransversusThoracis.TrThR4S;
    spine_muscle_folder_side.Left.LevatorCostarum.LCBrT3R4;
    spine_muscle_folder_side.Right.ErectorSpinae.ITC7R7;
    spine_muscle_folder_side.Left.ExternalInterCostalis.IC_Ext_R7R8.elem6;
    spine_muscle_folder_side.Right.ExternalInterCostalis.IC_Ext_R5R6.elem2;
    spine_muscle_folder_side.Right.SemispinalisThoracis.SSTT7C6;
    spine_muscle_folder_side.Left.ExternalInterCostalis.IC_Ext_R7R8.elem7;
    spine_muscle_folder_side.Left.ExternalInterCostalis.IC_Ext_R9R10.elem7;
    spine_muscle_folder_side.Left.ExternalInterCostalis.IC_Ext_R4R5.elem5;
    spine_muscle_folder_side.Left.ExternalInterCostalis.IC_Ext_R9R10.elem3;
    spine_muscle_folder_side.Left.ExternalInterCostalis.IC_Ext_R4R5.elem2;
    spine_muscle_folder_side.Left.SerratusPosteriorSuperior.SPSR4T2;
    spine_muscle_folder_side.Right.ExternalInterCostalis.IC_Ext_R6R7.elem6;
    spine_muscle_folder_side.Right.ExternalInterCostalis.IC_Ext_R9R10.elem4;
    spine_muscle_folder_side.Left.ExternalInterCostalis.IC_Ext_R10R11.elem5;
    spine_muscle_folder_side.Left.InternalInterCostalis.IC_Int_R6R7.elem7;
    spine_muscle_folder_side.Left.ThoracicMultifidi.MFT6T3;
    spine_muscle_folder_side.Left.ExternalInterCostalis.IC_Ext_R3R4.elem4;
    spine_muscle_folder_side.Right.QuadratusLumborum.QLC12Median_L2;
    spine_muscle_folder_side.Right.ErectorSpinae.ITR1R7;
    spine_muscle_folder_side.Right.InnermostInterCostalis.IC_Inn_R10R11.elem1;
    spine_muscle_folder_side.Right.InnermostInterCostalis.IC_Inn_R4R5.elem9;
    spine_muscle_folder_side.Left.ExternalInterCostalis.IC_Ext_R2R3.elem2;
    spine_muscle_folder_side.Right.ExternalInterCostalis.IC_Ext_R4R5.elem2;
    spine_muscle_folder_side.Left.InnermostInterCostalis.IC_Inn_R2R3.elem1;
    spine_muscle_folder_side.Right.QuadratusLumborum.QLC12InterMedian_CIInterMedian;
    spine_muscle_folder_side.Left.ErectorSpinae.LTptT9S4;
    spine_muscle_folder_side.Left.ExternalInterCostalis.IC_Ext_R3R4.elem1;
    spine_muscle_folder_side.Right.TransversusThoracis.TrThR9S;
    spine_muscle_folder_side.Left.ExternalInterCostalis.IC_Ext_R10R11.elem2;
    spine_muscle_folder_side.Left.TransversusThoracis.TrThR9S;
    spine_muscle_folder_side.Left.ErectorSpinae.ITC7R7;
    spine_muscle_folder_side.Left.InternalInterCostalis.IC_Int_R4R5.elem6;
    spine_muscle_folder_side.Left.InnermostInterCostalis.IC_Inn_R7R8.elem9;
    spine_muscle_folder_side.Left.QuadratusLumborum.QLC12Median_CIInterMedian;
    spine_muscle_folder_side.Right.ExternalInterCostalis.IC_Ext_R10R11.elem5;
    spine_muscle_folder_side.Left.Diaphragm.R10_Diaphragm1;
    spine_muscle_folder_side.Right.QuadratusLumborum.QLC12InterMedian_L2;
    spine_muscle_folder_side.Right.ExternalInterCostalis.IC_Ext_R1R2.elem1;
    spine_muscle_folder_side.Left.InnermostInterCostalis.IC_Inn_R7R8.elem8;
    spine_muscle_folder_side.Left.InternalInterCostalis.IC_Int_R3R4.elem3;
    spine_muscle_folder_side.Right.SemispinalisThoracis.SSTT11T3;
    spine_muscle_folder_side.Right.InnermostInterCostalis.IC_Inn_R6R7.elem9;
    spine_muscle_folder_side.Right.ErectorSpinae.LTptC7S2;
    spine_muscle_folder_side.Left.ErectorSpinae.LTptC7S2;
    spine_muscle_folder_side.Left.TransversusThoracis.TrThR8S;
    spine_muscle_folder_side.Spinalis.SPL1T3;
    spine_muscle_folder_side.Left.ExternalInterCostalis.IC_Ext_R5R6.elem6;
    spine_muscle_folder_side.Left.ErectorSpinae.ITR3R9;
    spine_muscle_folder_side.Right.InnermostInterCostalis.IC_Inn_R3R4.elem4;
    spine_muscle_folder_side.Right.InnermostInterCostalis.IC_Inn_R5R6.elem8;
    spine_muscle_folder_side.Left.Diaphragm.R10_Diaphragm3;
    spine_muscle_folder_side.Left.SemispinalisCapitis.SemispinalisCapitisT5C0;
    spine_muscle_folder_side.Right.ErectorSpinae.LTptT1L1;
    spine_muscle_folder_side.Right.SpleniusCervicis.SpleniusCervicisT6C3;
    spine_muscle_folder_side.Left.InnermostInterCostalis.IC_Inn_R10R11.elem1;
    spine_muscle_folder_side.Left.ErectorSpinae.LTptT5L5;
    spine_muscle_folder_side.Left.InnermostInterCostalis.IC_Inn_R6R7.elem8;
    spine_muscle_folder_side.Left.SerratusPosteriorSuperior.SPSR3T1;
    spine_muscle_folder_side.Left.ExternalInterCostalis.IC_Ext_R4R5.elem4;
    spine_muscle_folder_side.Right.SemispinalisCervicis.SemispinalisCervicisT5C6;
    spine_muscle_folder_side.Left.ExternalInterCostalis.IC_Ext_R6R7.elem2;
    spine_muscle_folder_side.Left.InnermostInterCostalis.IC_Inn_R4R5.elem2;
    spine_muscle_folder_side.Right.InternalInterCostalis.IC_Int_R3R4.elem2;
    spine_muscle_folder_side.Right.LevatorCostarum.LCBrT1R2;
    spine_muscle_folder_side.Right.InnermostInterCostalis.IC_Inn_R4R5.elem1;
    spine_muscle_folder_side.Right.ExternalInterCostalis.IC_Ext_R9R10.elem7;
    spine_muscle_folder_side.Right.InnermostInterCostalis.IC_Inn_R2R3.elem1;
    spine_muscle_folder_side.Left.LevatorCostarum.LCBrT1R2;
    spine_muscle_folder_side.Left.InternalInterCostalis.IC_Int_R3R4.elem1;
    spine_muscle_folder_side.Right.RotatoresLongus.RotatoresLongusT4T2;
    spine_muscle_folder_side.Left.ExternalInterCostalis.IC_Ext_R8R9.elem7;
    spine_muscle_folder_side.Left.InnermostInterCostalis.IC_Inn_R4R5.elem9;
    spine_muscle_folder_side.Right.LongissimusCervicis.LongissimusCervicisT4C5;
    spine_muscle_folder_side.Right.ErectorSpinae.LTptC5L5;
    spine_muscle_folder_side.Left.Subcostalis.SCR3R5;
    spine_muscle_folder_side.Left.InnermostInterCostalis.IC_Inn_R6R7.elem9;
    spine_muscle_folder_side.Right.ThoracicMultifidi.MFT5T1;
    spine_muscle_folder_side.Right.QuadratusLumborum.QLC12InterMedian_L3;
    spine_muscle_folder_side.Right.InnermostInterCostalis.IC_Inn_R2R3.elem2;
    spine_muscle_folder_side.Right.ErectorSpinae.LTptT3L3;
    spine_muscle_folder_side.Left.Subcostalis.SCR2R4;
    spine_muscle_folder_side.Right.ErectorSpinae.LTptT11Sacrum;
    spine_muscle_folder_side.Left.ExternalInterCostalis.IC_Ext_R6R7.elem7;
    spine_muscle_folder_side.Left.ExternalInterCostalis.IC_Ext_R8R9.elem2;
    spine_muscle_folder_side.Left.InternalInterCostalis.IC_Int_R7R8.elem_sternum;
    spine_muscle_folder_side.Right.ErectorSpinae.LTptT7S2;
    spine_muscle_folder_side.Right.LevatorCostarum.LCBrT2R3;
    spine_muscle_folder_side.Right.ErectorSpinae.ITR2R8;
    spine_muscle_folder_side.Right.ExternalInterCostalis.IC_Ext_R4R5.elem4;
    spine_muscle_folder_side.Right.ExternalInterCostalis.IC_Ext_R3R4.elem4;
    spine_muscle_folder_side.Right.ThoracicMultifidi.MFT6T3;
    spine_muscle_folder_side.Right.ThoracicMultifidi.MFT7T3;
    spine_muscle_folder_side.Right.ThoracicMultifidi.MFT6T2;
    spine_muscle_folder_side.Left.ExternalInterCostalis.IC_Ext_R4R5.elem1;
    spine_muscle_folder_side.Left.ExternalInterCostalis.IC_Ext_R10R11.elem3;
    spine_muscle_folder_side.Left.SpleniusCervicis.SpleniusCervicisT4C2;
    spine_muscle_folder_side.Right.Subcostalis.SCR1R4;
    spine_muscle_folder_side.Left.ErectorSpinae.LTptC10Sacrum;
    spine_muscle_folder_side.Left.InnermostInterCostalis.IC_Inn_R6R7.elem7;
    spine_muscle_folder_side.Right.ExternalInterCostalis.IC_Ext_R6R7.elem7;
    spine_muscle_folder_side.Right.ExternalInterCostalis.IC_Ext_R7R8.elem7;
    spine_muscle_folder_side.Left.SpleniusCervicis.SpleniusCervicisT6C3;
    spine_muscle_folder_side.Right.ThoracicMultifidi.MFT5T2;
    spine_muscle_folder_side.Left.Diaphragm.R10_Diaphragm2;
    spine_muscle_folder_side.Right.ErectorSpinae.LTptT4L4;
    spine_muscle_folder_side.Left.TransversusThoracis.TrThR4S;
    spine_muscle_folder_side.Right.ExternalInterCostalis.IC_Ext_R3R4.elem1;
    spine_muscle_folder_side.Left.InnermostInterCostalis.IC_Inn_R4R5.elem6;
    spine_muscle_folder_side.Right.ExternalInterCostalis.IC_Ext_R6R7.elem2;
    spine_muscle_folder_side.Left.ExternalInterCostalis.IC_Ext_R6R7.elem6;
    spine_muscle_folder_side.Left.ErectorSpinae.LTptC3L3;
    spine_muscle_folder_side.Right.ExternalInterCostalis.IC_Ext_R7R8.elem3;
    spine_muscle_folder_side.Left.SpleniusCervicis.SpleniusCervicisT5C3;
    spine_muscle_folder_side.Left.ErectorSpinae.LTptT2L2;
    spine_muscle_folder_side.Left.ErectorSpinae.ILptC5SIPS;
    spine_muscle_folder_side.Left.InnermostInterCostalis.IC_Inn_R3R4.elem5;
    spine_muscle_folder_side.Left.InnermostInterCostalis.IC_Inn_R5R6.elem7;
    spine_muscle_folder_side.Right.ExternalInterCostalis.IC_Ext_R10R11.elem6;
    spine_muscle_folder_side.Left.RotatoresLongus.RotatoresLongusT4T2;
    spine_muscle_folder_side.Left.SemispinalisThoracis.SSTT10T2;
    spine_muscle_folder_side.Right.ExternalInterCostalis.IC_Ext_R7R8.elem2;
    spine_muscle_folder_side.Left.ExternalInterCostalis.IC_Ext_R9R10.elem5;
    spine_muscle_folder_side.Left.ExternalInterCostalis.IC_Ext_R3R4.elem3;
    spine_muscle_folder_side.Left.InternalInterCostalis.IC_Int_R3R4.elem5;
    spine_muscle_folder_side.Left.LongissimusCapitis.LongissimusCapitisT4C0;
    spine_muscle_folder_side.Left.QuadratusLumborum.QLC12Median_L4;
    spine_muscle_folder_side.Right.ExternalInterCostalis.IC_Ext_R8R9.elem5;
    spine_muscle_folder_side.Right.ErectorSpinae.ITR3R9;
    spine_muscle_folder_side.Left.ExternalInterCostalis.IC_Ext_R6R7.elem4;
    spine_muscle_folder_side.Left.SemispinalisThoracis.SSTT11T3;
    spine_muscle_folder_side.Right.InnermostInterCostalis.IC_Inn_R3R4.elem2;
    spine_muscle_folder_side.Right.ExternalInterCostalis.IC_Ext_R7R8.elem6;
    spine_muscle_folder_side.Right.SerratusPosteriorSuperior.SPSR4T2;
    spine_muscle_folder_side.Right.SpleniusCervicis.SpleniusCervicisT5C3;
    spine_muscle_folder_side.Left.InnermostInterCostalis.IC_Inn_R5R6.elem6;
    spine_muscle_folder_side.Right.InternalInterCostalis.IC_Int_R1R2.elem_sternum;
    spine_muscle_folder_side.Left.ExternalInterCostalis.IC_Ext_R4R5.elem6;
    spine_muscle_folder_side.Right.ExternalInterCostalis.IC_Ext_R5R6.elem4;
    spine_muscle_folder_side.Left.Subcostalis.SCR4R6;
    spine_muscle_folder_side.Right.InnermostInterCostalis.IC_Inn_R5R6.elem1;
    spine_muscle_folder_side.Right.ExternalInterCostalis.IC_Ext_R8R9.elem7;
    spine_muscle_folder_side.Left.InternalInterCostalis.IC_Int_R3R4.elem2;
    spine_muscle_folder_side.Left.InnermostInterCostalis.IC_Inn_R3R4.elem4;
    spine_muscle_folder_side.Left.ExternalInterCostalis.IC_Ext_R10R11.elem6;
    spine_muscle_folder_side.Right.InnermostInterCostalis.IC_Inn_R4R5.elem7;
    spine_muscle_folder_side.Left.ExternalInterCostalis.IC_Ext_R8R9.elem5;
    spine_muscle_folder_side.Right.ExternalInterCostalis.IC_Ext_R5R6.elem3;
    spine_muscle_folder_side.Left.ThoracicMultifidi.MFT6T1;
    spine_muscle_folder_side.Left.InnermostInterCostalis.IC_Inn_R5R6.elem8;
    spine_muscle_folder_side.Left.Subcostalis.SCR1R4;
    spine_muscle_folder_side.Left.Diaphragm.R11_Diaphragm3;
    spine_muscle_folder_side.Left.ExternalInterCostalis.IC_Ext_R7R8.elem4;
    spine_muscle_folder_side.Right.SerratusPosteriorSuperior.SPSR5T3;
    spine_muscle_folder_side.Left.ExternalInterCostalis.IC_Ext_R9R10.elem6;
    spine_muscle_folder_side.Left.ErectorSpinae.ITR2R8;
    spine_muscle_folder_side.Left.ExternalInterCostalis.IC_Ext_R9R10.elem4;
    spine_muscle_folder_side.Left.InnermostInterCostalis.IC_Inn_R3R4.elem3;
    spine_muscle_folder_side.Right.Diaphragm.R10_Diaphragm1;
    spine_muscle_folder_side.Right.InternalInterCostalis.IC_Int_R3R4.elem1;
    spine_muscle_folder_side.Left.Subcostalis.SCR1R3;
    spine_muscle_folder_side.Right.ErectorSpinae.LTptC4L4;
    spine_muscle_folder_side.Left.ExternalInterCostalis.IC_Ext_R10R11.elem4;
    spine_muscle_folder_side.Left.QuadratusLumborum.QLC12InterMedian_CIInterMedian;
    spine_muscle_folder_side.Right.Diaphragm.R11_Diaphragm3;
    spine_muscle_folder_side.Right.ExternalInterCostalis.IC_Ext_R2R3.elem3;
    spine_muscle_folder_side.Left.Subcostalis.SCR4R7;
    spine_muscle_folder_side.Right.ExternalInterCostalis.IC_Ext_R10R11.elem1;
    spine_muscle_folder_side.Right.ExternalInterCostalis.IC_Ext_R8R9.elem2;
    spine_muscle_folder_side.Left.TransversusThoracis.TrThR3S;
    spine_muscle_folder_side.Left.ExternalInterCostalis.IC_Ext_R5R6.elem4;
    spine_muscle_folder_side.Right.InternalInterCostalis.IC_Int_R3R4.elem5;
    spine_muscle_folder_side.Right.QuadratusLumborum.QLC12Median_L4;
    spine_muscle_folder_side.Right.ExternalInterCostalis.IC_Ext_R4R5.elem1;
    spine_muscle_folder_side.Left.ExternalInterCostalis.IC_Ext_R3R4.elem2;
    spine_muscle_folder_side.Left.SemispinalisThoracis.SSTT8C7;
    spine_muscle_folder_side.Right.ExternalInterCostalis.IC_Ext_R2R3.elem1;
    spine_muscle_folder_side.Left.ErectorSpinae.LTptC5L5;
    spine_muscle_folder_side.Right.InnermostInterCostalis.IC_Inn_R5R6.elem7;
    spine_muscle_folder_side.Right.SemispinalisThoracis.SSTT10T2;
    spine_muscle_folder_side.Right.ErectorSpinae.LTptT9S4;
    spine_muscle_folder_side.Right.QuadratusLumborum.QLC12Median_L3;
    spine_muscle_folder_side.Left.Subcostalis.SCR3R6;
    spine_muscle_folder_side.Right.InnermostInterCostalis.IC_Inn_R4R5.elem6;
    spine_muscle_folder_side.Right.InnermostInterCostalis.IC_Inn_R5R6.elem6;
    spine_muscle_folder_side.Right.InnermostInterCostalis.IC_Inn_R3R4.elem5;
    spine_muscle_folder_side.Left.InnermostInterCostalis.IC_Inn_R4R5.elem8;
    spine_muscle_folder_side.Right.InnermostInterCostalis.IC_Inn_R6R7.elem8;
    spine_muscle_folder_side.Left.InnermostInterCostalis.IC_Inn_R4R5.elem4;
    spine_muscle_folder_side.Left.ErectorSpinae.LTptT3L3;
    spine_muscle_folder_side.Left.SemispinalisCervicis.SemispinalisCervicisT6C7;
    spine_muscle_folder_side.Left.ExternalInterCostalis.IC_Ext_R4R5.elem3;
    spine_muscle_folder_side.Right.LongissimusCervicis.LongissimusCervicisT5C6;
    spine_muscle_folder_side.Right.Subcostalis.SCR3R6;
    spine_muscle_folder_side.Left.SemispinalisCervicis.SemispinalisCervicisT4C5;
    spine_muscle_folder_side.Right.ExternalInterCostalis.IC_Ext_R7R8.elem4;
    spine_muscle_folder_side.Left.QuadratusLumborum.QLC12Median_CILat;
    spine_muscle_folder_side.Left.InnermostInterCostalis.IC_Inn_R2R3.elem2;
    spine_muscle_folder_side.Left.InternalInterCostalis.IC_Int_R2R3.elem1;
    spine_muscle_folder_side.Right.ExternalInterCostalis.IC_Ext_R10R11.elem2;
    spine_muscle_folder_side.Right.InnermostInterCostalis.IC_Inn_R4R5.elem8;
    spine_muscle_folder_side.Right.ErectorSpinae.LTptC10Sacrum;
    spine_muscle_folder_side.Left.MultifidusCervicis.MultifidusCervicisT4C7;
    spine_muscle_folder_side.Left.InnermostInterCostalis.IC_Inn_R4R5.elem1;
    spine_muscle_folder_side.Right.SpleniusCervicis.SpleniusCervicisT4C2;
    spine_muscle_folder_side.Left.InternalInterCostalis.IC_Int_R5R6.elem7;
    spine_muscle_folder_side.Right.InternalInterCostalis.IC_Int_R2R3.elem2;
    spine_muscle_folder_side.Left.ErectorSpinae.LTptC8S3;
    spine_muscle_folder_side.Left.ExternalInterCostalis.IC_Ext_R4R5.elem7;
    spine_muscle_folder_side.Left.ExternalInterCostalis.IC_Ext_R11R12.elem2;
    spine_muscle_folder_side.Right.Diaphragm.R10_Diaphragm3;
    spine_muscle_folder_side.Left.ExternalInterCostalis.IC_Ext_R8R9.elem3;
    spine_muscle_folder_side.Left.ExternalInterCostalis.IC_Ext_R1R2.elem1;
    spine_muscle_folder_side.Right.ExternalInterCostalis.IC_Ext_R6R7.elem5;
    spine_muscle_folder_side.Left.ErectorSpinae.LTptT10Sacrum;
    spine_muscle_folder_side.Right.ExternalInterCostalis.IC_Ext_R9R10.elem5;
    spine_muscle_folder_side.Left.SemispinalisThoracis.SSTT7C6;
    spine_muscle_folder_side.Right.ErectorSpinae.LTptT8S3;
    spine_muscle_folder_side.Left.ErectorSpinae.LTptT1L1;
    spine_muscle_folder_side.Right.SemispinalisThoracis.SSTT8C7;
    spine_muscle_folder_side.Right.RotatoresLongus.RotatoresLongusT5T3;
    spine_muscle_folder_side.Right.ExternalInterCostalis.IC_Ext_R9R10.elem6;
    spine_muscle_folder_side.Right.InternalInterCostalis.IC_Int_R6R7.elem7;
    spine_muscle_folder_side.Right.ErectorSpinae.LTptC3L3;
    spine_muscle_folder_side.Right.InnermostInterCostalis.IC_Inn_R3R4.elem3;
    spine_muscle_folder_side.Right.ExternalInterCostalis.IC_Ext_R11R12.elem2;
    spine_muscle_folder_side.Left.ExternalInterCostalis.IC_Ext_R5R6.elem3;
    spine_muscle_folder_side.Right.InternalInterCostalis.IC_Int_R3R4.elem3;
    spine_muscle_folder_side.Left.ThoracicMultifidi.MFT5T1;
    spine_muscle_folder_side.Left.InternalInterCostalis.IC_Int_R2R3.elem3;
    spine_muscle_folder_side.Right.InternalInterCostalis.IC_Int_R7R8.elem7;
    spine_muscle_folder_side.Left.ExternalInterCostalis.IC_Ext_R6R7.elem3;
    spine_muscle_folder_side.Right.ExternalInterCostalis.IC_Ext_R8R9.elem4;
    spine_muscle_folder_side.Right.LongissimusCapitis.LongissimusCapitisT4C0;
    spine_muscle_folder_side.Left.SemispinalisCapitis.SemispinalisCapitisT4C0;
    spine_muscle_folder_side.Right.InnermostInterCostalis.IC_Inn_R7R8.elem9;
    spine_muscle_folder_side.Left.InternalInterCostalis.IC_Int_R3R4.elem4;
    spine_muscle_folder_side.Right.ExternalInterCostalis.IC_Ext_R3R4.elem5;
    spine_muscle_folder_side.Left.InnermostInterCostalis.IC_Inn_R3R4.elem1;
    spine_muscle_folder_side.Right.QuadratusLumborum.QLC12Median_CIInterMedian;
    spine_muscle_folder_side.Spinalis.SPL1T2;
    spine_muscle_folder_side.Right.ErectorSpinae.LTptT10Sacrum;
    spine_muscle_folder_side.Left.ThoracicMultifidi.MFT5T2;
    spine_muscle_folder_side.Right.TransversusThoracis.TrThR8S;
    spine_muscle_folder_side.Left.InnermostInterCostalis.IC_Inn_R2R3.elem4;
    spine_muscle_folder_side.Right.InnermostInterCostalis.IC_Inn_R5R6.elem9;
    spine_muscle_folder_side.Left.QuadratusLumborum.QLC12InterMedian_L2;
    spine_muscle_folder_side.Right.ErectorSpinae.ITR4R10;
    spine_muscle_folder_side.Right.Subcostalis.SCR1R3;
    spine_muscle_folder_side.Left.InnermostInterCostalis.IC_Inn_R4R5.elem3;
    spine_muscle_folder_side.Right.InnermostInterCostalis.IC_Inn_R4R5.elem4;
    spine_muscle_folder_side.Right.ExternalInterCostalis.IC_Ext_R5R6.elem6;
    spine_muscle_folder_side.Left.InternalInterCostalis.IC_Int_R4R5.elem7;
    spine_muscle_folder_side.Left.SemispinalisCapitis.SemispinalisCapitisT6C0;
    spine_muscle_folder_side.Right.Subcostalis.SCR4R7;
    spine_muscle_folder_side.Right.Diaphragm.R11_Diaphragm2;
    spine_muscle_folder_side.Right.Diaphragm.R10_Diaphragm2;
    spine_muscle_folder_side.Right.ErectorSpinae.ILptC5SIPS;
    spine_muscle_folder_side.Left.SerratusPosteriorSuperior.SPSR5T3;
    spine_muscle_folder_side.Left.InternalInterCostalis.IC_Int_R2R3.elem2;
    spine_muscle_folder_side.Right.InnermostInterCostalis.IC_Inn_R6R7.elem7;
    spine_muscle_folder_side.Right.Subcostalis.SCR4R6;
    spine_muscle_folder_side.Right.InnermostInterCostalis.IC_Inn_R3R4.elem1;
    spine_muscle_folder_side.Left.SemispinalisCervicis.SemispinalisCervicisT5C6;
    spine_muscle_folder_side.Left.ErectorSpinae.LTptT8S3;
    spine_muscle_folder_side.Spinalis.SPL2T1;
    spine_muscle_folder_side.Right.Subcostalis.SCR2R4;
    spine_muscle_folder_side.Right.SemispinalisCervicis.SemispinalisCervicisT6C7;
    spine_muscle_folder_side.Left.Diaphragm.R11_Diaphragm1;
    spine_muscle_folder_side.Left.LongissimusCervicis.LongissimusCervicisT4C5;
    spine_muscle_folder_side.Right.ErectorSpinae.ITR5R11;
    spine_muscle_folder_side.Right.InnermostInterCostalis.IC_Inn_R7R8.elem7;
    spine_muscle_folder_side.Right.ExternalInterCostalis.IC_Ext_R8R9.elem3;
    spine_muscle_folder_side.Right.InternalInterCostalis.IC_Int_R3R4.elem4;
    spine_muscle_folder_side.Right.SemispinalisCervicis.SemispinalisCervicisT4C5;
    spine_muscle_folder_side.Left.ExternalInterCostalis.IC_Ext_R5R6.elem5;
    spine_muscle_folder_side.Right.ExternalInterCostalis.IC_Ext_R5R6.elem7;
    spine_muscle_folder_side.Left.ErectorSpinae.ITR4R10;
    spine_muscle_folder_side.Left.ThoracicMultifidi.MFT4T1;
    spine_muscle_folder_side.Left.InternalInterCostalis.IC_Int_R1R2.elem_sternum;
    spine_muscle_folder_side.Right.ExternalInterCostalis.IC_Ext_R6R7.elem4;
    spine_muscle_folder_side.Left.ThoracicMultifidi.MFT7T2;
    spine_muscle_folder_side.Right.SemispinalisCapitis.SemispinalisCapitisT6C0;
    spine_muscle_folder_side.Left.LongissimusCapitis.LongissimusCapitisT5C0;
    spine_muscle_folder_side.Left.InnermostInterCostalis.IC_Inn_R7R8.elem7;
    spine_muscle_folder_side.Left.ErectorSpinae.LTptT4L4;
    spine_muscle_folder_side.Left.QuadratusLumborum.QLC12Median_L3;
    spine_muscle_folder_side.Right.ErectorSpinae.ILptC6SIPS;
    spine_muscle_folder_side.Right.ErectorSpinae.LTptC8S3;
    spine_muscle_folder_side.Right.MultifidusCervicis.MultifidusCervicisT4C7;
    spine_muscle_folder_side.Right.InternalInterCostalis.IC_Int_R4R5.elem6;
    spine_muscle_folder_side.Left.QuadratusLumborum.QLC12InterMedian_L3;
    spine_muscle_folder_side.Left.ErectorSpinae.LTptT11Sacrum;
    spine_muscle_folder_side.Right.InternalInterCostalis.IC_Int_R2R3.elem1;
    spine_muscle_folder_side.Right.ExternalInterCostalis.IC_Ext_R7R8.elem5;
    spine_muscle_folder_side.Left.LongissimusCervicis.LongissimusCervicisT5C6;
    spine_muscle_folder_side.Left.InnermostInterCostalis.IC_Inn_R4R5.elem5;
    spine_muscle_folder_side.Right.InternalInterCostalis.IC_Int_R4R5.elem7;
    spine_muscle_folder_side.Right.SemispinalisThoracis.SSTT9T1;
    spine_muscle_folder_side.Left.ExternalInterCostalis.IC_Ext_R7R8.elem5;
    spine_muscle_folder_side.Left.InnermostInterCostalis.IC_Inn_R3R4.elem2;
    spine_muscle_folder_side.Left.ExternalInterCostalis.IC_Ext_R10R11.elem1;
    spine_muscle_folder_side.Right.ExternalInterCostalis.IC_Ext_R2R3.elem2;
    spine_muscle_folder_side.Left.RotatoresLongus.RotatoresLongusT5T3;
    spine_muscle_folder_side.Right.ExternalInterCostalis.IC_Ext_R4R5.elem3;
};
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