#if AMMR_VERSION == 4
AnyString spine_muscle_folder_side = "Main.HumanModel.BodyModel.Trunk.Muscles." + Side;
#else
AnyString spine_muscle_folder_side = "Main.HumanModel.BodyModel.Trunk.MusclesSpine" + Side;
#endif

AnyFolder SacrumPelvisJnt = {
  AnyObjectPtr ListFlexors = arrcat(
arrcat(
    ObjSearch(.spine_muscle_folder_side + ".ErectorSpinae.ILplL1CI"),
    ObjSearch(.spine_muscle_folder_side + ".ErectorSpinae.ILptC12CI"),
    ObjSearch(.spine_muscle_folder_side + ".ObliquusExternus.OEC_1"),
    ObjSearch(.spine_muscle_folder_side + ".ObliquusExternus.OEC_10"),
    ObjSearch(.spine_muscle_folder_side + ".ObliquusExternus.OEC_11"),
    ObjSearch(.spine_muscle_folder_side + ".ObliquusExternus.OEC_12"),
    ObjSearch(.spine_muscle_folder_side + ".ObliquusExternus.OEC_2"),
    ObjSearch(.spine_muscle_folder_side + ".ObliquusExternus.OEC_3"),
    ObjSearch(.spine_muscle_folder_side + ".ObliquusExternus.OEC_4"),
    ObjSearch(.spine_muscle_folder_side + ".ObliquusExternus.OEC_5")
),
arrcat(
    ObjSearch(.spine_muscle_folder_side + ".ObliquusExternus.OEC_6"),
    ObjSearch(.spine_muscle_folder_side + ".ObliquusExternus.OEC_7"),
    ObjSearch(.spine_muscle_folder_side + ".ObliquusExternus.OEC_8"),
    ObjSearch(.spine_muscle_folder_side + ".ObliquusExternus.OEC_9"),
    ObjSearch(.spine_muscle_folder_side + ".ObliquusInternus.OIC_11"),
    ObjSearch(.spine_muscle_folder_side + ".ObliquusInternus.OIC_12"),
    ObjSearch(.spine_muscle_folder_side + ".ObliquusInternus.OIC_13"),
    ObjSearch(.spine_muscle_folder_side + ".ObliquusInternus.OIC_3"),
    ObjSearch(.spine_muscle_folder_side + ".ObliquusInternus.OIC_4"),
    ObjSearch(.spine_muscle_folder_side + ".ObliquusInternus.OIC_5")
),
arrcat(
    ObjSearch(.spine_muscle_folder_side + ".ObliquusInternus.OIC_6"),
    ObjSearch(.spine_muscle_folder_side + ".ObliquusInternus.OIC_7"),
    ObjSearch(.spine_muscle_folder_side + ".ObliquusInternus.OIC_8"),
    ObjSearch(.spine_muscle_folder_side + ".ObliquusInternus.OIC_8_extra"),
    ObjSearch(.spine_muscle_folder_side + ".PsoasMajor.PML1I_TM"),
    ObjSearch(.spine_muscle_folder_side + ".PsoasMajor.PML1T_TM"),
    ObjSearch(.spine_muscle_folder_side + ".PsoasMajor.PML2I_TM"),
    ObjSearch(.spine_muscle_folder_side + ".PsoasMajor.PML2T_TM"),
    ObjSearch(.spine_muscle_folder_side + ".PsoasMajor.PML3I_TM"),
    ObjSearch(.spine_muscle_folder_side + ".PsoasMajor.PML3T_TM")
),
arrcat(
    ObjSearch(.spine_muscle_folder_side + ".PsoasMajor.PML4I_TM"),
    ObjSearch(.spine_muscle_folder_side + ".PsoasMajor.PML4T_TM"),
    ObjSearch(.spine_muscle_folder_side + ".PsoasMajor.PML5T_TM"),
    ObjSearch(.spine_muscle_folder_side + ".PsoasMajor.PML5_TM"),
    ObjSearch(.spine_muscle_folder_side + ".PsoasMajor.PMT12I_TM"),
    ObjSearch(.spine_muscle_folder_side + ".QuadratusLumborum.QLC12InterMedian_CIInterMedian"),
    ObjSearch(.spine_muscle_folder_side + ".QuadratusLumborum.QLC12InterMedian_CILat"),
    ObjSearch(.spine_muscle_folder_side + ".QuadratusLumborum.QLC12Lat_CILat"),
    ObjSearch(.spine_muscle_folder_side + ".QuadratusLumborum.QLC12Median_CILat"),
    ObjSearch(.spine_muscle_folder_side + ".QuadratusLumborum.QLL1_CILat")
),
arrcat(
    ObjSearch(.spine_muscle_folder_side + ".QuadratusLumborum.QLT12_CILat"),
    ObjSearch(.spine_muscle_folder_side + ".RectusAbdominis.RA_1"),
    ObjSearch(.spine_muscle_folder_side + ".RectusAbdominis.RA_2")
)
);
  AnyObjectPtr ListExtensors = arrcat(
arrcat(
    ObjSearch(.spine_muscle_folder_side + ".ErectorSpinae.ILplL3CI"),
    ObjSearch(.spine_muscle_folder_side + ".ErectorSpinae.ILplL4CI"),
    ObjSearch(.spine_muscle_folder_side + ".ErectorSpinae.ILptC7CI"),
    ObjSearch(.spine_muscle_folder_side + ".ErectorSpinae.ILptC8CI"),
    ObjSearch(.spine_muscle_folder_side + ".ErectorSpinae.LTplL3SIPS"),
    ObjSearch(.spine_muscle_folder_side + ".ErectorSpinae.LTplL4SIPS"),
    ObjSearch(.spine_muscle_folder_side + ".Multifidi.MFtstL2SIPS"),
    ObjSearch(.spine_muscle_folder_side + ".ObliquusInternus.OIC_1"),
    ObjSearch(.spine_muscle_folder_side + ".PelvicFloor.Pupococcygeus1"),
    ObjSearch(.spine_muscle_folder_side + ".PelvicFloor.Pupococcygeus2")
),
arrcat(
    ObjSearch(.spine_muscle_folder_side + ".PelvicFloor.Puporectalis1"),
    ObjSearch(.spine_muscle_folder_side + ".PelvicFloor.Puporectalis2"),
    ObjSearch(.spine_muscle_folder_side + ".QuadratusLumborum.QLL1_CIMedian"),
    ObjSearch(.spine_muscle_folder_side + ".QuadratusLumborum.QLL2_CIInterMedian"),
    ObjSearch(.spine_muscle_folder_side + ".QuadratusLumborum.QLL2_CIMedian"),
    ObjSearch(.spine_muscle_folder_side + ".QuadratusLumborum.QLL3_CIInterMedian"),
    ObjSearch(.spine_muscle_folder_side + ".QuadratusLumborum.QLL3_CIMedian"),
    ObjSearch(.spine_muscle_folder_side + ".QuadratusLumborum.QLL4_CIInterMedian"),
    ObjSearch(.spine_muscle_folder_side + ".QuadratusLumborum.QLL4_CIMedian"),
    ObjSearch(.spine_muscle_folder_side + ".QuadratusLumborum.QLT12_CIMedian")
)
);
};

AnyFolder L5SacrumJnt = {
  AnyObjectPtr ListFlexors = arrcat(
arrcat(
    ObjSearch(.spine_muscle_folder_side + ".ErectorSpinae.ILplL1CI"),
    ObjSearch(.spine_muscle_folder_side + ".Multifidi.MFdL4S1"),
    ObjSearch(.spine_muscle_folder_side + ".ObliquusExternus.OEC_1"),
    ObjSearch(.spine_muscle_folder_side + ".ObliquusExternus.OEC_10"),
    ObjSearch(.spine_muscle_folder_side + ".ObliquusExternus.OEC_11"),
    ObjSearch(.spine_muscle_folder_side + ".ObliquusExternus.OEC_12"),
    ObjSearch(.spine_muscle_folder_side + ".ObliquusExternus.OEC_2"),
    ObjSearch(.spine_muscle_folder_side + ".ObliquusExternus.OEC_3"),
    ObjSearch(.spine_muscle_folder_side + ".ObliquusExternus.OEC_4"),
    ObjSearch(.spine_muscle_folder_side + ".ObliquusExternus.OEC_5")
),
arrcat(
    ObjSearch(.spine_muscle_folder_side + ".ObliquusExternus.OEC_6"),
    ObjSearch(.spine_muscle_folder_side + ".ObliquusExternus.OEC_7"),
    ObjSearch(.spine_muscle_folder_side + ".ObliquusExternus.OEC_8"),
    ObjSearch(.spine_muscle_folder_side + ".ObliquusExternus.OEC_9"),
    ObjSearch(.spine_muscle_folder_side + ".ObliquusInternus.OIC_10"),
    ObjSearch(.spine_muscle_folder_side + ".ObliquusInternus.OIC_11"),
    ObjSearch(.spine_muscle_folder_side + ".ObliquusInternus.OIC_12"),
    ObjSearch(.spine_muscle_folder_side + ".ObliquusInternus.OIC_13"),
    ObjSearch(.spine_muscle_folder_side + ".ObliquusInternus.OIC_4"),
    ObjSearch(.spine_muscle_folder_side + ".ObliquusInternus.OIC_5")
),
arrcat(
    ObjSearch(.spine_muscle_folder_side + ".ObliquusInternus.OIC_6"),
    ObjSearch(.spine_muscle_folder_side + ".ObliquusInternus.OIC_7"),
    ObjSearch(.spine_muscle_folder_side + ".ObliquusInternus.OIC_8"),
    ObjSearch(.spine_muscle_folder_side + ".ObliquusInternus.OIC_8_extra"),
    ObjSearch(.spine_muscle_folder_side + ".PsoasMajor.PML1I_TM"),
    ObjSearch(.spine_muscle_folder_side + ".PsoasMajor.PML2I_TM"),
    ObjSearch(.spine_muscle_folder_side + ".PsoasMajor.PML3I_TM"),
    ObjSearch(.spine_muscle_folder_side + ".PsoasMajor.PML4I_TM"),
    ObjSearch(.spine_muscle_folder_side + ".PsoasMajor.PML5_TM"),
    ObjSearch(.spine_muscle_folder_side + ".PsoasMajor.PMT12I_TM")
),
arrcat(
    ObjSearch(.spine_muscle_folder_side + ".QuadratusLumborum.QLC12InterMedian_CILat"),
    ObjSearch(.spine_muscle_folder_side + ".QuadratusLumborum.QLC12Lat_CILat"),
    ObjSearch(.spine_muscle_folder_side + ".RectusAbdominis.RA_1"),
    ObjSearch(.spine_muscle_folder_side + ".RectusAbdominis.RA_2")
)
);
  AnyObjectPtr ListExtensors = arrcat(
arrcat(
    ObjSearch(.spine_muscle_folder_side + ".ErectorSpinae.ILplL3CI"),
    ObjSearch(.spine_muscle_folder_side + ".ErectorSpinae.ILplL4CI"),
    ObjSearch(.spine_muscle_folder_side + ".ErectorSpinae.ILptC10CI"),
    ObjSearch(.spine_muscle_folder_side + ".ErectorSpinae.ILptC6SIPS"),
    ObjSearch(.spine_muscle_folder_side + ".ErectorSpinae.ILptC7CI"),
    ObjSearch(.spine_muscle_folder_side + ".ErectorSpinae.ILptC8CI"),
    ObjSearch(.spine_muscle_folder_side + ".ErectorSpinae.ILptC9CI"),
    ObjSearch(.spine_muscle_folder_side + ".ErectorSpinae.LTplL3SIPS"),
    ObjSearch(.spine_muscle_folder_side + ".ErectorSpinae.LTplL4SIPS"),
    ObjSearch(.spine_muscle_folder_side + ".ErectorSpinae.LTplL5Ilium")
),
arrcat(
    ObjSearch(.spine_muscle_folder_side + ".ErectorSpinae.LTptC10Sacrum"),
    ObjSearch(.spine_muscle_folder_side + ".ErectorSpinae.LTptC7S2"),
    ObjSearch(.spine_muscle_folder_side + ".ErectorSpinae.LTptC8S3"),
    ObjSearch(.spine_muscle_folder_side + ".ErectorSpinae.LTptC9S4"),
    ObjSearch(.spine_muscle_folder_side + ".ErectorSpinae.LTptT10Sacrum"),
    ObjSearch(.spine_muscle_folder_side + ".ErectorSpinae.LTptT11Sacrum"),
    ObjSearch(.spine_muscle_folder_side + ".ErectorSpinae.LTptT12Sacrum"),
    ObjSearch(.spine_muscle_folder_side + ".ErectorSpinae.LTptT7S2"),
    ObjSearch(.spine_muscle_folder_side + ".ErectorSpinae.LTptT8S3"),
    ObjSearch(.spine_muscle_folder_side + ".ErectorSpinae.LTptT9S4")
),
arrcat(
    ObjSearch(.spine_muscle_folder_side + ".Multifidi.MFmL4Sacrum"),
    ObjSearch(.spine_muscle_folder_side + ".Multifidi.MFtsL3Ligament"),
    ObjSearch(.spine_muscle_folder_side + ".Multifidi.MFtsL4Sacrum"),
    ObjSearch(.spine_muscle_folder_side + ".Multifidi.MFtsL5Sacrum"),
    ObjSearch(.spine_muscle_folder_side + ".Multifidi.MFtstL1SIPS"),
    ObjSearch(.spine_muscle_folder_side + ".Multifidi.MFtstL2SIPS"),
    ObjSearch(.spine_muscle_folder_side + ".ObliquusInternus.OIC_1"),
    ObjSearch(.spine_muscle_folder_side + ".PsoasMajor.PML1T_TM"),
    ObjSearch(.spine_muscle_folder_side + ".PsoasMajor.PML2T_TM"),
    ObjSearch(.spine_muscle_folder_side + ".PsoasMajor.PML3T_TM")
),
arrcat(
    ObjSearch(.spine_muscle_folder_side + ".PsoasMajor.PML4T_TM"),
    ObjSearch(.spine_muscle_folder_side + ".QuadratusLumborum.QLC12Median_CIInterMedian"),
    ObjSearch(.spine_muscle_folder_side + ".QuadratusLumborum.QLL1_CIInterMedian"),
    ObjSearch(.spine_muscle_folder_side + ".QuadratusLumborum.QLL1_CIMedian"),
    ObjSearch(.spine_muscle_folder_side + ".QuadratusLumborum.QLL2_CIInterMedian"),
    ObjSearch(.spine_muscle_folder_side + ".QuadratusLumborum.QLL2_CILat"),
    ObjSearch(.spine_muscle_folder_side + ".QuadratusLumborum.QLL2_CIMedian"),
    ObjSearch(.spine_muscle_folder_side + ".QuadratusLumborum.QLL3_CIInterMedian"),
    ObjSearch(.spine_muscle_folder_side + ".QuadratusLumborum.QLL3_CILat"),
    ObjSearch(.spine_muscle_folder_side + ".QuadratusLumborum.QLL3_CIMedian")
),
arrcat(
    ObjSearch(.spine_muscle_folder_side + ".QuadratusLumborum.QLL4_CIInterMedian"),
    ObjSearch(.spine_muscle_folder_side + ".QuadratusLumborum.QLL4_CIMedian"),
    ObjSearch(.spine_muscle_folder_side + ".QuadratusLumborum.QLT12_CIInterMedian"),
    ObjSearch(.spine_muscle_folder_side + ".QuadratusLumborum.QLT12_CIMedian")
)
);
};

AnyFolder L4L5Jnt = {
  AnyObjectPtr ListFlexors = arrcat(
arrcat(
    ObjSearch(.spine_muscle_folder_side + ".ErectorSpinae.ILplL1CI"),
    ObjSearch(.spine_muscle_folder_side + ".ObliquusExternus.OEC_1"),
    ObjSearch(.spine_muscle_folder_side + ".ObliquusExternus.OEC_10"),
    ObjSearch(.spine_muscle_folder_side + ".ObliquusExternus.OEC_11"),
    ObjSearch(.spine_muscle_folder_side + ".ObliquusExternus.OEC_12"),
    ObjSearch(.spine_muscle_folder_side + ".ObliquusExternus.OEC_2"),
    ObjSearch(.spine_muscle_folder_side + ".ObliquusExternus.OEC_3"),
    ObjSearch(.spine_muscle_folder_side + ".ObliquusExternus.OEC_4"),
    ObjSearch(.spine_muscle_folder_side + ".ObliquusExternus.OEC_5"),
    ObjSearch(.spine_muscle_folder_side + ".ObliquusExternus.OEC_6")
),
arrcat(
    ObjSearch(.spine_muscle_folder_side + ".ObliquusExternus.OEC_7"),
    ObjSearch(.spine_muscle_folder_side + ".ObliquusExternus.OEC_8"),
    ObjSearch(.spine_muscle_folder_side + ".ObliquusExternus.OEC_9"),
    ObjSearch(.spine_muscle_folder_side + ".ObliquusInternus.OIC_10"),
    ObjSearch(.spine_muscle_folder_side + ".ObliquusInternus.OIC_11"),
    ObjSearch(.spine_muscle_folder_side + ".ObliquusInternus.OIC_12"),
    ObjSearch(.spine_muscle_folder_side + ".ObliquusInternus.OIC_13"),
    ObjSearch(.spine_muscle_folder_side + ".ObliquusInternus.OIC_4"),
    ObjSearch(.spine_muscle_folder_side + ".ObliquusInternus.OIC_5"),
    ObjSearch(.spine_muscle_folder_side + ".ObliquusInternus.OIC_6")
),
arrcat(
    ObjSearch(.spine_muscle_folder_side + ".ObliquusInternus.OIC_7"),
    ObjSearch(.spine_muscle_folder_side + ".ObliquusInternus.OIC_8"),
    ObjSearch(.spine_muscle_folder_side + ".ObliquusInternus.OIC_8_extra"),
    ObjSearch(.spine_muscle_folder_side + ".ObliquusInternus.OIC_9"),
    ObjSearch(.spine_muscle_folder_side + ".PsoasMajor.PML1I_TM"),
    ObjSearch(.spine_muscle_folder_side + ".PsoasMajor.PML2I_TM"),
    ObjSearch(.spine_muscle_folder_side + ".PsoasMajor.PML3I_TM"),
    ObjSearch(.spine_muscle_folder_side + ".PsoasMajor.PML4I_TM"),
    ObjSearch(.spine_muscle_folder_side + ".PsoasMajor.PMT12I_TM"),
    ObjSearch(.spine_muscle_folder_side + ".RectusAbdominis.RA_1")
),
arrcat(
    ObjSearch(.spine_muscle_folder_side + ".RectusAbdominis.RA_2")
)
);
  AnyObjectPtr ListExtensors = arrcat(
arrcat(
    ObjSearch(.spine_muscle_folder_side + ".ErectorSpinae.ILplL3CI"),
    ObjSearch(.spine_muscle_folder_side + ".ErectorSpinae.ILplL4CI"),
    ObjSearch(.spine_muscle_folder_side + ".ErectorSpinae.ILptC10CI"),
    ObjSearch(.spine_muscle_folder_side + ".ErectorSpinae.ILptC11CI"),
    ObjSearch(.spine_muscle_folder_side + ".ErectorSpinae.ILptC12CI"),
    ObjSearch(.spine_muscle_folder_side + ".ErectorSpinae.ILptC5SIPS"),
    ObjSearch(.spine_muscle_folder_side + ".ErectorSpinae.ILptC6SIPS"),
    ObjSearch(.spine_muscle_folder_side + ".ErectorSpinae.ILptC7CI"),
    ObjSearch(.spine_muscle_folder_side + ".ErectorSpinae.ILptC8CI"),
    ObjSearch(.spine_muscle_folder_side + ".ErectorSpinae.ILptC9CI")
),
arrcat(
    ObjSearch(.spine_muscle_folder_side + ".ErectorSpinae.LTplL1SIPS"),
    ObjSearch(.spine_muscle_folder_side + ".ErectorSpinae.LTplL2SIPS"),
    ObjSearch(.spine_muscle_folder_side + ".ErectorSpinae.LTplL3SIPS"),
    ObjSearch(.spine_muscle_folder_side + ".ErectorSpinae.LTplL4SIPS"),
    ObjSearch(.spine_muscle_folder_side + ".ErectorSpinae.LTptC10Sacrum"),
    ObjSearch(.spine_muscle_folder_side + ".ErectorSpinae.LTptC5L5"),
    ObjSearch(.spine_muscle_folder_side + ".ErectorSpinae.LTptC6S1"),
    ObjSearch(.spine_muscle_folder_side + ".ErectorSpinae.LTptC7S2"),
    ObjSearch(.spine_muscle_folder_side + ".ErectorSpinae.LTptC8S3"),
    ObjSearch(.spine_muscle_folder_side + ".ErectorSpinae.LTptC9S4")
),
arrcat(
    ObjSearch(.spine_muscle_folder_side + ".ErectorSpinae.LTptT10Sacrum"),
    ObjSearch(.spine_muscle_folder_side + ".ErectorSpinae.LTptT11Sacrum"),
    ObjSearch(.spine_muscle_folder_side + ".ErectorSpinae.LTptT12Sacrum"),
    ObjSearch(.spine_muscle_folder_side + ".ErectorSpinae.LTptT5L5"),
    ObjSearch(.spine_muscle_folder_side + ".ErectorSpinae.LTptT6S1"),
    ObjSearch(.spine_muscle_folder_side + ".ErectorSpinae.LTptT7S2"),
    ObjSearch(.spine_muscle_folder_side + ".ErectorSpinae.LTptT8S3"),
    ObjSearch(.spine_muscle_folder_side + ".ErectorSpinae.LTptT9S4"),
    ObjSearch(.spine_muscle_folder_side + ".Multifidi.MFdL3L5"),
    ObjSearch(.spine_muscle_folder_side + ".Multifidi.MFdL4S1")
),
arrcat(
    ObjSearch(.spine_muscle_folder_side + ".Multifidi.MFmL2L5"),
    ObjSearch(.spine_muscle_folder_side + ".Multifidi.MFmL3S1"),
    ObjSearch(.spine_muscle_folder_side + ".Multifidi.MFmL4Sacrum"),
    ObjSearch(.spine_muscle_folder_side + ".Multifidi.MFtsL1L5"),
    ObjSearch(.spine_muscle_folder_side + ".Multifidi.MFtsL1S1"),
    ObjSearch(.spine_muscle_folder_side + ".Multifidi.MFtsL2L5"),
    ObjSearch(.spine_muscle_folder_side + ".Multifidi.MFtsL2S1"),
    ObjSearch(.spine_muscle_folder_side + ".Multifidi.MFtsL3Ligament"),
    ObjSearch(.spine_muscle_folder_side + ".Multifidi.MFtsL4Sacrum"),
    ObjSearch(.spine_muscle_folder_side + ".Multifidi.MFtstL1SIPS")
),
arrcat(
    ObjSearch(.spine_muscle_folder_side + ".Multifidi.MFtstL2SIPS"),
    ObjSearch(.spine_muscle_folder_side + ".ObliquusInternus.OIC_1"),
    ObjSearch(.spine_muscle_folder_side + ".ObliquusInternus.OIC_2"),
    ObjSearch(.spine_muscle_folder_side + ".PsoasMajor.PML1T_TM"),
    ObjSearch(.spine_muscle_folder_side + ".PsoasMajor.PML2T_TM"),
    ObjSearch(.spine_muscle_folder_side + ".PsoasMajor.PML3T_TM"),
    ObjSearch(.spine_muscle_folder_side + ".PsoasMajor.PML4T_TM"),
    ObjSearch(.spine_muscle_folder_side + ".QuadratusLumborum.QLC12InterMedian_CIInterMedian"),
    ObjSearch(.spine_muscle_folder_side + ".QuadratusLumborum.QLC12InterMedian_CILat"),
    ObjSearch(.spine_muscle_folder_side + ".QuadratusLumborum.QLC12Lat_CILat")
),
arrcat(
    ObjSearch(.spine_muscle_folder_side + ".QuadratusLumborum.QLC12Median_CIInterMedian"),
    ObjSearch(.spine_muscle_folder_side + ".QuadratusLumborum.QLC12Median_CILat"),
    ObjSearch(.spine_muscle_folder_side + ".QuadratusLumborum.QLL1_CIInterMedian"),
    ObjSearch(.spine_muscle_folder_side + ".QuadratusLumborum.QLL1_CILat"),
    ObjSearch(.spine_muscle_folder_side + ".QuadratusLumborum.QLL1_CIMedian"),
    ObjSearch(.spine_muscle_folder_side + ".QuadratusLumborum.QLL2_CIInterMedian"),
    ObjSearch(.spine_muscle_folder_side + ".QuadratusLumborum.QLL2_CILat"),
    ObjSearch(.spine_muscle_folder_side + ".QuadratusLumborum.QLL2_CIMedian"),
    ObjSearch(.spine_muscle_folder_side + ".QuadratusLumborum.QLL3_CIInterMedian"),
    ObjSearch(.spine_muscle_folder_side + ".QuadratusLumborum.QLL3_CILat")
),
arrcat(
    ObjSearch(.spine_muscle_folder_side + ".QuadratusLumborum.QLL3_CIMedian"),
    ObjSearch(.spine_muscle_folder_side + ".QuadratusLumborum.QLL4_CIInterMedian"),
    ObjSearch(.spine_muscle_folder_side + ".QuadratusLumborum.QLL4_CIMedian"),
    ObjSearch(.spine_muscle_folder_side + ".QuadratusLumborum.QLT12_CIInterMedian"),
    ObjSearch(.spine_muscle_folder_side + ".QuadratusLumborum.QLT12_CILat"),
    ObjSearch(.spine_muscle_folder_side + ".QuadratusLumborum.QLT12_CIMedian"),
    ObjSearch(.spine_muscle_folder_side + ".ThoracicMultifidi.MFL5T12")
)
);
};

AnyFolder L3L4Jnt = {
  AnyObjectPtr ListFlexors = arrcat(
arrcat(
    ObjSearch(.spine_muscle_folder_side + ".ObliquusExternus.OEC_1"),
    ObjSearch(.spine_muscle_folder_side + ".ObliquusExternus.OEC_10"),
    ObjSearch(.spine_muscle_folder_side + ".ObliquusExternus.OEC_11"),
    ObjSearch(.spine_muscle_folder_side + ".ObliquusExternus.OEC_2"),
    ObjSearch(.spine_muscle_folder_side + ".ObliquusExternus.OEC_3"),
    ObjSearch(.spine_muscle_folder_side + ".ObliquusExternus.OEC_4"),
    ObjSearch(.spine_muscle_folder_side + ".ObliquusExternus.OEC_5"),
    ObjSearch(.spine_muscle_folder_side + ".ObliquusExternus.OEC_6"),
    ObjSearch(.spine_muscle_folder_side + ".ObliquusExternus.OEC_7"),
    ObjSearch(.spine_muscle_folder_side + ".ObliquusExternus.OEC_8")
),
arrcat(
    ObjSearch(.spine_muscle_folder_side + ".ObliquusExternus.OEC_9"),
    ObjSearch(.spine_muscle_folder_side + ".ObliquusInternus.OIC_10"),
    ObjSearch(.spine_muscle_folder_side + ".ObliquusInternus.OIC_11"),
    ObjSearch(.spine_muscle_folder_side + ".ObliquusInternus.OIC_12"),
    ObjSearch(.spine_muscle_folder_side + ".ObliquusInternus.OIC_13"),
    ObjSearch(.spine_muscle_folder_side + ".ObliquusInternus.OIC_4"),
    ObjSearch(.spine_muscle_folder_side + ".ObliquusInternus.OIC_5"),
    ObjSearch(.spine_muscle_folder_side + ".ObliquusInternus.OIC_6"),
    ObjSearch(.spine_muscle_folder_side + ".ObliquusInternus.OIC_7"),
    ObjSearch(.spine_muscle_folder_side + ".ObliquusInternus.OIC_8")
),
arrcat(
    ObjSearch(.spine_muscle_folder_side + ".ObliquusInternus.OIC_8_extra"),
    ObjSearch(.spine_muscle_folder_side + ".ObliquusInternus.OIC_9"),
    ObjSearch(.spine_muscle_folder_side + ".PsoasMajor.PML1I_TM"),
    ObjSearch(.spine_muscle_folder_side + ".PsoasMajor.PML2I_TM"),
    ObjSearch(.spine_muscle_folder_side + ".PsoasMajor.PML3I_TM"),
    ObjSearch(.spine_muscle_folder_side + ".PsoasMajor.PMT12I_TM"),
    ObjSearch(.spine_muscle_folder_side + ".RectusAbdominis.RA_1"),
    ObjSearch(.spine_muscle_folder_side + ".RectusAbdominis.RA_2")
)
);
  AnyObjectPtr ListExtensors = arrcat(
arrcat(
    ObjSearch(.spine_muscle_folder_side + ".ErectorSpinae.ILplL1CI"),
    ObjSearch(.spine_muscle_folder_side + ".ErectorSpinae.ILplL2CI"),
    ObjSearch(.spine_muscle_folder_side + ".ErectorSpinae.ILplL3CI"),
    ObjSearch(.spine_muscle_folder_side + ".ErectorSpinae.ILptC10CI"),
    ObjSearch(.spine_muscle_folder_side + ".ErectorSpinae.ILptC11CI"),
    ObjSearch(.spine_muscle_folder_side + ".ErectorSpinae.ILptC12CI"),
    ObjSearch(.spine_muscle_folder_side + ".ErectorSpinae.ILptC5SIPS"),
    ObjSearch(.spine_muscle_folder_side + ".ErectorSpinae.ILptC6SIPS"),
    ObjSearch(.spine_muscle_folder_side + ".ErectorSpinae.ILptC7CI"),
    ObjSearch(.spine_muscle_folder_side + ".ErectorSpinae.ILptC8CI")
),
arrcat(
    ObjSearch(.spine_muscle_folder_side + ".ErectorSpinae.ILptC9CI"),
    ObjSearch(.spine_muscle_folder_side + ".ErectorSpinae.LTplL1SIPS"),
    ObjSearch(.spine_muscle_folder_side + ".ErectorSpinae.LTplL2SIPS"),
    ObjSearch(.spine_muscle_folder_side + ".ErectorSpinae.LTplL3SIPS"),
    ObjSearch(.spine_muscle_folder_side + ".ErectorSpinae.LTptC10Sacrum"),
    ObjSearch(.spine_muscle_folder_side + ".ErectorSpinae.LTptC4L4"),
    ObjSearch(.spine_muscle_folder_side + ".ErectorSpinae.LTptC5L5"),
    ObjSearch(.spine_muscle_folder_side + ".ErectorSpinae.LTptC6S1"),
    ObjSearch(.spine_muscle_folder_side + ".ErectorSpinae.LTptC7S2"),
    ObjSearch(.spine_muscle_folder_side + ".ErectorSpinae.LTptC8S3")
),
arrcat(
    ObjSearch(.spine_muscle_folder_side + ".ErectorSpinae.LTptC9S4"),
    ObjSearch(.spine_muscle_folder_side + ".ErectorSpinae.LTptT10Sacrum"),
    ObjSearch(.spine_muscle_folder_side + ".ErectorSpinae.LTptT11Sacrum"),
    ObjSearch(.spine_muscle_folder_side + ".ErectorSpinae.LTptT12Sacrum"),
    ObjSearch(.spine_muscle_folder_side + ".ErectorSpinae.LTptT4L4"),
    ObjSearch(.spine_muscle_folder_side + ".ErectorSpinae.LTptT5L5"),
    ObjSearch(.spine_muscle_folder_side + ".ErectorSpinae.LTptT6S1"),
    ObjSearch(.spine_muscle_folder_side + ".ErectorSpinae.LTptT7S2"),
    ObjSearch(.spine_muscle_folder_side + ".ErectorSpinae.LTptT8S3"),
    ObjSearch(.spine_muscle_folder_side + ".ErectorSpinae.LTptT9S4")
),
arrcat(
    ObjSearch(.spine_muscle_folder_side + ".Multifidi.MFdL2L4"),
    ObjSearch(.spine_muscle_folder_side + ".Multifidi.MFdL3L5"),
    ObjSearch(.spine_muscle_folder_side + ".Multifidi.MFmL1L4"),
    ObjSearch(.spine_muscle_folder_side + ".Multifidi.MFmL2L5"),
    ObjSearch(.spine_muscle_folder_side + ".Multifidi.MFmL3S1"),
    ObjSearch(.spine_muscle_folder_side + ".Multifidi.MFtsL1L5"),
    ObjSearch(.spine_muscle_folder_side + ".Multifidi.MFtsL1S1"),
    ObjSearch(.spine_muscle_folder_side + ".Multifidi.MFtsL2L5"),
    ObjSearch(.spine_muscle_folder_side + ".Multifidi.MFtsL2S1"),
    ObjSearch(.spine_muscle_folder_side + ".Multifidi.MFtsL3Ligament")
),
arrcat(
    ObjSearch(.spine_muscle_folder_side + ".Multifidi.MFtstL1SIPS"),
    ObjSearch(.spine_muscle_folder_side + ".Multifidi.MFtstL2SIPS"),
    ObjSearch(.spine_muscle_folder_side + ".ObliquusInternus.OIC_1"),
    ObjSearch(.spine_muscle_folder_side + ".ObliquusInternus.OIC_2"),
    ObjSearch(.spine_muscle_folder_side + ".PsoasMajor.PML1T_TM"),
    ObjSearch(.spine_muscle_folder_side + ".PsoasMajor.PML2T_TM"),
    ObjSearch(.spine_muscle_folder_side + ".PsoasMajor.PML3T_TM"),
    ObjSearch(.spine_muscle_folder_side + ".QuadratusLumborum.QLC12InterMedian_CIInterMedian"),
    ObjSearch(.spine_muscle_folder_side + ".QuadratusLumborum.QLC12InterMedian_CILat"),
    ObjSearch(.spine_muscle_folder_side + ".QuadratusLumborum.QLC12InterMedian_L4")
),
arrcat(
    ObjSearch(.spine_muscle_folder_side + ".QuadratusLumborum.QLC12Lat_CILat"),
    ObjSearch(.spine_muscle_folder_side + ".QuadratusLumborum.QLC12Lat_L4"),
    ObjSearch(.spine_muscle_folder_side + ".QuadratusLumborum.QLC12Median_CIInterMedian"),
    ObjSearch(.spine_muscle_folder_side + ".QuadratusLumborum.QLC12Median_CILat"),
    ObjSearch(.spine_muscle_folder_side + ".QuadratusLumborum.QLC12Median_L4"),
    ObjSearch(.spine_muscle_folder_side + ".QuadratusLumborum.QLL1_CIInterMedian"),
    ObjSearch(.spine_muscle_folder_side + ".QuadratusLumborum.QLL1_CILat"),
    ObjSearch(.spine_muscle_folder_side + ".QuadratusLumborum.QLL1_CIMedian"),
    ObjSearch(.spine_muscle_folder_side + ".QuadratusLumborum.QLL2_CIInterMedian"),
    ObjSearch(.spine_muscle_folder_side + ".QuadratusLumborum.QLL2_CILat")
),
arrcat(
    ObjSearch(.spine_muscle_folder_side + ".QuadratusLumborum.QLL2_CIMedian"),
    ObjSearch(.spine_muscle_folder_side + ".QuadratusLumborum.QLL3_CIInterMedian"),
    ObjSearch(.spine_muscle_folder_side + ".QuadratusLumborum.QLL3_CILat"),
    ObjSearch(.spine_muscle_folder_side + ".QuadratusLumborum.QLL3_CIMedian"),
    ObjSearch(.spine_muscle_folder_side + ".QuadratusLumborum.QLT12_CIInterMedian"),
    ObjSearch(.spine_muscle_folder_side + ".QuadratusLumborum.QLT12_CILat"),
    ObjSearch(.spine_muscle_folder_side + ".QuadratusLumborum.QLT12_CIMedian"),
    ObjSearch(.spine_muscle_folder_side + ".ThoracicMultifidi.MFL4T11"),
    ObjSearch(.spine_muscle_folder_side + ".ThoracicMultifidi.MFL4T12"),
    ObjSearch(.spine_muscle_folder_side + ".ThoracicMultifidi.MFL5T12")
)
);
};

AnyFolder L2L3Jnt = {
  AnyObjectPtr ListFlexors = arrcat(
arrcat(
    ObjSearch(.spine_muscle_folder_side + ".ObliquusExternus.OEC_1"),
    ObjSearch(.spine_muscle_folder_side + ".ObliquusExternus.OEC_10"),
    ObjSearch(.spine_muscle_folder_side + ".ObliquusExternus.OEC_2"),
    ObjSearch(.spine_muscle_folder_side + ".ObliquusExternus.OEC_3"),
    ObjSearch(.spine_muscle_folder_side + ".ObliquusExternus.OEC_4"),
    ObjSearch(.spine_muscle_folder_side + ".ObliquusExternus.OEC_5"),
    ObjSearch(.spine_muscle_folder_side + ".ObliquusExternus.OEC_6"),
    ObjSearch(.spine_muscle_folder_side + ".ObliquusExternus.OEC_7"),
    ObjSearch(.spine_muscle_folder_side + ".ObliquusExternus.OEC_8"),
    ObjSearch(.spine_muscle_folder_side + ".ObliquusExternus.OEC_9")
),
arrcat(
    ObjSearch(.spine_muscle_folder_side + ".ObliquusInternus.OIC_10"),
    ObjSearch(.spine_muscle_folder_side + ".ObliquusInternus.OIC_11"),
    ObjSearch(.spine_muscle_folder_side + ".ObliquusInternus.OIC_12"),
    ObjSearch(.spine_muscle_folder_side + ".ObliquusInternus.OIC_13"),
    ObjSearch(.spine_muscle_folder_side + ".ObliquusInternus.OIC_3"),
    ObjSearch(.spine_muscle_folder_side + ".ObliquusInternus.OIC_4"),
    ObjSearch(.spine_muscle_folder_side + ".ObliquusInternus.OIC_5"),
    ObjSearch(.spine_muscle_folder_side + ".ObliquusInternus.OIC_6"),
    ObjSearch(.spine_muscle_folder_side + ".ObliquusInternus.OIC_7"),
    ObjSearch(.spine_muscle_folder_side + ".ObliquusInternus.OIC_8")
),
arrcat(
    ObjSearch(.spine_muscle_folder_side + ".ObliquusInternus.OIC_8_extra"),
    ObjSearch(.spine_muscle_folder_side + ".ObliquusInternus.OIC_9"),
    ObjSearch(.spine_muscle_folder_side + ".PsoasMajor.PML1I_TM"),
    ObjSearch(.spine_muscle_folder_side + ".PsoasMajor.PML2I_TM"),
    ObjSearch(.spine_muscle_folder_side + ".PsoasMajor.PMT12I_TM"),
    ObjSearch(.spine_muscle_folder_side + ".RectusAbdominis.RA_1"),
    ObjSearch(.spine_muscle_folder_side + ".RectusAbdominis.RA_2")
)
);
  AnyObjectPtr ListExtensors = arrcat(
arrcat(
    ObjSearch(.spine_muscle_folder_side + ".ErectorSpinae.ILplL1CI"),
    ObjSearch(.spine_muscle_folder_side + ".ErectorSpinae.ILplL2CI"),
    ObjSearch(.spine_muscle_folder_side + ".ErectorSpinae.ILptC10CI"),
    ObjSearch(.spine_muscle_folder_side + ".ErectorSpinae.ILptC11CI"),
    ObjSearch(.spine_muscle_folder_side + ".ErectorSpinae.ILptC12CI"),
    ObjSearch(.spine_muscle_folder_side + ".ErectorSpinae.ILptC5SIPS"),
    ObjSearch(.spine_muscle_folder_side + ".ErectorSpinae.ILptC6SIPS"),
    ObjSearch(.spine_muscle_folder_side + ".ErectorSpinae.ILptC7CI"),
    ObjSearch(.spine_muscle_folder_side + ".ErectorSpinae.ILptC8CI"),
    ObjSearch(.spine_muscle_folder_side + ".ErectorSpinae.ILptC9CI")
),
arrcat(
    ObjSearch(.spine_muscle_folder_side + ".ErectorSpinae.LTplL1SIPS"),
    ObjSearch(.spine_muscle_folder_side + ".ErectorSpinae.LTplL2SIPS"),
    ObjSearch(.spine_muscle_folder_side + ".ErectorSpinae.LTptC10Sacrum"),
    ObjSearch(.spine_muscle_folder_side + ".ErectorSpinae.LTptC3L3"),
    ObjSearch(.spine_muscle_folder_side + ".ErectorSpinae.LTptC4L4"),
    ObjSearch(.spine_muscle_folder_side + ".ErectorSpinae.LTptC5L5"),
    ObjSearch(.spine_muscle_folder_side + ".ErectorSpinae.LTptC6S1"),
    ObjSearch(.spine_muscle_folder_side + ".ErectorSpinae.LTptC7S2"),
    ObjSearch(.spine_muscle_folder_side + ".ErectorSpinae.LTptC8S3"),
    ObjSearch(.spine_muscle_folder_side + ".ErectorSpinae.LTptC9S4")
),
arrcat(
    ObjSearch(.spine_muscle_folder_side + ".ErectorSpinae.LTptT10Sacrum"),
    ObjSearch(.spine_muscle_folder_side + ".ErectorSpinae.LTptT11Sacrum"),
    ObjSearch(.spine_muscle_folder_side + ".ErectorSpinae.LTptT12Sacrum"),
    ObjSearch(.spine_muscle_folder_side + ".ErectorSpinae.LTptT3L3"),
    ObjSearch(.spine_muscle_folder_side + ".ErectorSpinae.LTptT4L4"),
    ObjSearch(.spine_muscle_folder_side + ".ErectorSpinae.LTptT5L5"),
    ObjSearch(.spine_muscle_folder_side + ".ErectorSpinae.LTptT6S1"),
    ObjSearch(.spine_muscle_folder_side + ".ErectorSpinae.LTptT7S2"),
    ObjSearch(.spine_muscle_folder_side + ".ErectorSpinae.LTptT8S3"),
    ObjSearch(.spine_muscle_folder_side + ".ErectorSpinae.LTptT9S4")
),
arrcat(
    ObjSearch(.spine_muscle_folder_side + ".Multifidi.MFdL1L3"),
    ObjSearch(.spine_muscle_folder_side + ".Multifidi.MFdL2L4"),
    ObjSearch(.spine_muscle_folder_side + ".Multifidi.MFmL1L4"),
    ObjSearch(.spine_muscle_folder_side + ".Multifidi.MFmL2L5"),
    ObjSearch(.spine_muscle_folder_side + ".Multifidi.MFtsL1L5"),
    ObjSearch(.spine_muscle_folder_side + ".Multifidi.MFtsL1S1"),
    ObjSearch(.spine_muscle_folder_side + ".Multifidi.MFtsL2L5"),
    ObjSearch(.spine_muscle_folder_side + ".Multifidi.MFtsL2S1"),
    ObjSearch(.spine_muscle_folder_side + ".Multifidi.MFtstL1SIPS"),
    ObjSearch(.spine_muscle_folder_side + ".Multifidi.MFtstL2SIPS")
),
arrcat(
    ObjSearch(.spine_muscle_folder_side + ".ObliquusExternus.OEC_12"),
    ObjSearch(.spine_muscle_folder_side + ".ObliquusInternus.OIC_1"),
    ObjSearch(.spine_muscle_folder_side + ".ObliquusInternus.OIC_2"),
    ObjSearch(.spine_muscle_folder_side + ".PsoasMajor.PML1T_TM"),
    ObjSearch(.spine_muscle_folder_side + ".PsoasMajor.PML2T_TM"),
    ObjSearch(.spine_muscle_folder_side + ".QuadratusLumborum.QLC12InterMedian_CIInterMedian"),
    ObjSearch(.spine_muscle_folder_side + ".QuadratusLumborum.QLC12InterMedian_CILat"),
    ObjSearch(.spine_muscle_folder_side + ".QuadratusLumborum.QLC12InterMedian_L3"),
    ObjSearch(.spine_muscle_folder_side + ".QuadratusLumborum.QLC12InterMedian_L4"),
    ObjSearch(.spine_muscle_folder_side + ".QuadratusLumborum.QLC12Lat_CILat")
),
arrcat(
    ObjSearch(.spine_muscle_folder_side + ".QuadratusLumborum.QLC12Lat_L3"),
    ObjSearch(.spine_muscle_folder_side + ".QuadratusLumborum.QLC12Lat_L4"),
    ObjSearch(.spine_muscle_folder_side + ".QuadratusLumborum.QLC12Median_CIInterMedian"),
    ObjSearch(.spine_muscle_folder_side + ".QuadratusLumborum.QLC12Median_CILat"),
    ObjSearch(.spine_muscle_folder_side + ".QuadratusLumborum.QLC12Median_L3"),
    ObjSearch(.spine_muscle_folder_side + ".QuadratusLumborum.QLC12Median_L4"),
    ObjSearch(.spine_muscle_folder_side + ".QuadratusLumborum.QLL1_CIInterMedian"),
    ObjSearch(.spine_muscle_folder_side + ".QuadratusLumborum.QLL1_CILat"),
    ObjSearch(.spine_muscle_folder_side + ".QuadratusLumborum.QLL1_CIMedian"),
    ObjSearch(.spine_muscle_folder_side + ".QuadratusLumborum.QLL2_CIInterMedian")
),
arrcat(
    ObjSearch(.spine_muscle_folder_side + ".QuadratusLumborum.QLL2_CILat"),
    ObjSearch(.spine_muscle_folder_side + ".QuadratusLumborum.QLL2_CIMedian"),
    ObjSearch(.spine_muscle_folder_side + ".QuadratusLumborum.QLT12_CIInterMedian"),
    ObjSearch(.spine_muscle_folder_side + ".QuadratusLumborum.QLT12_CILat"),
    ObjSearch(.spine_muscle_folder_side + ".QuadratusLumborum.QLT12_CIMedian"),
    ObjSearch(.spine_muscle_folder_side + ".ThoracicMultifidi.MFL3T10"),
    ObjSearch(.spine_muscle_folder_side + ".ThoracicMultifidi.MFL3T11"),
    ObjSearch(.spine_muscle_folder_side + ".ThoracicMultifidi.MFL3T12"),
    ObjSearch(.spine_muscle_folder_side + ".ThoracicMultifidi.MFL4T11"),
    ObjSearch(.spine_muscle_folder_side + ".ThoracicMultifidi.MFL4T12")
),
arrcat(
    ObjSearch(.spine_muscle_folder_side + ".ThoracicMultifidi.MFL5T12")
)
);
};

AnyFolder L1L2Jnt = {
  AnyObjectPtr ListFlexors = arrcat(
arrcat(
    ObjSearch(.spine_muscle_folder_side + ".Diaphragm.L2_Diaphragm1"),
    ObjSearch(.spine_muscle_folder_side + ".Diaphragm.L2_Diaphragm2"),
    ObjSearch(.spine_muscle_folder_side + ".ObliquusExternus.OEC_1"),
    ObjSearch(.spine_muscle_folder_side + ".ObliquusExternus.OEC_10"),
    ObjSearch(.spine_muscle_folder_side + ".ObliquusExternus.OEC_2"),
    ObjSearch(.spine_muscle_folder_side + ".ObliquusExternus.OEC_3"),
    ObjSearch(.spine_muscle_folder_side + ".ObliquusExternus.OEC_4"),
    ObjSearch(.spine_muscle_folder_side + ".ObliquusExternus.OEC_5"),
    ObjSearch(.spine_muscle_folder_side + ".ObliquusExternus.OEC_6"),
    ObjSearch(.spine_muscle_folder_side + ".ObliquusExternus.OEC_7")
),
arrcat(
    ObjSearch(.spine_muscle_folder_side + ".ObliquusExternus.OEC_8"),
    ObjSearch(.spine_muscle_folder_side + ".ObliquusExternus.OEC_9"),
    ObjSearch(.spine_muscle_folder_side + ".ObliquusInternus.OIC_10"),
    ObjSearch(.spine_muscle_folder_side + ".ObliquusInternus.OIC_11"),
    ObjSearch(.spine_muscle_folder_side + ".ObliquusInternus.OIC_12"),
    ObjSearch(.spine_muscle_folder_side + ".ObliquusInternus.OIC_13"),
    ObjSearch(.spine_muscle_folder_side + ".ObliquusInternus.OIC_3"),
    ObjSearch(.spine_muscle_folder_side + ".ObliquusInternus.OIC_4"),
    ObjSearch(.spine_muscle_folder_side + ".ObliquusInternus.OIC_5"),
    ObjSearch(.spine_muscle_folder_side + ".ObliquusInternus.OIC_6")
),
arrcat(
    ObjSearch(.spine_muscle_folder_side + ".ObliquusInternus.OIC_7"),
    ObjSearch(.spine_muscle_folder_side + ".ObliquusInternus.OIC_8"),
    ObjSearch(.spine_muscle_folder_side + ".ObliquusInternus.OIC_8_extra"),
    ObjSearch(.spine_muscle_folder_side + ".ObliquusInternus.OIC_9"),
    ObjSearch(.spine_muscle_folder_side + ".PsoasMajor.PML1I_TM"),
    ObjSearch(.spine_muscle_folder_side + ".PsoasMajor.PMT12I_TM"),
    ObjSearch(.spine_muscle_folder_side + ".RectusAbdominis.RA_1"),
    ObjSearch(.spine_muscle_folder_side + ".RectusAbdominis.RA_2")
)
);
  AnyObjectPtr ListExtensors = arrcat(
arrcat(
    ObjSearch(.spine_muscle_folder_side + ".ErectorSpinae.ILplL1CI"),
    ObjSearch(.spine_muscle_folder_side + ".ErectorSpinae.ILptC10CI"),
    ObjSearch(.spine_muscle_folder_side + ".ErectorSpinae.ILptC11CI"),
    ObjSearch(.spine_muscle_folder_side + ".ErectorSpinae.ILptC12CI"),
    ObjSearch(.spine_muscle_folder_side + ".ErectorSpinae.ILptC5SIPS"),
    ObjSearch(.spine_muscle_folder_side + ".ErectorSpinae.ILptC6SIPS"),
    ObjSearch(.spine_muscle_folder_side + ".ErectorSpinae.ILptC7CI"),
    ObjSearch(.spine_muscle_folder_side + ".ErectorSpinae.ILptC8CI"),
    ObjSearch(.spine_muscle_folder_side + ".ErectorSpinae.ILptC9CI"),
    ObjSearch(.spine_muscle_folder_side + ".ErectorSpinae.LTplL1SIPS")
),
arrcat(
    ObjSearch(.spine_muscle_folder_side + ".ErectorSpinae.LTptC10Sacrum"),
    ObjSearch(.spine_muscle_folder_side + ".ErectorSpinae.LTptC3L3"),
    ObjSearch(.spine_muscle_folder_side + ".ErectorSpinae.LTptC4L4"),
    ObjSearch(.spine_muscle_folder_side + ".ErectorSpinae.LTptC5L5"),
    ObjSearch(.spine_muscle_folder_side + ".ErectorSpinae.LTptC6S1"),
    ObjSearch(.spine_muscle_folder_side + ".ErectorSpinae.LTptC7S2"),
    ObjSearch(.spine_muscle_folder_side + ".ErectorSpinae.LTptC8S3"),
    ObjSearch(.spine_muscle_folder_side + ".ErectorSpinae.LTptC9S4"),
    ObjSearch(.spine_muscle_folder_side + ".ErectorSpinae.LTptT10Sacrum"),
    ObjSearch(.spine_muscle_folder_side + ".ErectorSpinae.LTptT11Sacrum")
),
arrcat(
    ObjSearch(.spine_muscle_folder_side + ".ErectorSpinae.LTptT12Sacrum"),
    ObjSearch(.spine_muscle_folder_side + ".ErectorSpinae.LTptT2L2"),
    ObjSearch(.spine_muscle_folder_side + ".ErectorSpinae.LTptT3L3"),
    ObjSearch(.spine_muscle_folder_side + ".ErectorSpinae.LTptT4L4"),
    ObjSearch(.spine_muscle_folder_side + ".ErectorSpinae.LTptT5L5"),
    ObjSearch(.spine_muscle_folder_side + ".ErectorSpinae.LTptT6S1"),
    ObjSearch(.spine_muscle_folder_side + ".ErectorSpinae.LTptT7S2"),
    ObjSearch(.spine_muscle_folder_side + ".ErectorSpinae.LTptT8S3"),
    ObjSearch(.spine_muscle_folder_side + ".ErectorSpinae.LTptT9S4"),
    ObjSearch(.spine_muscle_folder_side + ".Multifidi.MFdL1L3")
),
arrcat(
    ObjSearch(.spine_muscle_folder_side + ".Multifidi.MFmL1L4"),
    ObjSearch(.spine_muscle_folder_side + ".Multifidi.MFtsL1L5"),
    ObjSearch(.spine_muscle_folder_side + ".Multifidi.MFtsL1S1"),
    ObjSearch(.spine_muscle_folder_side + ".Multifidi.MFtstL1SIPS"),
    ObjSearch(.spine_muscle_folder_side + ".ObliquusExternus.OEC_11"),
    ObjSearch(.spine_muscle_folder_side + ".ObliquusExternus.OEC_12"),
    ObjSearch(.spine_muscle_folder_side + ".ObliquusInternus.OIC_1"),
    ObjSearch(.spine_muscle_folder_side + ".ObliquusInternus.OIC_2"),
    ObjSearch(.spine_muscle_folder_side + ".PsoasMajor.PML1T_TM"),
    ObjSearch(.spine_muscle_folder_side + ".QuadratusLumborum.QLC12InterMedian_CIInterMedian")
),
arrcat(
    ObjSearch(.spine_muscle_folder_side + ".QuadratusLumborum.QLC12InterMedian_CILat"),
    ObjSearch(.spine_muscle_folder_side + ".QuadratusLumborum.QLC12InterMedian_L2"),
    ObjSearch(.spine_muscle_folder_side + ".QuadratusLumborum.QLC12InterMedian_L3"),
    ObjSearch(.spine_muscle_folder_side + ".QuadratusLumborum.QLC12InterMedian_L4"),
    ObjSearch(.spine_muscle_folder_side + ".QuadratusLumborum.QLC12Lat_CILat"),
    ObjSearch(.spine_muscle_folder_side + ".QuadratusLumborum.QLC12Lat_L2"),
    ObjSearch(.spine_muscle_folder_side + ".QuadratusLumborum.QLC12Lat_L3"),
    ObjSearch(.spine_muscle_folder_side + ".QuadratusLumborum.QLC12Lat_L4"),
    ObjSearch(.spine_muscle_folder_side + ".QuadratusLumborum.QLC12Median_CIInterMedian"),
    ObjSearch(.spine_muscle_folder_side + ".QuadratusLumborum.QLC12Median_CILat")
),
arrcat(
    ObjSearch(.spine_muscle_folder_side + ".QuadratusLumborum.QLC12Median_L2"),
    ObjSearch(.spine_muscle_folder_side + ".QuadratusLumborum.QLC12Median_L3"),
    ObjSearch(.spine_muscle_folder_side + ".QuadratusLumborum.QLC12Median_L4"),
    ObjSearch(.spine_muscle_folder_side + ".QuadratusLumborum.QLL1_CIInterMedian"),
    ObjSearch(.spine_muscle_folder_side + ".QuadratusLumborum.QLL1_CILat"),
    ObjSearch(.spine_muscle_folder_side + ".QuadratusLumborum.QLL1_CIMedian"),
    ObjSearch(.spine_muscle_folder_side + ".QuadratusLumborum.QLT12_CIInterMedian"),
    ObjSearch(.spine_muscle_folder_side + ".QuadratusLumborum.QLT12_CILat"),
    ObjSearch(.spine_muscle_folder_side + ".QuadratusLumborum.QLT12_CIMedian"),
    ObjSearch(.spine_muscle_folder_side + ".SerratusPosteriorInferior.SPIL2R12")
),
arrcat(
    ObjSearch(.spine_muscle_folder_side + ".ThoracicMultifidi.MFL2T10"),
    ObjSearch(.spine_muscle_folder_side + ".ThoracicMultifidi.MFL2T11"),
    ObjSearch(.spine_muscle_folder_side + ".ThoracicMultifidi.MFL2T9"),
    ObjSearch(.spine_muscle_folder_side + ".ThoracicMultifidi.MFL3T10"),
    ObjSearch(.spine_muscle_folder_side + ".ThoracicMultifidi.MFL3T11"),
    ObjSearch(.spine_muscle_folder_side + ".ThoracicMultifidi.MFL3T12"),
    ObjSearch(.spine_muscle_folder_side + ".ThoracicMultifidi.MFL4T11"),
    ObjSearch(.spine_muscle_folder_side + ".ThoracicMultifidi.MFL4T12"),
    ObjSearch(.spine_muscle_folder_side + ".ThoracicMultifidi.MFL5T12")
)
);
};

AnyFolder T12L1Jnt = {
  AnyObjectPtr ListFlexors = arrcat(
arrcat(
    ObjSearch(.spine_muscle_folder_side + ".Diaphragm.L1_Diaphragm1"),
    ObjSearch(.spine_muscle_folder_side + ".Diaphragm.L1_Diaphragm2"),
    ObjSearch(.spine_muscle_folder_side + ".Diaphragm.L2_Diaphragm1"),
    ObjSearch(.spine_muscle_folder_side + ".Diaphragm.L2_Diaphragm2"),
    ObjSearch(.spine_muscle_folder_side + ".ObliquusExternus.OEC_1"),
    ObjSearch(.spine_muscle_folder_side + ".ObliquusExternus.OEC_10"),
    ObjSearch(.spine_muscle_folder_side + ".ObliquusExternus.OEC_2"),
    ObjSearch(.spine_muscle_folder_side + ".ObliquusExternus.OEC_3"),
    ObjSearch(.spine_muscle_folder_side + ".ObliquusExternus.OEC_4"),
    ObjSearch(.spine_muscle_folder_side + ".ObliquusExternus.OEC_5")
),
arrcat(
    ObjSearch(.spine_muscle_folder_side + ".ObliquusExternus.OEC_6"),
    ObjSearch(.spine_muscle_folder_side + ".ObliquusExternus.OEC_7"),
    ObjSearch(.spine_muscle_folder_side + ".ObliquusExternus.OEC_8"),
    ObjSearch(.spine_muscle_folder_side + ".ObliquusExternus.OEC_9"),
    ObjSearch(.spine_muscle_folder_side + ".ObliquusInternus.OIC_10"),
    ObjSearch(.spine_muscle_folder_side + ".ObliquusInternus.OIC_11"),
    ObjSearch(.spine_muscle_folder_side + ".ObliquusInternus.OIC_12"),
    ObjSearch(.spine_muscle_folder_side + ".ObliquusInternus.OIC_13"),
    ObjSearch(.spine_muscle_folder_side + ".ObliquusInternus.OIC_3"),
    ObjSearch(.spine_muscle_folder_side + ".ObliquusInternus.OIC_4")
),
arrcat(
    ObjSearch(.spine_muscle_folder_side + ".ObliquusInternus.OIC_5"),
    ObjSearch(.spine_muscle_folder_side + ".ObliquusInternus.OIC_6"),
    ObjSearch(.spine_muscle_folder_side + ".ObliquusInternus.OIC_7"),
    ObjSearch(.spine_muscle_folder_side + ".ObliquusInternus.OIC_8"),
    ObjSearch(.spine_muscle_folder_side + ".ObliquusInternus.OIC_8_extra"),
    ObjSearch(.spine_muscle_folder_side + ".ObliquusInternus.OIC_9"),
    ObjSearch(.spine_muscle_folder_side + ".PsoasMajor.PMT12I_TM"),
    ObjSearch(.spine_muscle_folder_side + ".RectusAbdominis.RA_1"),
    ObjSearch(.spine_muscle_folder_side + ".RectusAbdominis.RA_2")
)
);
  AnyObjectPtr ListExtensors = arrcat(
arrcat(
    ObjSearch(.spine_muscle_folder_side + ".Diaphragm.L1TransverseProcess_Diaphragm"),
    ObjSearch(.spine_muscle_folder_side + ".ErectorSpinae.ILptC10CI"),
    ObjSearch(.spine_muscle_folder_side + ".ErectorSpinae.ILptC11CI"),
    ObjSearch(.spine_muscle_folder_side + ".ErectorSpinae.ILptC12CI"),
    ObjSearch(.spine_muscle_folder_side + ".ErectorSpinae.ILptC5SIPS"),
    ObjSearch(.spine_muscle_folder_side + ".ErectorSpinae.ILptC6SIPS"),
    ObjSearch(.spine_muscle_folder_side + ".ErectorSpinae.ILptC7CI"),
    ObjSearch(.spine_muscle_folder_side + ".ErectorSpinae.ILptC8CI"),
    ObjSearch(.spine_muscle_folder_side + ".ErectorSpinae.ILptC9CI"),
    ObjSearch(.spine_muscle_folder_side + ".ErectorSpinae.LTptC10Sacrum")
),
arrcat(
    ObjSearch(.spine_muscle_folder_side + ".ErectorSpinae.LTptC3L3"),
    ObjSearch(.spine_muscle_folder_side + ".ErectorSpinae.LTptC4L4"),
    ObjSearch(.spine_muscle_folder_side + ".ErectorSpinae.LTptC5L5"),
    ObjSearch(.spine_muscle_folder_side + ".ErectorSpinae.LTptC6S1"),
    ObjSearch(.spine_muscle_folder_side + ".ErectorSpinae.LTptC7S2"),
    ObjSearch(.spine_muscle_folder_side + ".ErectorSpinae.LTptC8S3"),
    ObjSearch(.spine_muscle_folder_side + ".ErectorSpinae.LTptC9S4"),
    ObjSearch(.spine_muscle_folder_side + ".ErectorSpinae.LTptT10Sacrum"),
    ObjSearch(.spine_muscle_folder_side + ".ErectorSpinae.LTptT11Sacrum"),
    ObjSearch(.spine_muscle_folder_side + ".ErectorSpinae.LTptT12Sacrum")
),
arrcat(
    ObjSearch(.spine_muscle_folder_side + ".ErectorSpinae.LTptT1L1"),
    ObjSearch(.spine_muscle_folder_side + ".ErectorSpinae.LTptT2L2"),
    ObjSearch(.spine_muscle_folder_side + ".ErectorSpinae.LTptT3L3"),
    ObjSearch(.spine_muscle_folder_side + ".ErectorSpinae.LTptT4L4"),
    ObjSearch(.spine_muscle_folder_side + ".ErectorSpinae.LTptT5L5"),
    ObjSearch(.spine_muscle_folder_side + ".ErectorSpinae.LTptT6S1"),
    ObjSearch(.spine_muscle_folder_side + ".ErectorSpinae.LTptT7S2"),
    ObjSearch(.spine_muscle_folder_side + ".ErectorSpinae.LTptT8S3"),
    ObjSearch(.spine_muscle_folder_side + ".ErectorSpinae.LTptT9S4"),
    ObjSearch(.spine_muscle_folder_side + ".ObliquusExternus.OEC_11")
),
arrcat(
    ObjSearch(.spine_muscle_folder_side + ".ObliquusExternus.OEC_12"),
    ObjSearch(.spine_muscle_folder_side + ".ObliquusInternus.OIC_1"),
    ObjSearch(.spine_muscle_folder_side + ".QuadratusLumborum.QLC12InterMedian_CIInterMedian"),
    ObjSearch(.spine_muscle_folder_side + ".QuadratusLumborum.QLC12InterMedian_CILat"),
    ObjSearch(.spine_muscle_folder_side + ".QuadratusLumborum.QLC12InterMedian_L2"),
    ObjSearch(.spine_muscle_folder_side + ".QuadratusLumborum.QLC12InterMedian_L3"),
    ObjSearch(.spine_muscle_folder_side + ".QuadratusLumborum.QLC12InterMedian_L4"),
    ObjSearch(.spine_muscle_folder_side + ".QuadratusLumborum.QLC12Lat_CILat"),
    ObjSearch(.spine_muscle_folder_side + ".QuadratusLumborum.QLC12Lat_L2"),
    ObjSearch(.spine_muscle_folder_side + ".QuadratusLumborum.QLC12Lat_L3")
),
arrcat(
    ObjSearch(.spine_muscle_folder_side + ".QuadratusLumborum.QLC12Lat_L4"),
    ObjSearch(.spine_muscle_folder_side + ".QuadratusLumborum.QLC12Median_CIInterMedian"),
    ObjSearch(.spine_muscle_folder_side + ".QuadratusLumborum.QLC12Median_CILat"),
    ObjSearch(.spine_muscle_folder_side + ".QuadratusLumborum.QLC12Median_L2"),
    ObjSearch(.spine_muscle_folder_side + ".QuadratusLumborum.QLC12Median_L3"),
    ObjSearch(.spine_muscle_folder_side + ".QuadratusLumborum.QLC12Median_L4"),
    ObjSearch(.spine_muscle_folder_side + ".QuadratusLumborum.QLT12_CIInterMedian"),
    ObjSearch(.spine_muscle_folder_side + ".QuadratusLumborum.QLT12_CILat"),
    ObjSearch(.spine_muscle_folder_side + ".QuadratusLumborum.QLT12_CIMedian"),
    ObjSearch(.spine_muscle_folder_side + ".SerratusPosteriorInferior.SPIL1R11")
),
arrcat(
    ObjSearch(.spine_muscle_folder_side + ".SerratusPosteriorInferior.SPIL2R12"),
    ObjSearch(.spine_muscle_folder_side + ".ThoracicMultifidi.MFL1T10"),
    ObjSearch(.spine_muscle_folder_side + ".ThoracicMultifidi.MFL1T8"),
    ObjSearch(.spine_muscle_folder_side + ".ThoracicMultifidi.MFL1T9"),
    ObjSearch(.spine_muscle_folder_side + ".ThoracicMultifidi.MFL2T10"),
    ObjSearch(.spine_muscle_folder_side + ".ThoracicMultifidi.MFL2T11"),
    ObjSearch(.spine_muscle_folder_side + ".ThoracicMultifidi.MFL2T9"),
    ObjSearch(.spine_muscle_folder_side + ".ThoracicMultifidi.MFL3T10"),
    ObjSearch(.spine_muscle_folder_side + ".ThoracicMultifidi.MFL3T11"),
    ObjSearch(.spine_muscle_folder_side + ".ThoracicMultifidi.MFL3T12")
),
arrcat(
    ObjSearch(.spine_muscle_folder_side + ".ThoracicMultifidi.MFL4T11"),
    ObjSearch(.spine_muscle_folder_side + ".ThoracicMultifidi.MFL4T12"),
    ObjSearch(.spine_muscle_folder_side + ".ThoracicMultifidi.MFL5T12")
)
);
};

AnyFolder T11T12Jnt = {
  AnyObjectPtr ListFlexors = arrcat(
arrcat(
    ObjSearch(.spine_muscle_folder_side + ".Diaphragm.L1_Diaphragm1"),
    ObjSearch(.spine_muscle_folder_side + ".Diaphragm.L1_Diaphragm2"),
    ObjSearch(.spine_muscle_folder_side + ".Diaphragm.L2_Diaphragm1"),
    ObjSearch(.spine_muscle_folder_side + ".Diaphragm.L2_Diaphragm2"),
    ObjSearch(.spine_muscle_folder_side + ".ObliquusExternus.OEC_1"),
    ObjSearch(.spine_muscle_folder_side + ".ObliquusExternus.OEC_10"),
    ObjSearch(.spine_muscle_folder_side + ".ObliquusExternus.OEC_2"),
    ObjSearch(.spine_muscle_folder_side + ".ObliquusExternus.OEC_3"),
    ObjSearch(.spine_muscle_folder_side + ".ObliquusExternus.OEC_4"),
    ObjSearch(.spine_muscle_folder_side + ".ObliquusExternus.OEC_5")
),
arrcat(
    ObjSearch(.spine_muscle_folder_side + ".ObliquusExternus.OEC_6"),
    ObjSearch(.spine_muscle_folder_side + ".ObliquusExternus.OEC_7"),
    ObjSearch(.spine_muscle_folder_side + ".ObliquusExternus.OEC_8"),
    ObjSearch(.spine_muscle_folder_side + ".ObliquusExternus.OEC_9"),
    ObjSearch(.spine_muscle_folder_side + ".ObliquusInternus.OIC_1"),
    ObjSearch(.spine_muscle_folder_side + ".ObliquusInternus.OIC_10"),
    ObjSearch(.spine_muscle_folder_side + ".ObliquusInternus.OIC_11"),
    ObjSearch(.spine_muscle_folder_side + ".ObliquusInternus.OIC_12"),
    ObjSearch(.spine_muscle_folder_side + ".ObliquusInternus.OIC_13"),
    ObjSearch(.spine_muscle_folder_side + ".ObliquusInternus.OIC_2")
),
arrcat(
    ObjSearch(.spine_muscle_folder_side + ".ObliquusInternus.OIC_3"),
    ObjSearch(.spine_muscle_folder_side + ".ObliquusInternus.OIC_4"),
    ObjSearch(.spine_muscle_folder_side + ".ObliquusInternus.OIC_5"),
    ObjSearch(.spine_muscle_folder_side + ".ObliquusInternus.OIC_6"),
    ObjSearch(.spine_muscle_folder_side + ".ObliquusInternus.OIC_7"),
    ObjSearch(.spine_muscle_folder_side + ".ObliquusInternus.OIC_8"),
    ObjSearch(.spine_muscle_folder_side + ".ObliquusInternus.OIC_8_extra"),
    ObjSearch(.spine_muscle_folder_side + ".ObliquusInternus.OIC_9"),
    ObjSearch(.spine_muscle_folder_side + ".RectusAbdominis.RA_1"),
    ObjSearch(.spine_muscle_folder_side + ".RectusAbdominis.RA_2")
),
arrcat(
    ObjSearch(.spine_muscle_folder_side + ".SerratusPosteriorInferior.SPIL2R12")
)
);
  AnyObjectPtr ListExtensors = arrcat(
arrcat(
    ObjSearch(.spine_muscle_folder_side + ".Diaphragm.R12_Diaphragm1"),
    ObjSearch(.spine_muscle_folder_side + ".Diaphragm.R12_Diaphragm2"),
    ObjSearch(.spine_muscle_folder_side + ".ErectorSpinae.ILptC10CI"),
    ObjSearch(.spine_muscle_folder_side + ".ErectorSpinae.ILptC11CI"),
    ObjSearch(.spine_muscle_folder_side + ".ErectorSpinae.ILptC5SIPS"),
    ObjSearch(.spine_muscle_folder_side + ".ErectorSpinae.ILptC6SIPS"),
    ObjSearch(.spine_muscle_folder_side + ".ErectorSpinae.ILptC7CI"),
    ObjSearch(.spine_muscle_folder_side + ".ErectorSpinae.ILptC8CI"),
    ObjSearch(.spine_muscle_folder_side + ".ErectorSpinae.ILptC9CI"),
    ObjSearch(.spine_muscle_folder_side + ".ErectorSpinae.ITR6R12")
),
arrcat(
    ObjSearch(.spine_muscle_folder_side + ".ErectorSpinae.LTptC10Sacrum"),
    ObjSearch(.spine_muscle_folder_side + ".ErectorSpinae.LTptC3L3"),
    ObjSearch(.spine_muscle_folder_side + ".ErectorSpinae.LTptC4L4"),
    ObjSearch(.spine_muscle_folder_side + ".ErectorSpinae.LTptC5L5"),
    ObjSearch(.spine_muscle_folder_side + ".ErectorSpinae.LTptC6S1"),
    ObjSearch(.spine_muscle_folder_side + ".ErectorSpinae.LTptC7S2"),
    ObjSearch(.spine_muscle_folder_side + ".ErectorSpinae.LTptC8S3"),
    ObjSearch(.spine_muscle_folder_side + ".ErectorSpinae.LTptC9S4"),
    ObjSearch(.spine_muscle_folder_side + ".ErectorSpinae.LTptT10Sacrum"),
    ObjSearch(.spine_muscle_folder_side + ".ErectorSpinae.LTptT11Sacrum")
),
arrcat(
    ObjSearch(.spine_muscle_folder_side + ".ErectorSpinae.LTptT12Sacrum"),
    ObjSearch(.spine_muscle_folder_side + ".ErectorSpinae.LTptT1L1"),
    ObjSearch(.spine_muscle_folder_side + ".ErectorSpinae.LTptT2L2"),
    ObjSearch(.spine_muscle_folder_side + ".ErectorSpinae.LTptT3L3"),
    ObjSearch(.spine_muscle_folder_side + ".ErectorSpinae.LTptT4L4"),
    ObjSearch(.spine_muscle_folder_side + ".ErectorSpinae.LTptT5L5"),
    ObjSearch(.spine_muscle_folder_side + ".ErectorSpinae.LTptT6S1"),
    ObjSearch(.spine_muscle_folder_side + ".ErectorSpinae.LTptT7S2"),
    ObjSearch(.spine_muscle_folder_side + ".ErectorSpinae.LTptT8S3"),
    ObjSearch(.spine_muscle_folder_side + ".ErectorSpinae.LTptT9S4")
),
arrcat(
    ObjSearch(.spine_muscle_folder_side + ".ExternalInterCostalis.IC_Ext_R11R12.elem1"),
    ObjSearch(.spine_muscle_folder_side + ".ExternalInterCostalis.IC_Ext_R11R12.elem2"),
    ObjSearch(.spine_muscle_folder_side + ".InnermostInterCostalis.IC_Inn_R11R12.elem1"),
    ObjSearch(.spine_muscle_folder_side + ".InnermostInterCostalis.IC_Inn_R11R12.elem2"),
    ObjSearch(.spine_muscle_folder_side + ".InternalInterCostalis.IC_Int_R11R12.elem1"),
    ObjSearch(.spine_muscle_folder_side + ".InternalInterCostalis.IC_Int_R11R12.elem2"),
    ObjSearch(.spine_muscle_folder_side + ".LevatorCostarum.LCBrT11R12"),
    ObjSearch(.spine_muscle_folder_side + ".LevatorCostarum.LCLgT10R12"),
    ObjSearch(.spine_muscle_folder_side + ".ObliquusExternus.OEC_11"),
    ObjSearch(.spine_muscle_folder_side + ".ObliquusExternus.OEC_12")
),
arrcat(
    ObjSearch(.spine_muscle_folder_side + ".QuadratusLumborum.QLC12InterMedian_CIInterMedian"),
    ObjSearch(.spine_muscle_folder_side + ".QuadratusLumborum.QLC12InterMedian_CILat"),
    ObjSearch(.spine_muscle_folder_side + ".QuadratusLumborum.QLC12InterMedian_L2"),
    ObjSearch(.spine_muscle_folder_side + ".QuadratusLumborum.QLC12InterMedian_L3"),
    ObjSearch(.spine_muscle_folder_side + ".QuadratusLumborum.QLC12InterMedian_L4"),
    ObjSearch(.spine_muscle_folder_side + ".QuadratusLumborum.QLC12Lat_CILat"),
    ObjSearch(.spine_muscle_folder_side + ".QuadratusLumborum.QLC12Lat_L2"),
    ObjSearch(.spine_muscle_folder_side + ".QuadratusLumborum.QLC12Lat_L3"),
    ObjSearch(.spine_muscle_folder_side + ".QuadratusLumborum.QLC12Lat_L4"),
    ObjSearch(.spine_muscle_folder_side + ".QuadratusLumborum.QLC12Median_CIInterMedian")
),
arrcat(
    ObjSearch(.spine_muscle_folder_side + ".QuadratusLumborum.QLC12Median_CILat"),
    ObjSearch(.spine_muscle_folder_side + ".QuadratusLumborum.QLC12Median_L2"),
    ObjSearch(.spine_muscle_folder_side + ".QuadratusLumborum.QLC12Median_L3"),
    ObjSearch(.spine_muscle_folder_side + ".QuadratusLumborum.QLC12Median_L4"),
    ObjSearch(.spine_muscle_folder_side + ".RotatoresBrevis.RotatoresBrevisT12T11"),
    ObjSearch(.spine_muscle_folder_side + ".RotatoresLongus.RotatoresLongusT12T10"),
    ObjSearch(.spine_muscle_folder_side + ".SemispinalisThoracis.SSTT12T4"),
    ObjSearch(.spine_muscle_folder_side + ".SerratusPosteriorInferior.SPIL1R11"),
    ObjSearch(.spine_muscle_folder_side + ".SerratusPosteriorInferior.SPIT12R10"),
    ObjSearch(.spine_muscle_folder_side + ".ThoracicMultifidi.MFL1T10")
),
arrcat(
    ObjSearch(.spine_muscle_folder_side + ".ThoracicMultifidi.MFL1T8"),
    ObjSearch(.spine_muscle_folder_side + ".ThoracicMultifidi.MFL1T9"),
    ObjSearch(.spine_muscle_folder_side + ".ThoracicMultifidi.MFL2T10"),
    ObjSearch(.spine_muscle_folder_side + ".ThoracicMultifidi.MFL2T11"),
    ObjSearch(.spine_muscle_folder_side + ".ThoracicMultifidi.MFL2T9"),
    ObjSearch(.spine_muscle_folder_side + ".ThoracicMultifidi.MFL3T10"),
    ObjSearch(.spine_muscle_folder_side + ".ThoracicMultifidi.MFL3T11"),
    ObjSearch(.spine_muscle_folder_side + ".ThoracicMultifidi.MFL4T11"),
    ObjSearch(.spine_muscle_folder_side + ".ThoracicMultifidi.MFT12T7"),
    ObjSearch(.spine_muscle_folder_side + ".ThoracicMultifidi.MFT12T8")
),
arrcat(
    ObjSearch(.spine_muscle_folder_side + ".ThoracicMultifidi.MFT12T9")
)
);
};

AnyFolder T10T11Jnt = {
  AnyObjectPtr ListFlexors = arrcat(
arrcat(
    ObjSearch(.spine_muscle_folder_side + ".Diaphragm.L1TransverseProcess_Diaphragm"),
    ObjSearch(.spine_muscle_folder_side + ".Diaphragm.L1_Diaphragm1"),
    ObjSearch(.spine_muscle_folder_side + ".Diaphragm.L1_Diaphragm2"),
    ObjSearch(.spine_muscle_folder_side + ".Diaphragm.L2_Diaphragm1"),
    ObjSearch(.spine_muscle_folder_side + ".Diaphragm.L2_Diaphragm2"),
    ObjSearch(.spine_muscle_folder_side + ".Diaphragm.R12_Diaphragm1"),
    ObjSearch(.spine_muscle_folder_side + ".Diaphragm.R12_Diaphragm2"),
    ObjSearch(.spine_muscle_folder_side + ".InnermostInterCostalis.IC_Inn_R10R11.elem6"),
    ObjSearch(.spine_muscle_folder_side + ".InternalInterCostalis.IC_Int_R10R11.elem5"),
    ObjSearch(.spine_muscle_folder_side + ".InternalInterCostalis.IC_Int_R10R11.elem6")
),
arrcat(
    ObjSearch(.spine_muscle_folder_side + ".InternalInterCostalis.IC_Int_R11R12.elem1"),
    ObjSearch(.spine_muscle_folder_side + ".InternalInterCostalis.IC_Int_R11R12.elem2"),
    ObjSearch(.spine_muscle_folder_side + ".LevatorCostarum.LCBrT11R12"),
    ObjSearch(.spine_muscle_folder_side + ".ObliquusExternus.OEC_1"),
    ObjSearch(.spine_muscle_folder_side + ".ObliquusExternus.OEC_10"),
    ObjSearch(.spine_muscle_folder_side + ".ObliquusExternus.OEC_2"),
    ObjSearch(.spine_muscle_folder_side + ".ObliquusExternus.OEC_3"),
    ObjSearch(.spine_muscle_folder_side + ".ObliquusExternus.OEC_4"),
    ObjSearch(.spine_muscle_folder_side + ".ObliquusExternus.OEC_5"),
    ObjSearch(.spine_muscle_folder_side + ".ObliquusExternus.OEC_6")
),
arrcat(
    ObjSearch(.spine_muscle_folder_side + ".ObliquusExternus.OEC_9"),
    ObjSearch(.spine_muscle_folder_side + ".ObliquusInternus.OIC_1"),
    ObjSearch(.spine_muscle_folder_side + ".ObliquusInternus.OIC_10"),
    ObjSearch(.spine_muscle_folder_side + ".ObliquusInternus.OIC_11"),
    ObjSearch(.spine_muscle_folder_side + ".ObliquusInternus.OIC_12"),
    ObjSearch(.spine_muscle_folder_side + ".ObliquusInternus.OIC_13"),
    ObjSearch(.spine_muscle_folder_side + ".ObliquusInternus.OIC_2"),
    ObjSearch(.spine_muscle_folder_side + ".ObliquusInternus.OIC_3"),
    ObjSearch(.spine_muscle_folder_side + ".ObliquusInternus.OIC_4"),
    ObjSearch(.spine_muscle_folder_side + ".ObliquusInternus.OIC_5")
),
arrcat(
    ObjSearch(.spine_muscle_folder_side + ".ObliquusInternus.OIC_6"),
    ObjSearch(.spine_muscle_folder_side + ".ObliquusInternus.OIC_7"),
    ObjSearch(.spine_muscle_folder_side + ".ObliquusInternus.OIC_8"),
    ObjSearch(.spine_muscle_folder_side + ".ObliquusInternus.OIC_8_extra"),
    ObjSearch(.spine_muscle_folder_side + ".ObliquusInternus.OIC_9"),
    ObjSearch(.spine_muscle_folder_side + ".RectusAbdominis.RA_1"),
    ObjSearch(.spine_muscle_folder_side + ".RectusAbdominis.RA_2"),
    ObjSearch(.spine_muscle_folder_side + ".SerratusPosteriorInferior.SPIL1R11"),
    ObjSearch(.spine_muscle_folder_side + ".SerratusPosteriorInferior.SPIL2R12")
)
);
  AnyObjectPtr ListExtensors = arrcat(
arrcat(
    ObjSearch(.spine_muscle_folder_side + ".Diaphragm.R11_Diaphragm1"),
    ObjSearch(.spine_muscle_folder_side + ".Diaphragm.R11_Diaphragm2"),
    ObjSearch(.spine_muscle_folder_side + ".Diaphragm.R11_Diaphragm3"),
    ObjSearch(.spine_muscle_folder_side + ".ErectorSpinae.ILptC10CI"),
    ObjSearch(.spine_muscle_folder_side + ".ErectorSpinae.ILptC5SIPS"),
    ObjSearch(.spine_muscle_folder_side + ".ErectorSpinae.ILptC6SIPS"),
    ObjSearch(.spine_muscle_folder_side + ".ErectorSpinae.ILptC7CI"),
    ObjSearch(.spine_muscle_folder_side + ".ErectorSpinae.ILptC8CI"),
    ObjSearch(.spine_muscle_folder_side + ".ErectorSpinae.ILptC9CI"),
    ObjSearch(.spine_muscle_folder_side + ".ErectorSpinae.ITR5R11")
),
arrcat(
    ObjSearch(.spine_muscle_folder_side + ".ErectorSpinae.ITR6R12"),
    ObjSearch(.spine_muscle_folder_side + ".ErectorSpinae.LTptC10Sacrum"),
    ObjSearch(.spine_muscle_folder_side + ".ErectorSpinae.LTptC3L3"),
    ObjSearch(.spine_muscle_folder_side + ".ErectorSpinae.LTptC4L4"),
    ObjSearch(.spine_muscle_folder_side + ".ErectorSpinae.LTptC5L5"),
    ObjSearch(.spine_muscle_folder_side + ".ErectorSpinae.LTptC6S1"),
    ObjSearch(.spine_muscle_folder_side + ".ErectorSpinae.LTptC7S2"),
    ObjSearch(.spine_muscle_folder_side + ".ErectorSpinae.LTptC8S3"),
    ObjSearch(.spine_muscle_folder_side + ".ErectorSpinae.LTptC9S4"),
    ObjSearch(.spine_muscle_folder_side + ".ErectorSpinae.LTptT10Sacrum")
),
arrcat(
    ObjSearch(.spine_muscle_folder_side + ".ErectorSpinae.LTptT11Sacrum"),
    ObjSearch(.spine_muscle_folder_side + ".ErectorSpinae.LTptT1L1"),
    ObjSearch(.spine_muscle_folder_side + ".ErectorSpinae.LTptT2L2"),
    ObjSearch(.spine_muscle_folder_side + ".ErectorSpinae.LTptT3L3"),
    ObjSearch(.spine_muscle_folder_side + ".ErectorSpinae.LTptT4L4"),
    ObjSearch(.spine_muscle_folder_side + ".ErectorSpinae.LTptT5L5"),
    ObjSearch(.spine_muscle_folder_side + ".ErectorSpinae.LTptT6S1"),
    ObjSearch(.spine_muscle_folder_side + ".ErectorSpinae.LTptT7S2"),
    ObjSearch(.spine_muscle_folder_side + ".ErectorSpinae.LTptT8S3"),
    ObjSearch(.spine_muscle_folder_side + ".ErectorSpinae.LTptT9S4")
),
arrcat(
    ObjSearch(.spine_muscle_folder_side + ".ExternalInterCostalis.IC_Ext_R10R11.elem1"),
    ObjSearch(.spine_muscle_folder_side + ".ExternalInterCostalis.IC_Ext_R10R11.elem2"),
    ObjSearch(.spine_muscle_folder_side + ".ExternalInterCostalis.IC_Ext_R10R11.elem3"),
    ObjSearch(.spine_muscle_folder_side + ".ExternalInterCostalis.IC_Ext_R10R11.elem4"),
    ObjSearch(.spine_muscle_folder_side + ".ExternalInterCostalis.IC_Ext_R10R11.elem5"),
    ObjSearch(.spine_muscle_folder_side + ".ExternalInterCostalis.IC_Ext_R10R11.elem6"),
    ObjSearch(.spine_muscle_folder_side + ".ExternalInterCostalis.IC_Ext_R11R12.elem2"),
    ObjSearch(.spine_muscle_folder_side + ".InnermostInterCostalis.IC_Inn_R10R11.elem1"),
    ObjSearch(.spine_muscle_folder_side + ".InnermostInterCostalis.IC_Inn_R10R11.elem2"),
    ObjSearch(.spine_muscle_folder_side + ".InnermostInterCostalis.IC_Inn_R10R11.elem3")
),
arrcat(
    ObjSearch(.spine_muscle_folder_side + ".InnermostInterCostalis.IC_Inn_R10R11.elem4"),
    ObjSearch(.spine_muscle_folder_side + ".InternalInterCostalis.IC_Int_R10R11.elem1"),
    ObjSearch(.spine_muscle_folder_side + ".InternalInterCostalis.IC_Int_R10R11.elem2"),
    ObjSearch(.spine_muscle_folder_side + ".InternalInterCostalis.IC_Int_R10R11.elem3"),
    ObjSearch(.spine_muscle_folder_side + ".LevatorCostarum.LCBrT10R11"),
    ObjSearch(.spine_muscle_folder_side + ".LevatorCostarum.LCLgT10R12"),
    ObjSearch(.spine_muscle_folder_side + ".LevatorCostarum.LCLgT9R11"),
    ObjSearch(.spine_muscle_folder_side + ".ObliquusExternus.OEC_12"),
    ObjSearch(.spine_muscle_folder_side + ".QuadratusLumborum.QLC12InterMedian_CIInterMedian"),
    ObjSearch(.spine_muscle_folder_side + ".QuadratusLumborum.QLC12InterMedian_CILat")
),
arrcat(
    ObjSearch(.spine_muscle_folder_side + ".QuadratusLumborum.QLC12InterMedian_L2"),
    ObjSearch(.spine_muscle_folder_side + ".QuadratusLumborum.QLC12InterMedian_L3"),
    ObjSearch(.spine_muscle_folder_side + ".QuadratusLumborum.QLC12InterMedian_L4"),
    ObjSearch(.spine_muscle_folder_side + ".QuadratusLumborum.QLC12Median_CIInterMedian"),
    ObjSearch(.spine_muscle_folder_side + ".QuadratusLumborum.QLC12Median_CILat"),
    ObjSearch(.spine_muscle_folder_side + ".QuadratusLumborum.QLC12Median_L2"),
    ObjSearch(.spine_muscle_folder_side + ".QuadratusLumborum.QLC12Median_L3"),
    ObjSearch(.spine_muscle_folder_side + ".QuadratusLumborum.QLC12Median_L4"),
    ObjSearch(.spine_muscle_folder_side + ".RotatoresBrevis.RotatoresBrevisT11T10"),
    ObjSearch(.spine_muscle_folder_side + ".RotatoresLongus.RotatoresLongusT11T9")
),
arrcat(
    ObjSearch(.spine_muscle_folder_side + ".RotatoresLongus.RotatoresLongusT12T10"),
    ObjSearch(.spine_muscle_folder_side + ".SemispinalisThoracis.SSTT11T3"),
    ObjSearch(.spine_muscle_folder_side + ".SemispinalisThoracis.SSTT12T4"),
    ObjSearch(.spine_muscle_folder_side + ".SerratusPosteriorInferior.SPIT11R9"),
    ObjSearch(.spine_muscle_folder_side + ".SerratusPosteriorInferior.SPIT12R10"),
    ObjSearch(.spine_muscle_folder_side + ".Subcostalis.SCR8R11"),
    ObjSearch(.spine_muscle_folder_side + ".Subcostalis.SCR9R11"),
    ObjSearch(.spine_muscle_folder_side + ".ThoracicMultifidi.MFL1T10"),
    ObjSearch(.spine_muscle_folder_side + ".ThoracicMultifidi.MFL1T8"),
    ObjSearch(.spine_muscle_folder_side + ".ThoracicMultifidi.MFL1T9")
),
arrcat(
    ObjSearch(.spine_muscle_folder_side + ".ThoracicMultifidi.MFL2T10"),
    ObjSearch(.spine_muscle_folder_side + ".ThoracicMultifidi.MFL2T9"),
    ObjSearch(.spine_muscle_folder_side + ".ThoracicMultifidi.MFL3T10"),
    ObjSearch(.spine_muscle_folder_side + ".ThoracicMultifidi.MFT11T6"),
    ObjSearch(.spine_muscle_folder_side + ".ThoracicMultifidi.MFT11T7"),
    ObjSearch(.spine_muscle_folder_side + ".ThoracicMultifidi.MFT11T8"),
    ObjSearch(.spine_muscle_folder_side + ".ThoracicMultifidi.MFT12T7"),
    ObjSearch(.spine_muscle_folder_side + ".ThoracicMultifidi.MFT12T8"),
    ObjSearch(.spine_muscle_folder_side + ".ThoracicMultifidi.MFT12T9")
)
);
};

AnyFolder T9T10Jnt = {
  AnyObjectPtr ListFlexors = arrcat(
arrcat(
arrcat(
    ObjSearch(.spine_muscle_folder_side + ".Diaphragm.CC_DiaphragmNode7"),
    ObjSearch(.spine_muscle_folder_side + ".Diaphragm.L1TransverseProcess_Diaphragm"),
    ObjSearch(.spine_muscle_folder_side + ".Diaphragm.L1_Diaphragm1"),
    ObjSearch(.spine_muscle_folder_side + ".Diaphragm.L1_Diaphragm2"),
    ObjSearch(.spine_muscle_folder_side + ".Diaphragm.L2_Diaphragm1"),
    ObjSearch(.spine_muscle_folder_side + ".Diaphragm.L2_Diaphragm2"),
    ObjSearch(.spine_muscle_folder_side + ".Diaphragm.R12_Diaphragm1"),
    ObjSearch(.spine_muscle_folder_side + ".Diaphragm.R12_Diaphragm2"),
    ObjSearch(.spine_muscle_folder_side + ".ErectorSpinae.ILptC12CI"),
    ObjSearch(.spine_muscle_folder_side + ".ExternalInterCostalis.IC_Ext_R1R2.elem3")
),
arrcat(
    ObjSearch(.spine_muscle_folder_side + ".ExternalInterCostalis.IC_Ext_R1R2.elem4"),
    ObjSearch(.spine_muscle_folder_side + ".ExternalInterCostalis.IC_Ext_R1R2.elem5"),
    ObjSearch(.spine_muscle_folder_side + ".ExternalInterCostalis.IC_Ext_R1R2.elem6"),
    ObjSearch(.spine_muscle_folder_side + ".ExternalInterCostalis.IC_Ext_R1R2.elem7"),
    ObjSearch(.spine_muscle_folder_side + ".ExternalInterCostalis.IC_Ext_R2R3.elem4"),
    ObjSearch(.spine_muscle_folder_side + ".ExternalInterCostalis.IC_Ext_R2R3.elem5"),
    ObjSearch(.spine_muscle_folder_side + ".ExternalInterCostalis.IC_Ext_R2R3.elem6"),
    ObjSearch(.spine_muscle_folder_side + ".ExternalInterCostalis.IC_Ext_R2R3.elem7"),
    ObjSearch(.spine_muscle_folder_side + ".ExternalInterCostalis.IC_Ext_R3R4.elem4"),
    ObjSearch(.spine_muscle_folder_side + ".ExternalInterCostalis.IC_Ext_R3R4.elem5")
),
arrcat(
    ObjSearch(.spine_muscle_folder_side + ".ExternalInterCostalis.IC_Ext_R3R4.elem6"),
    ObjSearch(.spine_muscle_folder_side + ".ExternalInterCostalis.IC_Ext_R3R4.elem7"),
    ObjSearch(.spine_muscle_folder_side + ".ExternalInterCostalis.IC_Ext_R4R5.elem5"),
    ObjSearch(.spine_muscle_folder_side + ".ExternalInterCostalis.IC_Ext_R4R5.elem7"),
    ObjSearch(.spine_muscle_folder_side + ".ExternalInterCostalis.IC_Ext_R5R6.elem7"),
    ObjSearch(.spine_muscle_folder_side + ".ExternalInterCostalis.IC_Ext_R9R10.elem7"),
    ObjSearch(.spine_muscle_folder_side + ".Hyoid.LumpedHyoidStC0"),
    ObjSearch(.spine_muscle_folder_side + ".InnermostInterCostalis.IC_Inn_R10R11.elem5"),
    ObjSearch(.spine_muscle_folder_side + ".InnermostInterCostalis.IC_Inn_R10R11.elem6"),
    ObjSearch(.spine_muscle_folder_side + ".InnermostInterCostalis.IC_Inn_R11R12.elem1")
),
arrcat(
    ObjSearch(.spine_muscle_folder_side + ".InnermostInterCostalis.IC_Inn_R11R12.elem2"),
    ObjSearch(.spine_muscle_folder_side + ".InnermostInterCostalis.IC_Inn_R1R2.elem4"),
    ObjSearch(.spine_muscle_folder_side + ".InnermostInterCostalis.IC_Inn_R1R2.elem5"),
    ObjSearch(.spine_muscle_folder_side + ".InnermostInterCostalis.IC_Inn_R1R2.elem6"),
    ObjSearch(.spine_muscle_folder_side + ".InnermostInterCostalis.IC_Inn_R2R3.elem6"),
    ObjSearch(.spine_muscle_folder_side + ".InnermostInterCostalis.IC_Inn_R2R3.elem7"),
    ObjSearch(.spine_muscle_folder_side + ".InnermostInterCostalis.IC_Inn_R2R3.elem8"),
    ObjSearch(.spine_muscle_folder_side + ".InnermostInterCostalis.IC_Inn_R2R3.elem9"),
    ObjSearch(.spine_muscle_folder_side + ".InnermostInterCostalis.IC_Inn_R3R4.elem7"),
    ObjSearch(.spine_muscle_folder_side + ".InnermostInterCostalis.IC_Inn_R3R4.elem8")
),
arrcat(
    ObjSearch(.spine_muscle_folder_side + ".InnermostInterCostalis.IC_Inn_R3R4.elem9"),
    ObjSearch(.spine_muscle_folder_side + ".InnermostInterCostalis.IC_Inn_R4R5.elem8"),
    ObjSearch(.spine_muscle_folder_side + ".InnermostInterCostalis.IC_Inn_R4R5.elem9"),
    ObjSearch(.spine_muscle_folder_side + ".InnermostInterCostalis.IC_Inn_R9R10.elem8"),
    ObjSearch(.spine_muscle_folder_side + ".InnermostInterCostalis.IC_Inn_R9R10.elem9"),
    ObjSearch(.spine_muscle_folder_side + ".InternalInterCostalis.IC_Int_R10R11.elem3"),
    ObjSearch(.spine_muscle_folder_side + ".InternalInterCostalis.IC_Int_R10R11.elem4"),
    ObjSearch(.spine_muscle_folder_side + ".InternalInterCostalis.IC_Int_R10R11.elem5"),
    ObjSearch(.spine_muscle_folder_side + ".InternalInterCostalis.IC_Int_R10R11.elem6"),
    ObjSearch(.spine_muscle_folder_side + ".InternalInterCostalis.IC_Int_R11R12.elem1")
),
arrcat(
    ObjSearch(.spine_muscle_folder_side + ".InternalInterCostalis.IC_Int_R11R12.elem2"),
    ObjSearch(.spine_muscle_folder_side + ".InternalInterCostalis.IC_Int_R4R5.elem_sternum"),
    ObjSearch(.spine_muscle_folder_side + ".InternalInterCostalis.IC_Int_R5R6.elem_sternum"),
    ObjSearch(.spine_muscle_folder_side + ".InternalInterCostalis.IC_Int_R6R7.elem_sternum"),
    ObjSearch(.spine_muscle_folder_side + ".InternalInterCostalis.IC_Int_R9R10.elem6"),
    ObjSearch(.spine_muscle_folder_side + ".InternalInterCostalis.IC_Int_R9R10.elem7"),
    ObjSearch(.spine_muscle_folder_side + ".InternalInterCostalis.IC_Int_R9R10.elem_sternum"),
    ObjSearch(.spine_muscle_folder_side + ".LevatorCostarum.LCBrT10R11"),
    ObjSearch(.spine_muscle_folder_side + ".LevatorCostarum.LCBrT11R12"),
    ObjSearch(.spine_muscle_folder_side + ".LevatorCostarum.LCLgT10R12")
),
arrcat(
    ObjSearch(.spine_muscle_folder_side + ".ObliquusExternus.OEC_1"),
    ObjSearch(.spine_muscle_folder_side + ".ObliquusExternus.OEC_10"),
    ObjSearch(.spine_muscle_folder_side + ".ObliquusExternus.OEC_11"),
    ObjSearch(.spine_muscle_folder_side + ".ObliquusExternus.OEC_2"),
    ObjSearch(.spine_muscle_folder_side + ".ObliquusExternus.OEC_3"),
    ObjSearch(.spine_muscle_folder_side + ".ObliquusExternus.OEC_4"),
    ObjSearch(.spine_muscle_folder_side + ".ObliquusExternus.OEC_5"),
    ObjSearch(.spine_muscle_folder_side + ".ObliquusExternus.OEC_6"),
    ObjSearch(.spine_muscle_folder_side + ".ObliquusExternus.OEC_7"),
    ObjSearch(.spine_muscle_folder_side + ".ObliquusExternus.OEC_8")
),
arrcat(
    ObjSearch(.spine_muscle_folder_side + ".ObliquusExternus.OEC_9"),
    ObjSearch(.spine_muscle_folder_side + ".ObliquusInternus.OIC_1"),
    ObjSearch(.spine_muscle_folder_side + ".ObliquusInternus.OIC_10"),
    ObjSearch(.spine_muscle_folder_side + ".ObliquusInternus.OIC_11"),
    ObjSearch(.spine_muscle_folder_side + ".ObliquusInternus.OIC_12"),
    ObjSearch(.spine_muscle_folder_side + ".ObliquusInternus.OIC_13"),
    ObjSearch(.spine_muscle_folder_side + ".ObliquusInternus.OIC_2"),
    ObjSearch(.spine_muscle_folder_side + ".ObliquusInternus.OIC_3"),
    ObjSearch(.spine_muscle_folder_side + ".ObliquusInternus.OIC_4"),
    ObjSearch(.spine_muscle_folder_side + ".ObliquusInternus.OIC_5")
),
arrcat(
    ObjSearch(.spine_muscle_folder_side + ".ObliquusInternus.OIC_6"),
    ObjSearch(.spine_muscle_folder_side + ".ObliquusInternus.OIC_7"),
    ObjSearch(.spine_muscle_folder_side + ".ObliquusInternus.OIC_8"),
    ObjSearch(.spine_muscle_folder_side + ".ObliquusInternus.OIC_8_extra"),
    ObjSearch(.spine_muscle_folder_side + ".ObliquusInternus.OIC_9"),
    ObjSearch(.spine_muscle_folder_side + ".QuadratusLumborum.QLC12Lat_L4"),
    ObjSearch(.spine_muscle_folder_side + ".RectusAbdominis.RA_1"),
    ObjSearch(.spine_muscle_folder_side + ".RectusAbdominis.RA_2"),
    ObjSearch(.spine_muscle_folder_side + ".Scalenus.ScalenusAnteriorR1C3"),
    ObjSearch(.spine_muscle_folder_side + ".Scalenus.ScalenusAnteriorR1C4")
),
arrcat(
    ObjSearch(.spine_muscle_folder_side + ".Scalenus.ScalenusAnteriorR1C5"),
    ObjSearch(.spine_muscle_folder_side + ".Scalenus.ScalenusAnteriorR1C6"),
    ObjSearch(.spine_muscle_folder_side + ".Scalenus.ScalenusMediusR1C2"),
    ObjSearch(.spine_muscle_folder_side + ".Scalenus.ScalenusMediusR1C3"),
    ObjSearch(.spine_muscle_folder_side + ".Scalenus.ScalenusMediusR1C4"),
    ObjSearch(.spine_muscle_folder_side + ".Scalenus.ScalenusMediusR1C5"),
    ObjSearch(.spine_muscle_folder_side + ".Scalenus.ScalenusMediusR1C6"),
    ObjSearch(.spine_muscle_folder_side + ".Scalenus.ScalenusMediusR1C7"),
    ObjSearch(.spine_muscle_folder_side + ".Scalenus.ScalenusPosteriorR2C5"),
    ObjSearch(.spine_muscle_folder_side + ".Scalenus.ScalenusPosteriorR2C6")
)
),
arrcat(
arrcat(
    ObjSearch(.spine_muscle_folder_side + ".Scalenus.ScalenusPosteriorR2C7"),
    ObjSearch(.spine_muscle_folder_side + ".SerratusPosteriorInferior.SPIL1R11"),
    ObjSearch(.spine_muscle_folder_side + ".SerratusPosteriorInferior.SPIL2R12"),
    ObjSearch(.spine_muscle_folder_side + ".SerratusPosteriorInferior.SPIT12R10"),
    ObjSearch(.spine_muscle_folder_side + ".TransversusThoracis.TrThR10S"),
    ObjSearch(.spine_muscle_folder_side + ".TransversusThoracis.TrThR2S"),
    ObjSearch(.spine_muscle_folder_side + ".TransversusThoracis.TrThR7S"),
    ObjSearch(.spine_muscle_folder_side + ".TransversusThoracis.TrThR8S"),
    ObjSearch(.spine_muscle_folder_side + ".TransversusThoracis.TrThR9S")
)
)
);
  AnyObjectPtr ListExtensors = arrcat(
arrcat(
arrcat(
    ObjSearch(.spine_muscle_folder_side + ".Diaphragm.CC_DiaphragmNode1"),
    ObjSearch(.spine_muscle_folder_side + ".Diaphragm.CC_DiaphragmNode2"),
    ObjSearch(.spine_muscle_folder_side + ".Diaphragm.CC_DiaphragmNode3"),
    ObjSearch(.spine_muscle_folder_side + ".Diaphragm.CC_DiaphragmNode4"),
    ObjSearch(.spine_muscle_folder_side + ".Diaphragm.CC_DiaphragmNode5"),
    ObjSearch(.spine_muscle_folder_side + ".Diaphragm.R10_Diaphragm1"),
    ObjSearch(.spine_muscle_folder_side + ".Diaphragm.R10_Diaphragm2"),
    ObjSearch(.spine_muscle_folder_side + ".Diaphragm.R10_Diaphragm3"),
    ObjSearch(.spine_muscle_folder_side + ".Diaphragm.R11_Diaphragm1"),
    ObjSearch(.spine_muscle_folder_side + ".Diaphragm.R11_Diaphragm2")
),
arrcat(
    ObjSearch(.spine_muscle_folder_side + ".Diaphragm.R11_Diaphragm3"),
    ObjSearch(.spine_muscle_folder_side + ".Diaphragm.Xiphoid_Diaphragm"),
    ObjSearch(.spine_muscle_folder_side + ".ErectorSpinae.ILptC10CI"),
    ObjSearch(.spine_muscle_folder_side + ".ErectorSpinae.ILptC5SIPS"),
    ObjSearch(.spine_muscle_folder_side + ".ErectorSpinae.ILptC6SIPS"),
    ObjSearch(.spine_muscle_folder_side + ".ErectorSpinae.ILptC7CI"),
    ObjSearch(.spine_muscle_folder_side + ".ErectorSpinae.ILptC8CI"),
    ObjSearch(.spine_muscle_folder_side + ".ErectorSpinae.ILptC9CI"),
    ObjSearch(.spine_muscle_folder_side + ".ErectorSpinae.ITR2R8"),
    ObjSearch(.spine_muscle_folder_side + ".ErectorSpinae.ITR3R9")
),
arrcat(
    ObjSearch(.spine_muscle_folder_side + ".ErectorSpinae.ITR4R10"),
    ObjSearch(.spine_muscle_folder_side + ".ErectorSpinae.ITR5R11"),
    ObjSearch(.spine_muscle_folder_side + ".ErectorSpinae.ITR6R12"),
    ObjSearch(.spine_muscle_folder_side + ".ErectorSpinae.LTptC10Sacrum"),
    ObjSearch(.spine_muscle_folder_side + ".ErectorSpinae.LTptC3L3"),
    ObjSearch(.spine_muscle_folder_side + ".ErectorSpinae.LTptC4L4"),
    ObjSearch(.spine_muscle_folder_side + ".ErectorSpinae.LTptC5L5"),
    ObjSearch(.spine_muscle_folder_side + ".ErectorSpinae.LTptC6S1"),
    ObjSearch(.spine_muscle_folder_side + ".ErectorSpinae.LTptC7S2"),
    ObjSearch(.spine_muscle_folder_side + ".ErectorSpinae.LTptC8S3")
),
arrcat(
    ObjSearch(.spine_muscle_folder_side + ".ErectorSpinae.LTptC9S4"),
    ObjSearch(.spine_muscle_folder_side + ".ErectorSpinae.LTptT10Sacrum"),
    ObjSearch(.spine_muscle_folder_side + ".ErectorSpinae.LTptT11Sacrum"),
    ObjSearch(.spine_muscle_folder_side + ".ErectorSpinae.LTptT1L1"),
    ObjSearch(.spine_muscle_folder_side + ".ErectorSpinae.LTptT2L2"),
    ObjSearch(.spine_muscle_folder_side + ".ErectorSpinae.LTptT3L3"),
    ObjSearch(.spine_muscle_folder_side + ".ErectorSpinae.LTptT4L4"),
    ObjSearch(.spine_muscle_folder_side + ".ErectorSpinae.LTptT5L5"),
    ObjSearch(.spine_muscle_folder_side + ".ErectorSpinae.LTptT6S1"),
    ObjSearch(.spine_muscle_folder_side + ".ErectorSpinae.LTptT7S2")
),
arrcat(
    ObjSearch(.spine_muscle_folder_side + ".ErectorSpinae.LTptT8S3"),
    ObjSearch(.spine_muscle_folder_side + ".ErectorSpinae.LTptT9S4"),
    ObjSearch(.spine_muscle_folder_side + ".ExternalInterCostalis.IC_Ext_R10R11.elem1"),
    ObjSearch(.spine_muscle_folder_side + ".ExternalInterCostalis.IC_Ext_R10R11.elem2"),
    ObjSearch(.spine_muscle_folder_side + ".ExternalInterCostalis.IC_Ext_R10R11.elem3"),
    ObjSearch(.spine_muscle_folder_side + ".ExternalInterCostalis.IC_Ext_R10R11.elem4"),
    ObjSearch(.spine_muscle_folder_side + ".ExternalInterCostalis.IC_Ext_R10R11.elem5"),
    ObjSearch(.spine_muscle_folder_side + ".ExternalInterCostalis.IC_Ext_R10R11.elem6"),
    ObjSearch(.spine_muscle_folder_side + ".ExternalInterCostalis.IC_Ext_R11R12.elem2"),
    ObjSearch(.spine_muscle_folder_side + ".ExternalInterCostalis.IC_Ext_R1R2.elem1")
),
arrcat(
    ObjSearch(.spine_muscle_folder_side + ".ExternalInterCostalis.IC_Ext_R7R8.elem1"),
    ObjSearch(.spine_muscle_folder_side + ".ExternalInterCostalis.IC_Ext_R7R8.elem5"),
    ObjSearch(.spine_muscle_folder_side + ".ExternalInterCostalis.IC_Ext_R8R9.elem1"),
    ObjSearch(.spine_muscle_folder_side + ".ExternalInterCostalis.IC_Ext_R8R9.elem2"),
    ObjSearch(.spine_muscle_folder_side + ".ExternalInterCostalis.IC_Ext_R8R9.elem3"),
    ObjSearch(.spine_muscle_folder_side + ".ExternalInterCostalis.IC_Ext_R8R9.elem4"),
    ObjSearch(.spine_muscle_folder_side + ".ExternalInterCostalis.IC_Ext_R8R9.elem5"),
    ObjSearch(.spine_muscle_folder_side + ".ExternalInterCostalis.IC_Ext_R8R9.elem6"),
    ObjSearch(.spine_muscle_folder_side + ".ExternalInterCostalis.IC_Ext_R8R9.elem7"),
    ObjSearch(.spine_muscle_folder_side + ".ExternalInterCostalis.IC_Ext_R9R10.elem1")
),
arrcat(
    ObjSearch(.spine_muscle_folder_side + ".ExternalInterCostalis.IC_Ext_R9R10.elem2"),
    ObjSearch(.spine_muscle_folder_side + ".ExternalInterCostalis.IC_Ext_R9R10.elem3"),
    ObjSearch(.spine_muscle_folder_side + ".ExternalInterCostalis.IC_Ext_R9R10.elem4"),
    ObjSearch(.spine_muscle_folder_side + ".ExternalInterCostalis.IC_Ext_R9R10.elem5"),
    ObjSearch(.spine_muscle_folder_side + ".ExternalInterCostalis.IC_Ext_R9R10.elem6"),
    ObjSearch(.spine_muscle_folder_side + ".InnermostInterCostalis.IC_Inn_R10R11.elem1"),
    ObjSearch(.spine_muscle_folder_side + ".InnermostInterCostalis.IC_Inn_R10R11.elem2"),
    ObjSearch(.spine_muscle_folder_side + ".InnermostInterCostalis.IC_Inn_R10R11.elem3"),
    ObjSearch(.spine_muscle_folder_side + ".InnermostInterCostalis.IC_Inn_R5R6.elem3"),
    ObjSearch(.spine_muscle_folder_side + ".InnermostInterCostalis.IC_Inn_R5R6.elem4")
),
arrcat(
    ObjSearch(.spine_muscle_folder_side + ".InnermostInterCostalis.IC_Inn_R5R6.elem5"),
    ObjSearch(.spine_muscle_folder_side + ".InnermostInterCostalis.IC_Inn_R6R7.elem1"),
    ObjSearch(.spine_muscle_folder_side + ".InnermostInterCostalis.IC_Inn_R6R7.elem3"),
    ObjSearch(.spine_muscle_folder_side + ".InnermostInterCostalis.IC_Inn_R6R7.elem4"),
    ObjSearch(.spine_muscle_folder_side + ".InnermostInterCostalis.IC_Inn_R6R7.elem5"),
    ObjSearch(.spine_muscle_folder_side + ".InnermostInterCostalis.IC_Inn_R6R7.elem6"),
    ObjSearch(.spine_muscle_folder_side + ".InnermostInterCostalis.IC_Inn_R7R8.elem2"),
    ObjSearch(.spine_muscle_folder_side + ".InnermostInterCostalis.IC_Inn_R7R8.elem3"),
    ObjSearch(.spine_muscle_folder_side + ".InnermostInterCostalis.IC_Inn_R7R8.elem4"),
    ObjSearch(.spine_muscle_folder_side + ".InnermostInterCostalis.IC_Inn_R7R8.elem5")
),
arrcat(
    ObjSearch(.spine_muscle_folder_side + ".InnermostInterCostalis.IC_Inn_R7R8.elem6"),
    ObjSearch(.spine_muscle_folder_side + ".InnermostInterCostalis.IC_Inn_R7R8.elem7"),
    ObjSearch(.spine_muscle_folder_side + ".InnermostInterCostalis.IC_Inn_R8R9.elem1"),
    ObjSearch(.spine_muscle_folder_side + ".InnermostInterCostalis.IC_Inn_R8R9.elem2"),
    ObjSearch(.spine_muscle_folder_side + ".InnermostInterCostalis.IC_Inn_R8R9.elem3"),
    ObjSearch(.spine_muscle_folder_side + ".InnermostInterCostalis.IC_Inn_R8R9.elem4"),
    ObjSearch(.spine_muscle_folder_side + ".InnermostInterCostalis.IC_Inn_R8R9.elem5"),
    ObjSearch(.spine_muscle_folder_side + ".InnermostInterCostalis.IC_Inn_R8R9.elem6"),
    ObjSearch(.spine_muscle_folder_side + ".InnermostInterCostalis.IC_Inn_R8R9.elem7"),
    ObjSearch(.spine_muscle_folder_side + ".InnermostInterCostalis.IC_Inn_R8R9.elem8")
),
arrcat(
    ObjSearch(.spine_muscle_folder_side + ".InnermostInterCostalis.IC_Inn_R8R9.elem9"),
    ObjSearch(.spine_muscle_folder_side + ".InnermostInterCostalis.IC_Inn_R9R10.elem1"),
    ObjSearch(.spine_muscle_folder_side + ".InnermostInterCostalis.IC_Inn_R9R10.elem2"),
    ObjSearch(.spine_muscle_folder_side + ".InnermostInterCostalis.IC_Inn_R9R10.elem3"),
    ObjSearch(.spine_muscle_folder_side + ".InnermostInterCostalis.IC_Inn_R9R10.elem4"),
    ObjSearch(.spine_muscle_folder_side + ".InnermostInterCostalis.IC_Inn_R9R10.elem5"),
    ObjSearch(.spine_muscle_folder_side + ".InnermostInterCostalis.IC_Inn_R9R10.elem6"),
    ObjSearch(.spine_muscle_folder_side + ".InnermostInterCostalis.IC_Inn_R9R10.elem7"),
    ObjSearch(.spine_muscle_folder_side + ".InternalInterCostalis.IC_Int_R10R11.elem1"),
    ObjSearch(.spine_muscle_folder_side + ".InternalInterCostalis.IC_Int_R2R3.elem1")
)
),
arrcat(
arrcat(
    ObjSearch(.spine_muscle_folder_side + ".InternalInterCostalis.IC_Int_R2R3.elem2"),
    ObjSearch(.spine_muscle_folder_side + ".InternalInterCostalis.IC_Int_R2R3.elem3"),
    ObjSearch(.spine_muscle_folder_side + ".InternalInterCostalis.IC_Int_R3R4.elem1"),
    ObjSearch(.spine_muscle_folder_side + ".InternalInterCostalis.IC_Int_R3R4.elem2"),
    ObjSearch(.spine_muscle_folder_side + ".InternalInterCostalis.IC_Int_R3R4.elem3"),
    ObjSearch(.spine_muscle_folder_side + ".InternalInterCostalis.IC_Int_R3R4.elem4"),
    ObjSearch(.spine_muscle_folder_side + ".InternalInterCostalis.IC_Int_R4R5.elem1"),
    ObjSearch(.spine_muscle_folder_side + ".InternalInterCostalis.IC_Int_R4R5.elem2"),
    ObjSearch(.spine_muscle_folder_side + ".InternalInterCostalis.IC_Int_R4R5.elem3"),
    ObjSearch(.spine_muscle_folder_side + ".InternalInterCostalis.IC_Int_R4R5.elem4")
),
arrcat(
    ObjSearch(.spine_muscle_folder_side + ".InternalInterCostalis.IC_Int_R5R6.elem1"),
    ObjSearch(.spine_muscle_folder_side + ".InternalInterCostalis.IC_Int_R5R6.elem2"),
    ObjSearch(.spine_muscle_folder_side + ".InternalInterCostalis.IC_Int_R5R6.elem3"),
    ObjSearch(.spine_muscle_folder_side + ".InternalInterCostalis.IC_Int_R5R6.elem4"),
    ObjSearch(.spine_muscle_folder_side + ".InternalInterCostalis.IC_Int_R5R6.elem5"),
    ObjSearch(.spine_muscle_folder_side + ".InternalInterCostalis.IC_Int_R6R7.elem2"),
    ObjSearch(.spine_muscle_folder_side + ".InternalInterCostalis.IC_Int_R6R7.elem3"),
    ObjSearch(.spine_muscle_folder_side + ".InternalInterCostalis.IC_Int_R6R7.elem4"),
    ObjSearch(.spine_muscle_folder_side + ".InternalInterCostalis.IC_Int_R6R7.elem5"),
    ObjSearch(.spine_muscle_folder_side + ".InternalInterCostalis.IC_Int_R6R7.elem6")
),
arrcat(
    ObjSearch(.spine_muscle_folder_side + ".InternalInterCostalis.IC_Int_R7R8.elem2"),
    ObjSearch(.spine_muscle_folder_side + ".InternalInterCostalis.IC_Int_R7R8.elem3"),
    ObjSearch(.spine_muscle_folder_side + ".InternalInterCostalis.IC_Int_R7R8.elem4"),
    ObjSearch(.spine_muscle_folder_side + ".InternalInterCostalis.IC_Int_R7R8.elem5"),
    ObjSearch(.spine_muscle_folder_side + ".InternalInterCostalis.IC_Int_R7R8.elem6"),
    ObjSearch(.spine_muscle_folder_side + ".InternalInterCostalis.IC_Int_R7R8.elem7"),
    ObjSearch(.spine_muscle_folder_side + ".InternalInterCostalis.IC_Int_R8R9.elem1"),
    ObjSearch(.spine_muscle_folder_side + ".InternalInterCostalis.IC_Int_R8R9.elem2"),
    ObjSearch(.spine_muscle_folder_side + ".InternalInterCostalis.IC_Int_R8R9.elem3"),
    ObjSearch(.spine_muscle_folder_side + ".InternalInterCostalis.IC_Int_R8R9.elem4")
),
arrcat(
    ObjSearch(.spine_muscle_folder_side + ".InternalInterCostalis.IC_Int_R8R9.elem5"),
    ObjSearch(.spine_muscle_folder_side + ".InternalInterCostalis.IC_Int_R8R9.elem6"),
    ObjSearch(.spine_muscle_folder_side + ".InternalInterCostalis.IC_Int_R8R9.elem7"),
    ObjSearch(.spine_muscle_folder_side + ".InternalInterCostalis.IC_Int_R9R10.elem1"),
    ObjSearch(.spine_muscle_folder_side + ".InternalInterCostalis.IC_Int_R9R10.elem2"),
    ObjSearch(.spine_muscle_folder_side + ".InternalInterCostalis.IC_Int_R9R10.elem3"),
    ObjSearch(.spine_muscle_folder_side + ".InternalInterCostalis.IC_Int_R9R10.elem4"),
    ObjSearch(.spine_muscle_folder_side + ".InternalInterCostalis.IC_Int_R9R10.elem5"),
    ObjSearch(.spine_muscle_folder_side + ".LevatorCostarum.LCBrC7R1"),
    ObjSearch(.spine_muscle_folder_side + ".LevatorCostarum.LCBrT6R7")
),
arrcat(
    ObjSearch(.spine_muscle_folder_side + ".LevatorCostarum.LCBrT7R8"),
    ObjSearch(.spine_muscle_folder_side + ".LevatorCostarum.LCBrT8R9"),
    ObjSearch(.spine_muscle_folder_side + ".LevatorCostarum.LCBrT9R10"),
    ObjSearch(.spine_muscle_folder_side + ".LevatorCostarum.LCLgT5R7"),
    ObjSearch(.spine_muscle_folder_side + ".LevatorCostarum.LCLgT6R8"),
    ObjSearch(.spine_muscle_folder_side + ".LevatorCostarum.LCLgT7R9"),
    ObjSearch(.spine_muscle_folder_side + ".LevatorCostarum.LCLgT8R10"),
    ObjSearch(.spine_muscle_folder_side + ".LevatorCostarum.LCLgT9R11"),
    ObjSearch(.spine_muscle_folder_side + ".QuadratusLumborum.QLC12InterMedian_CIInterMedian"),
    ObjSearch(.spine_muscle_folder_side + ".QuadratusLumborum.QLC12InterMedian_L2")
),
arrcat(
    ObjSearch(.spine_muscle_folder_side + ".QuadratusLumborum.QLC12InterMedian_L3"),
    ObjSearch(.spine_muscle_folder_side + ".QuadratusLumborum.QLC12Median_CIInterMedian"),
    ObjSearch(.spine_muscle_folder_side + ".QuadratusLumborum.QLC12Median_CILat"),
    ObjSearch(.spine_muscle_folder_side + ".QuadratusLumborum.QLC12Median_L2"),
    ObjSearch(.spine_muscle_folder_side + ".QuadratusLumborum.QLC12Median_L3"),
    ObjSearch(.spine_muscle_folder_side + ".QuadratusLumborum.QLC12Median_L4"),
    ObjSearch(.spine_muscle_folder_side + ".RotatoresBrevis.RotatoresBrevisT10T9"),
    ObjSearch(.spine_muscle_folder_side + ".RotatoresLongus.RotatoresLongusT10T8"),
    ObjSearch(.spine_muscle_folder_side + ".RotatoresLongus.RotatoresLongusT11T9"),
    ObjSearch(.spine_muscle_folder_side + ".SemispinalisThoracis.SSTT10T2")
),
arrcat(
    ObjSearch(.spine_muscle_folder_side + ".SemispinalisThoracis.SSTT11T3"),
    ObjSearch(.spine_muscle_folder_side + ".SemispinalisThoracis.SSTT12T4"),
    ObjSearch(.spine_muscle_folder_side + ".SerratusPosteriorInferior.SPIT11R9"),
    ObjSearch(.spine_muscle_folder_side + ".Subcostalis.SCR1R4"),
    ObjSearch(.spine_muscle_folder_side + ".Subcostalis.SCR2R5"),
    ObjSearch(.spine_muscle_folder_side + ".Subcostalis.SCR5R8"),
    ObjSearch(.spine_muscle_folder_side + ".Subcostalis.SCR6R8"),
    ObjSearch(.spine_muscle_folder_side + ".Subcostalis.SCR6R9"),
    ObjSearch(.spine_muscle_folder_side + ".Subcostalis.SCR7R10"),
    ObjSearch(.spine_muscle_folder_side + ".Subcostalis.SCR7R9")
),
arrcat(
    ObjSearch(.spine_muscle_folder_side + ".Subcostalis.SCR8R10"),
    ObjSearch(.spine_muscle_folder_side + ".Subcostalis.SCR8R11"),
    ObjSearch(.spine_muscle_folder_side + ".Subcostalis.SCR9R11"),
    ObjSearch(.spine_muscle_folder_side + ".ThoracicMultifidi.MFL1T8"),
    ObjSearch(.spine_muscle_folder_side + ".ThoracicMultifidi.MFL1T9"),
    ObjSearch(.spine_muscle_folder_side + ".ThoracicMultifidi.MFL2T9"),
    ObjSearch(.spine_muscle_folder_side + ".ThoracicMultifidi.MFT10T5"),
    ObjSearch(.spine_muscle_folder_side + ".ThoracicMultifidi.MFT10T6"),
    ObjSearch(.spine_muscle_folder_side + ".ThoracicMultifidi.MFT10T7"),
    ObjSearch(.spine_muscle_folder_side + ".ThoracicMultifidi.MFT11T6")
),
arrcat(
    ObjSearch(.spine_muscle_folder_side + ".ThoracicMultifidi.MFT11T7"),
    ObjSearch(.spine_muscle_folder_side + ".ThoracicMultifidi.MFT11T8"),
    ObjSearch(.spine_muscle_folder_side + ".ThoracicMultifidi.MFT12T7"),
    ObjSearch(.spine_muscle_folder_side + ".ThoracicMultifidi.MFT12T8"),
    ObjSearch(.spine_muscle_folder_side + ".ThoracicMultifidi.MFT12T9")
)
)
);
};
AnyFolder T8T9Jnt = {
  AnyObjectPtr ListFlexors = arrcat(
arrcat(
arrcat(
    ObjSearch(.spine_muscle_folder_side + ".Diaphragm.CC_DiaphragmNode7"),
    ObjSearch(.spine_muscle_folder_side + ".Diaphragm.L1TransverseProcess_Diaphragm"),
    ObjSearch(.spine_muscle_folder_side + ".Diaphragm.L1_Diaphragm1"),
    ObjSearch(.spine_muscle_folder_side + ".Diaphragm.L1_Diaphragm2"),
    ObjSearch(.spine_muscle_folder_side + ".Diaphragm.L2_Diaphragm1"),
    ObjSearch(.spine_muscle_folder_side + ".Diaphragm.L2_Diaphragm2"),
    ObjSearch(.spine_muscle_folder_side + ".Diaphragm.R12_Diaphragm1"),
    ObjSearch(.spine_muscle_folder_side + ".Diaphragm.R12_Diaphragm2"),
    ObjSearch(.spine_muscle_folder_side + ".ErectorSpinae.ILptC12CI"),
    ObjSearch(.spine_muscle_folder_side + ".ExternalInterCostalis.IC_Ext_R1R2.elem3")
),
arrcat(
    ObjSearch(.spine_muscle_folder_side + ".ExternalInterCostalis.IC_Ext_R1R2.elem4"),
    ObjSearch(.spine_muscle_folder_side + ".ExternalInterCostalis.IC_Ext_R1R2.elem5"),
    ObjSearch(.spine_muscle_folder_side + ".ExternalInterCostalis.IC_Ext_R1R2.elem6"),
    ObjSearch(.spine_muscle_folder_side + ".ExternalInterCostalis.IC_Ext_R1R2.elem7"),
    ObjSearch(.spine_muscle_folder_side + ".ExternalInterCostalis.IC_Ext_R2R3.elem4"),
    ObjSearch(.spine_muscle_folder_side + ".ExternalInterCostalis.IC_Ext_R2R3.elem5"),
    ObjSearch(.spine_muscle_folder_side + ".ExternalInterCostalis.IC_Ext_R2R3.elem6"),
    ObjSearch(.spine_muscle_folder_side + ".ExternalInterCostalis.IC_Ext_R2R3.elem7"),
    ObjSearch(.spine_muscle_folder_side + ".ExternalInterCostalis.IC_Ext_R3R4.elem3"),
    ObjSearch(.spine_muscle_folder_side + ".ExternalInterCostalis.IC_Ext_R3R4.elem4")
),
arrcat(
    ObjSearch(.spine_muscle_folder_side + ".ExternalInterCostalis.IC_Ext_R3R4.elem5"),
    ObjSearch(.spine_muscle_folder_side + ".ExternalInterCostalis.IC_Ext_R3R4.elem6"),
    ObjSearch(.spine_muscle_folder_side + ".ExternalInterCostalis.IC_Ext_R3R4.elem7"),
    ObjSearch(.spine_muscle_folder_side + ".ExternalInterCostalis.IC_Ext_R4R5.elem5"),
    ObjSearch(.spine_muscle_folder_side + ".ExternalInterCostalis.IC_Ext_R4R5.elem6"),
    ObjSearch(.spine_muscle_folder_side + ".ExternalInterCostalis.IC_Ext_R4R5.elem7"),
    ObjSearch(.spine_muscle_folder_side + ".ExternalInterCostalis.IC_Ext_R5R6.elem6"),
    ObjSearch(.spine_muscle_folder_side + ".ExternalInterCostalis.IC_Ext_R5R6.elem7"),
    ObjSearch(.spine_muscle_folder_side + ".ExternalInterCostalis.IC_Ext_R6R7.elem7"),
    ObjSearch(.spine_muscle_folder_side + ".ExternalInterCostalis.IC_Ext_R7R8.elem7")
),
arrcat(
    ObjSearch(.spine_muscle_folder_side + ".ExternalInterCostalis.IC_Ext_R9R10.elem1"),
    ObjSearch(.spine_muscle_folder_side + ".Hyoid.LumpedHyoidStC0"),
    ObjSearch(.spine_muscle_folder_side + ".InnermostInterCostalis.IC_Inn_R10R11.elem5"),
    ObjSearch(.spine_muscle_folder_side + ".InnermostInterCostalis.IC_Inn_R10R11.elem6"),
    ObjSearch(.spine_muscle_folder_side + ".InnermostInterCostalis.IC_Inn_R11R12.elem1"),
    ObjSearch(.spine_muscle_folder_side + ".InnermostInterCostalis.IC_Inn_R11R12.elem2"),
    ObjSearch(.spine_muscle_folder_side + ".InnermostInterCostalis.IC_Inn_R1R2.elem3"),
    ObjSearch(.spine_muscle_folder_side + ".InnermostInterCostalis.IC_Inn_R1R2.elem4"),
    ObjSearch(.spine_muscle_folder_side + ".InnermostInterCostalis.IC_Inn_R1R2.elem5"),
    ObjSearch(.spine_muscle_folder_side + ".InnermostInterCostalis.IC_Inn_R1R2.elem6")
),
arrcat(
    ObjSearch(.spine_muscle_folder_side + ".InnermostInterCostalis.IC_Inn_R2R3.elem5"),
    ObjSearch(.spine_muscle_folder_side + ".InnermostInterCostalis.IC_Inn_R2R3.elem6"),
    ObjSearch(.spine_muscle_folder_side + ".InnermostInterCostalis.IC_Inn_R2R3.elem7"),
    ObjSearch(.spine_muscle_folder_side + ".InnermostInterCostalis.IC_Inn_R2R3.elem8"),
    ObjSearch(.spine_muscle_folder_side + ".InnermostInterCostalis.IC_Inn_R2R3.elem9"),
    ObjSearch(.spine_muscle_folder_side + ".InnermostInterCostalis.IC_Inn_R3R4.elem6"),
    ObjSearch(.spine_muscle_folder_side + ".InnermostInterCostalis.IC_Inn_R3R4.elem7"),
    ObjSearch(.spine_muscle_folder_side + ".InnermostInterCostalis.IC_Inn_R3R4.elem8"),
    ObjSearch(.spine_muscle_folder_side + ".InnermostInterCostalis.IC_Inn_R3R4.elem9"),
    ObjSearch(.spine_muscle_folder_side + ".InnermostInterCostalis.IC_Inn_R4R5.elem7")
),
arrcat(
    ObjSearch(.spine_muscle_folder_side + ".InnermostInterCostalis.IC_Inn_R4R5.elem8"),
    ObjSearch(.spine_muscle_folder_side + ".InnermostInterCostalis.IC_Inn_R4R5.elem9"),
    ObjSearch(.spine_muscle_folder_side + ".InnermostInterCostalis.IC_Inn_R5R6.elem9"),
    ObjSearch(.spine_muscle_folder_side + ".InternalInterCostalis.IC_Int_R10R11.elem2"),
    ObjSearch(.spine_muscle_folder_side + ".InternalInterCostalis.IC_Int_R10R11.elem3"),
    ObjSearch(.spine_muscle_folder_side + ".InternalInterCostalis.IC_Int_R10R11.elem4"),
    ObjSearch(.spine_muscle_folder_side + ".InternalInterCostalis.IC_Int_R10R11.elem5"),
    ObjSearch(.spine_muscle_folder_side + ".InternalInterCostalis.IC_Int_R10R11.elem6"),
    ObjSearch(.spine_muscle_folder_side + ".InternalInterCostalis.IC_Int_R11R12.elem1"),
    ObjSearch(.spine_muscle_folder_side + ".InternalInterCostalis.IC_Int_R11R12.elem2")
),
arrcat(
    ObjSearch(.spine_muscle_folder_side + ".InternalInterCostalis.IC_Int_R2R3.elem6"),
    ObjSearch(.spine_muscle_folder_side + ".InternalInterCostalis.IC_Int_R3R4.elem6"),
    ObjSearch(.spine_muscle_folder_side + ".InternalInterCostalis.IC_Int_R3R4.elem7"),
    ObjSearch(.spine_muscle_folder_side + ".InternalInterCostalis.IC_Int_R4R5.elem_sternum"),
    ObjSearch(.spine_muscle_folder_side + ".InternalInterCostalis.IC_Int_R5R6.elem_sternum"),
    ObjSearch(.spine_muscle_folder_side + ".InternalInterCostalis.IC_Int_R6R7.elem_sternum"),
    ObjSearch(.spine_muscle_folder_side + ".InternalInterCostalis.IC_Int_R7R8.elem_sternum"),
    ObjSearch(.spine_muscle_folder_side + ".InternalInterCostalis.IC_Int_R8R9.elem7"),
    ObjSearch(.spine_muscle_folder_side + ".InternalInterCostalis.IC_Int_R8R9.elem_sternum"),
    ObjSearch(.spine_muscle_folder_side + ".InternalInterCostalis.IC_Int_R9R10.elem2")
),
arrcat(
    ObjSearch(.spine_muscle_folder_side + ".InternalInterCostalis.IC_Int_R9R10.elem5"),
    ObjSearch(.spine_muscle_folder_side + ".InternalInterCostalis.IC_Int_R9R10.elem6"),
    ObjSearch(.spine_muscle_folder_side + ".InternalInterCostalis.IC_Int_R9R10.elem7"),
    ObjSearch(.spine_muscle_folder_side + ".InternalInterCostalis.IC_Int_R9R10.elem_sternum"),
    ObjSearch(.spine_muscle_folder_side + ".LevatorCostarum.LCBrT10R11"),
    ObjSearch(.spine_muscle_folder_side + ".LevatorCostarum.LCBrT11R12"),
    ObjSearch(.spine_muscle_folder_side + ".LevatorCostarum.LCBrT9R10"),
    ObjSearch(.spine_muscle_folder_side + ".LevatorCostarum.LCLgT10R12"),
    ObjSearch(.spine_muscle_folder_side + ".LevatorCostarum.LCLgT9R11"),
    ObjSearch(.spine_muscle_folder_side + ".ObliquusExternus.OEC_1")
),
arrcat(
    ObjSearch(.spine_muscle_folder_side + ".ObliquusExternus.OEC_10"),
    ObjSearch(.spine_muscle_folder_side + ".ObliquusExternus.OEC_11"),
    ObjSearch(.spine_muscle_folder_side + ".ObliquusExternus.OEC_2"),
    ObjSearch(.spine_muscle_folder_side + ".ObliquusExternus.OEC_3"),
    ObjSearch(.spine_muscle_folder_side + ".ObliquusExternus.OEC_4"),
    ObjSearch(.spine_muscle_folder_side + ".ObliquusExternus.OEC_5"),
    ObjSearch(.spine_muscle_folder_side + ".ObliquusExternus.OEC_6"),
    ObjSearch(.spine_muscle_folder_side + ".ObliquusExternus.OEC_7"),
    ObjSearch(.spine_muscle_folder_side + ".ObliquusExternus.OEC_8"),
    ObjSearch(.spine_muscle_folder_side + ".ObliquusExternus.OEC_9")
),
arrcat(
    ObjSearch(.spine_muscle_folder_side + ".ObliquusInternus.OIC_1"),
    ObjSearch(.spine_muscle_folder_side + ".ObliquusInternus.OIC_10"),
    ObjSearch(.spine_muscle_folder_side + ".ObliquusInternus.OIC_11"),
    ObjSearch(.spine_muscle_folder_side + ".ObliquusInternus.OIC_12"),
    ObjSearch(.spine_muscle_folder_side + ".ObliquusInternus.OIC_13"),
    ObjSearch(.spine_muscle_folder_side + ".ObliquusInternus.OIC_2"),
    ObjSearch(.spine_muscle_folder_side + ".ObliquusInternus.OIC_3"),
    ObjSearch(.spine_muscle_folder_side + ".ObliquusInternus.OIC_4"),
    ObjSearch(.spine_muscle_folder_side + ".ObliquusInternus.OIC_5"),
    ObjSearch(.spine_muscle_folder_side + ".ObliquusInternus.OIC_6")
)
),
arrcat(
arrcat(
    ObjSearch(.spine_muscle_folder_side + ".ObliquusInternus.OIC_7"),
    ObjSearch(.spine_muscle_folder_side + ".ObliquusInternus.OIC_8"),
    ObjSearch(.spine_muscle_folder_side + ".ObliquusInternus.OIC_8_extra"),
    ObjSearch(.spine_muscle_folder_side + ".ObliquusInternus.OIC_9"),
    ObjSearch(.spine_muscle_folder_side + ".QuadratusLumborum.QLC12Lat_L4"),
    ObjSearch(.spine_muscle_folder_side + ".RectusAbdominis.RA_1"),
    ObjSearch(.spine_muscle_folder_side + ".RectusAbdominis.RA_2"),
    ObjSearch(.spine_muscle_folder_side + ".Scalenus.ScalenusAnteriorR1C3"),
    ObjSearch(.spine_muscle_folder_side + ".Scalenus.ScalenusAnteriorR1C4"),
    ObjSearch(.spine_muscle_folder_side + ".Scalenus.ScalenusAnteriorR1C5")
),
arrcat(
    ObjSearch(.spine_muscle_folder_side + ".Scalenus.ScalenusAnteriorR1C6"),
    ObjSearch(.spine_muscle_folder_side + ".Scalenus.ScalenusMediusR1C2"),
    ObjSearch(.spine_muscle_folder_side + ".Scalenus.ScalenusMediusR1C3"),
    ObjSearch(.spine_muscle_folder_side + ".Scalenus.ScalenusMediusR1C4"),
    ObjSearch(.spine_muscle_folder_side + ".Scalenus.ScalenusMediusR1C5"),
    ObjSearch(.spine_muscle_folder_side + ".Scalenus.ScalenusMediusR1C6"),
    ObjSearch(.spine_muscle_folder_side + ".Scalenus.ScalenusMediusR1C7"),
    ObjSearch(.spine_muscle_folder_side + ".Scalenus.ScalenusPosteriorR2C5"),
    ObjSearch(.spine_muscle_folder_side + ".Scalenus.ScalenusPosteriorR2C6"),
    ObjSearch(.spine_muscle_folder_side + ".Scalenus.ScalenusPosteriorR2C7")
),
arrcat(
    ObjSearch(.spine_muscle_folder_side + ".SerratusPosteriorInferior.SPIL1R11"),
    ObjSearch(.spine_muscle_folder_side + ".SerratusPosteriorInferior.SPIL2R12"),
    ObjSearch(.spine_muscle_folder_side + ".SerratusPosteriorInferior.SPIT11R9"),
    ObjSearch(.spine_muscle_folder_side + ".SerratusPosteriorInferior.SPIT12R10"),
    ObjSearch(.spine_muscle_folder_side + ".TransversusThoracis.TrThR2R4S"),
    ObjSearch(.spine_muscle_folder_side + ".TransversusThoracis.TrThR2S"),
    ObjSearch(.spine_muscle_folder_side + ".TransversusThoracis.TrThR5R7S"),
    ObjSearch(.spine_muscle_folder_side + ".TransversusThoracis.TrThR6S"),
    ObjSearch(.spine_muscle_folder_side + ".TransversusThoracis.TrThR7S"),
    ObjSearch(.spine_muscle_folder_side + ".TransversusThoracis.TrThR8S")
),
arrcat(
    ObjSearch(.spine_muscle_folder_side + ".TransversusThoracis.TrThR9S")
)
)
);
  AnyObjectPtr ListExtensors = arrcat(
arrcat(
arrcat(
    ObjSearch(.spine_muscle_folder_side + ".Diaphragm.CC_DiaphragmNode1"),
    ObjSearch(.spine_muscle_folder_side + ".Diaphragm.CC_DiaphragmNode2"),
    ObjSearch(.spine_muscle_folder_side + ".Diaphragm.CC_DiaphragmNode3"),
    ObjSearch(.spine_muscle_folder_side + ".Diaphragm.R10_Diaphragm1"),
    ObjSearch(.spine_muscle_folder_side + ".Diaphragm.R10_Diaphragm2"),
    ObjSearch(.spine_muscle_folder_side + ".Diaphragm.R10_Diaphragm3"),
    ObjSearch(.spine_muscle_folder_side + ".Diaphragm.R11_Diaphragm1"),
    ObjSearch(.spine_muscle_folder_side + ".Diaphragm.R11_Diaphragm2"),
    ObjSearch(.spine_muscle_folder_side + ".Diaphragm.R11_Diaphragm3"),
    ObjSearch(.spine_muscle_folder_side + ".Diaphragm.Xiphoid_Diaphragm")
),
arrcat(
    ObjSearch(.spine_muscle_folder_side + ".ErectorSpinae.ILptC5SIPS"),
    ObjSearch(.spine_muscle_folder_side + ".ErectorSpinae.ILptC6SIPS"),
    ObjSearch(.spine_muscle_folder_side + ".ErectorSpinae.ILptC7CI"),
    ObjSearch(.spine_muscle_folder_side + ".ErectorSpinae.ILptC8CI"),
    ObjSearch(.spine_muscle_folder_side + ".ErectorSpinae.ILptC9CI"),
    ObjSearch(.spine_muscle_folder_side + ".ErectorSpinae.ITC7R7"),
    ObjSearch(.spine_muscle_folder_side + ".ErectorSpinae.ITR1R7"),
    ObjSearch(.spine_muscle_folder_side + ".ErectorSpinae.ITR2R8"),
    ObjSearch(.spine_muscle_folder_side + ".ErectorSpinae.ITR3R9"),
    ObjSearch(.spine_muscle_folder_side + ".ErectorSpinae.ITR4R10")
),
arrcat(
    ObjSearch(.spine_muscle_folder_side + ".ErectorSpinae.ITR5R11"),
    ObjSearch(.spine_muscle_folder_side + ".ErectorSpinae.ITR6R12"),
    ObjSearch(.spine_muscle_folder_side + ".ErectorSpinae.LTptC10Sacrum"),
    ObjSearch(.spine_muscle_folder_side + ".ErectorSpinae.LTptC3L3"),
    ObjSearch(.spine_muscle_folder_side + ".ErectorSpinae.LTptC4L4"),
    ObjSearch(.spine_muscle_folder_side + ".ErectorSpinae.LTptC5L5"),
    ObjSearch(.spine_muscle_folder_side + ".ErectorSpinae.LTptC6S1"),
    ObjSearch(.spine_muscle_folder_side + ".ErectorSpinae.LTptC7S2"),
    ObjSearch(.spine_muscle_folder_side + ".ErectorSpinae.LTptC8S3"),
    ObjSearch(.spine_muscle_folder_side + ".ErectorSpinae.LTptC9S4")
),
arrcat(
    ObjSearch(.spine_muscle_folder_side + ".ErectorSpinae.LTptT10Sacrum"),
    ObjSearch(.spine_muscle_folder_side + ".ErectorSpinae.LTptT11Sacrum"),
    ObjSearch(.spine_muscle_folder_side + ".ErectorSpinae.LTptT1L1"),
    ObjSearch(.spine_muscle_folder_side + ".ErectorSpinae.LTptT2L2"),
    ObjSearch(.spine_muscle_folder_side + ".ErectorSpinae.LTptT3L3"),
    ObjSearch(.spine_muscle_folder_side + ".ErectorSpinae.LTptT4L4"),
    ObjSearch(.spine_muscle_folder_side + ".ErectorSpinae.LTptT5L5"),
    ObjSearch(.spine_muscle_folder_side + ".ErectorSpinae.LTptT6S1"),
    ObjSearch(.spine_muscle_folder_side + ".ErectorSpinae.LTptT7S2"),
    ObjSearch(.spine_muscle_folder_side + ".ErectorSpinae.LTptT8S3")
),
arrcat(
    ObjSearch(.spine_muscle_folder_side + ".ErectorSpinae.LTptT9S4"),
    ObjSearch(.spine_muscle_folder_side + ".ExternalInterCostalis.IC_Ext_R10R11.elem1"),
    ObjSearch(.spine_muscle_folder_side + ".ExternalInterCostalis.IC_Ext_R10R11.elem2"),
    ObjSearch(.spine_muscle_folder_side + ".ExternalInterCostalis.IC_Ext_R10R11.elem3"),
    ObjSearch(.spine_muscle_folder_side + ".ExternalInterCostalis.IC_Ext_R10R11.elem4"),
    ObjSearch(.spine_muscle_folder_side + ".ExternalInterCostalis.IC_Ext_R10R11.elem5"),
    ObjSearch(.spine_muscle_folder_side + ".ExternalInterCostalis.IC_Ext_R10R11.elem6"),
    ObjSearch(.spine_muscle_folder_side + ".ExternalInterCostalis.IC_Ext_R11R12.elem2"),
    ObjSearch(.spine_muscle_folder_side + ".ExternalInterCostalis.IC_Ext_R6R7.elem1"),
    ObjSearch(.spine_muscle_folder_side + ".ExternalInterCostalis.IC_Ext_R6R7.elem2")
),
arrcat(
    ObjSearch(.spine_muscle_folder_side + ".ExternalInterCostalis.IC_Ext_R7R8.elem1"),
    ObjSearch(.spine_muscle_folder_side + ".ExternalInterCostalis.IC_Ext_R7R8.elem2"),
    ObjSearch(.spine_muscle_folder_side + ".ExternalInterCostalis.IC_Ext_R7R8.elem3"),
    ObjSearch(.spine_muscle_folder_side + ".ExternalInterCostalis.IC_Ext_R7R8.elem4"),
    ObjSearch(.spine_muscle_folder_side + ".ExternalInterCostalis.IC_Ext_R7R8.elem5"),
    ObjSearch(.spine_muscle_folder_side + ".ExternalInterCostalis.IC_Ext_R8R9.elem1"),
    ObjSearch(.spine_muscle_folder_side + ".ExternalInterCostalis.IC_Ext_R8R9.elem2"),
    ObjSearch(.spine_muscle_folder_side + ".ExternalInterCostalis.IC_Ext_R8R9.elem3"),
    ObjSearch(.spine_muscle_folder_side + ".ExternalInterCostalis.IC_Ext_R8R9.elem4"),
    ObjSearch(.spine_muscle_folder_side + ".ExternalInterCostalis.IC_Ext_R8R9.elem5")
),
arrcat(
    ObjSearch(.spine_muscle_folder_side + ".ExternalInterCostalis.IC_Ext_R8R9.elem6"),
    ObjSearch(.spine_muscle_folder_side + ".ExternalInterCostalis.IC_Ext_R8R9.elem7"),
    ObjSearch(.spine_muscle_folder_side + ".ExternalInterCostalis.IC_Ext_R9R10.elem2"),
    ObjSearch(.spine_muscle_folder_side + ".ExternalInterCostalis.IC_Ext_R9R10.elem3"),
    ObjSearch(.spine_muscle_folder_side + ".ExternalInterCostalis.IC_Ext_R9R10.elem4"),
    ObjSearch(.spine_muscle_folder_side + ".ExternalInterCostalis.IC_Ext_R9R10.elem5"),
    ObjSearch(.spine_muscle_folder_side + ".ExternalInterCostalis.IC_Ext_R9R10.elem6"),
    ObjSearch(.spine_muscle_folder_side + ".ExternalInterCostalis.IC_Ext_R9R10.elem7"),
    ObjSearch(.spine_muscle_folder_side + ".InnermostInterCostalis.IC_Inn_R10R11.elem1"),
    ObjSearch(.spine_muscle_folder_side + ".InnermostInterCostalis.IC_Inn_R10R11.elem2")
),
arrcat(
    ObjSearch(.spine_muscle_folder_side + ".InnermostInterCostalis.IC_Inn_R4R5.elem2"),
    ObjSearch(.spine_muscle_folder_side + ".InnermostInterCostalis.IC_Inn_R4R5.elem3"),
    ObjSearch(.spine_muscle_folder_side + ".InnermostInterCostalis.IC_Inn_R4R5.elem4"),
    ObjSearch(.spine_muscle_folder_side + ".InnermostInterCostalis.IC_Inn_R5R6.elem2"),
    ObjSearch(.spine_muscle_folder_side + ".InnermostInterCostalis.IC_Inn_R5R6.elem3"),
    ObjSearch(.spine_muscle_folder_side + ".InnermostInterCostalis.IC_Inn_R5R6.elem4"),
    ObjSearch(.spine_muscle_folder_side + ".InnermostInterCostalis.IC_Inn_R5R6.elem5"),
    ObjSearch(.spine_muscle_folder_side + ".InnermostInterCostalis.IC_Inn_R5R6.elem6"),
    ObjSearch(.spine_muscle_folder_side + ".InnermostInterCostalis.IC_Inn_R6R7.elem1"),
    ObjSearch(.spine_muscle_folder_side + ".InnermostInterCostalis.IC_Inn_R6R7.elem2")
),
arrcat(
    ObjSearch(.spine_muscle_folder_side + ".InnermostInterCostalis.IC_Inn_R6R7.elem3"),
    ObjSearch(.spine_muscle_folder_side + ".InnermostInterCostalis.IC_Inn_R6R7.elem4"),
    ObjSearch(.spine_muscle_folder_side + ".InnermostInterCostalis.IC_Inn_R6R7.elem5"),
    ObjSearch(.spine_muscle_folder_side + ".InnermostInterCostalis.IC_Inn_R6R7.elem6"),
    ObjSearch(.spine_muscle_folder_side + ".InnermostInterCostalis.IC_Inn_R6R7.elem7"),
    ObjSearch(.spine_muscle_folder_side + ".InnermostInterCostalis.IC_Inn_R7R8.elem1"),
    ObjSearch(.spine_muscle_folder_side + ".InnermostInterCostalis.IC_Inn_R7R8.elem2"),
    ObjSearch(.spine_muscle_folder_side + ".InnermostInterCostalis.IC_Inn_R7R8.elem3"),
    ObjSearch(.spine_muscle_folder_side + ".InnermostInterCostalis.IC_Inn_R7R8.elem4"),
    ObjSearch(.spine_muscle_folder_side + ".InnermostInterCostalis.IC_Inn_R7R8.elem5")
),
arrcat(
    ObjSearch(.spine_muscle_folder_side + ".InnermostInterCostalis.IC_Inn_R7R8.elem6"),
    ObjSearch(.spine_muscle_folder_side + ".InnermostInterCostalis.IC_Inn_R7R8.elem7"),
    ObjSearch(.spine_muscle_folder_side + ".InnermostInterCostalis.IC_Inn_R7R8.elem8"),
    ObjSearch(.spine_muscle_folder_side + ".InnermostInterCostalis.IC_Inn_R8R9.elem1"),
    ObjSearch(.spine_muscle_folder_side + ".InnermostInterCostalis.IC_Inn_R8R9.elem2"),
    ObjSearch(.spine_muscle_folder_side + ".InnermostInterCostalis.IC_Inn_R8R9.elem3"),
    ObjSearch(.spine_muscle_folder_side + ".InnermostInterCostalis.IC_Inn_R8R9.elem4"),
    ObjSearch(.spine_muscle_folder_side + ".InnermostInterCostalis.IC_Inn_R8R9.elem5"),
    ObjSearch(.spine_muscle_folder_side + ".InnermostInterCostalis.IC_Inn_R8R9.elem6"),
    ObjSearch(.spine_muscle_folder_side + ".InnermostInterCostalis.IC_Inn_R8R9.elem7")
)
),
arrcat(
arrcat(
    ObjSearch(.spine_muscle_folder_side + ".InnermostInterCostalis.IC_Inn_R8R9.elem8"),
    ObjSearch(.spine_muscle_folder_side + ".InnermostInterCostalis.IC_Inn_R9R10.elem1"),
    ObjSearch(.spine_muscle_folder_side + ".InnermostInterCostalis.IC_Inn_R9R10.elem2"),
    ObjSearch(.spine_muscle_folder_side + ".InnermostInterCostalis.IC_Inn_R9R10.elem3"),
    ObjSearch(.spine_muscle_folder_side + ".InnermostInterCostalis.IC_Inn_R9R10.elem4"),
    ObjSearch(.spine_muscle_folder_side + ".InnermostInterCostalis.IC_Inn_R9R10.elem5"),
    ObjSearch(.spine_muscle_folder_side + ".InnermostInterCostalis.IC_Inn_R9R10.elem6"),
    ObjSearch(.spine_muscle_folder_side + ".InnermostInterCostalis.IC_Inn_R9R10.elem7"),
    ObjSearch(.spine_muscle_folder_side + ".InternalInterCostalis.IC_Int_R1R2.elem_sternum"),
    ObjSearch(.spine_muscle_folder_side + ".InternalInterCostalis.IC_Int_R2R3.elem1")
),
arrcat(
    ObjSearch(.spine_muscle_folder_side + ".InternalInterCostalis.IC_Int_R2R3.elem2"),
    ObjSearch(.spine_muscle_folder_side + ".InternalInterCostalis.IC_Int_R3R4.elem1"),
    ObjSearch(.spine_muscle_folder_side + ".InternalInterCostalis.IC_Int_R3R4.elem2"),
    ObjSearch(.spine_muscle_folder_side + ".InternalInterCostalis.IC_Int_R3R4.elem3"),
    ObjSearch(.spine_muscle_folder_side + ".InternalInterCostalis.IC_Int_R4R5.elem1"),
    ObjSearch(.spine_muscle_folder_side + ".InternalInterCostalis.IC_Int_R4R5.elem2"),
    ObjSearch(.spine_muscle_folder_side + ".InternalInterCostalis.IC_Int_R4R5.elem3"),
    ObjSearch(.spine_muscle_folder_side + ".InternalInterCostalis.IC_Int_R4R5.elem4"),
    ObjSearch(.spine_muscle_folder_side + ".InternalInterCostalis.IC_Int_R5R6.elem1"),
    ObjSearch(.spine_muscle_folder_side + ".InternalInterCostalis.IC_Int_R5R6.elem2")
),
arrcat(
    ObjSearch(.spine_muscle_folder_side + ".InternalInterCostalis.IC_Int_R5R6.elem3"),
    ObjSearch(.spine_muscle_folder_side + ".InternalInterCostalis.IC_Int_R5R6.elem4"),
    ObjSearch(.spine_muscle_folder_side + ".InternalInterCostalis.IC_Int_R5R6.elem5"),
    ObjSearch(.spine_muscle_folder_side + ".InternalInterCostalis.IC_Int_R6R7.elem1"),
    ObjSearch(.spine_muscle_folder_side + ".InternalInterCostalis.IC_Int_R6R7.elem2"),
    ObjSearch(.spine_muscle_folder_side + ".InternalInterCostalis.IC_Int_R6R7.elem3"),
    ObjSearch(.spine_muscle_folder_side + ".InternalInterCostalis.IC_Int_R6R7.elem4"),
    ObjSearch(.spine_muscle_folder_side + ".InternalInterCostalis.IC_Int_R6R7.elem5"),
    ObjSearch(.spine_muscle_folder_side + ".InternalInterCostalis.IC_Int_R6R7.elem6"),
    ObjSearch(.spine_muscle_folder_side + ".InternalInterCostalis.IC_Int_R6R7.elem7")
),
arrcat(
    ObjSearch(.spine_muscle_folder_side + ".InternalInterCostalis.IC_Int_R7R8.elem1"),
    ObjSearch(.spine_muscle_folder_side + ".InternalInterCostalis.IC_Int_R7R8.elem2"),
    ObjSearch(.spine_muscle_folder_side + ".InternalInterCostalis.IC_Int_R7R8.elem3"),
    ObjSearch(.spine_muscle_folder_side + ".InternalInterCostalis.IC_Int_R7R8.elem4"),
    ObjSearch(.spine_muscle_folder_side + ".InternalInterCostalis.IC_Int_R7R8.elem5"),
    ObjSearch(.spine_muscle_folder_side + ".InternalInterCostalis.IC_Int_R7R8.elem6"),
    ObjSearch(.spine_muscle_folder_side + ".InternalInterCostalis.IC_Int_R7R8.elem7"),
    ObjSearch(.spine_muscle_folder_side + ".InternalInterCostalis.IC_Int_R8R9.elem1"),
    ObjSearch(.spine_muscle_folder_side + ".InternalInterCostalis.IC_Int_R8R9.elem2"),
    ObjSearch(.spine_muscle_folder_side + ".InternalInterCostalis.IC_Int_R8R9.elem3")
),
arrcat(
    ObjSearch(.spine_muscle_folder_side + ".InternalInterCostalis.IC_Int_R8R9.elem4"),
    ObjSearch(.spine_muscle_folder_side + ".InternalInterCostalis.IC_Int_R8R9.elem5"),
    ObjSearch(.spine_muscle_folder_side + ".LevatorCostarum.LCBrT2R3"),
    ObjSearch(.spine_muscle_folder_side + ".LevatorCostarum.LCBrT3R4"),
    ObjSearch(.spine_muscle_folder_side + ".LevatorCostarum.LCBrT4R5"),
    ObjSearch(.spine_muscle_folder_side + ".LevatorCostarum.LCBrT5R6"),
    ObjSearch(.spine_muscle_folder_side + ".LevatorCostarum.LCBrT6R7"),
    ObjSearch(.spine_muscle_folder_side + ".LevatorCostarum.LCBrT7R8"),
    ObjSearch(.spine_muscle_folder_side + ".LevatorCostarum.LCBrT8R9"),
    ObjSearch(.spine_muscle_folder_side + ".LevatorCostarum.LCLgT5R7")
),
arrcat(
    ObjSearch(.spine_muscle_folder_side + ".LevatorCostarum.LCLgT6R8"),
    ObjSearch(.spine_muscle_folder_side + ".LevatorCostarum.LCLgT7R9"),
    ObjSearch(.spine_muscle_folder_side + ".LevatorCostarum.LCLgT8R10"),
    ObjSearch(.spine_muscle_folder_side + ".QuadratusLumborum.QLC12InterMedian_CIInterMedian"),
    ObjSearch(.spine_muscle_folder_side + ".QuadratusLumborum.QLC12InterMedian_L2"),
    ObjSearch(.spine_muscle_folder_side + ".QuadratusLumborum.QLC12InterMedian_L3"),
    ObjSearch(.spine_muscle_folder_side + ".QuadratusLumborum.QLC12Median_CIInterMedian"),
    ObjSearch(.spine_muscle_folder_side + ".QuadratusLumborum.QLC12Median_CILat"),
    ObjSearch(.spine_muscle_folder_side + ".QuadratusLumborum.QLC12Median_L2"),
    ObjSearch(.spine_muscle_folder_side + ".QuadratusLumborum.QLC12Median_L3")
),
arrcat(
    ObjSearch(.spine_muscle_folder_side + ".QuadratusLumborum.QLC12Median_L4"),
    ObjSearch(.spine_muscle_folder_side + ".RotatoresBrevis.RotatoresBrevisT9T8"),
    ObjSearch(.spine_muscle_folder_side + ".RotatoresLongus.RotatoresLongusT10T8"),
    ObjSearch(.spine_muscle_folder_side + ".RotatoresLongus.RotatoresLongusT9T7"),
    ObjSearch(.spine_muscle_folder_side + ".SemispinalisThoracis.SSTT10T2"),
    ObjSearch(.spine_muscle_folder_side + ".SemispinalisThoracis.SSTT11T3"),
    ObjSearch(.spine_muscle_folder_side + ".SemispinalisThoracis.SSTT12T4"),
    ObjSearch(.spine_muscle_folder_side + ".SemispinalisThoracis.SSTT9T1"),
    ObjSearch(.spine_muscle_folder_side + ".Subcostalis.SCR1R3"),
    ObjSearch(.spine_muscle_folder_side + ".Subcostalis.SCR1R4")
),
arrcat(
    ObjSearch(.spine_muscle_folder_side + ".Subcostalis.SCR2R4"),
    ObjSearch(.spine_muscle_folder_side + ".Subcostalis.SCR2R5"),
    ObjSearch(.spine_muscle_folder_side + ".Subcostalis.SCR3R6"),
    ObjSearch(.spine_muscle_folder_side + ".Subcostalis.SCR5R7"),
    ObjSearch(.spine_muscle_folder_side + ".Subcostalis.SCR5R8"),
    ObjSearch(.spine_muscle_folder_side + ".Subcostalis.SCR6R8"),
    ObjSearch(.spine_muscle_folder_side + ".Subcostalis.SCR6R9"),
    ObjSearch(.spine_muscle_folder_side + ".Subcostalis.SCR7R10"),
    ObjSearch(.spine_muscle_folder_side + ".Subcostalis.SCR7R9"),
    ObjSearch(.spine_muscle_folder_side + ".Subcostalis.SCR8R10")
),
arrcat(
    ObjSearch(.spine_muscle_folder_side + ".Subcostalis.SCR8R11"),
    ObjSearch(.spine_muscle_folder_side + ".Subcostalis.SCR9R11"),
    ObjSearch(.spine_muscle_folder_side + ".ThoracicMultifidi.MFL1T8"),
    ObjSearch(.spine_muscle_folder_side + ".ThoracicMultifidi.MFT10T5"),
    ObjSearch(.spine_muscle_folder_side + ".ThoracicMultifidi.MFT10T6"),
    ObjSearch(.spine_muscle_folder_side + ".ThoracicMultifidi.MFT10T7"),
    ObjSearch(.spine_muscle_folder_side + ".ThoracicMultifidi.MFT11T6"),
    ObjSearch(.spine_muscle_folder_side + ".ThoracicMultifidi.MFT11T7"),
    ObjSearch(.spine_muscle_folder_side + ".ThoracicMultifidi.MFT11T8"),
    ObjSearch(.spine_muscle_folder_side + ".ThoracicMultifidi.MFT12T7")
),
arrcat(
    ObjSearch(.spine_muscle_folder_side + ".ThoracicMultifidi.MFT12T8"),
    ObjSearch(.spine_muscle_folder_side + ".ThoracicMultifidi.MFT9T4"),
    ObjSearch(.spine_muscle_folder_side + ".ThoracicMultifidi.MFT9T5"),
    ObjSearch(.spine_muscle_folder_side + ".ThoracicMultifidi.MFT9T6")
)
)
);
};

AnyFolder T7T8Jnt = {
  AnyObjectPtr ListFlexors = arrcat(
arrcat(
arrcat(
    ObjSearch(.spine_muscle_folder_side + ".Diaphragm.CC_DiaphragmNode1"),
    ObjSearch(.spine_muscle_folder_side + ".Diaphragm.CC_DiaphragmNode2"),
    ObjSearch(.spine_muscle_folder_side + ".Diaphragm.CC_DiaphragmNode3"),
    ObjSearch(.spine_muscle_folder_side + ".Diaphragm.CC_DiaphragmNode4"),
    ObjSearch(.spine_muscle_folder_side + ".Diaphragm.CC_DiaphragmNode5"),
    ObjSearch(.spine_muscle_folder_side + ".Diaphragm.CC_DiaphragmNode6"),
    ObjSearch(.spine_muscle_folder_side + ".Diaphragm.CC_DiaphragmNode7"),
    ObjSearch(.spine_muscle_folder_side + ".Diaphragm.L1TransverseProcess_Diaphragm"),
    ObjSearch(.spine_muscle_folder_side + ".Diaphragm.L1_Diaphragm1"),
    ObjSearch(.spine_muscle_folder_side + ".Diaphragm.L1_Diaphragm2")
),
arrcat(
    ObjSearch(.spine_muscle_folder_side + ".Diaphragm.L2_Diaphragm1"),
    ObjSearch(.spine_muscle_folder_side + ".Diaphragm.L2_Diaphragm2"),
    ObjSearch(.spine_muscle_folder_side + ".Diaphragm.R12_Diaphragm1"),
    ObjSearch(.spine_muscle_folder_side + ".Diaphragm.R12_Diaphragm2"),
    ObjSearch(.spine_muscle_folder_side + ".Diaphragm.Xiphoid_Diaphragm"),
    ObjSearch(.spine_muscle_folder_side + ".ErectorSpinae.ILptC12CI"),
    ObjSearch(.spine_muscle_folder_side + ".ExternalInterCostalis.IC_Ext_R1R2.elem2"),
    ObjSearch(.spine_muscle_folder_side + ".ExternalInterCostalis.IC_Ext_R1R2.elem3"),
    ObjSearch(.spine_muscle_folder_side + ".ExternalInterCostalis.IC_Ext_R1R2.elem4"),
    ObjSearch(.spine_muscle_folder_side + ".ExternalInterCostalis.IC_Ext_R1R2.elem5")
),
arrcat(
    ObjSearch(.spine_muscle_folder_side + ".ExternalInterCostalis.IC_Ext_R1R2.elem6"),
    ObjSearch(.spine_muscle_folder_side + ".ExternalInterCostalis.IC_Ext_R1R2.elem7"),
    ObjSearch(.spine_muscle_folder_side + ".ExternalInterCostalis.IC_Ext_R2R3.elem4"),
    ObjSearch(.spine_muscle_folder_side + ".ExternalInterCostalis.IC_Ext_R2R3.elem5"),
    ObjSearch(.spine_muscle_folder_side + ".ExternalInterCostalis.IC_Ext_R2R3.elem6"),
    ObjSearch(.spine_muscle_folder_side + ".ExternalInterCostalis.IC_Ext_R2R3.elem7"),
    ObjSearch(.spine_muscle_folder_side + ".ExternalInterCostalis.IC_Ext_R3R4.elem4"),
    ObjSearch(.spine_muscle_folder_side + ".ExternalInterCostalis.IC_Ext_R3R4.elem5"),
    ObjSearch(.spine_muscle_folder_side + ".ExternalInterCostalis.IC_Ext_R3R4.elem6"),
    ObjSearch(.spine_muscle_folder_side + ".ExternalInterCostalis.IC_Ext_R3R4.elem7")
),
arrcat(
    ObjSearch(.spine_muscle_folder_side + ".ExternalInterCostalis.IC_Ext_R4R5.elem5"),
    ObjSearch(.spine_muscle_folder_side + ".ExternalInterCostalis.IC_Ext_R4R5.elem6"),
    ObjSearch(.spine_muscle_folder_side + ".ExternalInterCostalis.IC_Ext_R4R5.elem7"),
    ObjSearch(.spine_muscle_folder_side + ".ExternalInterCostalis.IC_Ext_R5R6.elem6"),
    ObjSearch(.spine_muscle_folder_side + ".ExternalInterCostalis.IC_Ext_R5R6.elem7"),
    ObjSearch(.spine_muscle_folder_side + ".ExternalInterCostalis.IC_Ext_R6R7.elem7"),
    ObjSearch(.spine_muscle_folder_side + ".ExternalInterCostalis.IC_Ext_R8R9.elem1"),
    ObjSearch(.spine_muscle_folder_side + ".ExternalInterCostalis.IC_Ext_R9R10.elem1"),
    ObjSearch(.spine_muscle_folder_side + ".Hyoid.LumpedHyoidStC0"),
    ObjSearch(.spine_muscle_folder_side + ".InnermostInterCostalis.IC_Inn_R10R11.elem5")
),
arrcat(
    ObjSearch(.spine_muscle_folder_side + ".InnermostInterCostalis.IC_Inn_R10R11.elem6"),
    ObjSearch(.spine_muscle_folder_side + ".InnermostInterCostalis.IC_Inn_R11R12.elem1"),
    ObjSearch(.spine_muscle_folder_side + ".InnermostInterCostalis.IC_Inn_R11R12.elem2"),
    ObjSearch(.spine_muscle_folder_side + ".InnermostInterCostalis.IC_Inn_R1R2.elem2"),
    ObjSearch(.spine_muscle_folder_side + ".InnermostInterCostalis.IC_Inn_R1R2.elem3"),
    ObjSearch(.spine_muscle_folder_side + ".InnermostInterCostalis.IC_Inn_R1R2.elem4"),
    ObjSearch(.spine_muscle_folder_side + ".InnermostInterCostalis.IC_Inn_R1R2.elem5"),
    ObjSearch(.spine_muscle_folder_side + ".InnermostInterCostalis.IC_Inn_R1R2.elem6"),
    ObjSearch(.spine_muscle_folder_side + ".InnermostInterCostalis.IC_Inn_R2R3.elem5"),
    ObjSearch(.spine_muscle_folder_side + ".InnermostInterCostalis.IC_Inn_R2R3.elem6")
),
arrcat(
    ObjSearch(.spine_muscle_folder_side + ".InnermostInterCostalis.IC_Inn_R2R3.elem7"),
    ObjSearch(.spine_muscle_folder_side + ".InnermostInterCostalis.IC_Inn_R2R3.elem8"),
    ObjSearch(.spine_muscle_folder_side + ".InnermostInterCostalis.IC_Inn_R2R3.elem9"),
    ObjSearch(.spine_muscle_folder_side + ".InnermostInterCostalis.IC_Inn_R3R4.elem5"),
    ObjSearch(.spine_muscle_folder_side + ".InnermostInterCostalis.IC_Inn_R3R4.elem6"),
    ObjSearch(.spine_muscle_folder_side + ".InnermostInterCostalis.IC_Inn_R3R4.elem7"),
    ObjSearch(.spine_muscle_folder_side + ".InnermostInterCostalis.IC_Inn_R3R4.elem8"),
    ObjSearch(.spine_muscle_folder_side + ".InnermostInterCostalis.IC_Inn_R3R4.elem9"),
    ObjSearch(.spine_muscle_folder_side + ".InnermostInterCostalis.IC_Inn_R4R5.elem7"),
    ObjSearch(.spine_muscle_folder_side + ".InnermostInterCostalis.IC_Inn_R4R5.elem8")
),
arrcat(
    ObjSearch(.spine_muscle_folder_side + ".InnermostInterCostalis.IC_Inn_R4R5.elem9"),
    ObjSearch(.spine_muscle_folder_side + ".InnermostInterCostalis.IC_Inn_R5R6.elem8"),
    ObjSearch(.spine_muscle_folder_side + ".InnermostInterCostalis.IC_Inn_R5R6.elem9"),
    ObjSearch(.spine_muscle_folder_side + ".InnermostInterCostalis.IC_Inn_R6R7.elem9"),
    ObjSearch(.spine_muscle_folder_side + ".InternalInterCostalis.IC_Int_R10R11.elem2"),
    ObjSearch(.spine_muscle_folder_side + ".InternalInterCostalis.IC_Int_R10R11.elem3"),
    ObjSearch(.spine_muscle_folder_side + ".InternalInterCostalis.IC_Int_R10R11.elem4"),
    ObjSearch(.spine_muscle_folder_side + ".InternalInterCostalis.IC_Int_R10R11.elem5"),
    ObjSearch(.spine_muscle_folder_side + ".InternalInterCostalis.IC_Int_R10R11.elem6"),
    ObjSearch(.spine_muscle_folder_side + ".InternalInterCostalis.IC_Int_R11R12.elem1")
),
arrcat(
    ObjSearch(.spine_muscle_folder_side + ".InternalInterCostalis.IC_Int_R11R12.elem2"),
    ObjSearch(.spine_muscle_folder_side + ".InternalInterCostalis.IC_Int_R1R2.elem1"),
    ObjSearch(.spine_muscle_folder_side + ".InternalInterCostalis.IC_Int_R1R2.elem2"),
    ObjSearch(.spine_muscle_folder_side + ".InternalInterCostalis.IC_Int_R1R2.elem3"),
    ObjSearch(.spine_muscle_folder_side + ".InternalInterCostalis.IC_Int_R1R2.elem4"),
    ObjSearch(.spine_muscle_folder_side + ".InternalInterCostalis.IC_Int_R2R3.elem4"),
    ObjSearch(.spine_muscle_folder_side + ".InternalInterCostalis.IC_Int_R2R3.elem5"),
    ObjSearch(.spine_muscle_folder_side + ".InternalInterCostalis.IC_Int_R2R3.elem6"),
    ObjSearch(.spine_muscle_folder_side + ".InternalInterCostalis.IC_Int_R2R3.elem7"),
    ObjSearch(.spine_muscle_folder_side + ".InternalInterCostalis.IC_Int_R3R4.elem5")
),
arrcat(
    ObjSearch(.spine_muscle_folder_side + ".InternalInterCostalis.IC_Int_R3R4.elem6"),
    ObjSearch(.spine_muscle_folder_side + ".InternalInterCostalis.IC_Int_R3R4.elem7"),
    ObjSearch(.spine_muscle_folder_side + ".InternalInterCostalis.IC_Int_R3R4.elem_sternum"),
    ObjSearch(.spine_muscle_folder_side + ".InternalInterCostalis.IC_Int_R4R5.elem6"),
    ObjSearch(.spine_muscle_folder_side + ".InternalInterCostalis.IC_Int_R4R5.elem7"),
    ObjSearch(.spine_muscle_folder_side + ".InternalInterCostalis.IC_Int_R4R5.elem_sternum"),
    ObjSearch(.spine_muscle_folder_side + ".InternalInterCostalis.IC_Int_R5R6.elem_sternum"),
    ObjSearch(.spine_muscle_folder_side + ".InternalInterCostalis.IC_Int_R6R7.elem_sternum"),
    ObjSearch(.spine_muscle_folder_side + ".InternalInterCostalis.IC_Int_R7R8.elem_sternum"),
    ObjSearch(.spine_muscle_folder_side + ".InternalInterCostalis.IC_Int_R8R9.elem_sternum")
),
arrcat(
    ObjSearch(.spine_muscle_folder_side + ".InternalInterCostalis.IC_Int_R9R10.elem1"),
    ObjSearch(.spine_muscle_folder_side + ".InternalInterCostalis.IC_Int_R9R10.elem2"),
    ObjSearch(.spine_muscle_folder_side + ".InternalInterCostalis.IC_Int_R9R10.elem3"),
    ObjSearch(.spine_muscle_folder_side + ".InternalInterCostalis.IC_Int_R9R10.elem4"),
    ObjSearch(.spine_muscle_folder_side + ".InternalInterCostalis.IC_Int_R9R10.elem5"),
    ObjSearch(.spine_muscle_folder_side + ".InternalInterCostalis.IC_Int_R9R10.elem6"),
    ObjSearch(.spine_muscle_folder_side + ".InternalInterCostalis.IC_Int_R9R10.elem7"),
    ObjSearch(.spine_muscle_folder_side + ".InternalInterCostalis.IC_Int_R9R10.elem_sternum"),
    ObjSearch(.spine_muscle_folder_side + ".LevatorCostarum.LCBrT10R11"),
    ObjSearch(.spine_muscle_folder_side + ".LevatorCostarum.LCBrT11R12")
)
),
arrcat(
arrcat(
    ObjSearch(.spine_muscle_folder_side + ".LevatorCostarum.LCBrT8R9"),
    ObjSearch(.spine_muscle_folder_side + ".LevatorCostarum.LCBrT9R10"),
    ObjSearch(.spine_muscle_folder_side + ".LevatorCostarum.LCLgT10R12"),
    ObjSearch(.spine_muscle_folder_side + ".LevatorCostarum.LCLgT8R10"),
    ObjSearch(.spine_muscle_folder_side + ".LevatorCostarum.LCLgT9R11"),
    ObjSearch(.spine_muscle_folder_side + ".ObliquusExternus.OEC_1"),
    ObjSearch(.spine_muscle_folder_side + ".ObliquusExternus.OEC_10"),
    ObjSearch(.spine_muscle_folder_side + ".ObliquusExternus.OEC_11"),
    ObjSearch(.spine_muscle_folder_side + ".ObliquusExternus.OEC_2"),
    ObjSearch(.spine_muscle_folder_side + ".ObliquusExternus.OEC_3")
),
arrcat(
    ObjSearch(.spine_muscle_folder_side + ".ObliquusExternus.OEC_4"),
    ObjSearch(.spine_muscle_folder_side + ".ObliquusExternus.OEC_5"),
    ObjSearch(.spine_muscle_folder_side + ".ObliquusExternus.OEC_6"),
    ObjSearch(.spine_muscle_folder_side + ".ObliquusExternus.OEC_7"),
    ObjSearch(.spine_muscle_folder_side + ".ObliquusExternus.OEC_8"),
    ObjSearch(.spine_muscle_folder_side + ".ObliquusExternus.OEC_9"),
    ObjSearch(.spine_muscle_folder_side + ".ObliquusInternus.OIC_1"),
    ObjSearch(.spine_muscle_folder_side + ".ObliquusInternus.OIC_10"),
    ObjSearch(.spine_muscle_folder_side + ".ObliquusInternus.OIC_11"),
    ObjSearch(.spine_muscle_folder_side + ".ObliquusInternus.OIC_12")
),
arrcat(
    ObjSearch(.spine_muscle_folder_side + ".ObliquusInternus.OIC_13"),
    ObjSearch(.spine_muscle_folder_side + ".ObliquusInternus.OIC_2"),
    ObjSearch(.spine_muscle_folder_side + ".ObliquusInternus.OIC_3"),
    ObjSearch(.spine_muscle_folder_side + ".ObliquusInternus.OIC_4"),
    ObjSearch(.spine_muscle_folder_side + ".ObliquusInternus.OIC_5"),
    ObjSearch(.spine_muscle_folder_side + ".ObliquusInternus.OIC_6"),
    ObjSearch(.spine_muscle_folder_side + ".ObliquusInternus.OIC_7"),
    ObjSearch(.spine_muscle_folder_side + ".ObliquusInternus.OIC_8"),
    ObjSearch(.spine_muscle_folder_side + ".ObliquusInternus.OIC_8_extra"),
    ObjSearch(.spine_muscle_folder_side + ".ObliquusInternus.OIC_9")
),
arrcat(
    ObjSearch(.spine_muscle_folder_side + ".QuadratusLumborum.QLC12Lat_L4"),
    ObjSearch(.spine_muscle_folder_side + ".RectusAbdominis.RA_1"),
    ObjSearch(.spine_muscle_folder_side + ".RectusAbdominis.RA_2"),
    ObjSearch(.spine_muscle_folder_side + ".Scalenus.ScalenusPosteriorR2C5"),
    ObjSearch(.spine_muscle_folder_side + ".Scalenus.ScalenusPosteriorR2C6"),
    ObjSearch(.spine_muscle_folder_side + ".Scalenus.ScalenusPosteriorR2C7"),
    ObjSearch(.spine_muscle_folder_side + ".SerratusPosteriorInferior.SPIL1R11"),
    ObjSearch(.spine_muscle_folder_side + ".SerratusPosteriorInferior.SPIL2R12"),
    ObjSearch(.spine_muscle_folder_side + ".SerratusPosteriorInferior.SPIT11R9"),
    ObjSearch(.spine_muscle_folder_side + ".SerratusPosteriorInferior.SPIT12R10")
),
arrcat(
    ObjSearch(.spine_muscle_folder_side + ".TransversusThoracis.TrThR2R4S"),
    ObjSearch(.spine_muscle_folder_side + ".TransversusThoracis.TrThR2S"),
    ObjSearch(.spine_muscle_folder_side + ".TransversusThoracis.TrThR3R5S"),
    ObjSearch(.spine_muscle_folder_side + ".TransversusThoracis.TrThR4R6S"),
    ObjSearch(.spine_muscle_folder_side + ".TransversusThoracis.TrThR5R7S"),
    ObjSearch(.spine_muscle_folder_side + ".TransversusThoracis.TrThR6S"),
    ObjSearch(.spine_muscle_folder_side + ".TransversusThoracis.TrThR7S"),
    ObjSearch(.spine_muscle_folder_side + ".TransversusThoracis.TrThR8S")
)
)
);
  AnyObjectPtr ListExtensors = arrcat(
arrcat(
arrcat(
    ObjSearch(.spine_muscle_folder_side + ".Diaphragm.R10_Diaphragm1"),
    ObjSearch(.spine_muscle_folder_side + ".Diaphragm.R10_Diaphragm2"),
    ObjSearch(.spine_muscle_folder_side + ".Diaphragm.R10_Diaphragm3"),
    ObjSearch(.spine_muscle_folder_side + ".Diaphragm.R11_Diaphragm1"),
    ObjSearch(.spine_muscle_folder_side + ".Diaphragm.R11_Diaphragm2"),
    ObjSearch(.spine_muscle_folder_side + ".Diaphragm.R11_Diaphragm3"),
    ObjSearch(.spine_muscle_folder_side + ".ErectorSpinae.ILptC5SIPS"),
    ObjSearch(.spine_muscle_folder_side + ".ErectorSpinae.ILptC6SIPS"),
    ObjSearch(.spine_muscle_folder_side + ".ErectorSpinae.ILptC7CI"),
    ObjSearch(.spine_muscle_folder_side + ".ErectorSpinae.ILptC8CI")
),
arrcat(
    ObjSearch(.spine_muscle_folder_side + ".ErectorSpinae.ITC7R7"),
    ObjSearch(.spine_muscle_folder_side + ".ErectorSpinae.ITR1R7"),
    ObjSearch(.spine_muscle_folder_side + ".ErectorSpinae.ITR2R8"),
    ObjSearch(.spine_muscle_folder_side + ".ErectorSpinae.ITR3R9"),
    ObjSearch(.spine_muscle_folder_side + ".ErectorSpinae.ITR4R10"),
    ObjSearch(.spine_muscle_folder_side + ".ErectorSpinae.ITR5R11"),
    ObjSearch(.spine_muscle_folder_side + ".ErectorSpinae.ITR6R12"),
    ObjSearch(.spine_muscle_folder_side + ".ErectorSpinae.LTptC10Sacrum"),
    ObjSearch(.spine_muscle_folder_side + ".ErectorSpinae.LTptC3L3"),
    ObjSearch(.spine_muscle_folder_side + ".ErectorSpinae.LTptC4L4")
),
arrcat(
    ObjSearch(.spine_muscle_folder_side + ".ErectorSpinae.LTptC5L5"),
    ObjSearch(.spine_muscle_folder_side + ".ErectorSpinae.LTptC6S1"),
    ObjSearch(.spine_muscle_folder_side + ".ErectorSpinae.LTptC7S2"),
    ObjSearch(.spine_muscle_folder_side + ".ErectorSpinae.LTptC8S3"),
    ObjSearch(.spine_muscle_folder_side + ".ErectorSpinae.LTptC9S4"),
    ObjSearch(.spine_muscle_folder_side + ".ErectorSpinae.LTptT10Sacrum"),
    ObjSearch(.spine_muscle_folder_side + ".ErectorSpinae.LTptT11Sacrum"),
    ObjSearch(.spine_muscle_folder_side + ".ErectorSpinae.LTptT1L1"),
    ObjSearch(.spine_muscle_folder_side + ".ErectorSpinae.LTptT2L2"),
    ObjSearch(.spine_muscle_folder_side + ".ErectorSpinae.LTptT3L3")
),
arrcat(
    ObjSearch(.spine_muscle_folder_side + ".ErectorSpinae.LTptT4L4"),
    ObjSearch(.spine_muscle_folder_side + ".ErectorSpinae.LTptT5L5"),
    ObjSearch(.spine_muscle_folder_side + ".ErectorSpinae.LTptT6S1"),
    ObjSearch(.spine_muscle_folder_side + ".ErectorSpinae.LTptT7S2"),
    ObjSearch(.spine_muscle_folder_side + ".ErectorSpinae.LTptT8S3"),
    ObjSearch(.spine_muscle_folder_side + ".ErectorSpinae.LTptT9S4"),
    ObjSearch(.spine_muscle_folder_side + ".ExternalInterCostalis.IC_Ext_R10R11.elem1"),
    ObjSearch(.spine_muscle_folder_side + ".ExternalInterCostalis.IC_Ext_R10R11.elem2"),
    ObjSearch(.spine_muscle_folder_side + ".ExternalInterCostalis.IC_Ext_R10R11.elem3"),
    ObjSearch(.spine_muscle_folder_side + ".ExternalInterCostalis.IC_Ext_R10R11.elem4")
),
arrcat(
    ObjSearch(.spine_muscle_folder_side + ".ExternalInterCostalis.IC_Ext_R10R11.elem5"),
    ObjSearch(.spine_muscle_folder_side + ".ExternalInterCostalis.IC_Ext_R10R11.elem6"),
    ObjSearch(.spine_muscle_folder_side + ".ExternalInterCostalis.IC_Ext_R11R12.elem2"),
    ObjSearch(.spine_muscle_folder_side + ".ExternalInterCostalis.IC_Ext_R6R7.elem1"),
    ObjSearch(.spine_muscle_folder_side + ".ExternalInterCostalis.IC_Ext_R6R7.elem2"),
    ObjSearch(.spine_muscle_folder_side + ".ExternalInterCostalis.IC_Ext_R6R7.elem3"),
    ObjSearch(.spine_muscle_folder_side + ".ExternalInterCostalis.IC_Ext_R6R7.elem4"),
    ObjSearch(.spine_muscle_folder_side + ".ExternalInterCostalis.IC_Ext_R6R7.elem5"),
    ObjSearch(.spine_muscle_folder_side + ".ExternalInterCostalis.IC_Ext_R7R8.elem1"),
    ObjSearch(.spine_muscle_folder_side + ".ExternalInterCostalis.IC_Ext_R7R8.elem2")
),
arrcat(
    ObjSearch(.spine_muscle_folder_side + ".ExternalInterCostalis.IC_Ext_R7R8.elem3"),
    ObjSearch(.spine_muscle_folder_side + ".ExternalInterCostalis.IC_Ext_R7R8.elem4"),
    ObjSearch(.spine_muscle_folder_side + ".ExternalInterCostalis.IC_Ext_R7R8.elem5"),
    ObjSearch(.spine_muscle_folder_side + ".ExternalInterCostalis.IC_Ext_R7R8.elem6"),
    ObjSearch(.spine_muscle_folder_side + ".ExternalInterCostalis.IC_Ext_R7R8.elem7"),
    ObjSearch(.spine_muscle_folder_side + ".ExternalInterCostalis.IC_Ext_R8R9.elem2"),
    ObjSearch(.spine_muscle_folder_side + ".ExternalInterCostalis.IC_Ext_R8R9.elem3"),
    ObjSearch(.spine_muscle_folder_side + ".ExternalInterCostalis.IC_Ext_R8R9.elem4"),
    ObjSearch(.spine_muscle_folder_side + ".ExternalInterCostalis.IC_Ext_R8R9.elem5"),
    ObjSearch(.spine_muscle_folder_side + ".ExternalInterCostalis.IC_Ext_R8R9.elem6")
),
arrcat(
    ObjSearch(.spine_muscle_folder_side + ".ExternalInterCostalis.IC_Ext_R8R9.elem7"),
    ObjSearch(.spine_muscle_folder_side + ".ExternalInterCostalis.IC_Ext_R9R10.elem3"),
    ObjSearch(.spine_muscle_folder_side + ".ExternalInterCostalis.IC_Ext_R9R10.elem4"),
    ObjSearch(.spine_muscle_folder_side + ".ExternalInterCostalis.IC_Ext_R9R10.elem5"),
    ObjSearch(.spine_muscle_folder_side + ".ExternalInterCostalis.IC_Ext_R9R10.elem6"),
    ObjSearch(.spine_muscle_folder_side + ".ExternalInterCostalis.IC_Ext_R9R10.elem7"),
    ObjSearch(.spine_muscle_folder_side + ".InnermostInterCostalis.IC_Inn_R10R11.elem1"),
    ObjSearch(.spine_muscle_folder_side + ".InnermostInterCostalis.IC_Inn_R4R5.elem2"),
    ObjSearch(.spine_muscle_folder_side + ".InnermostInterCostalis.IC_Inn_R4R5.elem3"),
    ObjSearch(.spine_muscle_folder_side + ".InnermostInterCostalis.IC_Inn_R5R6.elem1")
),
arrcat(
    ObjSearch(.spine_muscle_folder_side + ".InnermostInterCostalis.IC_Inn_R5R6.elem2"),
    ObjSearch(.spine_muscle_folder_side + ".InnermostInterCostalis.IC_Inn_R5R6.elem3"),
    ObjSearch(.spine_muscle_folder_side + ".InnermostInterCostalis.IC_Inn_R5R6.elem4"),
    ObjSearch(.spine_muscle_folder_side + ".InnermostInterCostalis.IC_Inn_R5R6.elem5"),
    ObjSearch(.spine_muscle_folder_side + ".InnermostInterCostalis.IC_Inn_R5R6.elem6"),
    ObjSearch(.spine_muscle_folder_side + ".InnermostInterCostalis.IC_Inn_R6R7.elem1"),
    ObjSearch(.spine_muscle_folder_side + ".InnermostInterCostalis.IC_Inn_R6R7.elem2"),
    ObjSearch(.spine_muscle_folder_side + ".InnermostInterCostalis.IC_Inn_R6R7.elem3"),
    ObjSearch(.spine_muscle_folder_side + ".InnermostInterCostalis.IC_Inn_R6R7.elem4"),
    ObjSearch(.spine_muscle_folder_side + ".InnermostInterCostalis.IC_Inn_R6R7.elem5")
),
arrcat(
    ObjSearch(.spine_muscle_folder_side + ".InnermostInterCostalis.IC_Inn_R6R7.elem6"),
    ObjSearch(.spine_muscle_folder_side + ".InnermostInterCostalis.IC_Inn_R6R7.elem7"),
    ObjSearch(.spine_muscle_folder_side + ".InnermostInterCostalis.IC_Inn_R7R8.elem1"),
    ObjSearch(.spine_muscle_folder_side + ".InnermostInterCostalis.IC_Inn_R7R8.elem2"),
    ObjSearch(.spine_muscle_folder_side + ".InnermostInterCostalis.IC_Inn_R7R8.elem3"),
    ObjSearch(.spine_muscle_folder_side + ".InnermostInterCostalis.IC_Inn_R7R8.elem4"),
    ObjSearch(.spine_muscle_folder_side + ".InnermostInterCostalis.IC_Inn_R7R8.elem5"),
    ObjSearch(.spine_muscle_folder_side + ".InnermostInterCostalis.IC_Inn_R7R8.elem6"),
    ObjSearch(.spine_muscle_folder_side + ".InnermostInterCostalis.IC_Inn_R7R8.elem7"),
    ObjSearch(.spine_muscle_folder_side + ".InnermostInterCostalis.IC_Inn_R7R8.elem8")
),
arrcat(
    ObjSearch(.spine_muscle_folder_side + ".InnermostInterCostalis.IC_Inn_R7R8.elem9"),
    ObjSearch(.spine_muscle_folder_side + ".InnermostInterCostalis.IC_Inn_R8R9.elem1"),
    ObjSearch(.spine_muscle_folder_side + ".InnermostInterCostalis.IC_Inn_R8R9.elem2"),
    ObjSearch(.spine_muscle_folder_side + ".InnermostInterCostalis.IC_Inn_R8R9.elem3"),
    ObjSearch(.spine_muscle_folder_side + ".InnermostInterCostalis.IC_Inn_R8R9.elem4"),
    ObjSearch(.spine_muscle_folder_side + ".InnermostInterCostalis.IC_Inn_R8R9.elem5"),
    ObjSearch(.spine_muscle_folder_side + ".InnermostInterCostalis.IC_Inn_R8R9.elem6"),
    ObjSearch(.spine_muscle_folder_side + ".InnermostInterCostalis.IC_Inn_R8R9.elem7"),
    ObjSearch(.spine_muscle_folder_side + ".InnermostInterCostalis.IC_Inn_R8R9.elem8"),
    ObjSearch(.spine_muscle_folder_side + ".InnermostInterCostalis.IC_Inn_R8R9.elem9")
)
),
arrcat(
arrcat(
    ObjSearch(.spine_muscle_folder_side + ".InnermostInterCostalis.IC_Inn_R9R10.elem3"),
    ObjSearch(.spine_muscle_folder_side + ".InnermostInterCostalis.IC_Inn_R9R10.elem4"),
    ObjSearch(.spine_muscle_folder_side + ".InnermostInterCostalis.IC_Inn_R9R10.elem5"),
    ObjSearch(.spine_muscle_folder_side + ".InnermostInterCostalis.IC_Inn_R9R10.elem6"),
    ObjSearch(.spine_muscle_folder_side + ".InternalInterCostalis.IC_Int_R1R2.elem_sternum"),
    ObjSearch(.spine_muscle_folder_side + ".InternalInterCostalis.IC_Int_R2R3.elem1"),
    ObjSearch(.spine_muscle_folder_side + ".InternalInterCostalis.IC_Int_R3R4.elem1"),
    ObjSearch(.spine_muscle_folder_side + ".InternalInterCostalis.IC_Int_R3R4.elem2"),
    ObjSearch(.spine_muscle_folder_side + ".InternalInterCostalis.IC_Int_R3R4.elem3"),
    ObjSearch(.spine_muscle_folder_side + ".InternalInterCostalis.IC_Int_R4R5.elem1")
),
arrcat(
    ObjSearch(.spine_muscle_folder_side + ".InternalInterCostalis.IC_Int_R4R5.elem2"),
    ObjSearch(.spine_muscle_folder_side + ".InternalInterCostalis.IC_Int_R4R5.elem3"),
    ObjSearch(.spine_muscle_folder_side + ".InternalInterCostalis.IC_Int_R4R5.elem4"),
    ObjSearch(.spine_muscle_folder_side + ".InternalInterCostalis.IC_Int_R5R6.elem1"),
    ObjSearch(.spine_muscle_folder_side + ".InternalInterCostalis.IC_Int_R5R6.elem2"),
    ObjSearch(.spine_muscle_folder_side + ".InternalInterCostalis.IC_Int_R5R6.elem3"),
    ObjSearch(.spine_muscle_folder_side + ".InternalInterCostalis.IC_Int_R5R6.elem4"),
    ObjSearch(.spine_muscle_folder_side + ".InternalInterCostalis.IC_Int_R5R6.elem5"),
    ObjSearch(.spine_muscle_folder_side + ".InternalInterCostalis.IC_Int_R6R7.elem1"),
    ObjSearch(.spine_muscle_folder_side + ".InternalInterCostalis.IC_Int_R6R7.elem2")
),
arrcat(
    ObjSearch(.spine_muscle_folder_side + ".InternalInterCostalis.IC_Int_R6R7.elem3"),
    ObjSearch(.spine_muscle_folder_side + ".InternalInterCostalis.IC_Int_R6R7.elem4"),
    ObjSearch(.spine_muscle_folder_side + ".InternalInterCostalis.IC_Int_R6R7.elem5"),
    ObjSearch(.spine_muscle_folder_side + ".InternalInterCostalis.IC_Int_R6R7.elem6"),
    ObjSearch(.spine_muscle_folder_side + ".InternalInterCostalis.IC_Int_R7R8.elem1"),
    ObjSearch(.spine_muscle_folder_side + ".InternalInterCostalis.IC_Int_R7R8.elem2"),
    ObjSearch(.spine_muscle_folder_side + ".InternalInterCostalis.IC_Int_R7R8.elem3"),
    ObjSearch(.spine_muscle_folder_side + ".InternalInterCostalis.IC_Int_R7R8.elem4"),
    ObjSearch(.spine_muscle_folder_side + ".InternalInterCostalis.IC_Int_R7R8.elem5"),
    ObjSearch(.spine_muscle_folder_side + ".InternalInterCostalis.IC_Int_R7R8.elem6")
),
arrcat(
    ObjSearch(.spine_muscle_folder_side + ".InternalInterCostalis.IC_Int_R7R8.elem7"),
    ObjSearch(.spine_muscle_folder_side + ".LevatorCostarum.LCBrT2R3"),
    ObjSearch(.spine_muscle_folder_side + ".LevatorCostarum.LCBrT3R4"),
    ObjSearch(.spine_muscle_folder_side + ".LevatorCostarum.LCBrT4R5"),
    ObjSearch(.spine_muscle_folder_side + ".LevatorCostarum.LCBrT5R6"),
    ObjSearch(.spine_muscle_folder_side + ".LevatorCostarum.LCBrT6R7"),
    ObjSearch(.spine_muscle_folder_side + ".LevatorCostarum.LCBrT7R8"),
    ObjSearch(.spine_muscle_folder_side + ".LevatorCostarum.LCLgT5R7"),
    ObjSearch(.spine_muscle_folder_side + ".LevatorCostarum.LCLgT6R8"),
    ObjSearch(.spine_muscle_folder_side + ".LevatorCostarum.LCLgT7R9")
),
arrcat(
    ObjSearch(.spine_muscle_folder_side + ".QuadratusLumborum.QLC12InterMedian_CIInterMedian"),
    ObjSearch(.spine_muscle_folder_side + ".QuadratusLumborum.QLC12InterMedian_L2"),
    ObjSearch(.spine_muscle_folder_side + ".QuadratusLumborum.QLC12InterMedian_L3"),
    ObjSearch(.spine_muscle_folder_side + ".QuadratusLumborum.QLC12Median_CIInterMedian"),
    ObjSearch(.spine_muscle_folder_side + ".QuadratusLumborum.QLC12Median_CILat"),
    ObjSearch(.spine_muscle_folder_side + ".QuadratusLumborum.QLC12Median_L2"),
    ObjSearch(.spine_muscle_folder_side + ".QuadratusLumborum.QLC12Median_L3"),
    ObjSearch(.spine_muscle_folder_side + ".QuadratusLumborum.QLC12Median_L4"),
    ObjSearch(.spine_muscle_folder_side + ".RotatoresBrevis.RotatoresBrevisT8T7"),
    ObjSearch(.spine_muscle_folder_side + ".RotatoresLongus.RotatoresLongusT8T6")
),
arrcat(
    ObjSearch(.spine_muscle_folder_side + ".RotatoresLongus.RotatoresLongusT9T7"),
    ObjSearch(.spine_muscle_folder_side + ".SemispinalisThoracis.SSTT10T2"),
    ObjSearch(.spine_muscle_folder_side + ".SemispinalisThoracis.SSTT11T3"),
    ObjSearch(.spine_muscle_folder_side + ".SemispinalisThoracis.SSTT12T4"),
    ObjSearch(.spine_muscle_folder_side + ".SemispinalisThoracis.SSTT8C7"),
    ObjSearch(.spine_muscle_folder_side + ".SemispinalisThoracis.SSTT9T1"),
    ObjSearch(.spine_muscle_folder_side + ".SerratusPosteriorSuperior.SPSR5T3"),
    ObjSearch(.spine_muscle_folder_side + ".Subcostalis.SCR1R3"),
    ObjSearch(.spine_muscle_folder_side + ".Subcostalis.SCR1R4"),
    ObjSearch(.spine_muscle_folder_side + ".Subcostalis.SCR2R4")
),
arrcat(
    ObjSearch(.spine_muscle_folder_side + ".Subcostalis.SCR2R5"),
    ObjSearch(.spine_muscle_folder_side + ".Subcostalis.SCR3R6"),
    ObjSearch(.spine_muscle_folder_side + ".Subcostalis.SCR4R7"),
    ObjSearch(.spine_muscle_folder_side + ".Subcostalis.SCR5R7"),
    ObjSearch(.spine_muscle_folder_side + ".Subcostalis.SCR5R8"),
    ObjSearch(.spine_muscle_folder_side + ".Subcostalis.SCR6R8"),
    ObjSearch(.spine_muscle_folder_side + ".Subcostalis.SCR6R9"),
    ObjSearch(.spine_muscle_folder_side + ".Subcostalis.SCR7R10"),
    ObjSearch(.spine_muscle_folder_side + ".Subcostalis.SCR7R9"),
    ObjSearch(.spine_muscle_folder_side + ".Subcostalis.SCR8R11")
),
arrcat(
    ObjSearch(.spine_muscle_folder_side + ".Subcostalis.SCR9R11"),
    ObjSearch(.spine_muscle_folder_side + ".ThoracicMultifidi.MFT10T5"),
    ObjSearch(.spine_muscle_folder_side + ".ThoracicMultifidi.MFT10T6"),
    ObjSearch(.spine_muscle_folder_side + ".ThoracicMultifidi.MFT10T7"),
    ObjSearch(.spine_muscle_folder_side + ".ThoracicMultifidi.MFT11T6"),
    ObjSearch(.spine_muscle_folder_side + ".ThoracicMultifidi.MFT11T7"),
    ObjSearch(.spine_muscle_folder_side + ".ThoracicMultifidi.MFT12T7"),
    ObjSearch(.spine_muscle_folder_side + ".ThoracicMultifidi.MFT8T3"),
    ObjSearch(.spine_muscle_folder_side + ".ThoracicMultifidi.MFT8T4"),
    ObjSearch(.spine_muscle_folder_side + ".ThoracicMultifidi.MFT8T5")
),
arrcat(
    ObjSearch(.spine_muscle_folder_side + ".ThoracicMultifidi.MFT9T4"),
    ObjSearch(.spine_muscle_folder_side + ".ThoracicMultifidi.MFT9T5"),
    ObjSearch(.spine_muscle_folder_side + ".ThoracicMultifidi.MFT9T6"),
    ObjSearch(.spine_muscle_folder_side + ".TransversusThoracis.TrThR10S"),
    ObjSearch(.spine_muscle_folder_side + ".TransversusThoracis.TrThR9S")
)
)
);
};

AnyFolder T6T7Jnt = {
  AnyObjectPtr ListFlexors = arrcat(
arrcat(
arrcat(
    ObjSearch(.spine_muscle_folder_side + ".Diaphragm.CC_DiaphragmNode1"),
    ObjSearch(.spine_muscle_folder_side + ".Diaphragm.CC_DiaphragmNode2"),
    ObjSearch(.spine_muscle_folder_side + ".Diaphragm.CC_DiaphragmNode3"),
    ObjSearch(.spine_muscle_folder_side + ".Diaphragm.CC_DiaphragmNode4"),
    ObjSearch(.spine_muscle_folder_side + ".Diaphragm.CC_DiaphragmNode5"),
    ObjSearch(.spine_muscle_folder_side + ".Diaphragm.CC_DiaphragmNode6"),
    ObjSearch(.spine_muscle_folder_side + ".Diaphragm.CC_DiaphragmNode7"),
    ObjSearch(.spine_muscle_folder_side + ".Diaphragm.L1TransverseProcess_Diaphragm"),
    ObjSearch(.spine_muscle_folder_side + ".Diaphragm.L1_Diaphragm1"),
    ObjSearch(.spine_muscle_folder_side + ".Diaphragm.L1_Diaphragm2")
),
arrcat(
    ObjSearch(.spine_muscle_folder_side + ".Diaphragm.L2_Diaphragm1"),
    ObjSearch(.spine_muscle_folder_side + ".Diaphragm.L2_Diaphragm2"),
    ObjSearch(.spine_muscle_folder_side + ".Diaphragm.R12_Diaphragm1"),
    ObjSearch(.spine_muscle_folder_side + ".Diaphragm.R12_Diaphragm2"),
    ObjSearch(.spine_muscle_folder_side + ".Diaphragm.Xiphoid_Diaphragm"),
    ObjSearch(.spine_muscle_folder_side + ".ErectorSpinae.ILptC12CI"),
    ObjSearch(.spine_muscle_folder_side + ".ExternalInterCostalis.IC_Ext_R1R2.elem2"),
    ObjSearch(.spine_muscle_folder_side + ".ExternalInterCostalis.IC_Ext_R1R2.elem3"),
    ObjSearch(.spine_muscle_folder_side + ".ExternalInterCostalis.IC_Ext_R1R2.elem4"),
    ObjSearch(.spine_muscle_folder_side + ".ExternalInterCostalis.IC_Ext_R1R2.elem5")
),
arrcat(
    ObjSearch(.spine_muscle_folder_side + ".ExternalInterCostalis.IC_Ext_R1R2.elem6"),
    ObjSearch(.spine_muscle_folder_side + ".ExternalInterCostalis.IC_Ext_R1R2.elem7"),
    ObjSearch(.spine_muscle_folder_side + ".ExternalInterCostalis.IC_Ext_R2R3.elem4"),
    ObjSearch(.spine_muscle_folder_side + ".ExternalInterCostalis.IC_Ext_R2R3.elem5"),
    ObjSearch(.spine_muscle_folder_side + ".ExternalInterCostalis.IC_Ext_R2R3.elem6"),
    ObjSearch(.spine_muscle_folder_side + ".ExternalInterCostalis.IC_Ext_R2R3.elem7"),
    ObjSearch(.spine_muscle_folder_side + ".ExternalInterCostalis.IC_Ext_R3R4.elem4"),
    ObjSearch(.spine_muscle_folder_side + ".ExternalInterCostalis.IC_Ext_R3R4.elem5"),
    ObjSearch(.spine_muscle_folder_side + ".ExternalInterCostalis.IC_Ext_R3R4.elem6"),
    ObjSearch(.spine_muscle_folder_side + ".ExternalInterCostalis.IC_Ext_R3R4.elem7")
),
arrcat(
    ObjSearch(.spine_muscle_folder_side + ".ExternalInterCostalis.IC_Ext_R4R5.elem5"),
    ObjSearch(.spine_muscle_folder_side + ".ExternalInterCostalis.IC_Ext_R4R5.elem6"),
    ObjSearch(.spine_muscle_folder_side + ".ExternalInterCostalis.IC_Ext_R4R5.elem7"),
    ObjSearch(.spine_muscle_folder_side + ".ExternalInterCostalis.IC_Ext_R5R6.elem6"),
    ObjSearch(.spine_muscle_folder_side + ".ExternalInterCostalis.IC_Ext_R5R6.elem7"),
    ObjSearch(.spine_muscle_folder_side + ".ExternalInterCostalis.IC_Ext_R7R8.elem1"),
    ObjSearch(.spine_muscle_folder_side + ".ExternalInterCostalis.IC_Ext_R8R9.elem1"),
    ObjSearch(.spine_muscle_folder_side + ".ExternalInterCostalis.IC_Ext_R9R10.elem1"),
    ObjSearch(.spine_muscle_folder_side + ".Hyoid.LumpedHyoidStC0"),
    ObjSearch(.spine_muscle_folder_side + ".InnermostInterCostalis.IC_Inn_R10R11.elem5")
),
arrcat(
    ObjSearch(.spine_muscle_folder_side + ".InnermostInterCostalis.IC_Inn_R10R11.elem6"),
    ObjSearch(.spine_muscle_folder_side + ".InnermostInterCostalis.IC_Inn_R11R12.elem1"),
    ObjSearch(.spine_muscle_folder_side + ".InnermostInterCostalis.IC_Inn_R11R12.elem2"),
    ObjSearch(.spine_muscle_folder_side + ".InnermostInterCostalis.IC_Inn_R1R2.elem2"),
    ObjSearch(.spine_muscle_folder_side + ".InnermostInterCostalis.IC_Inn_R1R2.elem3"),
    ObjSearch(.spine_muscle_folder_side + ".InnermostInterCostalis.IC_Inn_R1R2.elem4"),
    ObjSearch(.spine_muscle_folder_side + ".InnermostInterCostalis.IC_Inn_R1R2.elem5"),
    ObjSearch(.spine_muscle_folder_side + ".InnermostInterCostalis.IC_Inn_R1R2.elem6"),
    ObjSearch(.spine_muscle_folder_side + ".InnermostInterCostalis.IC_Inn_R2R3.elem4"),
    ObjSearch(.spine_muscle_folder_side + ".InnermostInterCostalis.IC_Inn_R2R3.elem5")
),
arrcat(
    ObjSearch(.spine_muscle_folder_side + ".InnermostInterCostalis.IC_Inn_R2R3.elem6"),
    ObjSearch(.spine_muscle_folder_side + ".InnermostInterCostalis.IC_Inn_R2R3.elem7"),
    ObjSearch(.spine_muscle_folder_side + ".InnermostInterCostalis.IC_Inn_R2R3.elem8"),
    ObjSearch(.spine_muscle_folder_side + ".InnermostInterCostalis.IC_Inn_R2R3.elem9"),
    ObjSearch(.spine_muscle_folder_side + ".InnermostInterCostalis.IC_Inn_R3R4.elem5"),
    ObjSearch(.spine_muscle_folder_side + ".InnermostInterCostalis.IC_Inn_R3R4.elem6"),
    ObjSearch(.spine_muscle_folder_side + ".InnermostInterCostalis.IC_Inn_R3R4.elem7"),
    ObjSearch(.spine_muscle_folder_side + ".InnermostInterCostalis.IC_Inn_R3R4.elem8"),
    ObjSearch(.spine_muscle_folder_side + ".InnermostInterCostalis.IC_Inn_R3R4.elem9"),
    ObjSearch(.spine_muscle_folder_side + ".InnermostInterCostalis.IC_Inn_R4R5.elem7")
),
arrcat(
    ObjSearch(.spine_muscle_folder_side + ".InnermostInterCostalis.IC_Inn_R4R5.elem8"),
    ObjSearch(.spine_muscle_folder_side + ".InnermostInterCostalis.IC_Inn_R4R5.elem9"),
    ObjSearch(.spine_muscle_folder_side + ".InnermostInterCostalis.IC_Inn_R5R6.elem8"),
    ObjSearch(.spine_muscle_folder_side + ".InnermostInterCostalis.IC_Inn_R5R6.elem9"),
    ObjSearch(.spine_muscle_folder_side + ".InnermostInterCostalis.IC_Inn_R9R10.elem1"),
    ObjSearch(.spine_muscle_folder_side + ".InternalInterCostalis.IC_Int_R10R11.elem2"),
    ObjSearch(.spine_muscle_folder_side + ".InternalInterCostalis.IC_Int_R10R11.elem3"),
    ObjSearch(.spine_muscle_folder_side + ".InternalInterCostalis.IC_Int_R10R11.elem4"),
    ObjSearch(.spine_muscle_folder_side + ".InternalInterCostalis.IC_Int_R10R11.elem5"),
    ObjSearch(.spine_muscle_folder_side + ".InternalInterCostalis.IC_Int_R10R11.elem6")
),
arrcat(
    ObjSearch(.spine_muscle_folder_side + ".InternalInterCostalis.IC_Int_R11R12.elem1"),
    ObjSearch(.spine_muscle_folder_side + ".InternalInterCostalis.IC_Int_R11R12.elem2"),
    ObjSearch(.spine_muscle_folder_side + ".InternalInterCostalis.IC_Int_R1R2.elem1"),
    ObjSearch(.spine_muscle_folder_side + ".InternalInterCostalis.IC_Int_R1R2.elem2"),
    ObjSearch(.spine_muscle_folder_side + ".InternalInterCostalis.IC_Int_R1R2.elem3"),
    ObjSearch(.spine_muscle_folder_side + ".InternalInterCostalis.IC_Int_R1R2.elem4"),
    ObjSearch(.spine_muscle_folder_side + ".InternalInterCostalis.IC_Int_R2R3.elem4"),
    ObjSearch(.spine_muscle_folder_side + ".InternalInterCostalis.IC_Int_R2R3.elem5"),
    ObjSearch(.spine_muscle_folder_side + ".InternalInterCostalis.IC_Int_R2R3.elem6"),
    ObjSearch(.spine_muscle_folder_side + ".InternalInterCostalis.IC_Int_R2R3.elem7")
),
arrcat(
    ObjSearch(.spine_muscle_folder_side + ".InternalInterCostalis.IC_Int_R3R4.elem5"),
    ObjSearch(.spine_muscle_folder_side + ".InternalInterCostalis.IC_Int_R3R4.elem6"),
    ObjSearch(.spine_muscle_folder_side + ".InternalInterCostalis.IC_Int_R3R4.elem7"),
    ObjSearch(.spine_muscle_folder_side + ".InternalInterCostalis.IC_Int_R3R4.elem_sternum"),
    ObjSearch(.spine_muscle_folder_side + ".InternalInterCostalis.IC_Int_R4R5.elem6"),
    ObjSearch(.spine_muscle_folder_side + ".InternalInterCostalis.IC_Int_R4R5.elem7"),
    ObjSearch(.spine_muscle_folder_side + ".InternalInterCostalis.IC_Int_R4R5.elem_sternum"),
    ObjSearch(.spine_muscle_folder_side + ".InternalInterCostalis.IC_Int_R5R6.elem_sternum"),
    ObjSearch(.spine_muscle_folder_side + ".InternalInterCostalis.IC_Int_R6R7.elem_sternum"),
    ObjSearch(.spine_muscle_folder_side + ".InternalInterCostalis.IC_Int_R7R8.elem2")
),
arrcat(
    ObjSearch(.spine_muscle_folder_side + ".InternalInterCostalis.IC_Int_R7R8.elem3"),
    ObjSearch(.spine_muscle_folder_side + ".InternalInterCostalis.IC_Int_R7R8.elem4"),
    ObjSearch(.spine_muscle_folder_side + ".InternalInterCostalis.IC_Int_R7R8.elem5"),
    ObjSearch(.spine_muscle_folder_side + ".InternalInterCostalis.IC_Int_R8R9.elem1"),
    ObjSearch(.spine_muscle_folder_side + ".InternalInterCostalis.IC_Int_R8R9.elem2"),
    ObjSearch(.spine_muscle_folder_side + ".InternalInterCostalis.IC_Int_R8R9.elem3"),
    ObjSearch(.spine_muscle_folder_side + ".InternalInterCostalis.IC_Int_R8R9.elem4"),
    ObjSearch(.spine_muscle_folder_side + ".InternalInterCostalis.IC_Int_R8R9.elem5"),
    ObjSearch(.spine_muscle_folder_side + ".InternalInterCostalis.IC_Int_R8R9.elem6"),
    ObjSearch(.spine_muscle_folder_side + ".InternalInterCostalis.IC_Int_R8R9.elem_sternum")
)
),
arrcat(
arrcat(
    ObjSearch(.spine_muscle_folder_side + ".InternalInterCostalis.IC_Int_R9R10.elem1"),
    ObjSearch(.spine_muscle_folder_side + ".InternalInterCostalis.IC_Int_R9R10.elem2"),
    ObjSearch(.spine_muscle_folder_side + ".InternalInterCostalis.IC_Int_R9R10.elem3"),
    ObjSearch(.spine_muscle_folder_side + ".InternalInterCostalis.IC_Int_R9R10.elem4"),
    ObjSearch(.spine_muscle_folder_side + ".InternalInterCostalis.IC_Int_R9R10.elem5"),
    ObjSearch(.spine_muscle_folder_side + ".InternalInterCostalis.IC_Int_R9R10.elem6"),
    ObjSearch(.spine_muscle_folder_side + ".InternalInterCostalis.IC_Int_R9R10.elem7"),
    ObjSearch(.spine_muscle_folder_side + ".InternalInterCostalis.IC_Int_R9R10.elem_sternum"),
    ObjSearch(.spine_muscle_folder_side + ".LevatorCostarum.LCBrC7R1"),
    ObjSearch(.spine_muscle_folder_side + ".LevatorCostarum.LCBrT10R11")
),
arrcat(
    ObjSearch(.spine_muscle_folder_side + ".LevatorCostarum.LCBrT11R12"),
    ObjSearch(.spine_muscle_folder_side + ".LevatorCostarum.LCBrT7R8"),
    ObjSearch(.spine_muscle_folder_side + ".LevatorCostarum.LCBrT8R9"),
    ObjSearch(.spine_muscle_folder_side + ".LevatorCostarum.LCBrT9R10"),
    ObjSearch(.spine_muscle_folder_side + ".LevatorCostarum.LCLgT10R12"),
    ObjSearch(.spine_muscle_folder_side + ".LevatorCostarum.LCLgT7R9"),
    ObjSearch(.spine_muscle_folder_side + ".LevatorCostarum.LCLgT8R10"),
    ObjSearch(.spine_muscle_folder_side + ".LevatorCostarum.LCLgT9R11"),
    ObjSearch(.spine_muscle_folder_side + ".ObliquusExternus.OEC_1"),
    ObjSearch(.spine_muscle_folder_side + ".ObliquusExternus.OEC_10")
),
arrcat(
    ObjSearch(.spine_muscle_folder_side + ".ObliquusExternus.OEC_11"),
    ObjSearch(.spine_muscle_folder_side + ".ObliquusExternus.OEC_2"),
    ObjSearch(.spine_muscle_folder_side + ".ObliquusExternus.OEC_3"),
    ObjSearch(.spine_muscle_folder_side + ".ObliquusExternus.OEC_4"),
    ObjSearch(.spine_muscle_folder_side + ".ObliquusExternus.OEC_5"),
    ObjSearch(.spine_muscle_folder_side + ".ObliquusExternus.OEC_6"),
    ObjSearch(.spine_muscle_folder_side + ".ObliquusExternus.OEC_7"),
    ObjSearch(.spine_muscle_folder_side + ".ObliquusExternus.OEC_8"),
    ObjSearch(.spine_muscle_folder_side + ".ObliquusExternus.OEC_9"),
    ObjSearch(.spine_muscle_folder_side + ".ObliquusInternus.OIC_1")
),
arrcat(
    ObjSearch(.spine_muscle_folder_side + ".ObliquusInternus.OIC_10"),
    ObjSearch(.spine_muscle_folder_side + ".ObliquusInternus.OIC_11"),
    ObjSearch(.spine_muscle_folder_side + ".ObliquusInternus.OIC_12"),
    ObjSearch(.spine_muscle_folder_side + ".ObliquusInternus.OIC_13"),
    ObjSearch(.spine_muscle_folder_side + ".ObliquusInternus.OIC_2"),
    ObjSearch(.spine_muscle_folder_side + ".ObliquusInternus.OIC_3"),
    ObjSearch(.spine_muscle_folder_side + ".ObliquusInternus.OIC_4"),
    ObjSearch(.spine_muscle_folder_side + ".ObliquusInternus.OIC_5"),
    ObjSearch(.spine_muscle_folder_side + ".ObliquusInternus.OIC_6"),
    ObjSearch(.spine_muscle_folder_side + ".ObliquusInternus.OIC_7")
),
arrcat(
    ObjSearch(.spine_muscle_folder_side + ".ObliquusInternus.OIC_8"),
    ObjSearch(.spine_muscle_folder_side + ".ObliquusInternus.OIC_8_extra"),
    ObjSearch(.spine_muscle_folder_side + ".ObliquusInternus.OIC_9"),
    ObjSearch(.spine_muscle_folder_side + ".QuadratusLumborum.QLC12Lat_L4"),
    ObjSearch(.spine_muscle_folder_side + ".RectusAbdominis.RA_1"),
    ObjSearch(.spine_muscle_folder_side + ".RectusAbdominis.RA_2"),
    ObjSearch(.spine_muscle_folder_side + ".Scalenus.ScalenusPosteriorR2C5"),
    ObjSearch(.spine_muscle_folder_side + ".Scalenus.ScalenusPosteriorR2C6"),
    ObjSearch(.spine_muscle_folder_side + ".SerratusPosteriorInferior.SPIL1R11"),
    ObjSearch(.spine_muscle_folder_side + ".SerratusPosteriorInferior.SPIL2R12")
),
arrcat(
    ObjSearch(.spine_muscle_folder_side + ".SerratusPosteriorInferior.SPIT11R9"),
    ObjSearch(.spine_muscle_folder_side + ".SerratusPosteriorInferior.SPIT12R10"),
    ObjSearch(.spine_muscle_folder_side + ".Subcostalis.SCR7R10"),
    ObjSearch(.spine_muscle_folder_side + ".Subcostalis.SCR8R10"),
    ObjSearch(.spine_muscle_folder_side + ".TransversusThoracis.TrThR2R4S"),
    ObjSearch(.spine_muscle_folder_side + ".TransversusThoracis.TrThR2S"),
    ObjSearch(.spine_muscle_folder_side + ".TransversusThoracis.TrThR3R5S"),
    ObjSearch(.spine_muscle_folder_side + ".TransversusThoracis.TrThR4R6S"),
    ObjSearch(.spine_muscle_folder_side + ".TransversusThoracis.TrThR5R7S"),
    ObjSearch(.spine_muscle_folder_side + ".TransversusThoracis.TrThR6S")
),
arrcat(
    ObjSearch(.spine_muscle_folder_side + ".TransversusThoracis.TrThR7S")
)
)
);
  AnyObjectPtr ListExtensors = arrcat(
arrcat(
arrcat(
    ObjSearch(.spine_muscle_folder_side + ".Diaphragm.R10_Diaphragm1"),
    ObjSearch(.spine_muscle_folder_side + ".Diaphragm.R10_Diaphragm2"),
    ObjSearch(.spine_muscle_folder_side + ".Diaphragm.R10_Diaphragm3"),
    ObjSearch(.spine_muscle_folder_side + ".Diaphragm.R11_Diaphragm1"),
    ObjSearch(.spine_muscle_folder_side + ".Diaphragm.R11_Diaphragm2"),
    ObjSearch(.spine_muscle_folder_side + ".Diaphragm.R11_Diaphragm3"),
    ObjSearch(.spine_muscle_folder_side + ".ErectorSpinae.ILptC5SIPS"),
    ObjSearch(.spine_muscle_folder_side + ".ErectorSpinae.ILptC6SIPS"),
    ObjSearch(.spine_muscle_folder_side + ".ErectorSpinae.ILptC7CI"),
    ObjSearch(.spine_muscle_folder_side + ".ErectorSpinae.ITC7R7")
),
arrcat(
    ObjSearch(.spine_muscle_folder_side + ".ErectorSpinae.ITR1R7"),
    ObjSearch(.spine_muscle_folder_side + ".ErectorSpinae.ITR2R8"),
    ObjSearch(.spine_muscle_folder_side + ".ErectorSpinae.ITR3R9"),
    ObjSearch(.spine_muscle_folder_side + ".ErectorSpinae.ITR4R10"),
    ObjSearch(.spine_muscle_folder_side + ".ErectorSpinae.ITR5R11"),
    ObjSearch(.spine_muscle_folder_side + ".ErectorSpinae.ITR6R12"),
    ObjSearch(.spine_muscle_folder_side + ".ErectorSpinae.LTptC10Sacrum"),
    ObjSearch(.spine_muscle_folder_side + ".ErectorSpinae.LTptC3L3"),
    ObjSearch(.spine_muscle_folder_side + ".ErectorSpinae.LTptC4L4"),
    ObjSearch(.spine_muscle_folder_side + ".ErectorSpinae.LTptC5L5")
),
arrcat(
    ObjSearch(.spine_muscle_folder_side + ".ErectorSpinae.LTptC6S1"),
    ObjSearch(.spine_muscle_folder_side + ".ErectorSpinae.LTptC7S2"),
    ObjSearch(.spine_muscle_folder_side + ".ErectorSpinae.LTptC8S3"),
    ObjSearch(.spine_muscle_folder_side + ".ErectorSpinae.LTptC9S4"),
    ObjSearch(.spine_muscle_folder_side + ".ErectorSpinae.LTptT10Sacrum"),
    ObjSearch(.spine_muscle_folder_side + ".ErectorSpinae.LTptT11Sacrum"),
    ObjSearch(.spine_muscle_folder_side + ".ErectorSpinae.LTptT1L1"),
    ObjSearch(.spine_muscle_folder_side + ".ErectorSpinae.LTptT2L2"),
    ObjSearch(.spine_muscle_folder_side + ".ErectorSpinae.LTptT3L3"),
    ObjSearch(.spine_muscle_folder_side + ".ErectorSpinae.LTptT4L4")
),
arrcat(
    ObjSearch(.spine_muscle_folder_side + ".ErectorSpinae.LTptT5L5"),
    ObjSearch(.spine_muscle_folder_side + ".ErectorSpinae.LTptT6S1"),
    ObjSearch(.spine_muscle_folder_side + ".ErectorSpinae.LTptT7S2"),
    ObjSearch(.spine_muscle_folder_side + ".ErectorSpinae.LTptT8S3"),
    ObjSearch(.spine_muscle_folder_side + ".ErectorSpinae.LTptT9S4"),
    ObjSearch(.spine_muscle_folder_side + ".ExternalInterCostalis.IC_Ext_R10R11.elem1"),
    ObjSearch(.spine_muscle_folder_side + ".ExternalInterCostalis.IC_Ext_R10R11.elem2"),
    ObjSearch(.spine_muscle_folder_side + ".ExternalInterCostalis.IC_Ext_R10R11.elem3"),
    ObjSearch(.spine_muscle_folder_side + ".ExternalInterCostalis.IC_Ext_R10R11.elem4"),
    ObjSearch(.spine_muscle_folder_side + ".ExternalInterCostalis.IC_Ext_R10R11.elem5")
),
arrcat(
    ObjSearch(.spine_muscle_folder_side + ".ExternalInterCostalis.IC_Ext_R10R11.elem6"),
    ObjSearch(.spine_muscle_folder_side + ".ExternalInterCostalis.IC_Ext_R11R12.elem2"),
    ObjSearch(.spine_muscle_folder_side + ".ExternalInterCostalis.IC_Ext_R3R4.elem1"),
    ObjSearch(.spine_muscle_folder_side + ".ExternalInterCostalis.IC_Ext_R3R4.elem2"),
    ObjSearch(.spine_muscle_folder_side + ".ExternalInterCostalis.IC_Ext_R5R6.elem1"),
    ObjSearch(.spine_muscle_folder_side + ".ExternalInterCostalis.IC_Ext_R5R6.elem2"),
    ObjSearch(.spine_muscle_folder_side + ".ExternalInterCostalis.IC_Ext_R5R6.elem3"),
    ObjSearch(.spine_muscle_folder_side + ".ExternalInterCostalis.IC_Ext_R5R6.elem4"),
    ObjSearch(.spine_muscle_folder_side + ".ExternalInterCostalis.IC_Ext_R6R7.elem1"),
    ObjSearch(.spine_muscle_folder_side + ".ExternalInterCostalis.IC_Ext_R6R7.elem2")
),
arrcat(
    ObjSearch(.spine_muscle_folder_side + ".ExternalInterCostalis.IC_Ext_R6R7.elem3"),
    ObjSearch(.spine_muscle_folder_side + ".ExternalInterCostalis.IC_Ext_R6R7.elem4"),
    ObjSearch(.spine_muscle_folder_side + ".ExternalInterCostalis.IC_Ext_R6R7.elem5"),
    ObjSearch(.spine_muscle_folder_side + ".ExternalInterCostalis.IC_Ext_R6R7.elem6"),
    ObjSearch(.spine_muscle_folder_side + ".ExternalInterCostalis.IC_Ext_R6R7.elem7"),
    ObjSearch(.spine_muscle_folder_side + ".ExternalInterCostalis.IC_Ext_R7R8.elem2"),
    ObjSearch(.spine_muscle_folder_side + ".ExternalInterCostalis.IC_Ext_R7R8.elem3"),
    ObjSearch(.spine_muscle_folder_side + ".ExternalInterCostalis.IC_Ext_R7R8.elem4"),
    ObjSearch(.spine_muscle_folder_side + ".ExternalInterCostalis.IC_Ext_R7R8.elem5"),
    ObjSearch(.spine_muscle_folder_side + ".ExternalInterCostalis.IC_Ext_R7R8.elem6")
),
arrcat(
    ObjSearch(.spine_muscle_folder_side + ".ExternalInterCostalis.IC_Ext_R7R8.elem7"),
    ObjSearch(.spine_muscle_folder_side + ".ExternalInterCostalis.IC_Ext_R8R9.elem2"),
    ObjSearch(.spine_muscle_folder_side + ".ExternalInterCostalis.IC_Ext_R8R9.elem3"),
    ObjSearch(.spine_muscle_folder_side + ".ExternalInterCostalis.IC_Ext_R8R9.elem4"),
    ObjSearch(.spine_muscle_folder_side + ".ExternalInterCostalis.IC_Ext_R8R9.elem5"),
    ObjSearch(.spine_muscle_folder_side + ".ExternalInterCostalis.IC_Ext_R8R9.elem6"),
    ObjSearch(.spine_muscle_folder_side + ".ExternalInterCostalis.IC_Ext_R8R9.elem7"),
    ObjSearch(.spine_muscle_folder_side + ".ExternalInterCostalis.IC_Ext_R9R10.elem3"),
    ObjSearch(.spine_muscle_folder_side + ".ExternalInterCostalis.IC_Ext_R9R10.elem4"),
    ObjSearch(.spine_muscle_folder_side + ".ExternalInterCostalis.IC_Ext_R9R10.elem5")
),
arrcat(
    ObjSearch(.spine_muscle_folder_side + ".ExternalInterCostalis.IC_Ext_R9R10.elem6"),
    ObjSearch(.spine_muscle_folder_side + ".ExternalInterCostalis.IC_Ext_R9R10.elem7"),
    ObjSearch(.spine_muscle_folder_side + ".InnermostInterCostalis.IC_Inn_R10R11.elem1"),
    ObjSearch(.spine_muscle_folder_side + ".InnermostInterCostalis.IC_Inn_R2R3.elem1"),
    ObjSearch(.spine_muscle_folder_side + ".InnermostInterCostalis.IC_Inn_R3R4.elem1"),
    ObjSearch(.spine_muscle_folder_side + ".InnermostInterCostalis.IC_Inn_R3R4.elem2"),
    ObjSearch(.spine_muscle_folder_side + ".InnermostInterCostalis.IC_Inn_R4R5.elem1"),
    ObjSearch(.spine_muscle_folder_side + ".InnermostInterCostalis.IC_Inn_R4R5.elem2"),
    ObjSearch(.spine_muscle_folder_side + ".InnermostInterCostalis.IC_Inn_R4R5.elem3"),
    ObjSearch(.spine_muscle_folder_side + ".InnermostInterCostalis.IC_Inn_R4R5.elem4")
),
arrcat(
    ObjSearch(.spine_muscle_folder_side + ".InnermostInterCostalis.IC_Inn_R5R6.elem1"),
    ObjSearch(.spine_muscle_folder_side + ".InnermostInterCostalis.IC_Inn_R5R6.elem2"),
    ObjSearch(.spine_muscle_folder_side + ".InnermostInterCostalis.IC_Inn_R5R6.elem3"),
    ObjSearch(.spine_muscle_folder_side + ".InnermostInterCostalis.IC_Inn_R5R6.elem4"),
    ObjSearch(.spine_muscle_folder_side + ".InnermostInterCostalis.IC_Inn_R5R6.elem5"),
    ObjSearch(.spine_muscle_folder_side + ".InnermostInterCostalis.IC_Inn_R5R6.elem6"),
    ObjSearch(.spine_muscle_folder_side + ".InnermostInterCostalis.IC_Inn_R6R7.elem1"),
    ObjSearch(.spine_muscle_folder_side + ".InnermostInterCostalis.IC_Inn_R6R7.elem2"),
    ObjSearch(.spine_muscle_folder_side + ".InnermostInterCostalis.IC_Inn_R6R7.elem3"),
    ObjSearch(.spine_muscle_folder_side + ".InnermostInterCostalis.IC_Inn_R6R7.elem4")
),
arrcat(
    ObjSearch(.spine_muscle_folder_side + ".InnermostInterCostalis.IC_Inn_R6R7.elem5"),
    ObjSearch(.spine_muscle_folder_side + ".InnermostInterCostalis.IC_Inn_R6R7.elem6"),
    ObjSearch(.spine_muscle_folder_side + ".InnermostInterCostalis.IC_Inn_R6R7.elem7"),
    ObjSearch(.spine_muscle_folder_side + ".InnermostInterCostalis.IC_Inn_R6R7.elem8"),
    ObjSearch(.spine_muscle_folder_side + ".InnermostInterCostalis.IC_Inn_R6R7.elem9"),
    ObjSearch(.spine_muscle_folder_side + ".InnermostInterCostalis.IC_Inn_R7R8.elem1"),
    ObjSearch(.spine_muscle_folder_side + ".InnermostInterCostalis.IC_Inn_R7R8.elem2"),
    ObjSearch(.spine_muscle_folder_side + ".InnermostInterCostalis.IC_Inn_R7R8.elem3"),
    ObjSearch(.spine_muscle_folder_side + ".InnermostInterCostalis.IC_Inn_R7R8.elem4"),
    ObjSearch(.spine_muscle_folder_side + ".InnermostInterCostalis.IC_Inn_R7R8.elem5")
)
),
arrcat(
arrcat(
    ObjSearch(.spine_muscle_folder_side + ".InnermostInterCostalis.IC_Inn_R7R8.elem6"),
    ObjSearch(.spine_muscle_folder_side + ".InnermostInterCostalis.IC_Inn_R7R8.elem7"),
    ObjSearch(.spine_muscle_folder_side + ".InnermostInterCostalis.IC_Inn_R7R8.elem8"),
    ObjSearch(.spine_muscle_folder_side + ".InnermostInterCostalis.IC_Inn_R7R8.elem9"),
    ObjSearch(.spine_muscle_folder_side + ".InnermostInterCostalis.IC_Inn_R8R9.elem2"),
    ObjSearch(.spine_muscle_folder_side + ".InnermostInterCostalis.IC_Inn_R8R9.elem3"),
    ObjSearch(.spine_muscle_folder_side + ".InnermostInterCostalis.IC_Inn_R8R9.elem4"),
    ObjSearch(.spine_muscle_folder_side + ".InnermostInterCostalis.IC_Inn_R8R9.elem5"),
    ObjSearch(.spine_muscle_folder_side + ".InnermostInterCostalis.IC_Inn_R8R9.elem6"),
    ObjSearch(.spine_muscle_folder_side + ".InnermostInterCostalis.IC_Inn_R8R9.elem7")
),
arrcat(
    ObjSearch(.spine_muscle_folder_side + ".InnermostInterCostalis.IC_Inn_R8R9.elem8"),
    ObjSearch(.spine_muscle_folder_side + ".InnermostInterCostalis.IC_Inn_R8R9.elem9"),
    ObjSearch(.spine_muscle_folder_side + ".InnermostInterCostalis.IC_Inn_R9R10.elem4"),
    ObjSearch(.spine_muscle_folder_side + ".InternalInterCostalis.IC_Int_R1R2.elem_sternum"),
    ObjSearch(.spine_muscle_folder_side + ".InternalInterCostalis.IC_Int_R3R4.elem1"),
    ObjSearch(.spine_muscle_folder_side + ".InternalInterCostalis.IC_Int_R3R4.elem2"),
    ObjSearch(.spine_muscle_folder_side + ".InternalInterCostalis.IC_Int_R4R5.elem1"),
    ObjSearch(.spine_muscle_folder_side + ".InternalInterCostalis.IC_Int_R4R5.elem2"),
    ObjSearch(.spine_muscle_folder_side + ".InternalInterCostalis.IC_Int_R4R5.elem3"),
    ObjSearch(.spine_muscle_folder_side + ".InternalInterCostalis.IC_Int_R4R5.elem4")
),
arrcat(
    ObjSearch(.spine_muscle_folder_side + ".InternalInterCostalis.IC_Int_R5R6.elem1"),
    ObjSearch(.spine_muscle_folder_side + ".InternalInterCostalis.IC_Int_R5R6.elem2"),
    ObjSearch(.spine_muscle_folder_side + ".InternalInterCostalis.IC_Int_R5R6.elem3"),
    ObjSearch(.spine_muscle_folder_side + ".InternalInterCostalis.IC_Int_R5R6.elem4"),
    ObjSearch(.spine_muscle_folder_side + ".InternalInterCostalis.IC_Int_R5R6.elem5"),
    ObjSearch(.spine_muscle_folder_side + ".InternalInterCostalis.IC_Int_R6R7.elem1"),
    ObjSearch(.spine_muscle_folder_side + ".InternalInterCostalis.IC_Int_R6R7.elem2"),
    ObjSearch(.spine_muscle_folder_side + ".InternalInterCostalis.IC_Int_R6R7.elem3"),
    ObjSearch(.spine_muscle_folder_side + ".InternalInterCostalis.IC_Int_R6R7.elem4"),
    ObjSearch(.spine_muscle_folder_side + ".InternalInterCostalis.IC_Int_R6R7.elem5")
),
arrcat(
    ObjSearch(.spine_muscle_folder_side + ".InternalInterCostalis.IC_Int_R6R7.elem6"),
    ObjSearch(.spine_muscle_folder_side + ".InternalInterCostalis.IC_Int_R6R7.elem7"),
    ObjSearch(.spine_muscle_folder_side + ".InternalInterCostalis.IC_Int_R7R8.elem6"),
    ObjSearch(.spine_muscle_folder_side + ".InternalInterCostalis.IC_Int_R7R8.elem7"),
    ObjSearch(.spine_muscle_folder_side + ".InternalInterCostalis.IC_Int_R7R8.elem_sternum"),
    ObjSearch(.spine_muscle_folder_side + ".LevatorCostarum.LCBrT2R3"),
    ObjSearch(.spine_muscle_folder_side + ".LevatorCostarum.LCBrT3R4"),
    ObjSearch(.spine_muscle_folder_side + ".LevatorCostarum.LCBrT4R5"),
    ObjSearch(.spine_muscle_folder_side + ".LevatorCostarum.LCBrT5R6"),
    ObjSearch(.spine_muscle_folder_side + ".LevatorCostarum.LCBrT6R7")
),
arrcat(
    ObjSearch(.spine_muscle_folder_side + ".LevatorCostarum.LCLgT5R7"),
    ObjSearch(.spine_muscle_folder_side + ".LevatorCostarum.LCLgT6R8"),
    ObjSearch(.spine_muscle_folder_side + ".QuadratusLumborum.QLC12InterMedian_CIInterMedian"),
    ObjSearch(.spine_muscle_folder_side + ".QuadratusLumborum.QLC12InterMedian_L2"),
    ObjSearch(.spine_muscle_folder_side + ".QuadratusLumborum.QLC12InterMedian_L3"),
    ObjSearch(.spine_muscle_folder_side + ".QuadratusLumborum.QLC12Median_CIInterMedian"),
    ObjSearch(.spine_muscle_folder_side + ".QuadratusLumborum.QLC12Median_CILat"),
    ObjSearch(.spine_muscle_folder_side + ".QuadratusLumborum.QLC12Median_L2"),
    ObjSearch(.spine_muscle_folder_side + ".QuadratusLumborum.QLC12Median_L3"),
    ObjSearch(.spine_muscle_folder_side + ".QuadratusLumborum.QLC12Median_L4")
),
arrcat(
    ObjSearch(.spine_muscle_folder_side + ".RotatoresBrevis.RotatoresBrevisT7T6"),
    ObjSearch(.spine_muscle_folder_side + ".RotatoresLongus.RotatoresLongusT7T5"),
    ObjSearch(.spine_muscle_folder_side + ".RotatoresLongus.RotatoresLongusT8T6"),
    ObjSearch(.spine_muscle_folder_side + ".Scalenus.ScalenusAnteriorR1C3"),
    ObjSearch(.spine_muscle_folder_side + ".Scalenus.ScalenusAnteriorR1C4"),
    ObjSearch(.spine_muscle_folder_side + ".Scalenus.ScalenusAnteriorR1C5"),
    ObjSearch(.spine_muscle_folder_side + ".Scalenus.ScalenusAnteriorR1C6"),
    ObjSearch(.spine_muscle_folder_side + ".Scalenus.ScalenusMediusR1C2"),
    ObjSearch(.spine_muscle_folder_side + ".Scalenus.ScalenusMediusR1C3"),
    ObjSearch(.spine_muscle_folder_side + ".Scalenus.ScalenusMediusR1C4")
),
arrcat(
    ObjSearch(.spine_muscle_folder_side + ".Scalenus.ScalenusMediusR1C5"),
    ObjSearch(.spine_muscle_folder_side + ".Scalenus.ScalenusMediusR1C6"),
    ObjSearch(.spine_muscle_folder_side + ".Scalenus.ScalenusMediusR1C7"),
    ObjSearch(.spine_muscle_folder_side + ".SemispinalisThoracis.SSTT10T2"),
    ObjSearch(.spine_muscle_folder_side + ".SemispinalisThoracis.SSTT11T3"),
    ObjSearch(.spine_muscle_folder_side + ".SemispinalisThoracis.SSTT12T4"),
    ObjSearch(.spine_muscle_folder_side + ".SemispinalisThoracis.SSTT7C6"),
    ObjSearch(.spine_muscle_folder_side + ".SemispinalisThoracis.SSTT8C7"),
    ObjSearch(.spine_muscle_folder_side + ".SemispinalisThoracis.SSTT9T1"),
    ObjSearch(.spine_muscle_folder_side + ".SerratusPosteriorSuperior.SPSR4T2")
),
arrcat(
    ObjSearch(.spine_muscle_folder_side + ".SerratusPosteriorSuperior.SPSR5T3"),
    ObjSearch(.spine_muscle_folder_side + ".Subcostalis.SCR1R3"),
    ObjSearch(.spine_muscle_folder_side + ".Subcostalis.SCR1R4"),
    ObjSearch(.spine_muscle_folder_side + ".Subcostalis.SCR2R4"),
    ObjSearch(.spine_muscle_folder_side + ".Subcostalis.SCR2R5"),
    ObjSearch(.spine_muscle_folder_side + ".Subcostalis.SCR3R6"),
    ObjSearch(.spine_muscle_folder_side + ".Subcostalis.SCR4R7"),
    ObjSearch(.spine_muscle_folder_side + ".Subcostalis.SCR5R7"),
    ObjSearch(.spine_muscle_folder_side + ".Subcostalis.SCR5R8"),
    ObjSearch(.spine_muscle_folder_side + ".Subcostalis.SCR6R8")
),
arrcat(
    ObjSearch(.spine_muscle_folder_side + ".Subcostalis.SCR6R9"),
    ObjSearch(.spine_muscle_folder_side + ".Subcostalis.SCR8R11"),
    ObjSearch(.spine_muscle_folder_side + ".Subcostalis.SCR9R11"),
    ObjSearch(.spine_muscle_folder_side + ".ThoracicMultifidi.MFT10T5"),
    ObjSearch(.spine_muscle_folder_side + ".ThoracicMultifidi.MFT10T6"),
    ObjSearch(.spine_muscle_folder_side + ".ThoracicMultifidi.MFT11T6"),
    ObjSearch(.spine_muscle_folder_side + ".ThoracicMultifidi.MFT7T2"),
    ObjSearch(.spine_muscle_folder_side + ".ThoracicMultifidi.MFT7T3"),
    ObjSearch(.spine_muscle_folder_side + ".ThoracicMultifidi.MFT7T4"),
    ObjSearch(.spine_muscle_folder_side + ".ThoracicMultifidi.MFT8T3")
),
arrcat(
    ObjSearch(.spine_muscle_folder_side + ".ThoracicMultifidi.MFT8T4"),
    ObjSearch(.spine_muscle_folder_side + ".ThoracicMultifidi.MFT8T5"),
    ObjSearch(.spine_muscle_folder_side + ".ThoracicMultifidi.MFT9T4"),
    ObjSearch(.spine_muscle_folder_side + ".ThoracicMultifidi.MFT9T5"),
    ObjSearch(.spine_muscle_folder_side + ".ThoracicMultifidi.MFT9T6"),
    ObjSearch(.spine_muscle_folder_side + ".TransversusThoracis.TrThR10S"),
    ObjSearch(.spine_muscle_folder_side + ".TransversusThoracis.TrThR8S"),
    ObjSearch(.spine_muscle_folder_side + ".TransversusThoracis.TrThR9S")
)
)
);
};
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