   // Switch to define an automatic save of results to the Output folder
  #ifndef AutoSaveOption
  #define AutoSaveOption 0
  #endif

  /**Execute this operation to run the model in the intended operation sequence.
  It is also possible to run operations seperately, by manual selections in the operation tree*/
  AnyOperationSequence RunApplication = {

    /**This operation calibrates the muscles in the model if these are of the type AnyMuscleModel3E.
    This will just be an empty operation if the model is using a muscle type that does not require calibration.*/
    AnyOperation &CalibrationAnal = Main.HumanModel.Calibration.CalibrationSequence;

    ///This operation is the inverse dynamic analysis
    AnyOperation &InvAnal=Main.Study.InverseDynamics;

    ///This operation is running a post analysis of the model it will normalize muscle activity and measured EMG to unity
    AnyOperation &PostAnal=Main.PostStudy.Kinematics;

  #if AutoSaveOption
  /// This operation saves the output of the study to an h5 file in the Output folder
  AnyOperationClassOpr save = {
        Object = &Main.Study.Output;
        OperationName = "Save data";
        ArgList = {
          AnyStringVar file = ANYBODY_PATH_OUTPUT + ANYBODY_NAME_MAINFILE + ".anydata.h5";
          AnyStringVar type = "Deep";
        };
  };
  #endif

  };
