AnyFixedRefFrame Chart1Ref ={

  AnyRGB LocalRGB = {0,0,1};
  AnyVar LocalThickness = 3.0;
  AnyInt LocalStyle = 1;
  AnyRGB MeasRGB = {1,0,0};
  AnyVar MeasThickness = 3.0;
  AnyInt MeasStyle = 1;


  Origin = -{2,2,2};
AnyChart Chart1 =
{

  Style = {
    Sizes = {4,4,4};
     Axes = {
       Style = 0;
     };
    };

  Series =
  {
    // sacrum
    AnyChartSerie series0 =
    {
      Lines.RGB = ...LocalRGB;
      //Title = "";

      Abscissa = "Main.Study.Output.Model.HumanModel.Trunk.Segments.PelvisSeg.SacrumMarker.r[0]";
      Abscissa2 = "Main.Study.Output.Model.HumanModel.Trunk.Segments.PelvisSeg.SacrumMarker.r[1]";
      Value = "Main.Study.Output.Model.HumanModel.Trunk.Segments.PelvisSeg.SacrumMarker.r[2]";

      Lines = {
        Thickness = ....LocalThickness;
        Style = ....LocalStyle;

      };

    };

     AnyChartSerie series01 =
    {
      Lines.RGB = ...MeasRGB;

      //Title = "";
      Abscissa = "Main.Study.Output.Model.Markers.p15.Seg.r[0]";
      Abscissa2 = "Main.Study.Output.Model.Markers.p15.Seg.r[1]";
      Value = "Main.Study.Output.Model.Markers.p15.Seg.r[2]";

      Lines = {
        Thickness = ....MeasThickness;
        Style = ....MeasStyle;

      };


    };


    // ASISR
    AnyChartSerie series2 =
    {
      Lines.RGB = ...LocalRGB;
      //Title = "";
      Abscissa = "Main.Study.Output.Model.HumanModel.Trunk.Segments.PelvisSeg.RAsis.r[0]";
      Abscissa2 = "Main.Study.Output.Model.HumanModel.Trunk.Segments.PelvisSeg.RAsis.r[1]";
      Value = "Main.Study.Output.Model.HumanModel.Trunk.Segments.PelvisSeg.RAsis.r[2]";

      Lines = {
        Thickness = ....LocalThickness;
        Style = ....LocalStyle;

      };

    };

     AnyChartSerie series21 =
    {
      Lines.RGB = ...MeasRGB;
      //Title = "";
      Abscissa = "Main.Study.Output.Model.Markers.p7.Seg.r[0]";
      Abscissa2 = "Main.Study.Output.Model.Markers.p7.Seg.r[1]";
      Value = "Main.Study.Output.Model.Markers.p7.Seg.r[2]";

      Lines = {
        Thickness = ....MeasThickness;
        Style = ....MeasStyle;

      };

    };


    // ASISL
    AnyChartSerie series3 =
    {
      Lines.RGB = ...LocalRGB;
      //Title = "";
      Abscissa = "Main.Study.Output.Model.HumanModel.Trunk.Segments.PelvisSeg.LAsis.r[0]";
      Abscissa2 = "Main.Study.Output.Model.HumanModel.Trunk.Segments.PelvisSeg.LAsis.r[1]";
      Value = "Main.Study.Output.Model.HumanModel.Trunk.Segments.PelvisSeg.LAsis.r[2]";

      Lines = {
        Thickness = ....LocalThickness;
        Style = ....LocalStyle;
      };

    };

     AnyChartSerie series31 =
    {
      Lines.RGB = ...MeasRGB;
      //Title = "";
      Abscissa = "Main.Study.Output.Model.Markers.p14.Seg.r[0]";
      Abscissa2 = "Main.Study.Output.Model.Markers.p14.Seg.r[1]";
      Value = "Main.Study.Output.Model.Markers.p14.Seg.r[2]";

      Lines = {
         Thickness = ....MeasThickness;
         Style = ....MeasStyle;
      };

    };


    // LeftKnee
    AnyChartSerie series7 =
    {
      Lines.RGB = ...LocalRGB;
      //Title = "";
      Abscissa = "Main.Study.Output.Model.HumanModel.Left.Leg.Segments.Thigh.KneeMarker.r[0]";
      Abscissa2 = "Main.Study.Output.Model.HumanModel.Left.Leg.Segments.Thigh.KneeMarker.r[1]";
      Value = "Main.Study.Output.Model.HumanModel.Left.Leg.Segments.Thigh.KneeMarker.r[2]";

      Lines = {
        Thickness = ....LocalThickness;
        Style = ....LocalStyle;
      };

    };

   AnyChartSerie series71 =
   {
      Lines.RGB = ...MeasRGB;
      //Title = "";
      Abscissa = "Main.Study.Output.Model.Markers.p12.Seg.r[0]";
      Abscissa2 = "Main.Study.Output.Model.Markers.p12.Seg.r[1]";
      Value = "Main.Study.Output.Model.Markers.p12.Seg.r[2]";

      Lines = {
         Thickness = ....MeasThickness;
         Style = ....MeasStyle;
      };

    };

    // MalleolusMarker
    AnyChartSerie series17 =
    {
      Lines.RGB = ...LocalRGB;
      //Title = "";
      Abscissa = "Main.Study.Output.Model.HumanModel.Left.Leg.Segments.Shank.MalleolusMarker.r[0]";
      Abscissa2 = "Main.Study.Output.Model.HumanModel.Left.Leg.Segments.Shank.MalleolusMarker.r[1]";
      Value = "Main.Study.Output.Model.HumanModel.Left.Leg.Segments.Shank.MalleolusMarker.r[2]";

      Lines = {
          Thickness = ....LocalThickness;
          Style = ....LocalStyle;
      };

    };

   AnyChartSerie series171 =
    {
      Lines.RGB = ...MeasRGB;
      //Title = "";
      Abscissa = "Main.Study.Output.Model.Markers.p10.Seg.r[0]";
      Abscissa2 = "Main.Study.Output.Model.Markers.p10.Seg.r[1]";
      Value = "Main.Study.Output.Model.Markers.p10.Seg.r[2]";

      Lines = {
           Thickness = ....MeasThickness;
           Style = ....MeasStyle;

      };

    };


    // HeelMarker
    AnyChartSerie series19 =
    {
      Lines.RGB = ...LocalRGB;
      //Title = "";
      Abscissa = "Main.Study.Output.Model.HumanModel.Left.Leg.Segments.Foot.HeelMarker.r[0]";
      Abscissa2 = "Main.Study.Output.Model.HumanModel.Left.Leg.Segments.Foot.HeelMarker.r[1]";
      Value = "Main.Study.Output.Model.HumanModel.Left.Leg.Segments.Foot.HeelMarker.r[2]";

      Lines = {
         Thickness = ....LocalThickness;
         Style = ....LocalStyle;
      };

    };

   AnyChartSerie series191 =
    {
      Lines.RGB = ...MeasRGB;
      //Title = "";
      Abscissa = "Main.Study.Output.Model.Markers.p9.Seg.r[0]";
      Abscissa2 = "Main.Study.Output.Model.Markers.p9.Seg.r[1]";
      Value = "Main.Study.Output.Model.Markers.p9.Seg.r[2]";

      Lines = {
         Thickness = ....MeasThickness;
         Style = ....MeasStyle;
      };

    };

    // Main.Study.Output.Model.HumanModel.Left.Leg.Segments.Foot.MetatarsalMarker
    AnyChartSerie series211 =
    {
      Lines.RGB = ...LocalRGB;
      //Title = "";
      Abscissa = "Main.Study.Output.Model.HumanModel.Left.Leg.Segments.Foot.MetatarsalMarker.r[0]";
      Abscissa2 = "Main.Study.Output.Model.HumanModel.Left.Leg.Segments.Foot.MetatarsalMarker.r[1]";
      Value = "Main.Study.Output.Model.HumanModel.Left.Leg.Segments.Foot.MetatarsalMarker.r[2]";

      Lines = {
         Thickness = ....LocalThickness;
         Style = ....LocalStyle;

      };

    };

   AnyChartSerie series2111 =
    {
      Lines.RGB = ...MeasRGB;
      //Title = "";
      Abscissa = "Main.Study.Output.Model.Markers.p8.Seg.r[0]";
      Abscissa2 = "Main.Study.Output.Model.Markers.p8.Seg.r[1]";
      Value = "Main.Study.Output.Model.Markers.p8.Seg.r[2]";

      Lines = {
          Thickness = ....MeasThickness;
          Style = ....MeasStyle;
      };

    };

    // Main.Study.Output.Model.HumanModel.Right.Leg.Segments.Thigh.KneeMarker
    AnyChartSerie seriesl1 =
    {
      Lines.RGB = ...LocalRGB;
      //Title = "";
      Abscissa = "Main.Study.Output.Model.HumanModel.Right.Leg.Segments.Thigh.KneeMarker.r[0]";
      Abscissa2 = "Main.Study.Output.Model.HumanModel.Right.Leg.Segments.Thigh.KneeMarker.r[1]";
      Value = "Main.Study.Output.Model.HumanModel.Right.Leg.Segments.Thigh.KneeMarker.r[2]";

      Lines = {
       Thickness = ....LocalThickness;
       Style = ....LocalStyle;

      };

    };

   AnyChartSerie series11 =
    {
      Lines.RGB = ...MeasRGB;
      //Title = "";
      Abscissa = "Main.Study.Output.Model.Markers.p5.Seg.r[0]";
      Abscissa2 = "Main.Study.Output.Model.Markers.p5.Seg.r[1]";
      Value = "Main.Study.Output.Model.Markers.p5.Seg.r[2]";

      Lines = {
          Thickness = ....MeasThickness;
          Style = ....MeasStyle;
      };

    };


    // Main.Study.Output.Model.HumanModel.Right.Leg.Segments.Shank.MalleolusMarker
    AnyChartSerie seriesl2 =
    {
      Lines.RGB = ...LocalRGB;
      //Title = "";
      Abscissa = "Main.Study.Output.Model.HumanModel.Right.Leg.Segments.Shank.MalleolusMarker.r[0]";
      Abscissa2 = "Main.Study.Output.Model.HumanModel.Right.Leg.Segments.Shank.MalleolusMarker.r[1]";
      Value = "Main.Study.Output.Model.HumanModel.Right.Leg.Segments.Shank.MalleolusMarker.r[2]";

      Lines = {
        Thickness = ....LocalThickness;
        Style = ....LocalStyle;
      };

    };

   AnyChartSerie seriesl21 =
    {
      Lines.RGB = ...MeasRGB;
      //Title = "";
      Abscissa = "Main.Study.Output.Model.Markers.p3.Seg.r[0]";
      Abscissa2 = "Main.Study.Output.Model.Markers.p3.Seg.r[1]";
      Value = "Main.Study.Output.Model.Markers.p3.Seg.r[2]";

      Lines = {
           Thickness = ....MeasThickness;
           Style = ....MeasStyle;
      };

    };


    // Main.Study.Output.Model.HumanModel.Right.Leg.Segments.Foot.HeelMarker
    AnyChartSerie seriesl3 =
    {
      Lines.RGB = ...LocalRGB;
      //Title = "";
      Abscissa = "Main.Study.Output.Model.HumanModel.Right.Leg.Segments.Foot.HeelMarker.r[0]";
      Abscissa2 = "Main.Study.Output.Model.HumanModel.Right.Leg.Segments.Foot.HeelMarker.r[1]";
      Value = "Main.Study.Output.Model.HumanModel.Right.Leg.Segments.Foot.HeelMarker.r[2]";

      Lines = {
         Thickness = ....LocalThickness;
         Style = ....LocalStyle;
      };

    };

   AnyChartSerie seriesl31 =
    {
      Lines.RGB = ...MeasRGB;
      //Title = "";
      Abscissa = "Main.Study.Output.Model.Markers.p2.Seg.r[0]";
      Abscissa2 = "Main.Study.Output.Model.Markers.p2.Seg.r[1]";
      Value = "Main.Study.Output.Model.Markers.p2.Seg.r[2]";

      Lines = {
            Thickness = ....MeasThickness;
            Style = ....MeasStyle;
      };

    };


    // Main.Study.Output.Model.HumanModel.Right.Leg.Segments.Foot.MetatarsalMarker
    AnyChartSerie seriesl4 =
    {
      Lines.RGB = ...LocalRGB;
      //Title = "";
      Abscissa = "Main.Study.Output.Model.HumanModel.Right.Leg.Segments.Foot.MetatarsalMarker.r[0]";
      Abscissa2 = "Main.Study.Output.Model.HumanModel.Right.Leg.Segments.Foot.MetatarsalMarker.r[1]";
      Value = "Main.Study.Output.Model.HumanModel.Right.Leg.Segments.Foot.MetatarsalMarker.r[2]";

      Lines = {
         Thickness = ....LocalThickness;
         Style = ....LocalStyle;
      };

    };

   AnyChartSerie seriesl41 =
    {
      Lines.RGB = ...MeasRGB;
      //Title = "";
      Abscissa = "Main.Study.Output.Model.Markers.p1.Seg.r[0]";
      Abscissa2 = "Main.Study.Output.Model.Markers.p1.Seg.r[1]";
      Value = "Main.Study.Output.Model.Markers.p1.Seg.r[2]";

      Lines = {
           Thickness = ....MeasThickness;
           Style = ....MeasStyle;
      };

    };

  };

    AbsAxis = {
      Visible = Off;
      Min = -2;
      Max = 2;
      AutoMin = Off;
      AutoMax = Off;

      Unit1 = {
        Unit = 50;
      };
    };

    AbsAxis2 =
    {
      Visible = Off;
      Min = -2;
      Max = 2;
      AutoMin = Off;
      AutoMax = Off;

      Unit1 = {
        Unit = 50;
      };


    };

    ValueAxis =
    {
      Visible = Off;
      Min = -2;
      Max = 2;
      AutoMin = Off;
      AutoMax = Off;

      Unit1 = {
        Unit = 50;
      };
    };
};

};
