/*
  This dataset is based on the AMMR 2.2 arm muscle parameters. The parameters
  were collected from hardcoded values in the old model and added  here to
  create a single file containing all arm model muscle parameters. All hard
  coded values for PCSA in the old model was converted to corresponding muscle
  volumes. Hence the dataset produces the same


  The arm muscle parameter from AMMR 2.2  was based on a number of sources:
  VU study
  http://www.fbw.vu.nl/research/Lijn_A4/shoulder/overview.htm

   Yamaguchi
  A survey of human musculotendon actuator parameters
  G.T. Yamaguchi, A.G. Sawa, D.W. Moran, M.J. Fessler, and J.M. Winters
   multiple Muscle Systems: Biomechanics and Movement Organization
  J.M. Winters and S.L.-T. Woo (eds.) 1990 Springer- verlag, New York

  Juul-Kristensen2000
   muscle sizes and moment arms of the rotator cuff muscles determined by magnetic resonance imaging
  B. Juul-kristensen, F. Bojsen-Moeller, L. Finsen, J. Eriksson, G. Johansson, F. Staahlberg, C. Ekdahl
  Cell Tissues Organs 2000, 214-222

  Kamibayashi1998
   morphometry of human neck muscles
  Lynne K. Kamibayashi, Frances J.R. Richmond
  Spine Vol. 23,No.12, pp. 1314-1323, 1998

  Holzbauer2005
  Kathrine Holzbaur, Wendy Murray, Scott Delp
  A model of the upper extremity for simulating musculoskeletal surgery and analysing neuromuscular control
  Annals of biomedical engineering, Vol. 33, no. 6, june 2005 pp.829-840

  Bodgduk1998
  The morphology and biomechanics of latissimus dorsi
  N. Bogduk, G.Johnson, D. Spalding
  Clinical Biomechanics 13(1998) 377-385

  Jacobson
  Jacobson, M. D., R. Raab, B. M. Fazeli, R. A. Abrams, M. J. Botte, and R. L. Lieber.
  Architectural design of the human intrinsic hand muscles.
   J. Hand Surg. [Am.] 17:804809, 1992.

  Lieber1
  Lieber, R. L., M. D. Jacobson, B. M. Fazeli, R. A. Abrams, and M. J. Botte.
  Architecture of selected muscles of the arm and forearm: Anatomy and implications for tendon transfer.
  J. Hand Surg. [Am.] 17:787-798, 1992.

  Lieber2
  Lieber, R. L., B. M. Fazeli, and M. J. Botte.
  Architecture of selected wrist flexor and extensor muscles.
  J. Hand Surg. [Am.] 15:244-250, 1990.

  Murray
  Muray, W.M.,T.S. Buchanan, and S.L. Delp.
  Scaling of peak moment arms with the elbow and forearm position
  J. Biomech. Vol. 28, pp. 513-525, 1995
*/

// This logic ensures that TotalTendonLength and OpatinalFiberLength are not
// created as DesignVars when they are also calibrated.
#if BM_CALIBRATION_TYPE == _CALIBRATION_TYPE_1PAR_
 #define _TENDON_LENGTH_DESIGNVAR(x) (x)
 #define _FIBER_LENGTH_DESIGNVAR(x) DesignVar(x)
#endif
#if (BM_CALIBRATION_TYPE == _CALIBRATION_TYPE_2PAR_) | (BM_CALIBRATION_TYPE == _EXPERIMENTAL_CALIBRATION_TYPE_2PAR_)
 #define _TENDON_LENGTH_DESIGNVAR(x) (x)
 #define _FIBER_LENGTH_DESIGNVAR(x) (x)
#endif
#if BM_CALIBRATION_TYPE == _CALIBRATION_TYPE_CUSTOM_
 #define _TENDON_LENGTH_DESIGNVAR(x) DesignVar(x)
 #define _FIBER_LENGTH_DESIGNVAR(x) DesignVar(x)
#endif


AnyFolder Muscles =
{
  AnyVar VolumeUnitFactor ??= 1e-6; ///< Unit conversion factor for volume (1e-6 > volume in cm^3)
  AnyFolder BicepsBrachiiBreve =
  {
    AnyString Muscle = "Biceps brachii caput breve"; ///< Descriptive name for the muscle, e.g. for plotting
    AnyIntVar MuscleElemAmount = 1; ///< The total amount of elements for this muscle
    AnyFloat Pennationangle ??= DesignVar(2); ///< Pennation angle of the muscle fibers (degres)
    AnyFloat VolumeScaleFactor ??= DesignVar(1.0); ///< Factor for scaling the muscle volume
    AnyFloat MuscleVolume ??= DesignVar(25.8); ///< Volume of the muscle  (ml)
    AnyFloat MuscleVolumeSIScaled ??= .VolumeUnitFactor*VolumeScaleFactor*MuscleVolume; ///< Scaled Volume of the muscle in SI base unit (m^3)
    AnyFloat OptimalFiberlength ??= _FIBER_LENGTH_DESIGNVAR(0.15); ///< Optimal working length of the muscle fiber (m)
    AnyFloat TotalTendonLength ??= _TENDON_LENGTH_DESIGNVAR(0.1);///< The total tendon length (m)
    AnyFloat K1 ??= DesignVar(10); ///< K1 constant in the muscle model.  Factor for determining shortening speed at optimum length
    AnyFloat K2 ??= DesignVar(0); ///< K2 constant in the muscle model.  Factor for determining shortening speed at optimum length
    AnyFloat Epsilon0 ??= DesignVar(0.053); ///< Epsilon bar in the muscle model. Represents tendon strain at F0
    AnyFloat Fcfast ??= DesignVar(0.4); ///< Factor for determining shortening speed at optimum length
  };

  AnyFolder BicepsBrachiiLongum =
  {
    AnyString Muscle = "Biceps brachii caput longum"; ///< Descriptive name for the muscle, e.g. for plotting
    AnyIntVar MuscleElemAmount = 1; ///< The total amount of elements for this muscle
    AnyFloat Pennationangle ??= DesignVar(2); ///< Pennation angle of the muscle fibers (degres)
    AnyFloat VolumeScaleFactor ??= DesignVar(1.0); ///< Factor for scaling the muscle volume
    AnyFloat MuscleVolume ??= DesignVar(17.8); ///< Volume of the muscle  (ml)
    AnyFloat MuscleVolumeSIScaled ??= .VolumeUnitFactor*VolumeScaleFactor*MuscleVolume; ///< Scaled Volume of the muscle in SI base unit (m^3)
    AnyFloat OptimalFiberlength ??= _FIBER_LENGTH_DESIGNVAR(0.1); ///< Optimal working length of the muscle fiber (m)
    AnyFloat TotalTendonLength ??= _TENDON_LENGTH_DESIGNVAR(0.1);///< The total tendon length (m)
    AnyFloat K1 ??= DesignVar(10); ///< K1 constant in the muscle model.  Factor for determining shortening speed at optimum length
    AnyFloat K2 ??= DesignVar(0); ///< K2 constant in the muscle model.  Factor for determining shortening speed at optimum length
    AnyFloat Epsilon0 ??= DesignVar(0.053); ///< Epsilon bar in the muscle model. Represents tendon strain at F0
    AnyFloat Fcfast ??= DesignVar(0.4); ///< Factor for determining shortening speed at optimum length
  };

  AnyFolder coracobrachialis =
  {
    AnyString Muscle = "coracobrachialis"; ///< Descriptive name for the muscle, e.g. for plotting
    AnyIntVar MuscleElemAmount = 6; ///< The total amount of elements for this muscle
    AnyFloat Pennationangle ??= DesignVar(5); ///< Pennation angle of the muscle fibers (degres)
    AnyFloat VolumeScaleFactor ??= DesignVar(1.0); ///< Factor for scaling the muscle volume
    AnyFloat MuscleVolume ??= DesignVar(50.785); ///< Volume of the muscle  (ml)
    AnyFloat MuscleVolumeSIScaled ??= .VolumeUnitFactor*VolumeScaleFactor*MuscleVolume; ///< Scaled Volume of the muscle in SI base unit (m^3)
    AnyFloat OptimalFiberlength ??= _FIBER_LENGTH_DESIGNVAR(0.091); ///< Optimal working length of the muscle fiber (m)
    AnyFloat TotalTendonLength ??= _TENDON_LENGTH_DESIGNVAR(0.0182);///< The total tendon length (m)
    AnyFloat K1 ??= DesignVar(10); ///< K1 constant in the muscle model.  Factor for determining shortening speed at optimum length
    AnyFloat K2 ??= DesignVar(0); ///< K2 constant in the muscle model.  Factor for determining shortening speed at optimum length
    AnyFloat Epsilon0 ??= DesignVar(0.053); ///< Epsilon bar in the muscle model. Represents tendon strain at F0
    AnyFloat Fcfast ??= DesignVar(0.4); ///< Factor for determining shortening speed at optimum length
  };

#if BM_ARM_DELTOID_WRAPPING == OFF
  AnyFolder deltoideus_scapular_part_1 =
  {
    AnyString Muscle = "Deltoideus scapula part 1"; ///< Descriptive name for the muscle, e.g. for plotting
    AnyIntVar MuscleElemAmount = 1; ///< The total amount of elements for this muscle
    AnyFloat Pennationangle ??= DesignVar(0); ///< Pennation angle of the muscle fibers (degres)
    AnyFloat VolumeScaleFactor ??= DesignVar(1.0); ///< Factor for scaling the muscle volume
    AnyFloat MuscleVolume ??= DesignVar(10.395); ///< Volume of the muscle  (ml)
    AnyFloat MuscleVolumeSIScaled ??= .VolumeUnitFactor*VolumeScaleFactor*MuscleVolume; ///< Scaled Volume of the muscle in SI base unit (m^3)
    AnyFloat OptimalFiberlength ??= _FIBER_LENGTH_DESIGNVAR(0.1155); ///< Optimal working length of the muscle fiber (m)
    AnyFloat TotalTendonLength ??= _TENDON_LENGTH_DESIGNVAR(0.02475);///< The total tendon length (m)
    AnyFloat K1 ??= DesignVar(10); ///< K1 constant in the muscle model.  Factor for determining shortening speed at optimum length
    AnyFloat K2 ??= DesignVar(0); ///< K2 constant in the muscle model.  Factor for determining shortening speed at optimum length
    AnyFloat Epsilon0 ??= DesignVar(0.053); ///< Epsilon bar in the muscle model. Represents tendon strain at F0
    AnyFloat Fcfast ??= DesignVar(0.4); ///< Factor for determining shortening speed at optimum length
  };
#endif

#if BM_ARM_DELTOID_WRAPPING == OFF
  AnyFolder deltoideus_scapular_part_2 =
  {
    AnyString Muscle = "Deltoideus scapula part 2"; ///< Descriptive name for the muscle, e.g. for plotting
    AnyIntVar MuscleElemAmount = 1; ///< The total amount of elements for this muscle
    AnyFloat Pennationangle ??= DesignVar(0); ///< Pennation angle of the muscle fibers (degres)
    AnyFloat VolumeScaleFactor ??= DesignVar(1.0); ///< Factor for scaling the muscle volume
    AnyFloat MuscleVolume ??= DesignVar(10.395); ///< Volume of the muscle  (ml)
    AnyFloat MuscleVolumeSIScaled ??= .VolumeUnitFactor*VolumeScaleFactor*MuscleVolume; ///< Scaled Volume of the muscle in SI base unit (m^3)
    AnyFloat OptimalFiberlength ??= _FIBER_LENGTH_DESIGNVAR(0.1155); ///< Optimal working length of the muscle fiber (m)
    AnyFloat TotalTendonLength ??= _TENDON_LENGTH_DESIGNVAR(0.02475);///< The total tendon length (m)
    AnyFloat K1 ??= DesignVar(10); ///< K1 constant in the muscle model.  Factor for determining shortening speed at optimum length
    AnyFloat K2 ??= DesignVar(0); ///< K2 constant in the muscle model.  Factor for determining shortening speed at optimum length
    AnyFloat Epsilon0 ??= DesignVar(0.053); ///< Epsilon bar in the muscle model. Represents tendon strain at F0
    AnyFloat Fcfast ??= DesignVar(0.4); ///< Factor for determining shortening speed at optimum length
  };
#endif

#if BM_ARM_DELTOID_WRAPPING == OFF
  AnyFolder deltoideus_scapular_part_3 =
  {
    AnyString Muscle = "Deltoideus scapula part 3"; ///< Descriptive name for the muscle, e.g. for plotting
    AnyIntVar MuscleElemAmount = 1; ///< The total amount of elements for this muscle
    AnyFloat Pennationangle ??= DesignVar(0); ///< Pennation angle of the muscle fibers (degres)
    AnyFloat VolumeScaleFactor ??= DesignVar(1.0); ///< Factor for scaling the muscle volume
    AnyFloat MuscleVolume ??= DesignVar(23.677); ///< Volume of the muscle  (ml)
    AnyFloat MuscleVolumeSIScaled ??= .VolumeUnitFactor*VolumeScaleFactor*MuscleVolume; ///< Scaled Volume of the muscle in SI base unit (m^3)
    AnyFloat OptimalFiberlength ??= _FIBER_LENGTH_DESIGNVAR(0.1155); ///< Optimal working length of the muscle fiber (m)
    AnyFloat TotalTendonLength ??= _TENDON_LENGTH_DESIGNVAR(0.02475);///< The total tendon length (m)
    AnyFloat K1 ??= DesignVar(10); ///< K1 constant in the muscle model.  Factor for determining shortening speed at optimum length
    AnyFloat K2 ??= DesignVar(0); ///< K2 constant in the muscle model.  Factor for determining shortening speed at optimum length
    AnyFloat Epsilon0 ??= DesignVar(0.053); ///< Epsilon bar in the muscle model. Represents tendon strain at F0
    AnyFloat Fcfast ??= DesignVar(0.4); ///< Factor for determining shortening speed at optimum length
  };
#endif

#if BM_ARM_DELTOID_WRAPPING == OFF
  AnyFolder deltoideus_scapular_part_4 =
  {
    AnyString Muscle = "Deltoideus scapula part 4"; ///< Descriptive name for the muscle, e.g. for plotting
    AnyIntVar MuscleElemAmount = 1; ///< The total amount of elements for this muscle
    AnyFloat Pennationangle ??= DesignVar(0); ///< Pennation angle of the muscle fibers (degres)
    AnyFloat VolumeScaleFactor ??= DesignVar(1.0); ///< Factor for scaling the muscle volume
    AnyFloat MuscleVolume ??= DesignVar(27.06); ///< Volume of the muscle  (ml)
    AnyFloat MuscleVolumeSIScaled ??= .VolumeUnitFactor*VolumeScaleFactor*MuscleVolume; ///< Scaled Volume of the muscle in SI base unit (m^3)
    AnyFloat OptimalFiberlength ??= _FIBER_LENGTH_DESIGNVAR(0.132); ///< Optimal working length of the muscle fiber (m)
    AnyFloat TotalTendonLength ??= _TENDON_LENGTH_DESIGNVAR(0.02475);///< The total tendon length (m)
    AnyFloat K1 ??= DesignVar(10); ///< K1 constant in the muscle model.  Factor for determining shortening speed at optimum length
    AnyFloat K2 ??= DesignVar(0); ///< K2 constant in the muscle model.  Factor for determining shortening speed at optimum length
    AnyFloat Epsilon0 ??= DesignVar(0.053); ///< Epsilon bar in the muscle model. Represents tendon strain at F0
    AnyFloat Fcfast ??= DesignVar(0.4); ///< Factor for determining shortening speed at optimum length
  };
#endif

#if BM_ARM_DELTOID_WRAPPING == OFF
  AnyFolder deltoideus_scapular_part_5 =
  {
    AnyString Muscle = "Deltoideus scapula part 5"; ///< Descriptive name for the muscle, e.g. for plotting
    AnyIntVar MuscleElemAmount = 1; ///< The total amount of elements for this muscle
    AnyFloat Pennationangle ??= DesignVar(0); ///< Pennation angle of the muscle fibers (degres)
    AnyFloat VolumeScaleFactor ??= DesignVar(1.0); ///< Factor for scaling the muscle volume
    AnyFloat MuscleVolume ??= DesignVar(27.06); ///< Volume of the muscle  (ml)
    AnyFloat MuscleVolumeSIScaled ??= .VolumeUnitFactor*VolumeScaleFactor*MuscleVolume; ///< Scaled Volume of the muscle in SI base unit (m^3)
    AnyFloat OptimalFiberlength ??= _FIBER_LENGTH_DESIGNVAR(0.132); ///< Optimal working length of the muscle fiber (m)
    AnyFloat TotalTendonLength ??= _TENDON_LENGTH_DESIGNVAR(0.02475);///< The total tendon length (m)
    AnyFloat K1 ??= DesignVar(10); ///< K1 constant in the muscle model.  Factor for determining shortening speed at optimum length
    AnyFloat K2 ??= DesignVar(0); ///< K2 constant in the muscle model.  Factor for determining shortening speed at optimum length
    AnyFloat Epsilon0 ??= DesignVar(0.053); ///< Epsilon bar in the muscle model. Represents tendon strain at F0
    AnyFloat Fcfast ??= DesignVar(0.4); ///< Factor for determining shortening speed at optimum length
  };
#endif

#if BM_ARM_DELTOID_WRAPPING == OFF
  AnyFolder deltoideus_scapular_part_6 =
  {
    AnyString Muscle = "Deltoideus scapula part 6"; ///< Descriptive name for the muscle, e.g. for plotting
    AnyIntVar MuscleElemAmount = 1; ///< The total amount of elements for this muscle
    AnyFloat Pennationangle ??= DesignVar(0); ///< Pennation angle of the muscle fibers (degres)
    AnyFloat VolumeScaleFactor ??= DesignVar(1.0); ///< Factor for scaling the muscle volume
    AnyFloat MuscleVolume ??= DesignVar(27.06); ///< Volume of the muscle  (ml)
    AnyFloat MuscleVolumeSIScaled ??= .VolumeUnitFactor*VolumeScaleFactor*MuscleVolume; ///< Scaled Volume of the muscle in SI base unit (m^3)
    AnyFloat OptimalFiberlength ??= _FIBER_LENGTH_DESIGNVAR(0.132); ///< Optimal working length of the muscle fiber (m)
    AnyFloat TotalTendonLength ??= _TENDON_LENGTH_DESIGNVAR(0.02475);///< The total tendon length (m)
    AnyFloat K1 ??= DesignVar(10); ///< K1 constant in the muscle model.  Factor for determining shortening speed at optimum length
    AnyFloat K2 ??= DesignVar(0); ///< K2 constant in the muscle model.  Factor for determining shortening speed at optimum length
    AnyFloat Epsilon0 ??= DesignVar(0.053); ///< Epsilon bar in the muscle model. Represents tendon strain at F0
    AnyFloat Fcfast ??= DesignVar(0.4); ///< Factor for determining shortening speed at optimum length
  };
#endif

#if BM_ARM_DELTOID_WRAPPING == OFF
  AnyFolder deltoideus_clavicular_part_1 =
  {
    AnyString Muscle = "Deltoideus clavicular part 1"; ///< Descriptive name for the muscle, e.g. for plotting
    AnyIntVar MuscleElemAmount = 1; ///< The total amount of elements for this muscle
    AnyFloat Pennationangle ??= DesignVar(0); ///< Pennation angle of the muscle fibers (degres)
    AnyFloat VolumeScaleFactor ??= DesignVar(1.0); ///< Factor for scaling the muscle volume
    AnyFloat MuscleVolume ??= DesignVar(19.074); ///< Volume of the muscle  (ml)
    AnyFloat MuscleVolumeSIScaled ??= .VolumeUnitFactor*VolumeScaleFactor*MuscleVolume; ///< Scaled Volume of the muscle in SI base unit (m^3)
    AnyFloat OptimalFiberlength ??= _FIBER_LENGTH_DESIGNVAR(0.14025); ///< Optimal working length of the muscle fiber (m)
    AnyFloat TotalTendonLength ??= _TENDON_LENGTH_DESIGNVAR(0.02475);///< The total tendon length (m)
    AnyFloat K1 ??= DesignVar(10); ///< K1 constant in the muscle model.  Factor for determining shortening speed at optimum length
    AnyFloat K2 ??= DesignVar(0); ///< K2 constant in the muscle model.  Factor for determining shortening speed at optimum length
    AnyFloat Epsilon0 ??= DesignVar(0.053); ///< Epsilon bar in the muscle model. Represents tendon strain at F0
    AnyFloat Fcfast ??= DesignVar(0.4); ///< Factor for determining shortening speed at optimum length
  };
#endif

#if BM_ARM_DELTOID_WRAPPING == OFF
  AnyFolder deltoideus_clavicular_part_2 =
  {
    AnyString Muscle = "Deltoideus clavicular part 2"; ///< Descriptive name for the muscle, e.g. for plotting
    AnyIntVar MuscleElemAmount = 1; ///< The total amount of elements for this muscle
    AnyFloat Pennationangle ??= DesignVar(0); ///< Pennation angle of the muscle fibers (degres)
    AnyFloat VolumeScaleFactor ??= DesignVar(1.0); ///< Factor for scaling the muscle volume
    AnyFloat MuscleVolume ??= DesignVar(19.074); ///< Volume of the muscle  (ml)
    AnyFloat MuscleVolumeSIScaled ??= .VolumeUnitFactor*VolumeScaleFactor*MuscleVolume; ///< Scaled Volume of the muscle in SI base unit (m^3)
    AnyFloat OptimalFiberlength ??= _FIBER_LENGTH_DESIGNVAR(0.14025); ///< Optimal working length of the muscle fiber (m)
    AnyFloat TotalTendonLength ??= _TENDON_LENGTH_DESIGNVAR(0.02475);///< The total tendon length (m)
    AnyFloat K1 ??= DesignVar(10); ///< K1 constant in the muscle model.  Factor for determining shortening speed at optimum length
    AnyFloat K2 ??= DesignVar(0); ///< K2 constant in the muscle model.  Factor for determining shortening speed at optimum length
    AnyFloat Epsilon0 ??= DesignVar(0.053); ///< Epsilon bar in the muscle model. Represents tendon strain at F0
    AnyFloat Fcfast ??= DesignVar(0.4); ///< Factor for determining shortening speed at optimum length
  };
#endif

#if BM_ARM_DELTOID_WRAPPING == OFF
  AnyFolder deltoideus_clavicular_part_3 =
  {
    AnyString Muscle = "Deltoideus clavicular part 3"; ///< Descriptive name for the muscle, e.g. for plotting
    AnyIntVar MuscleElemAmount = 1; ///< The total amount of elements for this muscle
    AnyFloat Pennationangle ??= DesignVar(0); ///< Pennation angle of the muscle fibers (degres)
    AnyFloat VolumeScaleFactor ??= DesignVar(1.0); ///< Factor for scaling the muscle volume
    AnyFloat MuscleVolume ??= DesignVar(19.074); ///< Volume of the muscle  (ml)
    AnyFloat MuscleVolumeSIScaled ??= .VolumeUnitFactor*VolumeScaleFactor*MuscleVolume; ///< Scaled Volume of the muscle in SI base unit (m^3)
    AnyFloat OptimalFiberlength ??= _FIBER_LENGTH_DESIGNVAR(0.14025); ///< Optimal working length of the muscle fiber (m)
    AnyFloat TotalTendonLength ??= _TENDON_LENGTH_DESIGNVAR(0.02475);///< The total tendon length (m)
    AnyFloat K1 ??= DesignVar(10); ///< K1 constant in the muscle model.  Factor for determining shortening speed at optimum length
    AnyFloat K2 ??= DesignVar(0); ///< K2 constant in the muscle model.  Factor for determining shortening speed at optimum length
    AnyFloat Epsilon0 ??= DesignVar(0.053); ///< Epsilon bar in the muscle model. Represents tendon strain at F0
    AnyFloat Fcfast ??= DesignVar(0.4); ///< Factor for determining shortening speed at optimum length
  };
#endif

#if BM_ARM_DELTOID_WRAPPING == OFF
  AnyFolder deltoideus_clavicular_part_4 =
  {
    AnyString Muscle = "Deltoideus clavicular part 4"; ///< Descriptive name for the muscle, e.g. for plotting
    AnyIntVar MuscleElemAmount = 1; ///< The total amount of elements for this muscle
    AnyFloat Pennationangle ??= DesignVar(0); ///< Pennation angle of the muscle fibers (degres)
    AnyFloat VolumeScaleFactor ??= DesignVar(1.0); ///< Factor for scaling the muscle volume
    AnyFloat MuscleVolume ??= DesignVar(19.074); ///< Volume of the muscle  (ml)
    AnyFloat MuscleVolumeSIScaled ??= .VolumeUnitFactor*VolumeScaleFactor*MuscleVolume; ///< Scaled Volume of the muscle in SI base unit (m^3)
    AnyFloat OptimalFiberlength ??= _FIBER_LENGTH_DESIGNVAR(0.14025); ///< Optimal working length of the muscle fiber (m)
    AnyFloat TotalTendonLength ??= _TENDON_LENGTH_DESIGNVAR(0.02475);///< The total tendon length (m)
    AnyFloat K1 ??= DesignVar(10); ///< K1 constant in the muscle model.  Factor for determining shortening speed at optimum length
    AnyFloat K2 ??= DesignVar(0); ///< K2 constant in the muscle model.  Factor for determining shortening speed at optimum length
    AnyFloat Epsilon0 ??= DesignVar(0.053); ///< Epsilon bar in the muscle model. Represents tendon strain at F0
    AnyFloat Fcfast ??= DesignVar(0.4); ///< Factor for determining shortening speed at optimum length
  };
#endif

#if BM_ARM_DELTOID_WRAPPING == OFF
  AnyFolder deltoideus_clavicular_part_5 =
  {
    AnyString Muscle = "Deltoideus clavicular part 5"; ///< Descriptive name for the muscle, e.g. for plotting
    AnyIntVar MuscleElemAmount = 1; ///< The total amount of elements for this muscle
    AnyFloat Pennationangle ??= DesignVar(0); ///< Pennation angle of the muscle fibers (degres)
    AnyFloat VolumeScaleFactor ??= DesignVar(1.0); ///< Factor for scaling the muscle volume
    AnyFloat MuscleVolume ??= DesignVar(19.074); ///< Volume of the muscle  (ml)
    AnyFloat MuscleVolumeSIScaled ??= .VolumeUnitFactor*VolumeScaleFactor*MuscleVolume; ///< Scaled Volume of the muscle in SI base unit (m^3)
    AnyFloat OptimalFiberlength ??= _FIBER_LENGTH_DESIGNVAR(0.14025); ///< Optimal working length of the muscle fiber (m)
    AnyFloat TotalTendonLength ??= _TENDON_LENGTH_DESIGNVAR(0.02475);///< The total tendon length (m)
    AnyFloat K1 ??= DesignVar(10); ///< K1 constant in the muscle model.  Factor for determining shortening speed at optimum length
    AnyFloat K2 ??= DesignVar(0); ///< K2 constant in the muscle model.  Factor for determining shortening speed at optimum length
    AnyFloat Epsilon0 ??= DesignVar(0.053); ///< Epsilon bar in the muscle model. Represents tendon strain at F0
    AnyFloat Fcfast ??= DesignVar(0.4); ///< Factor for determining shortening speed at optimum length
  };
#endif

#if BM_ARM_DELTOID_WRAPPING == OFF
  AnyFolder deltoideus_clavicular_part_6 =
  {
    AnyString Muscle = "Deltoideus clavicular part 6"; ///< Descriptive name for the muscle, e.g. for plotting
    AnyIntVar MuscleElemAmount = 1; ///< The total amount of elements for this muscle
    AnyFloat Pennationangle ??= DesignVar(0); ///< Pennation angle of the muscle fibers (degres)
    AnyFloat VolumeScaleFactor ??= DesignVar(1.0); ///< Factor for scaling the muscle volume
    AnyFloat MuscleVolume ??= DesignVar(19.074); ///< Volume of the muscle  (ml)
    AnyFloat MuscleVolumeSIScaled ??= .VolumeUnitFactor*VolumeScaleFactor*MuscleVolume; ///< Scaled Volume of the muscle in SI base unit (m^3)
    AnyFloat OptimalFiberlength ??= _FIBER_LENGTH_DESIGNVAR(0.14025); ///< Optimal working length of the muscle fiber (m)
    AnyFloat TotalTendonLength ??= _TENDON_LENGTH_DESIGNVAR(0.02475);///< The total tendon length (m)
    AnyFloat K1 ??= DesignVar(10); ///< K1 constant in the muscle model.  Factor for determining shortening speed at optimum length
    AnyFloat K2 ??= DesignVar(0); ///< K2 constant in the muscle model.  Factor for determining shortening speed at optimum length
    AnyFloat Epsilon0 ??= DesignVar(0.053); ///< Epsilon bar in the muscle model. Represents tendon strain at F0
    AnyFloat Fcfast ??= DesignVar(0.4); ///< Factor for determining shortening speed at optimum length
  };
#endif

#if BM_ARM_DELTOID_WRAPPING != OFF
  AnyFolder deltoideus_posterior_part =
  {
    AnyString Muscle = "Deltoideus posterior"; ///< Descriptive name for the muscle, e.g. for plotting
    AnyIntVar MuscleElemAmount = 4; ///< The total amount of elements for this muscle
    AnyFloat Pennationangle ??= DesignVar(0); ///< Pennation angle of the muscle fibers (degres)
    AnyFloat VolumeScaleFactor ??= DesignVar(1.0); ///< Factor for scaling the muscle volume
    AnyFloat MuscleVolume ??= DesignVar(41.58); ///< Volume of the muscle  (ml)
    AnyFloat MuscleVolumeSIScaled ??= .VolumeUnitFactor*VolumeScaleFactor*MuscleVolume; ///< Scaled Volume of the muscle in SI base unit (m^3)
    AnyFloat OptimalFiberlength ??= _FIBER_LENGTH_DESIGNVAR(0.1155); ///< Optimal working length of the muscle fiber (m)
    AnyFloat TotalTendonLength ??= _TENDON_LENGTH_DESIGNVAR(0.02475);///< The total tendon length (m)
    AnyFloat K1 ??= DesignVar(10); ///< K1 constant in the muscle model.  Factor for determining shortening speed at optimum length
    AnyFloat K2 ??= DesignVar(0); ///< K2 constant in the muscle model.  Factor for determining shortening speed at optimum length
    AnyFloat Epsilon0 ??= DesignVar(0.053); ///< Epsilon bar in the muscle model. Represents tendon strain at F0
    AnyFloat Fcfast ??= DesignVar(0.4); ///< Factor for determining shortening speed at optimum length
  };
#endif

#if BM_ARM_DELTOID_WRAPPING != OFF
  AnyFolder deltoideus_lateral_part =
  {
    AnyString Muscle = "Deltoideus lateral"; ///< Descriptive name for the muscle, e.g. for plotting
    AnyIntVar MuscleElemAmount = 4; ///< The total amount of elements for this muscle
    AnyFloat Pennationangle ??= DesignVar(0); ///< Pennation angle of the muscle fibers (degres)
    AnyFloat VolumeScaleFactor ??= DesignVar(1.0); ///< Factor for scaling the muscle volume
    AnyFloat MuscleVolume ??= DesignVar(108.24); ///< Volume of the muscle  (ml)
    AnyFloat MuscleVolumeSIScaled ??= .VolumeUnitFactor*VolumeScaleFactor*MuscleVolume; ///< Scaled Volume of the muscle in SI base unit (m^3)
    AnyFloat OptimalFiberlength ??= _FIBER_LENGTH_DESIGNVAR(0.132); ///< Optimal working length of the muscle fiber (m)
    AnyFloat TotalTendonLength ??= _TENDON_LENGTH_DESIGNVAR(0.02475);///< The total tendon length (m)
    AnyFloat K1 ??= DesignVar(10); ///< K1 constant in the muscle model.  Factor for determining shortening speed at optimum length
    AnyFloat K2 ??= DesignVar(0); ///< K2 constant in the muscle model.  Factor for determining shortening speed at optimum length
    AnyFloat Epsilon0 ??= DesignVar(0.053); ///< Epsilon bar in the muscle model. Represents tendon strain at F0
    AnyFloat Fcfast ??= DesignVar(0.4); ///< Factor for determining shortening speed at optimum length
  };
#endif

#if BM_ARM_DELTOID_WRAPPING != OFF
  AnyFolder deltoideus_anterior_part =
  {
    AnyString Muscle = "Deltoideus anterior"; ///< Descriptive name for the muscle, e.g. for plotting
    AnyIntVar MuscleElemAmount = 4; ///< The total amount of elements for this muscle
    AnyFloat Pennationangle ??= DesignVar(0); ///< Pennation angle of the muscle fibers (degres)
    AnyFloat VolumeScaleFactor ??= DesignVar(1.0); ///< Factor for scaling the muscle volume
    AnyFloat MuscleVolume ??= DesignVar(76.296); ///< Volume of the muscle  (ml)
    AnyFloat MuscleVolumeSIScaled ??= .VolumeUnitFactor*VolumeScaleFactor*MuscleVolume; ///< Scaled Volume of the muscle in SI base unit (m^3)
    AnyFloat OptimalFiberlength ??= _FIBER_LENGTH_DESIGNVAR(0.14025); ///< Optimal working length of the muscle fiber (m)
    AnyFloat TotalTendonLength ??= _TENDON_LENGTH_DESIGNVAR(0.02475);///< The total tendon length (m)
    AnyFloat K1 ??= DesignVar(10); ///< K1 constant in the muscle model.  Factor for determining shortening speed at optimum length
    AnyFloat K2 ??= DesignVar(0); ///< K2 constant in the muscle model.  Factor for determining shortening speed at optimum length
    AnyFloat Epsilon0 ??= DesignVar(0.053); ///< Epsilon bar in the muscle model. Represents tendon strain at F0
    AnyFloat Fcfast ??= DesignVar(0.4); ///< Factor for determining shortening speed at optimum length
  };
#endif

  AnyFolder infraspinatus =
  {
    AnyString Muscle = "Infraspinatus"; ///< Descriptive name for the muscle, e.g. for plotting
    AnyIntVar MuscleElemAmount = 6; ///< The total amount of elements for this muscle
    AnyFloat Pennationangle ??= DesignVar(0); ///< Pennation angle of the muscle fibers (degres)
    AnyFloat VolumeScaleFactor ??= DesignVar(1.0); ///< Factor for scaling the muscle volume
    AnyFloat MuscleVolume ??= DesignVar(53.118); ///< Volume of the muscle  (ml)
    AnyFloat MuscleVolumeSIScaled ??= .VolumeUnitFactor*VolumeScaleFactor*MuscleVolume; ///< Scaled Volume of the muscle in SI base unit (m^3)
    AnyFloat OptimalFiberlength ??= _FIBER_LENGTH_DESIGNVAR(0.065); ///< Optimal working length of the muscle fiber (m)
    AnyFloat TotalTendonLength ??= _TENDON_LENGTH_DESIGNVAR(0.0075);///< The total tendon length (m)
    AnyFloat K1 ??= DesignVar(10); ///< K1 constant in the muscle model.  Factor for determining shortening speed at optimum length
    AnyFloat K2 ??= DesignVar(0); ///< K2 constant in the muscle model.  Factor for determining shortening speed at optimum length
    AnyFloat Epsilon0 ??= DesignVar(0.053); ///< Epsilon bar in the muscle model. Represents tendon strain at F0
    AnyFloat Fcfast ??= DesignVar(0.4); ///< Factor for determining shortening speed at optimum length
  };

  AnyFolder latissimus_dorsi =
  {
    AnyString Muscle = "Latissimus dorsi"; ///< Descriptive name for the muscle, e.g. for plotting
    AnyIntVar MuscleElemAmount = 11; ///< The total amount of elements for this muscle
    AnyFloat Pennationangle ??= DesignVar(0); ///< Pennation angle of the muscle fibers (degres)
    AnyFloat VolumeScaleFactor ??= DesignVar(1.0); ///< Factor for scaling the muscle volume
    AnyFloat MuscleVolume ??= DesignVar(119.28); ///< Volume of the muscle  (ml)
    AnyFloat MuscleVolumeSIScaled ??= .VolumeUnitFactor*VolumeScaleFactor*MuscleVolume; ///< Scaled Volume of the muscle in SI base unit (m^3)
    AnyFloat OptimalFiberlength ??= _FIBER_LENGTH_DESIGNVAR(0.14); ///< Optimal working length of the muscle fiber (m)
    AnyFloat TotalTendonLength ??= _TENDON_LENGTH_DESIGNVAR(0.021);///< The total tendon length (m)
    AnyFloat K1 ??= DesignVar(10); ///< K1 constant in the muscle model.  Factor for determining shortening speed at optimum length
    AnyFloat K2 ??= DesignVar(0); ///< K2 constant in the muscle model.  Factor for determining shortening speed at optimum length
    AnyFloat Epsilon0 ??= DesignVar(0.053); ///< Epsilon bar in the muscle model. Represents tendon strain at F0
    AnyFloat Fcfast ??= DesignVar(0.4); ///< Factor for determining shortening speed at optimum length
  };

  AnyFolder levator_scapulae =
  {
    AnyString Muscle = "Levator scapulae"; ///< Descriptive name for the muscle, e.g. for plotting
    AnyIntVar MuscleElemAmount = 4; ///< The total amount of elements for this muscle
    AnyFloat Pennationangle ??= DesignVar(5); ///< Pennation angle of the muscle fibers (degres)
    AnyFloat VolumeScaleFactor ??= DesignVar(1.0); ///< Factor for scaling the muscle volume
    AnyFloat MuscleVolume ??= DesignVar(34.41); ///< Volume of the muscle  (ml)
    AnyFloat MuscleVolumeSIScaled ??= .VolumeUnitFactor*VolumeScaleFactor*MuscleVolume; ///< Scaled Volume of the muscle in SI base unit (m^3)
    AnyFloat OptimalFiberlength ??= _FIBER_LENGTH_DESIGNVAR(0.1); ///< Optimal working length of the muscle fiber (m)
    AnyFloat TotalTendonLength ??= _TENDON_LENGTH_DESIGNVAR(0.02);///< The total tendon length (m)
    AnyFloat K1 ??= DesignVar(10); ///< K1 constant in the muscle model.  Factor for determining shortening speed at optimum length
    AnyFloat K2 ??= DesignVar(0); ///< K2 constant in the muscle model.  Factor for determining shortening speed at optimum length
    AnyFloat Epsilon0 ??= DesignVar(0.053); ///< Epsilon bar in the muscle model. Represents tendon strain at F0
    AnyFloat Fcfast ??= DesignVar(0.4); ///< Factor for determining shortening speed at optimum length
  };

  AnyFolder pectoralis_major_thoracic_part =
  {
    AnyString Muscle = "Pectoralis major thoracic"; ///< Descriptive name for the muscle, e.g. for plotting
    AnyIntVar MuscleElemAmount = 10; ///< The total amount of elements for this muscle
    AnyFloat Pennationangle ??= DesignVar(5); ///< Pennation angle of the muscle fibers (degres)
    AnyFloat VolumeScaleFactor ??= DesignVar(1.0); ///< Factor for scaling the muscle volume
    AnyFloat MuscleVolume ??= DesignVar(78); ///< Volume of the muscle  (ml)
    AnyFloat MuscleVolumeSIScaled ??= .VolumeUnitFactor*VolumeScaleFactor*MuscleVolume; ///< Scaled Volume of the muscle in SI base unit (m^3)
    AnyFloat OptimalFiberlength ??= _FIBER_LENGTH_DESIGNVAR(0.12); ///< Optimal working length of the muscle fiber (m)
    AnyFloat TotalTendonLength ??= _TENDON_LENGTH_DESIGNVAR(0.012);///< The total tendon length (m)
    AnyFloat K1 ??= DesignVar(10); ///< K1 constant in the muscle model.  Factor for determining shortening speed at optimum length
    AnyFloat K2 ??= DesignVar(0); ///< K2 constant in the muscle model.  Factor for determining shortening speed at optimum length
    AnyFloat Epsilon0 ??= DesignVar(0.053); ///< Epsilon bar in the muscle model. Represents tendon strain at F0
    AnyFloat Fcfast ??= DesignVar(0.4); ///< Factor for determining shortening speed at optimum length
  };

  AnyFolder pectoralis_major_clavicular_part =
  {
    AnyString Muscle = "Pectoralis major clavicular"; ///< Descriptive name for the muscle, e.g. for plotting
    AnyIntVar MuscleElemAmount = 5; ///< The total amount of elements for this muscle
    AnyFloat Pennationangle ??= DesignVar(5); ///< Pennation angle of the muscle fibers (degres)
    AnyFloat VolumeScaleFactor ??= DesignVar(1.0); ///< Factor for scaling the muscle volume
    AnyFloat MuscleVolume ??= DesignVar(31.2); ///< Volume of the muscle  (ml)
    AnyFloat MuscleVolumeSIScaled ??= .VolumeUnitFactor*VolumeScaleFactor*MuscleVolume; ///< Scaled Volume of the muscle in SI base unit (m^3)
    AnyFloat OptimalFiberlength ??= _FIBER_LENGTH_DESIGNVAR(0.12); ///< Optimal working length of the muscle fiber (m)
    AnyFloat TotalTendonLength ??= _TENDON_LENGTH_DESIGNVAR(0.012);///< The total tendon length (m)
    AnyFloat K1 ??= DesignVar(10); ///< K1 constant in the muscle model.  Factor for determining shortening speed at optimum length
    AnyFloat K2 ??= DesignVar(0); ///< K2 constant in the muscle model.  Factor for determining shortening speed at optimum length
    AnyFloat Epsilon0 ??= DesignVar(0.053); ///< Epsilon bar in the muscle model. Represents tendon strain at F0
    AnyFloat Fcfast ??= DesignVar(0.4); ///< Factor for determining shortening speed at optimum length
  };

  AnyFolder pectoralis_minor =
  {
    AnyString Muscle = "Pectoralis minor"; ///< Descriptive name for the muscle, e.g. for plotting
    AnyIntVar MuscleElemAmount = 3; ///< The total amount of elements for this muscle
    AnyFloat Pennationangle ??= DesignVar(5); ///< Pennation angle of the muscle fibers (degres)
    AnyFloat VolumeScaleFactor ??= DesignVar(1.0); ///< Factor for scaling the muscle volume
    AnyFloat MuscleVolume ??= DesignVar(27.424); ///< Volume of the muscle  (ml)
    AnyFloat MuscleVolumeSIScaled ??= .VolumeUnitFactor*VolumeScaleFactor*MuscleVolume; ///< Scaled Volume of the muscle in SI base unit (m^3)
    AnyFloat OptimalFiberlength ??= _FIBER_LENGTH_DESIGNVAR(0.08); ///< Optimal working length of the muscle fiber (m)
    AnyFloat TotalTendonLength ??= _TENDON_LENGTH_DESIGNVAR(0.008);///< The total tendon length (m)
    AnyFloat K1 ??= DesignVar(10); ///< K1 constant in the muscle model.  Factor for determining shortening speed at optimum length
    AnyFloat K2 ??= DesignVar(0); ///< K2 constant in the muscle model.  Factor for determining shortening speed at optimum length
    AnyFloat Epsilon0 ??= DesignVar(0.053); ///< Epsilon bar in the muscle model. Represents tendon strain at F0
    AnyFloat Fcfast ??= DesignVar(0.4); ///< Factor for determining shortening speed at optimum length
  };

  AnyFolder rhomboideus =
  {
    AnyString Muscle = "Rhomboideus"; ///< Descriptive name for the muscle, e.g. for plotting
    AnyIntVar MuscleElemAmount = 6; ///< The total amount of elements for this muscle
    AnyFloat Pennationangle ??= DesignVar(5); ///< Pennation angle of the muscle fibers (degres)
    AnyFloat VolumeScaleFactor ??= DesignVar(1.0); ///< Factor for scaling the muscle volume
    AnyFloat MuscleVolume ??= DesignVar(51.469); ///< Volume of the muscle  (ml)
    AnyFloat MuscleVolumeSIScaled ??= .VolumeUnitFactor*VolumeScaleFactor*MuscleVolume; ///< Scaled Volume of the muscle in SI base unit (m^3)
    AnyFloat OptimalFiberlength ??= _FIBER_LENGTH_DESIGNVAR(0.068); ///< Optimal working length of the muscle fiber (m)
    AnyFloat TotalTendonLength ??= _TENDON_LENGTH_DESIGNVAR(0.0136);///< The total tendon length (m)
    AnyFloat K1 ??= DesignVar(10); ///< K1 constant in the muscle model.  Factor for determining shortening speed at optimum length
    AnyFloat K2 ??= DesignVar(0); ///< K2 constant in the muscle model.  Factor for determining shortening speed at optimum length
    AnyFloat Epsilon0 ??= DesignVar(0.053); ///< Epsilon bar in the muscle model. Represents tendon strain at F0
    AnyFloat Fcfast ??= DesignVar(0.4); ///< Factor for determining shortening speed at optimum length
  };

  AnyFolder serratus_anterior =
  {
    AnyString Muscle = "Serratus anterior"; ///< Descriptive name for the muscle, e.g. for plotting
    AnyIntVar MuscleElemAmount = 9; ///< The total amount of elements for this muscle
    AnyFloat Pennationangle ??= DesignVar(0); ///< Pennation angle of the muscle fibers (degres)
    AnyFloat VolumeScaleFactor ??= DesignVar(1.0); ///< Factor for scaling the muscle volume
    AnyFloat MuscleVolume ??= DesignVar(83.439); ///< Volume of the muscle  (ml)
    AnyFloat MuscleVolumeSIScaled ??= .VolumeUnitFactor*VolumeScaleFactor*MuscleVolume; ///< Scaled Volume of the muscle in SI base unit (m^3)
    AnyFloat OptimalFiberlength ??= _FIBER_LENGTH_DESIGNVAR(0.073); ///< Optimal working length of the muscle fiber (m)
    AnyFloat TotalTendonLength ??= _TENDON_LENGTH_DESIGNVAR(0.0073);///< The total tendon length (m)
    AnyFloat K1 ??= DesignVar(10); ///< K1 constant in the muscle model.  Factor for determining shortening speed at optimum length
    AnyFloat K2 ??= DesignVar(0); ///< K2 constant in the muscle model.  Factor for determining shortening speed at optimum length
    AnyFloat Epsilon0 ??= DesignVar(0.053); ///< Epsilon bar in the muscle model. Represents tendon strain at F0
    AnyFloat Fcfast ??= DesignVar(0.4); ///< Factor for determining shortening speed at optimum length
  };

  AnyFolder Sternocleidomastoid =
  {
    AnyString Muscle = "Sternocleidomastoid"; ///< Descriptive name for the muscle, e.g. for plotting
    AnyIntVar MuscleElemAmount = 2; ///< The total amount of elements for this muscle
    AnyFloat Pennationangle ??= DesignVar(0); ///< Pennation angle of the muscle fibers (degres)
    AnyFloat VolumeScaleFactor ??= DesignVar(1.0); ///< Factor for scaling the muscle volume
    AnyFloat MuscleVolume ??= DesignVar(34.686); ///< Volume of the muscle  (ml)
    AnyFloat MuscleVolumeSIScaled ??= .VolumeUnitFactor*VolumeScaleFactor*MuscleVolume; ///< Scaled Volume of the muscle in SI base unit (m^3)
    AnyFloat OptimalFiberlength ??= _FIBER_LENGTH_DESIGNVAR(0.141); ///< Optimal working length of the muscle fiber (m)
    AnyFloat TotalTendonLength ??= _TENDON_LENGTH_DESIGNVAR(0.058);///< The total tendon length (m)
    AnyFloat K1 ??= DesignVar(10); ///< K1 constant in the muscle model.  Factor for determining shortening speed at optimum length
    AnyFloat K2 ??= DesignVar(0); ///< K2 constant in the muscle model.  Factor for determining shortening speed at optimum length
    AnyFloat Epsilon0 ??= DesignVar(0.053); ///< Epsilon bar in the muscle model. Represents tendon strain at F0
    AnyFloat Fcfast ??= DesignVar(0.4); ///< Factor for determining shortening speed at optimum length
  };

  AnyFolder subscapularis =
  {
    AnyString Muscle = "Subscapularis"; ///< Descriptive name for the muscle, e.g. for plotting
    AnyIntVar MuscleElemAmount = 6; ///< The total amount of elements for this muscle
    AnyFloat Pennationangle ??= DesignVar(4); ///< Pennation angle of the muscle fibers (degres)
    AnyFloat VolumeScaleFactor ??= DesignVar(1.0); ///< Factor for scaling the muscle volume
    AnyFloat MuscleVolume ??= DesignVar(120); ///< Volume of the muscle  (ml)
    AnyFloat MuscleVolumeSIScaled ??= .VolumeUnitFactor*VolumeScaleFactor*MuscleVolume; ///< Scaled Volume of the muscle in SI base unit (m^3)
    AnyFloat OptimalFiberlength ??= _FIBER_LENGTH_DESIGNVAR(0.08); ///< Optimal working length of the muscle fiber (m)
    AnyFloat TotalTendonLength ??= _TENDON_LENGTH_DESIGNVAR(0.04);///< The total tendon length (m)
    AnyFloat K1 ??= DesignVar(10); ///< K1 constant in the muscle model.  Factor for determining shortening speed at optimum length
    AnyFloat K2 ??= DesignVar(0); ///< K2 constant in the muscle model.  Factor for determining shortening speed at optimum length
    AnyFloat Epsilon0 ??= DesignVar(0.053); ///< Epsilon bar in the muscle model. Represents tendon strain at F0
    AnyFloat Fcfast ??= DesignVar(0.4); ///< Factor for determining shortening speed at optimum length
  };

  AnyFolder supraspinatus =
  {
    AnyString Muscle = "Supraspinatus"; ///< Descriptive name for the muscle, e.g. for plotting
    AnyIntVar MuscleElemAmount = 6; ///< The total amount of elements for this muscle
    AnyFloat Pennationangle ??= DesignVar(0); ///< Pennation angle of the muscle fibers (degres)
    AnyFloat VolumeScaleFactor ??= DesignVar(1.0); ///< Factor for scaling the muscle volume
    AnyFloat MuscleVolume ??= DesignVar(21.996); ///< Volume of the muscle  (ml)
    AnyFloat MuscleVolumeSIScaled ??= .VolumeUnitFactor*VolumeScaleFactor*MuscleVolume; ///< Scaled Volume of the muscle in SI base unit (m^3)
    AnyFloat OptimalFiberlength ??= _FIBER_LENGTH_DESIGNVAR(0.047); ///< Optimal working length of the muscle fiber (m)
    AnyFloat TotalTendonLength ??= _TENDON_LENGTH_DESIGNVAR(0.00376);///< The total tendon length (m)
    AnyFloat K1 ??= DesignVar(10); ///< K1 constant in the muscle model.  Factor for determining shortening speed at optimum length
    AnyFloat K2 ??= DesignVar(0); ///< K2 constant in the muscle model.  Factor for determining shortening speed at optimum length
    AnyFloat Epsilon0 ??= DesignVar(0.053); ///< Epsilon bar in the muscle model. Represents tendon strain at F0
    AnyFloat Fcfast ??= DesignVar(0.4); ///< Factor for determining shortening speed at optimum length
  };

  AnyFolder teres_major =
  {
    AnyString Muscle = "Teres major"; ///< Descriptive name for the muscle, e.g. for plotting
    AnyIntVar MuscleElemAmount = 6; ///< The total amount of elements for this muscle
    AnyFloat Pennationangle ??= DesignVar(2); ///< Pennation angle of the muscle fibers (degres)
    AnyFloat VolumeScaleFactor ??= DesignVar(1.0); ///< Factor for scaling the muscle volume
    AnyFloat MuscleVolume ??= DesignVar(30); ///< Volume of the muscle  (ml)
    AnyFloat MuscleVolumeSIScaled ??= .VolumeUnitFactor*VolumeScaleFactor*MuscleVolume; ///< Scaled Volume of the muscle in SI base unit (m^3)
    AnyFloat OptimalFiberlength ??= _FIBER_LENGTH_DESIGNVAR(0.1); ///< Optimal working length of the muscle fiber (m)
    AnyFloat TotalTendonLength ??= _TENDON_LENGTH_DESIGNVAR(0.01);///< The total tendon length (m)
    AnyFloat K1 ??= DesignVar(10); ///< K1 constant in the muscle model.  Factor for determining shortening speed at optimum length
    AnyFloat K2 ??= DesignVar(0); ///< K2 constant in the muscle model.  Factor for determining shortening speed at optimum length
    AnyFloat Epsilon0 ??= DesignVar(0.053); ///< Epsilon bar in the muscle model. Represents tendon strain at F0
    AnyFloat Fcfast ??= DesignVar(0.4); ///< Factor for determining shortening speed at optimum length
  };

  AnyFolder teres_minor =
  {
    AnyString Muscle = "Teres minor"; ///< Descriptive name for the muscle, e.g. for plotting
    AnyIntVar MuscleElemAmount = 6; ///< The total amount of elements for this muscle
    AnyFloat Pennationangle ??= DesignVar(2); ///< Pennation angle of the muscle fibers (degres)
    AnyFloat VolumeScaleFactor ??= DesignVar(1.0); ///< Factor for scaling the muscle volume
    AnyFloat MuscleVolume ??= DesignVar(21.672); ///< Volume of the muscle  (ml)
    AnyFloat MuscleVolumeSIScaled ??= .VolumeUnitFactor*VolumeScaleFactor*MuscleVolume; ///< Scaled Volume of the muscle in SI base unit (m^3)
    AnyFloat OptimalFiberlength ??= _FIBER_LENGTH_DESIGNVAR(0.07); ///< Optimal working length of the muscle fiber (m)
    AnyFloat TotalTendonLength ??= _TENDON_LENGTH_DESIGNVAR(0.007);///< The total tendon length (m)
    AnyFloat K1 ??= DesignVar(10); ///< K1 constant in the muscle model.  Factor for determining shortening speed at optimum length
    AnyFloat K2 ??= DesignVar(0); ///< K2 constant in the muscle model.  Factor for determining shortening speed at optimum length
    AnyFloat Epsilon0 ??= DesignVar(0.053); ///< Epsilon bar in the muscle model. Represents tendon strain at F0
    AnyFloat Fcfast ??= DesignVar(0.4); ///< Factor for determining shortening speed at optimum length
  };

  AnyFolder trapezius_scapular_part =
  {
    AnyString Muscle = "Trapezius scapular part"; ///< Descriptive name for the muscle, e.g. for plotting
    AnyIntVar MuscleElemAmount = 14; ///< The total amount of elements for this muscle
    AnyFloat Pennationangle ??= DesignVar(10); ///< Pennation angle of the muscle fibers (degres)
    AnyFloat VolumeScaleFactor ??= DesignVar(1.0); ///< Factor for scaling the muscle volume
    AnyFloat MuscleVolume ??= DesignVar(87.3); ///< Volume of the muscle  (ml)
    AnyFloat MuscleVolumeSIScaled ??= .VolumeUnitFactor*VolumeScaleFactor*MuscleVolume; ///< Scaled Volume of the muscle in SI base unit (m^3)
    AnyFloat OptimalFiberlength ??= _FIBER_LENGTH_DESIGNVAR(0.1); ///< Optimal working length of the muscle fiber (m)
    AnyFloat TotalTendonLength ??= _TENDON_LENGTH_DESIGNVAR(0.02);///< The total tendon length (m)
    AnyFloat K1 ??= DesignVar(10); ///< K1 constant in the muscle model.  Factor for determining shortening speed at optimum length
    AnyFloat K2 ??= DesignVar(0); ///< K2 constant in the muscle model.  Factor for determining shortening speed at optimum length
    AnyFloat Epsilon0 ??= DesignVar(0.053); ///< Epsilon bar in the muscle model. Represents tendon strain at F0
    AnyFloat Fcfast ??= DesignVar(0.4); ///< Factor for determining shortening speed at optimum length
  };

  AnyFolder trapezius_clavicular_part =
  {
    AnyString Muscle = "Trapezius clavicular part"; ///< Descriptive name for the muscle, e.g. for plotting
    AnyIntVar MuscleElemAmount = 6; ///< The total amount of elements for this muscle
    AnyFloat Pennationangle ??= DesignVar(10); ///< Pennation angle of the muscle fibers (degres)
    AnyFloat VolumeScaleFactor ??= DesignVar(1.0); ///< Factor for scaling the muscle volume
    AnyFloat MuscleVolume ??= DesignVar(87.3); ///< Volume of the muscle  (ml)
    AnyFloat MuscleVolumeSIScaled ??= .VolumeUnitFactor*VolumeScaleFactor*MuscleVolume; ///< Scaled Volume of the muscle in SI base unit (m^3)
    AnyFloat OptimalFiberlength ??= _FIBER_LENGTH_DESIGNVAR(0.1); ///< Optimal working length of the muscle fiber (m)
    AnyFloat TotalTendonLength ??= _TENDON_LENGTH_DESIGNVAR(0.01);///< The total tendon length (m)
    AnyFloat K1 ??= DesignVar(10); ///< K1 constant in the muscle model.  Factor for determining shortening speed at optimum length
    AnyFloat K2 ??= DesignVar(0); ///< K2 constant in the muscle model.  Factor for determining shortening speed at optimum length
    AnyFloat Epsilon0 ??= DesignVar(0.053); ///< Epsilon bar in the muscle model. Represents tendon strain at F0
    AnyFloat Fcfast ??= DesignVar(0.4); ///< Factor for determining shortening speed at optimum length
  };

  AnyFolder TricepsBrachiiLongum =
  {
    AnyString Muscle = "Triceps Long head"; ///< Descriptive name for the muscle, e.g. for plotting
    AnyIntVar MuscleElemAmount = 2; ///< The total amount of elements for this muscle
    AnyFloat Pennationangle ??= DesignVar(30); ///< Pennation angle of the muscle fibers (degres)
    AnyFloat VolumeScaleFactor ??= DesignVar(1.0); ///< Factor for scaling the muscle volume
    AnyFloat MuscleVolume ??= DesignVar(52.823); ///< Volume of the muscle  (ml)
    AnyFloat MuscleVolumeSIScaled ??= .VolumeUnitFactor*VolumeScaleFactor*MuscleVolume; ///< Scaled Volume of the muscle in SI base unit (m^3)
    AnyFloat OptimalFiberlength ??= _FIBER_LENGTH_DESIGNVAR(0.094); ///< Optimal working length of the muscle fiber (m)
    AnyFloat TotalTendonLength ??= _TENDON_LENGTH_DESIGNVAR(0.0329);///< The total tendon length (m)
    AnyFloat K1 ??= DesignVar(10); ///< K1 constant in the muscle model.  Factor for determining shortening speed at optimum length
    AnyFloat K2 ??= DesignVar(0); ///< K2 constant in the muscle model.  Factor for determining shortening speed at optimum length
    AnyFloat Epsilon0 ??= DesignVar(0.053); ///< Epsilon bar in the muscle model. Represents tendon strain at F0
    AnyFloat Fcfast ??= DesignVar(0.4); ///< Factor for determining shortening speed at optimum length
  };

  AnyFolder Brachialis =
  {
    AnyString Muscle = "Brachialis"; ///< Descriptive name for the muscle, e.g. for plotting
    AnyIntVar MuscleElemAmount = 2; ///< The total amount of elements for this muscle
    AnyFloat Pennationangle ??= DesignVar(15); ///< Pennation angle of the muscle fibers (degres)
    AnyFloat VolumeScaleFactor ??= DesignVar(1.0); ///< Factor for scaling the muscle volume
    AnyFloat MuscleVolume ??= DesignVar(75.078); ///< Volume of the muscle  (ml)
    AnyFloat MuscleVolumeSIScaled ??= .VolumeUnitFactor*VolumeScaleFactor*MuscleVolume; ///< Scaled Volume of the muscle in SI base unit (m^3)
    AnyFloat OptimalFiberlength ??= _FIBER_LENGTH_DESIGNVAR(0.123); ///< Optimal working length of the muscle fiber (m)
    AnyFloat TotalTendonLength ??= _TENDON_LENGTH_DESIGNVAR(0.0105);///< The total tendon length (m)
    AnyFloat K1 ??= DesignVar(10); ///< K1 constant in the muscle model.  Factor for determining shortening speed at optimum length
    AnyFloat K2 ??= DesignVar(0); ///< K2 constant in the muscle model.  Factor for determining shortening speed at optimum length
    AnyFloat Epsilon0 ??= DesignVar(0.053); ///< Epsilon bar in the muscle model. Represents tendon strain at F0
    AnyFloat Fcfast ??= DesignVar(0.4); ///< Factor for determining shortening speed at optimum length
  };

  AnyFolder TricepsBrachiiMediale =
  {
    AnyString Muscle = "Triceps medial head"; ///< Descriptive name for the muscle, e.g. for plotting
    AnyIntVar MuscleElemAmount = 2; ///< The total amount of elements for this muscle
    AnyFloat Pennationangle ??= DesignVar(45); ///< Pennation angle of the muscle fibers (degres)
    AnyFloat VolumeScaleFactor ??= DesignVar(1.0); ///< Factor for scaling the muscle volume
    AnyFloat MuscleVolume ??= DesignVar(78.743); ///< Volume of the muscle  (ml)
    AnyFloat MuscleVolumeSIScaled ??= .VolumeUnitFactor*VolumeScaleFactor*MuscleVolume; ///< Scaled Volume of the muscle in SI base unit (m^3)
    AnyFloat OptimalFiberlength ??= _FIBER_LENGTH_DESIGNVAR(0.087); ///< Optimal working length of the muscle fiber (m)
    AnyFloat TotalTendonLength ??= _TENDON_LENGTH_DESIGNVAR(0.01305);///< The total tendon length (m)
    AnyFloat K1 ??= DesignVar(10); ///< K1 constant in the muscle model.  Factor for determining shortening speed at optimum length
    AnyFloat K2 ??= DesignVar(0); ///< K2 constant in the muscle model.  Factor for determining shortening speed at optimum length
    AnyFloat Epsilon0 ??= DesignVar(0.053); ///< Epsilon bar in the muscle model. Represents tendon strain at F0
    AnyFloat Fcfast ??= DesignVar(0.4); ///< Factor for determining shortening speed at optimum length
  };

  AnyFolder TricepsBrachiiLaterale =
  {
    AnyString Muscle = "Triceps lateral head"; ///< Descriptive name for the muscle, e.g. for plotting
    AnyIntVar MuscleElemAmount = 2; ///< The total amount of elements for this muscle
    AnyFloat Pennationangle ??= DesignVar(30); ///< Pennation angle of the muscle fibers (degres)
    AnyFloat VolumeScaleFactor ??= DesignVar(1.0); ///< Factor for scaling the muscle volume
    AnyFloat MuscleVolume ??= DesignVar(26.38); ///< Volume of the muscle  (ml)
    AnyFloat MuscleVolumeSIScaled ??= .VolumeUnitFactor*VolumeScaleFactor*MuscleVolume; ///< Scaled Volume of the muscle in SI base unit (m^3)
    AnyFloat OptimalFiberlength ??= _FIBER_LENGTH_DESIGNVAR(0.055); ///< Optimal working length of the muscle fiber (m)
    AnyFloat TotalTendonLength ??= _TENDON_LENGTH_DESIGNVAR(0.01375);///< The total tendon length (m)
    AnyFloat K1 ??= DesignVar(10); ///< K1 constant in the muscle model.  Factor for determining shortening speed at optimum length
    AnyFloat K2 ??= DesignVar(0); ///< K2 constant in the muscle model.  Factor for determining shortening speed at optimum length
    AnyFloat Epsilon0 ??= DesignVar(0.053); ///< Epsilon bar in the muscle model. Represents tendon strain at F0
    AnyFloat Fcfast ??= DesignVar(0.4); ///< Factor for determining shortening speed at optimum length
  };

  AnyFolder Brach_rad =
  {
    AnyString Muscle = "Bracio radialis"; ///< Descriptive name for the muscle, e.g. for plotting
    AnyIntVar MuscleElemAmount = 2; ///< The total amount of elements for this muscle
    AnyFloat Pennationangle ??= DesignVar(15); ///< Pennation angle of the muscle fibers (degres)
    AnyFloat VolumeScaleFactor ??= DesignVar(1.0); ///< Factor for scaling the muscle volume
    AnyFloat MuscleVolume ??= DesignVar(28.16); ///< Volume of the muscle  (ml)
    AnyFloat MuscleVolumeSIScaled ??= .VolumeUnitFactor*VolumeScaleFactor*MuscleVolume; ///< Scaled Volume of the muscle in SI base unit (m^3)
    AnyFloat OptimalFiberlength ??= _FIBER_LENGTH_DESIGNVAR(0.128); ///< Optimal working length of the muscle fiber (m)
    AnyFloat TotalTendonLength ??= _TENDON_LENGTH_DESIGNVAR(0.0192);///< The total tendon length (m)
    AnyFloat K1 ??= DesignVar(10); ///< K1 constant in the muscle model.  Factor for determining shortening speed at optimum length
    AnyFloat K2 ??= DesignVar(0); ///< K2 constant in the muscle model.  Factor for determining shortening speed at optimum length
    AnyFloat Epsilon0 ??= DesignVar(0.053); ///< Epsilon bar in the muscle model. Represents tendon strain at F0
    AnyFloat Fcfast ??= DesignVar(0.4); ///< Factor for determining shortening speed at optimum length
  };

  AnyFolder Anconeus =
  {
    AnyString Muscle = "Anconeus"; ///< Descriptive name for the muscle, e.g. for plotting
    AnyIntVar MuscleElemAmount = 2; ///< The total amount of elements for this muscle
    AnyFloat Pennationangle ??= DesignVar(30); ///< Pennation angle of the muscle fibers (degres)
    AnyFloat VolumeScaleFactor ??= DesignVar(1.0); ///< Factor for scaling the muscle volume
    AnyFloat MuscleVolume ??= DesignVar(0.4434); ///< Volume of the muscle  (ml)
    AnyFloat MuscleVolumeSIScaled ??= .VolumeUnitFactor*VolumeScaleFactor*MuscleVolume; ///< Scaled Volume of the muscle in SI base unit (m^3)
    AnyFloat OptimalFiberlength ??= _FIBER_LENGTH_DESIGNVAR(0.024); ///< Optimal working length of the muscle fiber (m)
    AnyFloat TotalTendonLength ??= _TENDON_LENGTH_DESIGNVAR(0.006);///< The total tendon length (m)
    AnyFloat K1 ??= DesignVar(10); ///< K1 constant in the muscle model.  Factor for determining shortening speed at optimum length
    AnyFloat K2 ??= DesignVar(0); ///< K2 constant in the muscle model.  Factor for determining shortening speed at optimum length
    AnyFloat Epsilon0 ??= DesignVar(0.053); ///< Epsilon bar in the muscle model. Represents tendon strain at F0
    AnyFloat Fcfast ??= DesignVar(0.4); ///< Factor for determining shortening speed at optimum length
  };

  AnyFolder Pronator_teres_caput_humeral =
  {
    AnyString Muscle = "Pronator teres caput humeral"; ///< Descriptive name for the muscle, e.g. for plotting
    AnyIntVar MuscleElemAmount = 2; ///< The total amount of elements for this muscle
    AnyFloat Pennationangle ??= DesignVar(15); ///< Pennation angle of the muscle fibers (degres)
    AnyFloat VolumeScaleFactor ??= DesignVar(1.0); ///< Factor for scaling the muscle volume
    AnyFloat MuscleVolume ??= DesignVar(12.392); ///< Volume of the muscle  (ml)
    AnyFloat MuscleVolumeSIScaled ??= .VolumeUnitFactor*VolumeScaleFactor*MuscleVolume; ///< Scaled Volume of the muscle in SI base unit (m^3)
    AnyFloat OptimalFiberlength ??= _FIBER_LENGTH_DESIGNVAR(0.0665); ///< Optimal working length of the muscle fiber (m)
    AnyFloat TotalTendonLength ??= _TENDON_LENGTH_DESIGNVAR(0.01);///< The total tendon length (m)
    AnyFloat K1 ??= DesignVar(10); ///< K1 constant in the muscle model.  Factor for determining shortening speed at optimum length
    AnyFloat K2 ??= DesignVar(0); ///< K2 constant in the muscle model.  Factor for determining shortening speed at optimum length
    AnyFloat Epsilon0 ??= DesignVar(0.053); ///< Epsilon bar in the muscle model. Represents tendon strain at F0
    AnyFloat Fcfast ??= DesignVar(0.4); ///< Factor for determining shortening speed at optimum length
  };

  AnyFolder Pronator_teres_caput_ulnare =
  {
    AnyString Muscle = "Pronator teres caput ulnare"; ///< Descriptive name for the muscle, e.g. for plotting
    AnyIntVar MuscleElemAmount = 1; ///< The total amount of elements for this muscle
    AnyFloat Pennationangle ??= DesignVar(15); ///< Pennation angle of the muscle fibers (degres)
    AnyFloat VolumeScaleFactor ??= DesignVar(1.0); ///< Factor for scaling the muscle volume
    AnyFloat MuscleVolume ??= DesignVar(12.392); ///< Volume of the muscle  (ml)
    AnyFloat MuscleVolumeSIScaled ??= .VolumeUnitFactor*VolumeScaleFactor*MuscleVolume; ///< Scaled Volume of the muscle in SI base unit (m^3)
    AnyFloat OptimalFiberlength ??= _FIBER_LENGTH_DESIGNVAR(0.0665); ///< Optimal working length of the muscle fiber (m)
    AnyFloat TotalTendonLength ??= _TENDON_LENGTH_DESIGNVAR(0.01);///< The total tendon length (m)
    AnyFloat K1 ??= DesignVar(10); ///< K1 constant in the muscle model.  Factor for determining shortening speed at optimum length
    AnyFloat K2 ??= DesignVar(0); ///< K2 constant in the muscle model.  Factor for determining shortening speed at optimum length
    AnyFloat Epsilon0 ??= DesignVar(0.053); ///< Epsilon bar in the muscle model. Represents tendon strain at F0
    AnyFloat Fcfast ??= DesignVar(0.4); ///< Factor for determining shortening speed at optimum length
  };

  AnyFolder Supinator_humerus_part =
  {
    AnyString Muscle = "Supinator humerus part"; ///< Descriptive name for the muscle, e.g. for plotting
    AnyIntVar MuscleElemAmount = 2; ///< The total amount of elements for this muscle
    AnyFloat Pennationangle ??= DesignVar(15); ///< Pennation angle of the muscle fibers (degres)
    AnyFloat VolumeScaleFactor ??= DesignVar(1.0); ///< Factor for scaling the muscle volume
    AnyFloat MuscleVolume ??= DesignVar(23.811); ///< Volume of the muscle  (ml)
    AnyFloat MuscleVolumeSIScaled ??= .VolumeUnitFactor*VolumeScaleFactor*MuscleVolume; ///< Scaled Volume of the muscle in SI base unit (m^3)
    AnyFloat OptimalFiberlength ??= _FIBER_LENGTH_DESIGNVAR(0.04); ///< Optimal working length of the muscle fiber (m)
    AnyFloat TotalTendonLength ??= _TENDON_LENGTH_DESIGNVAR(0.006);///< The total tendon length (m)
    AnyFloat K1 ??= DesignVar(10); ///< K1 constant in the muscle model.  Factor for determining shortening speed at optimum length
    AnyFloat K2 ??= DesignVar(0); ///< K2 constant in the muscle model.  Factor for determining shortening speed at optimum length
    AnyFloat Epsilon0 ??= DesignVar(0.053); ///< Epsilon bar in the muscle model. Represents tendon strain at F0
    AnyFloat Fcfast ??= DesignVar(0.4); ///< Factor for determining shortening speed at optimum length
  };

  AnyFolder Supinator_ulna_part =
  {
    AnyString Muscle = "Supinator ulna part"; ///< Descriptive name for the muscle, e.g. for plotting
    AnyIntVar MuscleElemAmount = 2; ///< The total amount of elements for this muscle
    AnyFloat Pennationangle ??= DesignVar(15); ///< Pennation angle of the muscle fibers (degres)
    AnyFloat VolumeScaleFactor ??= DesignVar(1.0); ///< Factor for scaling the muscle volume
    AnyFloat MuscleVolume ??= DesignVar(23.811); ///< Volume of the muscle  (ml)
    AnyFloat MuscleVolumeSIScaled ??= .VolumeUnitFactor*VolumeScaleFactor*MuscleVolume; ///< Scaled Volume of the muscle in SI base unit (m^3)
    AnyFloat OptimalFiberlength ??= _FIBER_LENGTH_DESIGNVAR(0.04); ///< Optimal working length of the muscle fiber (m)
    AnyFloat TotalTendonLength ??= _TENDON_LENGTH_DESIGNVAR(0.006);///< The total tendon length (m)
    AnyFloat K1 ??= DesignVar(10); ///< K1 constant in the muscle model.  Factor for determining shortening speed at optimum length
    AnyFloat K2 ??= DesignVar(0); ///< K2 constant in the muscle model.  Factor for determining shortening speed at optimum length
    AnyFloat Epsilon0 ??= DesignVar(0.053); ///< Epsilon bar in the muscle model. Represents tendon strain at F0
    AnyFloat Fcfast ??= DesignVar(0.4); ///< Factor for determining shortening speed at optimum length
  };

  AnyFolder Pron_quadr =
  {
    AnyString Muscle = "Pronator quadr"; ///< Descriptive name for the muscle, e.g. for plotting
    AnyIntVar MuscleElemAmount = 2; ///< The total amount of elements for this muscle
    AnyFloat Pennationangle ??= DesignVar(15); ///< Pennation angle of the muscle fibers (degres)
    AnyFloat VolumeScaleFactor ??= DesignVar(1.0); ///< Factor for scaling the muscle volume
    AnyFloat MuscleVolume ??= DesignVar(4.3999); ///< Volume of the muscle  (ml)
    AnyFloat MuscleVolumeSIScaled ??= .VolumeUnitFactor*VolumeScaleFactor*MuscleVolume; ///< Scaled Volume of the muscle in SI base unit (m^3)
    AnyFloat OptimalFiberlength ??= _FIBER_LENGTH_DESIGNVAR(0.02); ///< Optimal working length of the muscle fiber (m)
    AnyFloat TotalTendonLength ??= _TENDON_LENGTH_DESIGNVAR(0.0002);///< The total tendon length (m)
    AnyFloat K1 ??= DesignVar(10); ///< K1 constant in the muscle model.  Factor for determining shortening speed at optimum length
    AnyFloat K2 ??= DesignVar(0); ///< K2 constant in the muscle model.  Factor for determining shortening speed at optimum length
    AnyFloat Epsilon0 ??= DesignVar(0.053); ///< Epsilon bar in the muscle model. Represents tendon strain at F0
    AnyFloat Fcfast ??= DesignVar(0.4); ///< Factor for determining shortening speed at optimum length
  };

  AnyFolder Extensor_Pollicis_Longus =
  {
    AnyString Muscle = "Extensor Pollicis Longus"; ///< Descriptive name for the muscle, e.g. for plotting
    AnyIntVar MuscleElemAmount = 1; ///< The total amount of elements for this muscle
    AnyFloat Pennationangle ??= DesignVar(7); ///< Pennation angle of the muscle fibers (degres)
    AnyFloat VolumeScaleFactor ??= DesignVar(1.0); ///< Factor for scaling the muscle volume
    AnyFloat MuscleVolume ??= DesignVar(4.95); ///< Volume of the muscle  (ml)
    AnyFloat MuscleVolumeSIScaled ??= .VolumeUnitFactor*VolumeScaleFactor*MuscleVolume; ///< Scaled Volume of the muscle in SI base unit (m^3)
    AnyFloat OptimalFiberlength ??= _FIBER_LENGTH_DESIGNVAR(0.055); ///< Optimal working length of the muscle fiber (m)
    AnyFloat TotalTendonLength ??= _TENDON_LENGTH_DESIGNVAR(0.194);///< The total tendon length (m)
    AnyFloat K1 ??= DesignVar(10); ///< K1 constant in the muscle model.  Factor for determining shortening speed at optimum length
    AnyFloat K2 ??= DesignVar(0); ///< K2 constant in the muscle model.  Factor for determining shortening speed at optimum length
    AnyFloat Epsilon0 ??= DesignVar(0.053); ///< Epsilon bar in the muscle model. Represents tendon strain at F0
    AnyFloat Fcfast ??= DesignVar(0.4); ///< Factor for determining shortening speed at optimum length
  };

  AnyFolder Extensor_Pollicis_Brevis =
  {
    AnyString Muscle = "Extensor Pollicis Brevis"; ///< Descriptive name for the muscle, e.g. for plotting
    AnyIntVar MuscleElemAmount = 1; ///< The total amount of elements for this muscle
    AnyFloat Pennationangle ??= DesignVar(7); ///< Pennation angle of the muscle fibers (degres)
    AnyFloat VolumeScaleFactor ??= DesignVar(1.0); ///< Factor for scaling the muscle volume
    AnyFloat MuscleVolume ??= DesignVar(2.04); ///< Volume of the muscle  (ml)
    AnyFloat MuscleVolumeSIScaled ??= .VolumeUnitFactor*VolumeScaleFactor*MuscleVolume; ///< Scaled Volume of the muscle in SI base unit (m^3)
    AnyFloat OptimalFiberlength ??= _FIBER_LENGTH_DESIGNVAR(0.068); ///< Optimal working length of the muscle fiber (m)
    AnyFloat TotalTendonLength ??= _TENDON_LENGTH_DESIGNVAR(0.115);///< The total tendon length (m)
    AnyFloat K1 ??= DesignVar(10); ///< K1 constant in the muscle model.  Factor for determining shortening speed at optimum length
    AnyFloat K2 ??= DesignVar(0); ///< K2 constant in the muscle model.  Factor for determining shortening speed at optimum length
    AnyFloat Epsilon0 ??= DesignVar(0.053); ///< Epsilon bar in the muscle model. Represents tendon strain at F0
    AnyFloat Fcfast ??= DesignVar(0.4); ///< Factor for determining shortening speed at optimum length
  };

  AnyFolder Abductor_Pollicis_Longus =
  {
    AnyString Muscle = "Abductor Pollicis Longus"; ///< Descriptive name for the muscle, e.g. for plotting
    AnyIntVar MuscleElemAmount = 1; ///< The total amount of elements for this muscle
    AnyFloat Pennationangle ??= DesignVar(6); ///< Pennation angle of the muscle fibers (degres)
    AnyFloat VolumeScaleFactor ??= DesignVar(1.0); ///< Factor for scaling the muscle volume
    AnyFloat MuscleVolume ??= DesignVar(7.02); ///< Volume of the muscle  (ml)
    AnyFloat MuscleVolumeSIScaled ??= .VolumeUnitFactor*VolumeScaleFactor*MuscleVolume; ///< Scaled Volume of the muscle in SI base unit (m^3)
    AnyFloat OptimalFiberlength ??= _FIBER_LENGTH_DESIGNVAR(0.054); ///< Optimal working length of the muscle fiber (m)
    AnyFloat TotalTendonLength ??= _TENDON_LENGTH_DESIGNVAR(0.221);///< The total tendon length (m)
    AnyFloat K1 ??= DesignVar(10); ///< K1 constant in the muscle model.  Factor for determining shortening speed at optimum length
    AnyFloat K2 ??= DesignVar(0); ///< K2 constant in the muscle model.  Factor for determining shortening speed at optimum length
    AnyFloat Epsilon0 ??= DesignVar(0.053); ///< Epsilon bar in the muscle model. Represents tendon strain at F0
    AnyFloat Fcfast ??= DesignVar(0.4); ///< Factor for determining shortening speed at optimum length
  };

  AnyFolder Extensor_Indicis =
  {
    AnyString Muscle = "Extensor_Indicis"; ///< Descriptive name for the muscle, e.g. for plotting
    AnyIntVar MuscleElemAmount = 1; ///< The total amount of elements for this muscle
    AnyFloat Pennationangle ??= DesignVar(6); ///< Pennation angle of the muscle fibers (degres)
    AnyFloat VolumeScaleFactor ??= DesignVar(1.0); ///< Factor for scaling the muscle volume
    AnyFloat MuscleVolume ??= DesignVar(2.95); ///< Volume of the muscle  (ml)
    AnyFloat MuscleVolumeSIScaled ??= .VolumeUnitFactor*VolumeScaleFactor*MuscleVolume; ///< Scaled Volume of the muscle in SI base unit (m^3)
    AnyFloat OptimalFiberlength ??= _FIBER_LENGTH_DESIGNVAR(0.059); ///< Optimal working length of the muscle fiber (m)
    AnyFloat TotalTendonLength ??= _TENDON_LENGTH_DESIGNVAR(0.186);///< The total tendon length (m)
    AnyFloat K1 ??= DesignVar(10); ///< K1 constant in the muscle model.  Factor for determining shortening speed at optimum length
    AnyFloat K2 ??= DesignVar(0); ///< K2 constant in the muscle model.  Factor for determining shortening speed at optimum length
    AnyFloat Epsilon0 ??= DesignVar(0.053); ///< Epsilon bar in the muscle model. Represents tendon strain at F0
    AnyFloat Fcfast ??= DesignVar(0.4); ///< Factor for determining shortening speed at optimum length
  };

  AnyFolder Extensor_Carpi_Ulnaris =
  {
    AnyString Muscle = "Extensor Carpi Ulnaris"; ///< Descriptive name for the muscle, e.g. for plotting
    AnyIntVar MuscleElemAmount = 1; ///< The total amount of elements for this muscle
    AnyFloat Pennationangle ??= DesignVar(12); ///< Pennation angle of the muscle fibers (degres)
    AnyFloat VolumeScaleFactor ??= DesignVar(1.0); ///< Factor for scaling the muscle volume
    AnyFloat MuscleVolume ??= DesignVar(10.71); ///< Volume of the muscle  (ml)
    AnyFloat MuscleVolumeSIScaled ??= .VolumeUnitFactor*VolumeScaleFactor*MuscleVolume; ///< Scaled Volume of the muscle in SI base unit (m^3)
    AnyFloat OptimalFiberlength ??= _FIBER_LENGTH_DESIGNVAR(0.051); ///< Optimal working length of the muscle fiber (m)
    AnyFloat TotalTendonLength ??= _TENDON_LENGTH_DESIGNVAR(0.265);///< The total tendon length (m)
    AnyFloat K1 ??= DesignVar(10); ///< K1 constant in the muscle model.  Factor for determining shortening speed at optimum length
    AnyFloat K2 ??= DesignVar(0); ///< K2 constant in the muscle model.  Factor for determining shortening speed at optimum length
    AnyFloat Epsilon0 ??= DesignVar(0.053); ///< Epsilon bar in the muscle model. Represents tendon strain at F0
    AnyFloat Fcfast ??= DesignVar(0.4); ///< Factor for determining shortening speed at optimum length
  };

  AnyFolder Extensor_Carpi_Radialis_Longus =
  {
    AnyString Muscle = "Extensor Carpi Radialis Longus"; ///< Descriptive name for the muscle, e.g. for plotting
    AnyIntVar MuscleElemAmount = 1; ///< The total amount of elements for this muscle
    AnyFloat Pennationangle ??= DesignVar(0); ///< Pennation angle of the muscle fibers (degres)
    AnyFloat VolumeScaleFactor ??= DesignVar(1.0); ///< Factor for scaling the muscle volume
    AnyFloat MuscleVolume ??= DesignVar(17.82); ///< Volume of the muscle  (ml)
    AnyFloat MuscleVolumeSIScaled ??= .VolumeUnitFactor*VolumeScaleFactor*MuscleVolume; ///< Scaled Volume of the muscle in SI base unit (m^3)
    AnyFloat OptimalFiberlength ??= _FIBER_LENGTH_DESIGNVAR(0.081); ///< Optimal working length of the muscle fiber (m)
    AnyFloat TotalTendonLength ??= _TENDON_LENGTH_DESIGNVAR(0.224);///< The total tendon length (m)
    AnyFloat K1 ??= DesignVar(10); ///< K1 constant in the muscle model.  Factor for determining shortening speed at optimum length
    AnyFloat K2 ??= DesignVar(0); ///< K2 constant in the muscle model.  Factor for determining shortening speed at optimum length
    AnyFloat Epsilon0 ??= DesignVar(0.053); ///< Epsilon bar in the muscle model. Represents tendon strain at F0
    AnyFloat Fcfast ??= DesignVar(0.4); ///< Factor for determining shortening speed at optimum length
  };

  AnyFolder Extensor_Carpi_Radialis_Brevis =
  {
    AnyString Muscle = "Extensor Carpi Radialis Brevis"; ///< Descriptive name for the muscle, e.g. for plotting
    AnyIntVar MuscleElemAmount = 1; ///< The total amount of elements for this muscle
    AnyFloat Pennationangle ??= DesignVar(0); ///< Pennation angle of the muscle fibers (degres)
    AnyFloat VolumeScaleFactor ??= DesignVar(1.0); ///< Factor for scaling the muscle volume
    AnyFloat MuscleVolume ??= DesignVar(12.98); ///< Volume of the muscle  (ml)
    AnyFloat MuscleVolumeSIScaled ??= .VolumeUnitFactor*VolumeScaleFactor*MuscleVolume; ///< Scaled Volume of the muscle in SI base unit (m^3)
    AnyFloat OptimalFiberlength ??= _FIBER_LENGTH_DESIGNVAR(0.059); ///< Optimal working length of the muscle fiber (m)
    AnyFloat TotalTendonLength ??= _TENDON_LENGTH_DESIGNVAR(0.222);///< The total tendon length (m)
    AnyFloat K1 ??= DesignVar(10); ///< K1 constant in the muscle model.  Factor for determining shortening speed at optimum length
    AnyFloat K2 ??= DesignVar(0); ///< K2 constant in the muscle model.  Factor for determining shortening speed at optimum length
    AnyFloat Epsilon0 ??= DesignVar(0.053); ///< Epsilon bar in the muscle model. Represents tendon strain at F0
    AnyFloat Fcfast ??= DesignVar(0.4); ///< Factor for determining shortening speed at optimum length
  };

  AnyFolder Flexor_Carpi_Radialis =
  {
    AnyString Muscle = "Flexor Carpi Radialis"; ///< Descriptive name for the muscle, e.g. for plotting
    AnyIntVar MuscleElemAmount = 1; ///< The total amount of elements for this muscle
    AnyFloat Pennationangle ??= DesignVar(3); ///< Pennation angle of the muscle fibers (degres)
    AnyFloat VolumeScaleFactor ??= DesignVar(1.0); ///< Factor for scaling the muscle volume
    AnyFloat MuscleVolume ??= DesignVar(10.08); ///< Volume of the muscle  (ml)
    AnyFloat MuscleVolumeSIScaled ??= .VolumeUnitFactor*VolumeScaleFactor*MuscleVolume; ///< Scaled Volume of the muscle in SI base unit (m^3)
    AnyFloat OptimalFiberlength ??= _FIBER_LENGTH_DESIGNVAR(0.063); ///< Optimal working length of the muscle fiber (m)
    AnyFloat TotalTendonLength ??= _TENDON_LENGTH_DESIGNVAR(0.244);///< The total tendon length (m)
    AnyFloat K1 ??= DesignVar(10); ///< K1 constant in the muscle model.  Factor for determining shortening speed at optimum length
    AnyFloat K2 ??= DesignVar(0); ///< K2 constant in the muscle model.  Factor for determining shortening speed at optimum length
    AnyFloat Epsilon0 ??= DesignVar(0.053); ///< Epsilon bar in the muscle model. Represents tendon strain at F0
    AnyFloat Fcfast ??= DesignVar(0.4); ///< Factor for determining shortening speed at optimum length
  };

  AnyFolder Flexor_Carpi_Ulnaris =
  {
    AnyString Muscle = "Flexor Carpi Ulnaris"; ///< Descriptive name for the muscle, e.g. for plotting
    AnyIntVar MuscleElemAmount = 1; ///< The total amount of elements for this muscle
    AnyFloat Pennationangle ??= DesignVar(12); ///< Pennation angle of the muscle fibers (degres)
    AnyFloat VolumeScaleFactor ??= DesignVar(1.0); ///< Factor for scaling the muscle volume
    AnyFloat MuscleVolume ??= DesignVar(14.79); ///< Volume of the muscle  (ml)
    AnyFloat MuscleVolumeSIScaled ??= .VolumeUnitFactor*VolumeScaleFactor*MuscleVolume; ///< Scaled Volume of the muscle in SI base unit (m^3)
    AnyFloat OptimalFiberlength ??= _FIBER_LENGTH_DESIGNVAR(0.051); ///< Optimal working length of the muscle fiber (m)
    AnyFloat TotalTendonLength ??= _TENDON_LENGTH_DESIGNVAR(0.244);///< The total tendon length (m)
    AnyFloat K1 ??= DesignVar(10); ///< K1 constant in the muscle model.  Factor for determining shortening speed at optimum length
    AnyFloat K2 ??= DesignVar(0); ///< K2 constant in the muscle model.  Factor for determining shortening speed at optimum length
    AnyFloat Epsilon0 ??= DesignVar(0.053); ///< Epsilon bar in the muscle model. Represents tendon strain at F0
    AnyFloat Fcfast ??= DesignVar(0.4); ///< Factor for determining shortening speed at optimum length
  };

  AnyFolder Palmaris_Longus =
  {
    AnyString Muscle = "Palmaris Longus"; ///< Descriptive name for the muscle, e.g. for plotting
    AnyIntVar MuscleElemAmount = 1; ///< The total amount of elements for this muscle
    AnyFloat Pennationangle ??= DesignVar(4); ///< Pennation angle of the muscle fibers (degres)
    AnyFloat VolumeScaleFactor ??= DesignVar(1.0); ///< Factor for scaling the muscle volume
    AnyFloat MuscleVolume ??= DesignVar(3.84); ///< Volume of the muscle  (ml)
    AnyFloat MuscleVolumeSIScaled ??= .VolumeUnitFactor*VolumeScaleFactor*MuscleVolume; ///< Scaled Volume of the muscle in SI base unit (m^3)
    AnyFloat OptimalFiberlength ??= _FIBER_LENGTH_DESIGNVAR(0.064); ///< Optimal working length of the muscle fiber (m)
    AnyFloat TotalTendonLength ??= _TENDON_LENGTH_DESIGNVAR(0.269);///< The total tendon length (m)
    AnyFloat K1 ??= DesignVar(10); ///< K1 constant in the muscle model.  Factor for determining shortening speed at optimum length
    AnyFloat K2 ??= DesignVar(0); ///< K2 constant in the muscle model.  Factor for determining shortening speed at optimum length
    AnyFloat Epsilon0 ??= DesignVar(0.053); ///< Epsilon bar in the muscle model. Represents tendon strain at F0
    AnyFloat Fcfast ??= DesignVar(0.4); ///< Factor for determining shortening speed at optimum length
  };

  AnyFolder Flexor_Digitorum_Superficialis_Digit5 =
  {
    AnyString Muscle = "Flexor Digitorum Superficialis Digit5"; ///< Descriptive name for the muscle, e.g. for plotting
    AnyIntVar MuscleElemAmount = 1; ///< The total amount of elements for this muscle
    AnyFloat Pennationangle ??= DesignVar(5); ///< Pennation angle of the muscle fibers (degres)
    AnyFloat VolumeScaleFactor ??= DesignVar(1.0); ///< Factor for scaling the muscle volume
    AnyFloat MuscleVolume ??= DesignVar(2.08); ///< Volume of the muscle  (ml)
    AnyFloat MuscleVolumeSIScaled ??= .VolumeUnitFactor*VolumeScaleFactor*MuscleVolume; ///< Scaled Volume of the muscle in SI base unit (m^3)
    AnyFloat OptimalFiberlength ??= _FIBER_LENGTH_DESIGNVAR(0.052); ///< Optimal working length of the muscle fiber (m)
    AnyFloat TotalTendonLength ??= _TENDON_LENGTH_DESIGNVAR(0.338);///< The total tendon length (m)
    AnyFloat K1 ??= DesignVar(10); ///< K1 constant in the muscle model.  Factor for determining shortening speed at optimum length
    AnyFloat K2 ??= DesignVar(0); ///< K2 constant in the muscle model.  Factor for determining shortening speed at optimum length
    AnyFloat Epsilon0 ??= DesignVar(0.053); ///< Epsilon bar in the muscle model. Represents tendon strain at F0
    AnyFloat Fcfast ??= DesignVar(0.4); ///< Factor for determining shortening speed at optimum length
  };

  AnyFolder Flexor_Digitorum_Superficialis_Digit4 =
  {
    AnyString Muscle = "Flexor Digitorum Superficialis Digit4"; ///< Descriptive name for the muscle, e.g. for plotting
    AnyIntVar MuscleElemAmount = 1; ///< The total amount of elements for this muscle
    AnyFloat Pennationangle ??= DesignVar(4); ///< Pennation angle of the muscle fibers (degres)
    AnyFloat VolumeScaleFactor ??= DesignVar(1.0); ///< Factor for scaling the muscle volume
    AnyFloat MuscleVolume ??= DesignVar(9.62); ///< Volume of the muscle  (ml)
    AnyFloat MuscleVolumeSIScaled ??= .VolumeUnitFactor*VolumeScaleFactor*MuscleVolume; ///< Scaled Volume of the muscle in SI base unit (m^3)
    AnyFloat OptimalFiberlength ??= _FIBER_LENGTH_DESIGNVAR(0.074); ///< Optimal working length of the muscle fiber (m)
    AnyFloat TotalTendonLength ??= _TENDON_LENGTH_DESIGNVAR(0.328);///< The total tendon length (m)
    AnyFloat K1 ??= DesignVar(10); ///< K1 constant in the muscle model.  Factor for determining shortening speed at optimum length
    AnyFloat K2 ??= DesignVar(0); ///< K2 constant in the muscle model.  Factor for determining shortening speed at optimum length
    AnyFloat Epsilon0 ??= DesignVar(0.053); ///< Epsilon bar in the muscle model. Represents tendon strain at F0
    AnyFloat Fcfast ??= DesignVar(0.4); ///< Factor for determining shortening speed at optimum length
  };

  AnyFolder Flexor_Digitorum_Superficialis_Digit3 =
  {
    AnyString Muscle = "Flexor Digitorum Superficialis Digit3"; ///< Descriptive name for the muscle, e.g. for plotting
    AnyIntVar MuscleElemAmount = 1; ///< The total amount of elements for this muscle
    AnyFloat Pennationangle ??= DesignVar(7); ///< Pennation angle of the muscle fibers (degres)
    AnyFloat VolumeScaleFactor ??= DesignVar(1.0); ///< Factor for scaling the muscle volume
    AnyFloat MuscleVolume ??= DesignVar(15); ///< Volume of the muscle  (ml)
    AnyFloat MuscleVolumeSIScaled ??= .VolumeUnitFactor*VolumeScaleFactor*MuscleVolume; ///< Scaled Volume of the muscle in SI base unit (m^3)
    AnyFloat OptimalFiberlength ??= _FIBER_LENGTH_DESIGNVAR(0.075); ///< Optimal working length of the muscle fiber (m)
    AnyFloat TotalTendonLength ??= _TENDON_LENGTH_DESIGNVAR(0.295);///< The total tendon length (m)
    AnyFloat K1 ??= DesignVar(10); ///< K1 constant in the muscle model.  Factor for determining shortening speed at optimum length
    AnyFloat K2 ??= DesignVar(0); ///< K2 constant in the muscle model.  Factor for determining shortening speed at optimum length
    AnyFloat Epsilon0 ??= DesignVar(0.053); ///< Epsilon bar in the muscle model. Represents tendon strain at F0
    AnyFloat Fcfast ??= DesignVar(0.4); ///< Factor for determining shortening speed at optimum length
  };

  AnyFolder Flexor_Digitorum_Superficialis_Digit2 =
  {
    AnyString Muscle = "Flexor Digitorum Superficialis Digit2"; ///< Descriptive name for the muscle, e.g. for plotting
    AnyIntVar MuscleElemAmount = 1; ///< The total amount of elements for this muscle
    AnyFloat Pennationangle ??= DesignVar(6); ///< Pennation angle of the muscle fibers (degres)
    AnyFloat VolumeScaleFactor ??= DesignVar(1.0); ///< Factor for scaling the muscle volume
    AnyFloat MuscleVolume ??= DesignVar(11.76); ///< Volume of the muscle  (ml)
    AnyFloat MuscleVolumeSIScaled ??= .VolumeUnitFactor*VolumeScaleFactor*MuscleVolume; ///< Scaled Volume of the muscle in SI base unit (m^3)
    AnyFloat OptimalFiberlength ??= _FIBER_LENGTH_DESIGNVAR(0.084); ///< Optimal working length of the muscle fiber (m)
    AnyFloat TotalTendonLength ??= _TENDON_LENGTH_DESIGNVAR(0.275);///< The total tendon length (m)
    AnyFloat K1 ??= DesignVar(10); ///< K1 constant in the muscle model.  Factor for determining shortening speed at optimum length
    AnyFloat K2 ??= DesignVar(0); ///< K2 constant in the muscle model.  Factor for determining shortening speed at optimum length
    AnyFloat Epsilon0 ??= DesignVar(0.053); ///< Epsilon bar in the muscle model. Represents tendon strain at F0
    AnyFloat Fcfast ??= DesignVar(0.4); ///< Factor for determining shortening speed at optimum length
  };

  AnyFolder Flexor_Digitorum_Profundus_Digit5 =
  {
    AnyString Muscle = "Flexor Digitorum Profundus Digit5"; ///< Descriptive name for the muscle, e.g. for plotting
    AnyIntVar MuscleElemAmount = 1; ///< The total amount of elements for this muscle
    AnyFloat Pennationangle ??= DesignVar(8); ///< Pennation angle of the muscle fibers (degres)
    AnyFloat VolumeScaleFactor ??= DesignVar(1.0); ///< Factor for scaling the muscle volume
    AnyFloat MuscleVolume ??= DesignVar(13.5); ///< Volume of the muscle  (ml)
    AnyFloat MuscleVolumeSIScaled ??= .VolumeUnitFactor*VolumeScaleFactor*MuscleVolume; ///< Scaled Volume of the muscle in SI base unit (m^3)
    AnyFloat OptimalFiberlength ??= _FIBER_LENGTH_DESIGNVAR(0.075); ///< Optimal working length of the muscle fiber (m)
    AnyFloat TotalTendonLength ??= _TENDON_LENGTH_DESIGNVAR(0.282);///< The total tendon length (m)
    AnyFloat K1 ??= DesignVar(10); ///< K1 constant in the muscle model.  Factor for determining shortening speed at optimum length
    AnyFloat K2 ??= DesignVar(0); ///< K2 constant in the muscle model.  Factor for determining shortening speed at optimum length
    AnyFloat Epsilon0 ??= DesignVar(0.053); ///< Epsilon bar in the muscle model. Represents tendon strain at F0
    AnyFloat Fcfast ??= DesignVar(0.4); ///< Factor for determining shortening speed at optimum length
  };

  AnyFolder Flexor_Digitorum_Profundus_Digit4 =
  {
    AnyString Muscle = "Flexor Digitorum Profundus Digit4"; ///< Descriptive name for the muscle, e.g. for plotting
    AnyIntVar MuscleElemAmount = 1; ///< The total amount of elements for this muscle
    AnyFloat Pennationangle ??= DesignVar(7); ///< Pennation angle of the muscle fibers (degres)
    AnyFloat VolumeScaleFactor ??= DesignVar(1.0); ///< Factor for scaling the muscle volume
    AnyFloat MuscleVolume ??= DesignVar(11.2); ///< Volume of the muscle  (ml)
    AnyFloat MuscleVolumeSIScaled ??= .VolumeUnitFactor*VolumeScaleFactor*MuscleVolume; ///< Scaled Volume of the muscle in SI base unit (m^3)
    AnyFloat OptimalFiberlength ??= _FIBER_LENGTH_DESIGNVAR(0.08); ///< Optimal working length of the muscle fiber (m)
    AnyFloat TotalTendonLength ??= _TENDON_LENGTH_DESIGNVAR(0.282);///< The total tendon length (m)
    AnyFloat K1 ??= DesignVar(10); ///< K1 constant in the muscle model.  Factor for determining shortening speed at optimum length
    AnyFloat K2 ??= DesignVar(0); ///< K2 constant in the muscle model.  Factor for determining shortening speed at optimum length
    AnyFloat Epsilon0 ??= DesignVar(0.053); ///< Epsilon bar in the muscle model. Represents tendon strain at F0
    AnyFloat Fcfast ??= DesignVar(0.4); ///< Factor for determining shortening speed at optimum length
  };

  AnyFolder Flexor_Digitorum_Profundus_Digit3 =
  {
    AnyString Muscle = "Flexor Digitorum Profundus Digit3"; ///< Descriptive name for the muscle, e.g. for plotting
    AnyIntVar MuscleElemAmount = 1; ///< The total amount of elements for this muscle
    AnyFloat Pennationangle ??= DesignVar(6); ///< Pennation angle of the muscle fibers (degres)
    AnyFloat VolumeScaleFactor ??= DesignVar(1.0); ///< Factor for scaling the muscle volume
    AnyFloat MuscleVolume ??= DesignVar(15.12); ///< Volume of the muscle  (ml)
    AnyFloat MuscleVolumeSIScaled ??= .VolumeUnitFactor*VolumeScaleFactor*MuscleVolume; ///< Scaled Volume of the muscle in SI base unit (m^3)
    AnyFloat OptimalFiberlength ??= _FIBER_LENGTH_DESIGNVAR(0.084); ///< Optimal working length of the muscle fiber (m)
    AnyFloat TotalTendonLength ??= _TENDON_LENGTH_DESIGNVAR(0.293);///< The total tendon length (m)
    AnyFloat K1 ??= DesignVar(10); ///< K1 constant in the muscle model.  Factor for determining shortening speed at optimum length
    AnyFloat K2 ??= DesignVar(0); ///< K2 constant in the muscle model.  Factor for determining shortening speed at optimum length
    AnyFloat Epsilon0 ??= DesignVar(0.053); ///< Epsilon bar in the muscle model. Represents tendon strain at F0
    AnyFloat Fcfast ??= DesignVar(0.4); ///< Factor for determining shortening speed at optimum length
  };

  AnyFolder Flexor_Digitorum_Profundus_Digit2 =
  {
    AnyString Muscle = "Flexor Digitorum Profundus Digit2"; ///< Descriptive name for the muscle, e.g. for plotting
    AnyIntVar MuscleElemAmount = 1; ///< The total amount of elements for this muscle
    AnyFloat Pennationangle ??= DesignVar(2); ///< Pennation angle of the muscle fibers (degres)
    AnyFloat VolumeScaleFactor ??= DesignVar(1.0); ///< Factor for scaling the muscle volume
    AnyFloat MuscleVolume ??= DesignVar(11.25); ///< Volume of the muscle  (ml)
    AnyFloat MuscleVolumeSIScaled ??= .VolumeUnitFactor*VolumeScaleFactor*MuscleVolume; ///< Scaled Volume of the muscle in SI base unit (m^3)
    AnyFloat OptimalFiberlength ??= _FIBER_LENGTH_DESIGNVAR(0.075); ///< Optimal working length of the muscle fiber (m)
    AnyFloat TotalTendonLength ??= _TENDON_LENGTH_DESIGNVAR(0.294);///< The total tendon length (m)
    AnyFloat K1 ??= DesignVar(10); ///< K1 constant in the muscle model.  Factor for determining shortening speed at optimum length
    AnyFloat K2 ??= DesignVar(0); ///< K2 constant in the muscle model.  Factor for determining shortening speed at optimum length
    AnyFloat Epsilon0 ??= DesignVar(0.053); ///< Epsilon bar in the muscle model. Represents tendon strain at F0
    AnyFloat Fcfast ??= DesignVar(0.4); ///< Factor for determining shortening speed at optimum length
  };

  AnyFolder Extensor_Digitorum_Digit5 =
  {
    AnyString Muscle = "Extensor Digitorum Digit5"; ///< Descriptive name for the muscle, e.g. for plotting
    AnyIntVar MuscleElemAmount = 1; ///< The total amount of elements for this muscle
    AnyFloat Pennationangle ??= DesignVar(2); ///< Pennation angle of the muscle fibers (degres)
    AnyFloat VolumeScaleFactor ??= DesignVar(1.0); ///< Factor for scaling the muscle volume
    AnyFloat MuscleVolume ??= DesignVar(1.95); ///< Volume of the muscle  (ml)
    AnyFloat MuscleVolumeSIScaled ??= .VolumeUnitFactor*VolumeScaleFactor*MuscleVolume; ///< Scaled Volume of the muscle in SI base unit (m^3)
    AnyFloat OptimalFiberlength ??= _FIBER_LENGTH_DESIGNVAR(0.065); ///< Optimal working length of the muscle fiber (m)
    AnyFloat TotalTendonLength ??= _TENDON_LENGTH_DESIGNVAR(0.297);///< The total tendon length (m)
    AnyFloat K1 ??= DesignVar(10); ///< K1 constant in the muscle model.  Factor for determining shortening speed at optimum length
    AnyFloat K2 ??= DesignVar(0); ///< K2 constant in the muscle model.  Factor for determining shortening speed at optimum length
    AnyFloat Epsilon0 ??= DesignVar(0.053); ///< Epsilon bar in the muscle model. Represents tendon strain at F0
    AnyFloat Fcfast ??= DesignVar(0.4); ///< Factor for determining shortening speed at optimum length
  };

  AnyFolder Extensor_Digitorum_Digit4 =
  {
    AnyString Muscle = "Extensor Digitorum Digit4"; ///< Descriptive name for the muscle, e.g. for plotting
    AnyIntVar MuscleElemAmount = 1; ///< The total amount of elements for this muscle
    AnyFloat Pennationangle ??= DesignVar(3); ///< Pennation angle of the muscle fibers (degres)
    AnyFloat VolumeScaleFactor ??= DesignVar(1.0); ///< Factor for scaling the muscle volume
    AnyFloat MuscleVolume ??= DesignVar(5.04); ///< Volume of the muscle  (ml)
    AnyFloat MuscleVolumeSIScaled ??= .VolumeUnitFactor*VolumeScaleFactor*MuscleVolume; ///< Scaled Volume of the muscle in SI base unit (m^3)
    AnyFloat OptimalFiberlength ??= _FIBER_LENGTH_DESIGNVAR(0.063); ///< Optimal working length of the muscle fiber (m)
    AnyFloat TotalTendonLength ??= _TENDON_LENGTH_DESIGNVAR(0.327);///< The total tendon length (m)
    AnyFloat K1 ??= DesignVar(10); ///< K1 constant in the muscle model.  Factor for determining shortening speed at optimum length
    AnyFloat K2 ??= DesignVar(0); ///< K2 constant in the muscle model.  Factor for determining shortening speed at optimum length
    AnyFloat Epsilon0 ??= DesignVar(0.053); ///< Epsilon bar in the muscle model. Represents tendon strain at F0
    AnyFloat Fcfast ??= DesignVar(0.4); ///< Factor for determining shortening speed at optimum length
  };

  AnyFolder Extensor_Digitorum_Digit3 =
  {
    AnyString Muscle = "Extensor Digitorum Digit3"; ///< Descriptive name for the muscle, e.g. for plotting
    AnyIntVar MuscleElemAmount = 1; ///< The total amount of elements for this muscle
    AnyFloat Pennationangle ??= DesignVar(3); ///< Pennation angle of the muscle fibers (degres)
    AnyFloat VolumeScaleFactor ??= DesignVar(1.0); ///< Factor for scaling the muscle volume
    AnyFloat MuscleVolume ??= DesignVar(5.76); ///< Volume of the muscle  (ml)
    AnyFloat MuscleVolumeSIScaled ??= .VolumeUnitFactor*VolumeScaleFactor*MuscleVolume; ///< Scaled Volume of the muscle in SI base unit (m^3)
    AnyFloat OptimalFiberlength ??= _FIBER_LENGTH_DESIGNVAR(0.072); ///< Optimal working length of the muscle fiber (m)
    AnyFloat TotalTendonLength ??= _TENDON_LENGTH_DESIGNVAR(0.335);///< The total tendon length (m)
    AnyFloat K1 ??= DesignVar(10); ///< K1 constant in the muscle model.  Factor for determining shortening speed at optimum length
    AnyFloat K2 ??= DesignVar(0); ///< K2 constant in the muscle model.  Factor for determining shortening speed at optimum length
    AnyFloat Epsilon0 ??= DesignVar(0.053); ///< Epsilon bar in the muscle model. Represents tendon strain at F0
    AnyFloat Fcfast ??= DesignVar(0.4); ///< Factor for determining shortening speed at optimum length
  };

  AnyFolder Extensor_Digitorum_Digit2 =
  {
    AnyString Muscle = "Extensor Digitorum Digit2"; ///< Descriptive name for the muscle, e.g. for plotting
    AnyIntVar MuscleElemAmount = 1; ///< The total amount of elements for this muscle
    AnyFloat Pennationangle ??= DesignVar(3); ///< Pennation angle of the muscle fibers (degres)
    AnyFloat VolumeScaleFactor ??= DesignVar(1.0); ///< Factor for scaling the muscle volume
    AnyFloat MuscleVolume ??= DesignVar(2.8); ///< Volume of the muscle  (ml)
    AnyFloat MuscleVolumeSIScaled ??= .VolumeUnitFactor*VolumeScaleFactor*MuscleVolume; ///< Scaled Volume of the muscle in SI base unit (m^3)
    AnyFloat OptimalFiberlength ??= _FIBER_LENGTH_DESIGNVAR(0.07); ///< Optimal working length of the muscle fiber (m)
    AnyFloat TotalTendonLength ??= _TENDON_LENGTH_DESIGNVAR(0.325);///< The total tendon length (m)
    AnyFloat K1 ??= DesignVar(10); ///< K1 constant in the muscle model.  Factor for determining shortening speed at optimum length
    AnyFloat K2 ??= DesignVar(0); ///< K2 constant in the muscle model.  Factor for determining shortening speed at optimum length
    AnyFloat Epsilon0 ??= DesignVar(0.053); ///< Epsilon bar in the muscle model. Represents tendon strain at F0
    AnyFloat Fcfast ??= DesignVar(0.4); ///< Factor for determining shortening speed at optimum length
  };

  AnyFolder Extensor_Digiti_Minimi =
  {
    AnyString Muscle = "Extensor Digiti Minimi"; ///< Descriptive name for the muscle, e.g. for plotting
    AnyIntVar MuscleElemAmount = 1; ///< The total amount of elements for this muscle
    AnyFloat Pennationangle ??= DesignVar(3); ///< Pennation angle of the muscle fibers (degres)
    AnyFloat VolumeScaleFactor ??= DesignVar(1.0); ///< Factor for scaling the muscle volume
    AnyFloat MuscleVolume ??= DesignVar(4.08); ///< Volume of the muscle  (ml)
    AnyFloat MuscleVolumeSIScaled ??= .VolumeUnitFactor*VolumeScaleFactor*MuscleVolume; ///< Scaled Volume of the muscle in SI base unit (m^3)
    AnyFloat OptimalFiberlength ??= _FIBER_LENGTH_DESIGNVAR(0.068); ///< Optimal working length of the muscle fiber (m)
    AnyFloat TotalTendonLength ??= _TENDON_LENGTH_DESIGNVAR(0.322);///< The total tendon length (m)
    AnyFloat K1 ??= DesignVar(10); ///< K1 constant in the muscle model.  Factor for determining shortening speed at optimum length
    AnyFloat K2 ??= DesignVar(0); ///< K2 constant in the muscle model.  Factor for determining shortening speed at optimum length
    AnyFloat Epsilon0 ??= DesignVar(0.053); ///< Epsilon bar in the muscle model. Represents tendon strain at F0
    AnyFloat Fcfast ??= DesignVar(0.4); ///< Factor for determining shortening speed at optimum length
  };

  AnyFolder Flexor_Pollicis_Longus =
  {
    AnyString Muscle = "Flexor Pollicis Longus"; ///< Descriptive name for the muscle, e.g. for plotting
    AnyIntVar MuscleElemAmount = 1; ///< The total amount of elements for this muscle
    AnyFloat Pennationangle ??= DesignVar(7); ///< Pennation angle of the muscle fibers (degres)
    AnyFloat VolumeScaleFactor ??= DesignVar(1.0); ///< Factor for scaling the muscle volume
    AnyFloat MuscleVolume ??= DesignVar(9.35); ///< Volume of the muscle  (ml)
    AnyFloat MuscleVolumeSIScaled ??= .VolumeUnitFactor*VolumeScaleFactor*MuscleVolume; ///< Scaled Volume of the muscle in SI base unit (m^3)
    AnyFloat OptimalFiberlength ??= _FIBER_LENGTH_DESIGNVAR(0.055); ///< Optimal working length of the muscle fiber (m)
    AnyFloat TotalTendonLength ??= _TENDON_LENGTH_DESIGNVAR(0.194);///< The total tendon length (m)
    AnyFloat K1 ??= DesignVar(10); ///< K1 constant in the muscle model.  Factor for determining shortening speed at optimum length
    AnyFloat K2 ??= DesignVar(0); ///< K2 constant in the muscle model.  Factor for determining shortening speed at optimum length
    AnyFloat Epsilon0 ??= DesignVar(0.053); ///< Epsilon bar in the muscle model. Represents tendon strain at F0
    AnyFloat Fcfast ??= DesignVar(0.4); ///< Factor for determining shortening speed at optimum length
  };
}; // Muscles

#undef _TENDON_LENGTH_DESIGNVAR
#undef _FIBER_LENGTH_DESIGNVAR
