//This file contains a moment measures for the following joints in the arm:

//Elbowpronation
//ElbowFlexion
//Glenohumeral

//The measures named:
//  ElbowPronationNetMoment
//  ElbowFlexionNetMoment
//  GHNetMoment
//will measure the moments and forces supplied by the muscles spanning these and on top of these
//moments and force the forces and moments from the constraints in the joints will be added.
//The resulting force and moment are equal to the to total moment and force which
//could replace both the muscles spanning the joint and the joints reactions.

//The measures named:
//  ElbowPronationNetMomentMuscles
//  ElbowFlexionNetMomentMuscles
//  GHNetMomentMuscles
//will measure ONLY the moments and forces supplied by the muscles spanning these joint and not the moments and forces which from the constraints in the joints.
//The resulting force and moment are equal to the to total moment and force which
//are supplied by the muscles.

//In both cases the resulting force and moment is given in the global coordinate system.

//A vector which shows the resulting moment as an arrow, will automatically be shown in the model view the parameters of it can
//be controlled from the "DrawSettings.any" file typically to be found in the application directory.,


AnyForceMomentMeasure2 ElbowPronationNetMoment = {
  AnyRefNode &ref1 =..Segments.Ulna.ps2.RotNode;
  AnySeg &seg1 =..Segments.Radius;
  AnySeg &seg2 =..Segments.Hand.Carpals;
  AnySeg &seg3 =..Segments.WristJointSeg;

  AnyReacForce &jnt1=..Jnt.WristJointFlexion.Constraints.Reaction;
  AnyReacForce &jnt1Bis=..Jnt.WristJointDeviation.Constraints.Reaction;
  AnyReacForce &jnt2=..Jnt.PSProximalConstraints.Reaction;
  AnyReacForce &jnt3=..Jnt.PSLinDistalConstraint.Reaction;
  #include  "..\..\..\Body\AAUHuman\Arm\ArmMuscleNames.any"

  //    //Make transformation to the radius.ps2.rotnode coordinate system
  //    AnyRefNode &ref2=.ShoulderArm.Segments.Radius.PointPS2.RotNode;
  //
  //    AnyVec3 Mlocal=M*ref2.Axes;
  //    AnyVar ElbowPronation=Mlocal[0];


//  AnyDrawVector DrawVector=
//  {
//    AnyRefNode &ref1=.ref1;
//    Vec = Main.DrawSettings.NetMomentVector.ScaleFactor*.M;
//    PointAway = On;
//    DrawCoord = Off;
//    Line.RGB =  Main.DrawSettings.NetMomentVector.RGB;
//    Line.Thickness = Main.DrawSettings.NetMomentVector.Thickness;
//    Line.End.Thickness = 2*Main.DrawSettings.NetMomentVector.Thickness;
//    Line.End.Length = 4*Main.DrawSettings.NetMomentVector.Thickness;
//  };
};


AnyForceMomentMeasure2 ElbowFlexionNetMoment = {
  AnyRefNode &ref=..Segments.Humerus.fe.RotNode;

  AnySeg &seg1=..Segments.Ulna;
  AnySeg &seg2=..Segments.Radius;
  AnySeg &seg3=..Segments.Hand.Carpals;
  AnySeg &seg4 =..Segments.WristJointSeg;

  AnyReacForce &jnt1=..Jnt.WristJointFlexion.Constraints.Reaction;
  AnyReacForce &jnt1Bis=..Jnt.WristJointDeviation.Constraints.Reaction;
  AnyReacForce &jnt2=..Jnt.PSProximalConstraints.Reaction;
  AnyReacForce &jnt3=..Jnt.PSLinDistalConstraint.Reaction;
  AnyReacForce &jnt4=..Jnt.HumeroUlnarJoint.Constraints.Reaction;

  #include  "..\..\..\Body\AAUHuman\Arm\ArmMuscleNames.any"


  //    Make transformation to the radius.ps2.rotnode coordinate system
  //    AnyRefNode &ref2=.ShoulderArm.Segments.Humerus.fe.RotNode;
  //
  //    AnyVec3 Mlocal=M*ref2.Axes;
  //    AnyVar ElbowFlexion=Mlocal[0];

//  AnyDrawVector DrawVector=
//  {
//    AnyRefNode &ref1=.ref;
//    Vec = Main.DrawSettings.NetMomentVector.ScaleFactor*.M;
//    PointAway = On;
//    DrawCoord = Off;
//    Line.RGB =  Main.DrawSettings.NetMomentVector.RGB;
//    Line.Thickness = Main.DrawSettings.NetMomentVector.Thickness;
//    Line.End.Thickness = 2*Main.DrawSettings.NetMomentVector.Thickness;
//    Line.End.Length = 4*Main.DrawSettings.NetMomentVector.Thickness;
//  };
};


AnyForceMomentMeasure2 GHNetMoment = {
  AnyRefNode &ref=..Segments.Humerus.gh.RotNode;

  AnySeg &seg0=..Segments.Humerus;
  #if BM_ARM_DELTOID_WRAPPING == _DELTOID_WRAPPING_RAKE_
  AnySeg &seg5=..Mus.ArtificialRake.DeltoidMuscleConnector;
  AnySeg &seg6=..Mus.ArtificialRake.DeltoidMuscleRotControlSeg;
  #else
  AnySeg &seg5a=..Mus.DeltoidWrappingPosterior.WrappingSegment;
  AnySeg &seg5b=..Mus.DeltoidWrappingLateral.WrappingSegment;
  AnySeg &seg5c=..Mus.DeltoidWrappingAnterior.WrappingSegment;
  #endif
  AnySeg &seg1=..Segments.Ulna;
  AnySeg &seg2=..Segments.Radius;
  AnySeg &seg3=..Segments.Hand.Carpals;
  AnySeg &seg4 =..Segments.WristJointSeg;

  AnyReacForce &jnt1=..Jnt.WristJointFlexion.Constraints.Reaction;
  AnyReacForce &jnt1Bis=..Jnt.WristJointDeviation.Constraints.Reaction;
  AnyReacForce &jnt2=..Jnt.PSProximalConstraints.Reaction;
  AnyReacForce &jnt3=..Jnt.PSLinDistalConstraint.Reaction;
  AnyReacForce &jnt4=..Jnt.HumeroUlnarJoint.Constraints.Reaction;


  //the gh reactions are supplied by muscles so these muscles has to be listed here.
  AnyFolder &conmus1 = ..Jnt.GHReactions.EdgeMuscle1;
  AnyFolder &conmus2 = ..Jnt.GHReactions.EdgeMuscle2;
  AnyFolder &conmus3 = ..Jnt.GHReactions.EdgeMuscle3;
  AnyFolder &conmus4 = ..Jnt.GHReactions.EdgeMuscle4;
  AnyFolder &conmus5 = ..Jnt.GHReactions.EdgeMuscle5;
  AnyFolder &conmus6 = ..Jnt.GHReactions.EdgeMuscle6;
  AnyFolder &conmus7 = ..Jnt.GHReactions.EdgeMuscle7;
  AnyFolder &conmus8 = ..Jnt.GHReactions.EdgeMuscle8;


  #include  "..\..\..\Body\AAUHuman\Arm\ArmMuscleNames.any"


  //    //Make transformation to the Humerus.gh.RotNode coordinate system
  //    AnyRefNode &ref2=..Segments.Humerus.gh.RotNode;
  //
  //    AnyVec3 Mlocal=M*ref2.Axes;
  //    AnyVar ElbowFlexion=Mlocal[0];


//  AnyDrawVector DrawVector=
//  {
//    AnyRefNode &ref1=.ref;
//    Vec = Main.DrawSettings.NetMomentVector.ScaleFactor*.M;
//    PointAway = On;
//    DrawCoord = Off;
//    Line.RGB =  Main.DrawSettings.NetMomentVector.RGB;
//    Line.Thickness = Main.DrawSettings.NetMomentVector.Thickness;
//    Line.End.Thickness = 2*Main.DrawSettings.NetMomentVector.Thickness;
//    Line.End.Length = 4*Main.DrawSettings.NetMomentVector.Thickness;
//  };
};


//The same measures as above without the joint reactions
//******************************************************


AnyForceMomentMeasure2 WristFlexionNetMomentMuscles = {
  AnyRefNode &ref =..Segments.Radius.wj.RotNode;
  AnySeg &seg1 =..Segments.WristJointSeg;
  AnySeg &seg2 =..Segments.Hand.Carpals;
  AnySeg &seg3 =..Segments.Hand.Finger1.Seg.MCPJointSeg;
  AnySeg &seg4 =..Segments.Hand.Finger1.Seg.CMCJointSeg;
  AnySeg &seg5 =..Segments.Hand.Finger1.Seg.Metacarpal;
  AnySeg &seg6 =..Segments.Hand.Finger1.Seg.ProximalPhalanx;
  AnySeg &seg7 =..Segments.Hand.Finger1.Seg.DistalPhalanx;
  AnySeg &seg8 =..Segments.Hand.Finger2.Seg.Metacarpal;
  AnySeg &seg9 =..Segments.Hand.Finger2.Seg.ProximalPhalanx;
  AnySeg &seg10 =..Segments.Hand.Finger2.Seg.MiddlePhalanx;
  AnySeg &seg11 =..Segments.Hand.Finger2.Seg.DistalPhalanx;
  AnySeg &seg12 =..Segments.Hand.Finger3.Seg.Metacarpal;
  AnySeg &seg13 =..Segments.Hand.Finger3.Seg.ProximalPhalanx;
  AnySeg &seg14 =..Segments.Hand.Finger3.Seg.MiddlePhalanx;
  AnySeg &seg15 =..Segments.Hand.Finger3.Seg.DistalPhalanx;
  AnySeg &seg16 =..Segments.Hand.Finger4.Seg.Metacarpal;
  AnySeg &seg17 =..Segments.Hand.Finger4.Seg.ProximalPhalanx;
  AnySeg &seg18 =..Segments.Hand.Finger4.Seg.MiddlePhalanx;
  AnySeg &seg19 =..Segments.Hand.Finger4.Seg.DistalPhalanx;
  AnySeg &seg20 =..Segments.Hand.Finger5.Seg.Metacarpal;
  AnySeg &seg21 =..Segments.Hand.Finger5.Seg.ProximalPhalanx;
  AnySeg &seg22 =..Segments.Hand.Finger5.Seg.MiddlePhalanx;
  AnySeg &seg23 =..Segments.Hand.Finger5.Seg.DistalPhalanx;


  #include  "..\..\..\Body\AAUHuman\Arm\ArmMuscleNames.any"


      //Make transformation to the Radius.wj.rotnode coordinate system
      AnyVec3 Mlocal=M*ref.Axes;
      AnyVar WristFlexion=Mlocal[1];


//  AnyDrawVector DrawVector=
//  {
//    AnyRefNode &ref1=.ref1;
//    Vec = Main.DrawSettings.NetMomentMuscleVector.ScaleFactor*.M;
//    PointAway = On;
//    DrawCoord = Off;
//    Line.RGB =  Main.DrawSettings.NetMomentMuscleVector.RGB;
//    Line.Thickness = Main.DrawSettings.NetMomentMuscleVector.Thickness;
//    Line.End.Thickness = 2*Main.DrawSettings.NetMomentMuscleVector.Thickness;
//    Line.End.Length = 4*Main.DrawSettings.NetMomentMuscleVector.Thickness;
//  };
};


AnyForceMomentMeasure2 WristAbductionNetMomentMuscles = {
  AnyRefNode &ref =..Segments.WristJointSeg.RadialUlnarDeviation.RotNode;
  AnySeg &seg2 =..Segments.Hand.Carpals;
  AnySeg &seg3 =..Segments.Hand.Finger1.Seg.MCPJointSeg;
  AnySeg &seg4 =..Segments.Hand.Finger1.Seg.CMCJointSeg;
  AnySeg &seg5 =..Segments.Hand.Finger1.Seg.Metacarpal;
  AnySeg &seg6 =..Segments.Hand.Finger1.Seg.ProximalPhalanx;
  AnySeg &seg7 =..Segments.Hand.Finger1.Seg.DistalPhalanx;
  AnySeg &seg8 =..Segments.Hand.Finger2.Seg.Metacarpal;
  AnySeg &seg9 =..Segments.Hand.Finger2.Seg.ProximalPhalanx;
  AnySeg &seg10 =..Segments.Hand.Finger2.Seg.MiddlePhalanx;
  AnySeg &seg11 =..Segments.Hand.Finger2.Seg.DistalPhalanx;
  AnySeg &seg12 =..Segments.Hand.Finger3.Seg.Metacarpal;
  AnySeg &seg13 =..Segments.Hand.Finger3.Seg.ProximalPhalanx;
  AnySeg &seg14 =..Segments.Hand.Finger3.Seg.MiddlePhalanx;
  AnySeg &seg15 =..Segments.Hand.Finger3.Seg.DistalPhalanx;
  AnySeg &seg16 =..Segments.Hand.Finger4.Seg.Metacarpal;
  AnySeg &seg17 =..Segments.Hand.Finger4.Seg.ProximalPhalanx;
  AnySeg &seg18 =..Segments.Hand.Finger4.Seg.MiddlePhalanx;
  AnySeg &seg19 =..Segments.Hand.Finger4.Seg.DistalPhalanx;
  AnySeg &seg20 =..Segments.Hand.Finger5.Seg.Metacarpal;
  AnySeg &seg21 =..Segments.Hand.Finger5.Seg.ProximalPhalanx;
  AnySeg &seg22 =..Segments.Hand.Finger5.Seg.MiddlePhalanx;
  AnySeg &seg23 =..Segments.Hand.Finger5.Seg.DistalPhalanx;

  #include  "..\..\..\Body\AAUHuman\Arm\ArmMuscleNames.any"


      //Make transformation to the WristJointSeg.RadialUlnarDeviation.rotnode coordinate system
      AnyVec3 Mlocal=M*ref.Axes;
      AnyVar WristAbduction=Mlocal[2];


//  AnyDrawVector DrawVector=
//  {
//    AnyRefNode &ref1=.ref1;
//    Vec = Main.DrawSettings.NetMomentMuscleVector.ScaleFactor*.M;
//    PointAway = On;
//    DrawCoord = Off;
//    Line.RGB =  Main.DrawSettings.NetMomentMuscleVector.RGB;
//    Line.Thickness = Main.DrawSettings.NetMomentMuscleVector.Thickness;
//    Line.End.Thickness = 2*Main.DrawSettings.NetMomentMuscleVector.Thickness;
//    Line.End.Length = 4*Main.DrawSettings.NetMomentMuscleVector.Thickness;
//  };
};


AnyForceMomentMeasure2 ElbowPronationNetMomentMuscles = {
  AnyRefNode &ref =..Segments.Ulna.ps2.RotNode;
  AnySeg &seg1 =..Segments.Radius;
  AnySeg &seg2 =..Segments.WristJointSeg;
  AnySeg &seg3 =..Segments.Hand.Carpals;
  AnySeg &seg4 =..Segments.Hand.Finger1.Seg.MCPJointSeg;
  AnySeg &seg5 =..Segments.Hand.Finger1.Seg.CMCJointSeg;
  AnySeg &seg6 =..Segments.Hand.Finger1.Seg.Metacarpal;
  AnySeg &seg7 =..Segments.Hand.Finger1.Seg.ProximalPhalanx;
  AnySeg &seg8 =..Segments.Hand.Finger1.Seg.DistalPhalanx;
  AnySeg &seg9 =..Segments.Hand.Finger2.Seg.Metacarpal;
  AnySeg &seg10 =..Segments.Hand.Finger2.Seg.ProximalPhalanx;
  AnySeg &seg11 =..Segments.Hand.Finger2.Seg.MiddlePhalanx;
  AnySeg &seg12 =..Segments.Hand.Finger2.Seg.DistalPhalanx;
  AnySeg &seg13 =..Segments.Hand.Finger3.Seg.Metacarpal;
  AnySeg &seg14 =..Segments.Hand.Finger3.Seg.ProximalPhalanx;
  AnySeg &seg15 =..Segments.Hand.Finger3.Seg.MiddlePhalanx;
  AnySeg &seg16 =..Segments.Hand.Finger3.Seg.DistalPhalanx;
  AnySeg &seg17 =..Segments.Hand.Finger4.Seg.Metacarpal;
  AnySeg &seg18 =..Segments.Hand.Finger4.Seg.ProximalPhalanx;
  AnySeg &seg19 =..Segments.Hand.Finger4.Seg.MiddlePhalanx;
  AnySeg &seg20 =..Segments.Hand.Finger4.Seg.DistalPhalanx;
  AnySeg &seg21 =..Segments.Hand.Finger5.Seg.Metacarpal;
  AnySeg &seg22 =..Segments.Hand.Finger5.Seg.ProximalPhalanx;
  AnySeg &seg23 =..Segments.Hand.Finger5.Seg.MiddlePhalanx;
  AnySeg &seg24 =..Segments.Hand.Finger5.Seg.DistalPhalanx;

  #include  "..\..\..\Body\AAUHuman\Arm\ArmMuscleNames.any"


      //Make transformation to the radius.ps2.rotnode coordinate system
      AnyVec3 Mlocal=M*ref.Axes;
      AnyVar ElbowPronation=Mlocal[0];


//  AnyDrawVector DrawVector=
//  {
//    AnyRefNode &ref1=.ref1;
//    Vec = Main.DrawSettings.NetMomentMuscleVector.ScaleFactor*.M;
//    PointAway = On;
//    DrawCoord = Off;
//    Line.RGB =  Main.DrawSettings.NetMomentMuscleVector.RGB;
//    Line.Thickness = Main.DrawSettings.NetMomentMuscleVector.Thickness;
//    Line.End.Thickness = 2*Main.DrawSettings.NetMomentMuscleVector.Thickness;
//    Line.End.Length = 4*Main.DrawSettings.NetMomentMuscleVector.Thickness;
//  };
};


AnyForceMomentMeasure2 ElbowFlexionNetMomentMuscles = {
  AnyRefNode &ref=..Segments.Humerus.fe.RotNode;

  AnySeg &seg1=..Segments.Ulna;
  AnySeg &seg2=..Segments.Radius;
  AnySeg &seg3 =..Segments.WristJointSeg;
  AnySeg &seg4 =..Segments.Hand.Carpals;
  AnySeg &seg5 =..Segments.Hand.Finger1.Seg.MCPJointSeg;
  AnySeg &seg6 =..Segments.Hand.Finger1.Seg.CMCJointSeg;
  AnySeg &seg7 =..Segments.Hand.Finger1.Seg.Metacarpal;
  AnySeg &seg8 =..Segments.Hand.Finger1.Seg.ProximalPhalanx;
  AnySeg &seg9 =..Segments.Hand.Finger1.Seg.DistalPhalanx;
  AnySeg &seg10 =..Segments.Hand.Finger2.Seg.Metacarpal;
  AnySeg &seg11 =..Segments.Hand.Finger2.Seg.ProximalPhalanx;
  AnySeg &seg12 =..Segments.Hand.Finger2.Seg.MiddlePhalanx;
  AnySeg &seg13 =..Segments.Hand.Finger2.Seg.DistalPhalanx;
  AnySeg &seg14 =..Segments.Hand.Finger3.Seg.Metacarpal;
  AnySeg &seg15 =..Segments.Hand.Finger3.Seg.ProximalPhalanx;
  AnySeg &seg16 =..Segments.Hand.Finger3.Seg.MiddlePhalanx;
  AnySeg &seg17 =..Segments.Hand.Finger3.Seg.DistalPhalanx;
  AnySeg &seg18 =..Segments.Hand.Finger4.Seg.Metacarpal;
  AnySeg &seg19 =..Segments.Hand.Finger4.Seg.ProximalPhalanx;
  AnySeg &seg20 =..Segments.Hand.Finger4.Seg.MiddlePhalanx;
  AnySeg &seg21 =..Segments.Hand.Finger4.Seg.DistalPhalanx;
  AnySeg &seg22 =..Segments.Hand.Finger5.Seg.Metacarpal;
  AnySeg &seg23 =..Segments.Hand.Finger5.Seg.ProximalPhalanx;
  AnySeg &seg24 =..Segments.Hand.Finger5.Seg.MiddlePhalanx;
  AnySeg &seg25 =..Segments.Hand.Finger5.Seg.DistalPhalanx;

  #include  "..\..\..\Body\AAUHuman\Arm\ArmMuscleNames.any"


      //Make transformation to the Humerus.fe.rotnode coordinate system
      AnyVec3 Mlocal=M*ref.Axes;
      AnyVar ElbowFlexion=Mlocal[0];

//  AnyDrawVector DrawVector=
//  {
//    AnyRefNode &ref1=.ref;
//    Vec = Main.DrawSettings.NetMomentMuscleVector.ScaleFactor*.M;
//    PointAway = On;
//    DrawCoord = Off;
//    Line.RGB =  Main.DrawSettings.NetMomentMuscleVector.RGB;
//    Line.Thickness = Main.DrawSettings.NetMomentMuscleVector.Thickness;
//    Line.End.Thickness = 2*Main.DrawSettings.NetMomentMuscleVector.Thickness;
//    Line.End.Length = 4*Main.DrawSettings.NetMomentMuscleVector.Thickness;
//  };
};


AnyForceMomentMeasure2 GHNetMomentMuscles = {
  AnyRefNode &ref=..Segments.Scapula.gh.RotNode;

  AnySeg &seg0=..Segments.Humerus;
  #if BM_ARM_DELTOID_WRAPPING == _DELTOID_WRAPPING_RAKE_
  AnySeg &seg4=..Mus.ArtificialRake.DeltoidMuscleConnector;
  AnySeg &seg5=..Mus.ArtificialRake.DeltoidMuscleRotControlSeg;
  #else
  AnySeg &seg4a=..Mus.DeltoidWrappingPosterior.WrappingSegment;
  AnySeg &seg4b=..Mus.DeltoidWrappingLateral.WrappingSegment;
  AnySeg &seg4c=..Mus.DeltoidWrappingAnterior.WrappingSegment;
  #endif

  AnySeg &seg1=..Segments.Ulna;
  AnySeg &seg2=..Segments.Radius;
  AnySeg &seg6 =..Segments.WristJointSeg;
  AnySeg &seg7 =..Segments.Hand.Carpals;
  AnySeg &seg8 =..Segments.Hand.Finger1.Seg.MCPJointSeg;
  AnySeg &seg9 =..Segments.Hand.Finger1.Seg.CMCJointSeg;
  AnySeg &seg10 =..Segments.Hand.Finger1.Seg.Metacarpal;
  AnySeg &seg11 =..Segments.Hand.Finger1.Seg.ProximalPhalanx;
  AnySeg &seg12 =..Segments.Hand.Finger1.Seg.DistalPhalanx;
  AnySeg &seg13 =..Segments.Hand.Finger2.Seg.Metacarpal;
  AnySeg &seg14 =..Segments.Hand.Finger2.Seg.ProximalPhalanx;
  AnySeg &seg15 =..Segments.Hand.Finger2.Seg.MiddlePhalanx;
  AnySeg &seg16 =..Segments.Hand.Finger2.Seg.DistalPhalanx;
  AnySeg &seg17 =..Segments.Hand.Finger3.Seg.Metacarpal;
  AnySeg &seg18 =..Segments.Hand.Finger3.Seg.ProximalPhalanx;
  AnySeg &seg19 =..Segments.Hand.Finger3.Seg.MiddlePhalanx;
  AnySeg &seg20 =..Segments.Hand.Finger3.Seg.DistalPhalanx;
  AnySeg &seg21 =..Segments.Hand.Finger4.Seg.Metacarpal;
  AnySeg &seg22 =..Segments.Hand.Finger4.Seg.ProximalPhalanx;
  AnySeg &seg23 =..Segments.Hand.Finger4.Seg.MiddlePhalanx;
  AnySeg &seg24 =..Segments.Hand.Finger4.Seg.DistalPhalanx;
  AnySeg &seg25 =..Segments.Hand.Finger5.Seg.Metacarpal;
  AnySeg &seg26 =..Segments.Hand.Finger5.Seg.ProximalPhalanx;
  AnySeg &seg27 =..Segments.Hand.Finger5.Seg.MiddlePhalanx;
  AnySeg &seg28 =..Segments.Hand.Finger5.Seg.DistalPhalanx;


  #include  "..\..\..\Body\AAUHuman\Arm\ArmMuscleNames.any"


      //Make transformation to the Scapula.gh.RotNode coordinate system
      AnyVec3 Mlocal=M*ref.Axes;
      AnyVar GHAbduction=Mlocal[0];
      AnyVar GHFlexion=Mlocal[2];
      AnyVar GHExternalRotation=Mlocal[1];

//  AnyDrawVector DrawVector=
//  {
//    AnyRefNode &ref1=.ref;
//    Vec = Main.DrawSettings.NetMomentMuscleVector.ScaleFactor*.M;
//    PointAway = On;
//    DrawCoord = Off;
//    Line.RGB =  Main.DrawSettings.NetMomentMuscleVector.RGB;
//    Line.Thickness = Main.DrawSettings.NetMomentMuscleVector.Thickness;
//    Line.End.Thickness = 2*Main.DrawSettings.NetMomentMuscleVector.Thickness;
//    Line.End.Length = 4*Main.DrawSettings.NetMomentMuscleVector.Thickness;
//  };
};


AnyForceMomentMeasure ElbowJointReactionMoments =
{
  AnyForceBase &Force = ..Jnt.HumeroUlnarJoint.Constraints.Reaction;
  AnyRefFrame &Humerusfe = ..Segments.Humerus.fe;
  AnyVec3 Mlocal = M*Humerusfe.Axes;
};

AnyForceMomentMeasure WristJointReactionMoments =
{
  AnyForceBase &Force = ..Jnt.WristJointFlexion.Constraints.Reaction;
  AnyRefFrame &Radiuswj = ..Segments.Radius.wj;
  AnyVec3 Mlocal = M*Radiuswj.Axes;
};
