ArmCalibrationStudy ArmCalibration1Left(
  BodyModelRef = Main.HumanModel.BodyModel,
Side = Left,
) = {
  nStep = .ArmCalibration1Right.nStep;

  MuscleArr = ObjSearch(
  &..BodyModel.Left.ShoulderArm.Muscles,
  {
    "DeltoideusAnterior.*",
    "DeltoideusLateral.*",
    "DeltoideusPosterior.*",
    "Infraspinatus.*",
    "LatissimusDorsi.*",
    "LevatorScapulae.*",
    "PectoralisMajorClavicular.*",
    "PectoralisMajorThoracic.*",
    "PectoralisMinor.*",
    "SerratusAnterior.*",
    "Subscapularis.*",
    "Supraspinatus.*",
  },
  "AnyMuscle"
  );

  RminMuscleFiber = repmat(NumElemOf(MuscleArr), .RValues.RMinDefault);
  RmaxMuscleFiber = repmat(NumElemOf(MuscleArr), .RValues.RMaxDefault);

  AnyObjectPtrArray ShoulderPositions = .ArmCalibration1Right.ShoulderPositions;
  AnyObjectPtrArray ScapulaElevationPositions = .ArmCalibration1Right.ScapulaElevationPositions;
  AnyObjectPtrArray ScapulaProtractionPositions = .ArmCalibration1Right.ScapulaProtractionPositions;
  AnyObjectPtrArray ElbowFlexionPositions = .ArmCalibration1Right.ElbowFlexionPositions;
  AnyObjectPtrArray ElbowPronationPositions = .ArmCalibration1Right.ElbowPronationPositions;
  AnyObjectPtrArray WristFlexionPositions = .ArmCalibration1Right.WristFlexionPositions;
  AnyObjectPtrArray WristAbductionPositions = .ArmCalibration1Right.WristAbductionPositions;

  #if BM_ARM_DETAILED_HAND
  ModelRef = { #include "DetailedHandDrivers.any" };
  #endif

  #if BM_ARM_SHOULDER_RHYTHM
  ModelRef = {
    // Exclude the shoulder rythm, since the drivers handles all DOFs.
    AnyMechObjectExcluder ExcludeShoulderRhythm =
    {
      Objects = arrcat(
      &.Joints.ClaviculaProtractionDriver,
      &.Joints.ClaviculaElevationDriver,
      ObjSearch(&.Joints, "ClaviculaAxialRotationDriver")
      );
    };
  };
  #endif
};

ArmCalibrationStudy ArmCalibration2Left(
  BodyModelRef = Main.HumanModel.BodyModel,
Side = Left,
) = {
  nStep = .ArmCalibration2Right.nStep;

  MuscleArr = ObjSearch(
  &..BodyModel.Left.ShoulderArm.Muscles,
  {
    "Anconeus.*",
    "BicepsBrachii.*",
    "Brachialis.*",
    "Brachioradialis.*",
    "Coracobrachialis.*",
    "Triceps.*",
  },
  "AnyMuscle"
  );

  RminMuscleFiber = repmat(NumElemOf(MuscleArr), .RValues.RMinDefault);
  RmaxMuscleFiber = repmat(NumElemOf(MuscleArr), .RValues.RMaxDefault);

  AnyObjectPtrArray ShoulderPositions = .ArmCalibration2Right.ShoulderPositions;
  AnyObjectPtrArray ScapulaElevationPositions = .ArmCalibration2Right.ScapulaElevationPositions;
  AnyObjectPtrArray ScapulaProtractionPositions = .ArmCalibration2Right.ScapulaProtractionPositions;
  AnyObjectPtrArray ElbowFlexionPositions = .ArmCalibration2Right.ElbowFlexionPositions;
  AnyObjectPtrArray ElbowPronationPositions = .ArmCalibration2Right.ElbowPronationPositions;
  AnyObjectPtrArray WristFlexionPositions = .ArmCalibration2Right.WristFlexionPositions;
  AnyObjectPtrArray WristAbductionPositions = .ArmCalibration2Right.WristAbductionPositions;

  #if BM_ARM_DETAILED_HAND
  ModelRef = { #include "DetailedHandDrivers.any" };
  #endif

  #if BM_ARM_SHOULDER_RHYTHM
  ModelRef = {
    // Exclude the shoulder rythm, since the drivers handles all DOFs.
    AnyMechObjectExcluder ExcludeShoulderRhythm = {
      Objects = arrcat(
      &.Joints.ClaviculaProtractionDriver,
      &.Joints.ClaviculaElevationDriver,
      ObjSearch(&.Joints, "ClaviculaAxialRotationDriver")
      );
    };
  };
  #endif
};

ArmCalibrationStudy ArmCalibration3Left(
  BodyModelRef=Main.HumanModel.BodyModel,
Side=Left,
) = {
  nStep = .ArmCalibration3Right.nStep;

  MuscleArr = ObjSearch(
  &..BodyModel.Left.ShoulderArm.Muscles,
  {
    "AbductorPollicis.*",
    "FlexorPollicisLongus.*",
  },
  "AnyMuscle"
  );

  RminMuscleFiber = repmat(NumElemOf(MuscleArr), .RValues.RMinDefault);
  RmaxMuscleFiber = repmat(NumElemOf(MuscleArr), .RValues.RMaxDefault);

  AnyObjectPtrArray ShoulderPositions = .ArmCalibration3Right.ShoulderPositions;
  AnyObjectPtrArray ScapulaElevationPositions = .ArmCalibration3Right.ScapulaElevationPositions;
  AnyObjectPtrArray ScapulaProtractionPositions = .ArmCalibration3Right.ScapulaProtractionPositions;
  AnyObjectPtrArray ElbowFlexionPositions = .ArmCalibration3Right.ElbowFlexionPositions;
  AnyObjectPtrArray ElbowPronationPositions = .ArmCalibration3Right.ElbowPronationPositions;
  AnyObjectPtrArray WristFlexionPositions = .ArmCalibration3Right.WristFlexionPositions;
  AnyObjectPtrArray WristAbductionPositions = .ArmCalibration3Right.WristAbductionPositions;

  #if BM_ARM_DETAILED_HAND
  ModelRef = { #include "DetailedHandDrivers.any" };
  #endif

  #if BM_ARM_SHOULDER_RHYTHM
  ModelRef = {
    // Exclude the shoulder rythm, since the drivers handles all DOFs.
    AnyMechObjectExcluder ExcludeShoulderRhythm = {
      Objects = arrcat(
      &.Joints.ClaviculaProtractionDriver,
      &.Joints.ClaviculaElevationDriver,
      ObjSearch(&.Joints, "ClaviculaAxialRotationDriver")
      );
    };
  };
  #endif
};

ArmCalibrationStudy ArmCalibration4Left(
BodyModelRef=Main.HumanModel.BodyModel,
Side=Left,
) = {
  nStep = .ArmCalibration4Right.nStep;

  MuscleArr = ObjSearch(
  &..BodyModel.Left.ShoulderArm.Muscles,
  {
    "Rhomboideus.*",
    "Sternocleidomastoid.*",
    "TeresMajor.*",
    "TeresMinor.*",
    "TrapeziusClavicular.*",
    "TrapeziusScapular.*",
  },
  "AnyMuscle"
  );

  RminMuscleFiber = repmat(NumElemOf(MuscleArr), .RValues.RMinDefault);
  RmaxMuscleFiber = repmat(NumElemOf(MuscleArr), .RValues.RMaxDefault);

  AnyObjectPtrArray ShoulderPositions = .ArmCalibration4Right.ShoulderPositions;
  AnyObjectPtrArray ScapulaElevationPositions = .ArmCalibration4Right.ScapulaElevationPositions;
  AnyObjectPtrArray ScapulaProtractionPositions = .ArmCalibration4Right.ScapulaProtractionPositions;
  AnyObjectPtrArray ElbowFlexionPositions = .ArmCalibration4Right.ElbowFlexionPositions;
  AnyObjectPtrArray ElbowPronationPositions = .ArmCalibration4Right.ElbowPronationPositions;
  AnyObjectPtrArray WristFlexionPositions = .ArmCalibration4Right.WristFlexionPositions;
  AnyObjectPtrArray WristAbductionPositions = .ArmCalibration4Right.WristAbductionPositions;

  #if BM_ARM_DETAILED_HAND
  ModelRef = { #include "DetailedHandDrivers.any" };
  #endif

  #if BM_ARM_SHOULDER_RHYTHM
  ModelRef = {
    // Exclude the shoulder rythm, since the drivers handles all DOFs.
    AnyMechObjectExcluder ExcludeShoulderRhythm = {
      Objects = arrcat(
      &.Joints.ClaviculaProtractionDriver,
      &.Joints.ClaviculaElevationDriver,
      ObjSearch(&.Joints, "ClaviculaAxialRotationDriver")
      );
    };
  };
  #endif
};

ArmCalibrationStudy ArmCalibration5Left(
BodyModelRef=Main.HumanModel.BodyModel,
Side=Left,
) = {
  nStep = .ArmCalibration5Right.nStep;

  MuscleArr = ObjSearch(
  &..BodyModel.Left.ShoulderArm.Muscles,
  {
    "PronatorQuadratus.*",
    "PronatorTeres.*",
    "Supinator.*",
  },
  "AnyMuscle"
  );

  RminMuscleFiber = repmat(NumElemOf(MuscleArr), .RValues.RMinDefault);
  RmaxMuscleFiber = repmat(NumElemOf(MuscleArr), .RValues.RMaxDefault);

  AnyObjectPtrArray ShoulderPositions = .ArmCalibration5Right.ShoulderPositions;
  AnyObjectPtrArray ScapulaElevationPositions = .ArmCalibration5Right.ScapulaElevationPositions;
  AnyObjectPtrArray ScapulaProtractionPositions = .ArmCalibration5Right.ScapulaProtractionPositions;
  AnyObjectPtrArray ElbowFlexionPositions = .ArmCalibration5Right.ElbowFlexionPositions;
  AnyObjectPtrArray ElbowPronationPositions = .ArmCalibration5Right.ElbowPronationPositions;
  AnyObjectPtrArray WristFlexionPositions = .ArmCalibration5Right.WristFlexionPositions;
  AnyObjectPtrArray WristAbductionPositions = .ArmCalibration5Right.WristAbductionPositions;

  #if BM_ARM_DETAILED_HAND
  ModelRef = { #include "DetailedHandDrivers.any" };
  #endif

  #if BM_ARM_SHOULDER_RHYTHM
  ModelRef = {
    // Exclude the shoulder rythm, since the drivers handles all DOFs.
    AnyMechObjectExcluder ExcludeShoulderRhythm = {
      Objects = arrcat(
      &.Joints.ClaviculaProtractionDriver,
      &.Joints.ClaviculaElevationDriver,
      ObjSearch(&.Joints, "ClaviculaAxialRotationDriver")
      );
    };
  };
  #endif
};

ArmCalibrationStudy ArmCalibration6Left(
BodyModelRef=Main.HumanModel.BodyModel,
Side=Left,
) = {
  nStep = .ArmCalibration6Right.nStep;

  MuscleArr = ObjSearch(
  &..BodyModel.Left.ShoulderArm.Muscles,
  {
    "ExtensorCarpiRadialis.*",
    "ExtensorCarpiUlnaris.*",
    "ExtensorDigitiMinimi.*",
    "ExtensorDigitorum.*",
    "ExtensorIndicis.*",
    "ExtensorPollicis.*",
    "FlexorCarpiRadialis.*",
    "FlexorCarpiUlnaris.*",
    "FlexorDigitorumProfundus.*",
    "FlexorDigitorumSuperficialis.*",
    "PalmarisLongus.*",
  },
  "AnyMuscle"
  );

  RminMuscleFiber = repmat(NumElemOf(MuscleArr), .RValues.RMinDefault);
  RmaxMuscleFiber = repmat(NumElemOf(MuscleArr), .RValues.RMaxDefault);

  AnyObjectPtrArray ShoulderPositions = .ArmCalibration6Right.ShoulderPositions;
  AnyObjectPtrArray ScapulaElevationPositions = .ArmCalibration6Right.ScapulaElevationPositions;
  AnyObjectPtrArray ScapulaProtractionPositions = .ArmCalibration6Right.ScapulaProtractionPositions;
  AnyObjectPtrArray ElbowFlexionPositions = .ArmCalibration6Right.ElbowFlexionPositions;
  AnyObjectPtrArray ElbowPronationPositions = .ArmCalibration6Right.ElbowPronationPositions;
  AnyObjectPtrArray WristFlexionPositions = .ArmCalibration6Right.WristFlexionPositions;
  AnyObjectPtrArray WristAbductionPositions = .ArmCalibration6Right.WristAbductionPositions;

  #if BM_ARM_DETAILED_HAND
  ModelRef = { #include "DetailedHandDrivers.any" };
  #endif

  #if BM_ARM_SHOULDER_RHYTHM
  ModelRef = {
    // Exclude the shoulder rythm, since the drivers handles all DOFs.
    AnyMechObjectExcluder ExcludeShoulderRhythm = {
      Objects = arrcat(
      &.Joints.ClaviculaProtractionDriver,
      &.Joints.ClaviculaElevationDriver,
      ObjSearch(&.Joints, "ClaviculaAxialRotationDriver")
      );
    };
  };
  #endif
};


CalibrationSequence = {
  AnyOperation &ArmCal1Left = .ArmCalibration1Left.FiberAndTendonLengthAdjustment;
  AnyOperation &ArmCal2Left = .ArmCalibration2Left.FiberAndTendonLengthAdjustment;
  AnyOperation &ArmCal3Left = .ArmCalibration3Left.FiberAndTendonLengthAdjustment;
  AnyOperation &ArmCal4Left = .ArmCalibration4Left.FiberAndTendonLengthAdjustment;
  AnyOperation &ArmCal5Left = .ArmCalibration5Left.FiberAndTendonLengthAdjustment;
  AnyOperation &ArmCal6Left = .ArmCalibration6Left.FiberAndTendonLengthAdjustment;
};
