// This file contains muscle attachment points for the clavicle segment data from VU sub 2.
// The original coordinates have been transformed from global coordinates to the segment local
// coordinate system
AnyFolder &Humerus =..Segments.Humerus;

Humerus = {
  #include "../DrawSettings/SegmentAxes.any"

  AnyRefNode art_gh_hum = {

    sRel = .Scale(.Data.art_gh_hum_pos*.Mirror);
    AnyVar Radius=0.0266;

    AnyVec3 P1=.Scale(.Data.art_gh_hum_P1_pos*.Mirror);
    AnyVec3 P2=.Scale(.Data.art_gh_hum_P2_pos*.Mirror);
    AnyVec3 P3=.Scale(.Data.art_gh_hum_P3_pos*.Mirror);

    //These three numbers are the distance from srel to P1, P2 and P3
    AnyVar P1Radius= vnorm(sRel-P1);
    AnyVar P2Radius= vnorm(sRel-P2);
    AnyVar P3Radius= vnorm(sRel-P3);

    //The art_gh_hum surf is made as an ellipsoid this is the only way to ensure that when
    //scaling the bone the muscle insertation points will remain outside the surface
    AnySurfEllipsoid art_gh_humSurf = {Radius ={.P1Radius,.P2Radius,.P3Radius};};
  };


  AnyRefNode  SubscapularisHumerusWrapping = {
    AnyVec3 CenterOffset = {0.005,0.005,0.00};
    sRel = .Scale((.Data.gh_pos+CenterOffset)*.Mirror);
    ARel = RotMat(pi/2, x);

    AnyVec3 humerus_top=.Scale(.Data.art_gh_hum_P2_pos*.Mirror);
    AnyVec3 i_subscapularis = .I_Subscapularis1.sRel;

    AnySurfCylinder cyl = {
      Radius = 0.99*vnorm(.sRel-.i_subscapularis);
      Length = 0*Radius;
      viewSurface.Opacity = 0.5;
      CapRatio2 = vnorm(.sRel-.humerus_top)/Radius;
      CapRatio = 2.7;
    };

  };

  //Used for deltoid muscle wrapping
  AnyRefNode art_tub_minus_tub_majus = {
    sRel = .Scale(.Data.art_tub_minus_tub_majus_pos*.Mirror);

    //Two points lying with an angle of 90 deg between are used for to control
    //the scaling of the sphere
    AnyVar Radius =0.036;
    AnyVec3 P1=.Scale(.Data.art_tub_minus_tub_majus_P1_pos*.Mirror);
    AnyVec3 P2=.Scale(.Data.art_tub_minus_tub_majus_P2_pos*.Mirror);

    //These two numbers are the distance from srel to P1 and P2
    AnyVar P1Radius= vnorm(sRel-P1);
    AnyVar P2Radius= vnorm(sRel-P2);

    //Take the average and use this as the radius
    AnyVar RadiusAverage =(P1Radius+P2Radius)/2;
    ARel={ {0,0,1}, {1,0,0}, {0,1,0}};

    AnySurfSphere art_tub_minus_tub_majusSurf = {Radius =.RadiusAverage;};
  };

  AnyRefNode art_tub_minus               ={sRel = .Scale(.Data.art_tub_minus_pos*.Mirror);};
  AnyRefNode art_tub_majus               ={sRel = .Scale(.Data.art_tub_majus_pos*.Mirror);};
  AnyRefNode sulcus_intertubercularis    ={sRel = .Scale(.Data.sulcus_intertubercularis_pos*.Mirror);};
  AnyRefNode sulcus_intertubercularisTop ={sRel = .Scale(.Data.sulcus_intertubercularisTop_pos*.Mirror);};


  AnyRefNode collum_hum = {
    AnyVec3 P2 =.Scale(.Data.collum_hum_P2_pos*.Mirror); ////Point used for radius
    AnyVec3 P3 =.Scale(.Data.collum_hum_P3_pos*.Mirror); //End point
    sRel = .Scale(.Data.collum_hum_pos*.Mirror);

    //Calculate orientation of the cylinder (A little different to all other surfaces)
    ARel=RotMat(sRel,P3,P2)*RotMat(90/180*pi, x)*RotMat(90/180*pi, y);

    AnySurfCylinder collum_hum= {
      Radius=vnorm(.sRel-.P2);
      Length=vnorm(.sRel-.P3);
    };
  };


  AnyRefNode collum_hum_TeresMinormajor = {
    AnyMatrix p = .Scale(.Data.HumerusWrapLandmarks*.Mirror);
    AnyFloat lengthscalefactor = 1;
    AnyFloat radiusscalefactor = 0.92;

    AnyVar Z_rotation =0.5*pi*(1-....Sign);
    #include "<ANYBODY_PATH_MODELUTILS>/WrappingSurfaces/WrappingCylinder5PointFit.any"
    cyl ={CapRatio =1;};
  };


  AnyRefNode TeresMinorhumurus_wrap = {
    AnyVar minor_radius = 0.90*abs(.gh.sRel-.I_TeresMinor1.sRel)[0];
    AnyVar major_radius = minor_radius*1.9;

    AnyVec3 minor_center = {0, .I_TeresMinor3.sRel[1],0};
    AnyMat33 orientation = RotMat(0.0*....Sign,y);

    AnyVec3 major_center = minor_center+major_radius*....Sign*orientation'[0];

    sRel=major_center;
    ARel = orientation;
    //viewRefFrame.Visible = Off;

    AnySurfTorus torus = {
       MajorRadius = .major_radius;
       MinorRadius = .minor_radius;
       //viewSurface.Visible=On;
    };


  };

  AnyRefNode Infraspinatushumurus_wrap = {
    AnyVar minor_radius = 0.96*abs(.gh.sRel-.I_Infraspinatus5.sRel)[0];
    AnyVar major_radius = minor_radius*1.9;

    AnyVec3 minor_center = {0, .I_Infraspinatus5.sRel[1],0};
    AnyMat33 orientation = RotMat(0.0*....Sign,y);

    AnyVec3 major_center = minor_center+major_radius*....Sign*orientation'[0];

    sRel=major_center;
    ARel = orientation;
    //viewRefFrame.Visible = Off;

    AnySurfTorus torus = {
       MajorRadius = .major_radius;
       MinorRadius = .minor_radius;
       //viewSurface.Visible=On;
    };


  };

  AnyRefNode tricpes_gh_sphere = {
   sRel=.gh.sRel;
    ARel =RotMat(....Sign*0.25*pi,y);
    AnySurfSphere surf = {
      AnyVar ra=    1*..art_gh_hum.Radius;
      Radius=ra ;
    };
  };


  // This is a collum which visually has been fitted to the distal end of humerus
  // it is used for wrapping of elbow flexor muscles.
  AnyRefNode condylus_hum= {

    AnyMatrix p = .Scale(.Data.condylus_hum_landmarks *.Mirror);

    AnyFloat lengthscalefactor = 5;
    AnyFloat radiusscalefactor = 1.2;

    AnyVar Z_rotation =iffun(eqfun(1.0,....Sign),1,0)*pi;

    #include "<ANYBODY_PATH_MODELUTILS>/WrappingSurfaces/WrappingCylinder5PointFit.any"
    cyl = {
      CapRatio = 0.8;
    };
  };

  // This is a collum which visually has been fitted to the distal end of humerus
  // it is used for wrapping of Triceps muscles
  AnyRefNode condylus_humT = {
    AnyVec3 P2 =.Scale(.Data.condylus_humT_P2_pos*.Mirror); //End point
    AnyVec3 P3 =.Scale(.Data.condylus_humT_P3_pos*.Mirror); //Point used for radius

    sRel = .Scale(.Data.condylus_humT_pos*.Mirror);

    //Calculate orientation of the cylinder
    ARel=RotMat(sRel,P3,P2)*RotMat(-90/180*pi, z)*RotMat(-90/180*pi, y);

    AnySurfCylinder condylus_humT= {
      Radius=vnorm(.sRel-.P3);
      Length=vnorm(.sRel-.P2);
    };
  };

  AnyRefNode Deltoid_hum = {
    sRel = .Scale(.Data.Deltoid_hum*.Mirror);
    ARel = RotMat (pi/2, x);
    AnyFloat P2 = ..Humerus.gh_rotated1.sRel;
    AnyFloat P3 = .Scale(.Data.Deltoid_hum_p3*.Mirror);

    AnySurfCylinder Deltoid_humCyl= {
      Radius=vnorm(.sRel-.P3);
      Length=2*vnorm(.sRel-.P2);
      CapRatio = 1;
      CenterOrigin = On;
    };
  };
  AnyRefNode Deltoid_hum_ext = {
    sRel = ..Humerus.gh_rotated1.sRel;
    ARel = RotMat (pi/2, x);
    AnyFloat P2 = .Scale(.Data.Deltoid_hum*.Mirror);
    AnyFloat P3 = .Scale(.Data.Deltoid_hum_p3*.Mirror);

    AnySurfCylinder Deltoid_humCyl= {
      Radius=0.98*Main.HumanModel.BodyModel.Right.ShoulderArm.Muscles.WrappingSurfaces.DeltoidWrappingAnterior.WrappingSegment.AlignmentRefNode.Deltoid_Clavicula_Cyl.cyl.Radius;//vnorm(.sRel-.P3);
      Length=Radius*2;//2*vnorm(.sRel-.P2);
      CapRatio = 1;//3;
//      CapRatio2 = 1;
//      CenterOrigin = On;
    };
  };

#if BM_ARM_DELTOID_WRAPPING == _DELTOID_WRAPPING_RAKE_
  AnyRefNode I_deltoideus_scapular_part_1         = {sRel = .Scale(.Data.I_deltoideus_scapular_part_1_pos*.Mirror);};
  AnyRefNode I_deltoideus_scapular_part_2         = {sRel = .Scale(.Data.I_deltoideus_scapular_part_2_pos*.Mirror);};
  AnyRefNode I_deltoideus_scapular_part_3         = {sRel = .Scale(.Data.I_deltoideus_scapular_part_3_pos*.Mirror);};
  AnyRefNode I_deltoideus_scapular_part_4         = {sRel = .Scale(.Data.I_deltoideus_scapular_part_4_pos*.Mirror);};
  AnyRefNode I_deltoideus_scapular_part_5         = {sRel = .Scale(.Data.I_deltoideus_scapular_part_5_pos*.Mirror);};
  AnyRefNode I_deltoideus_scapular_part_6         = {sRel = .Scale(.Data.I_deltoideus_scapular_part_6_pos*.Mirror);};
  AnyRefNode I_deltoideus_clavicular_part_1       = {sRel = .Scale(.Data.I_deltoideus_clavicular_part_1_pos*.Mirror);};
  AnyRefNode I_deltoideus_clavicular_part_2       = {sRel = .Scale(.Data.I_deltoideus_clavicular_part_2_pos*.Mirror);};
  AnyRefNode I_deltoideus_clavicular_part_3       = {sRel = .Scale(.Data.I_deltoideus_clavicular_part_3_pos*.Mirror);};
  AnyRefNode I_deltoideus_clavicular_part_4       = {sRel = .Scale(.Data.I_deltoideus_clavicular_part_4_pos*.Mirror);};
  AnyRefNode I_deltoideus_clavicular_part_5       = {sRel = .Scale(.Data.I_deltoideus_clavicular_part_5_pos*.Mirror);};
  AnyRefNode I_deltoideus_clavicular_part_6       = {sRel = .Scale(.Data.I_deltoideus_clavicular_part_6_pos*.Mirror);};
#else
  AnyRefNode I_DeltoideusPosterior1         = {sRel = .Scale(.Data.I_DeltoideusPosterior1_pos*.Mirror);};
  AnyRefNode I_DeltoideusPosterior2        = {sRel = .Scale(.Data.I_DeltoideusPosterior2_pos*.Mirror);};
  AnyRefNode I_DeltoideusPosterior3        = {sRel = .Scale(.Data.I_DeltoideusPosterior3_pos*.Mirror);};
  AnyRefNode I_DeltoideusPosterior4        = {sRel = .Scale(.Data.I_DeltoideusPosterior4_pos*.Mirror);};
  AnyRefNode I_DeltoideusLateral1         = {sRel = .Scale(.Data.I_DeltoideusLateral1_pos*.Mirror);};
  AnyRefNode I_DeltoideusLateral2         = {sRel = .Scale(.Data.I_DeltoideusLateral2_pos*.Mirror);};
  AnyRefNode I_DeltoideusLateral3         = {sRel = .Scale(.Data.I_DeltoideusLateral3_pos*.Mirror);};
  AnyRefNode I_DeltoideusLateral4         = {sRel = .Scale(.Data.I_DeltoideusLateral4_pos*.Mirror);};
  AnyRefNode I_DeltoideusAnterior1       = {sRel = .Scale(.Data.I_DeltoideusAnterior1_pos*.Mirror);};
  AnyRefNode I_DeltoideusAnterior2       = {sRel = .Scale(.Data.I_DeltoideusAnterior2_pos*.Mirror);};
  AnyRefNode I_DeltoideusAnterior3       = {sRel = .Scale(.Data.I_DeltoideusAnterior3_pos*.Mirror);};
  AnyRefNode I_DeltoideusAnterior4       = {sRel = .Scale(.Data.I_DeltoideusAnterior4_pos*.Mirror);};
#endif
  AnyRefNode I_Subscapularis1                    = {sRel = .Scale(.Data.I_Subscapularis1_pos*.Mirror);};
  AnyRefNode I_Subscapularis2                    = {sRel = .Scale(.Data.I_Subscapularis2_pos*.Mirror);};
  AnyRefNode I_Subscapularis3                    = {sRel = .Scale(.Data.I_Subscapularis3_pos*.Mirror);};
  AnyRefNode I_Subscapularis4                    = {sRel = .Scale(.Data.I_Subscapularis4_pos*.Mirror);};
  AnyRefNode I_Subscapularis5                    = {sRel = .Scale(.Data.I_Subscapularis5_pos*.Mirror);};
  AnyRefNode I_Subscapularis6                    = {sRel = .Scale(.Data.I_Subscapularis6_pos*.Mirror);};

  AnyRefNode I_Supraspinatus1                    = {sRel = .Scale(.Data.I_Supraspinatus1_pos*.Mirror);};
  AnyRefNode I_Supraspinatus2                    = {sRel = .Scale(.Data.I_Supraspinatus2_pos*.Mirror);};
  AnyRefNode I_Supraspinatus3                    = {sRel = .Scale(.Data.I_Supraspinatus3_pos*.Mirror);};
  AnyRefNode I_Supraspinatus4                    = {sRel = .Scale(.Data.I_Supraspinatus4_pos*.Mirror);};
  AnyRefNode I_Supraspinatus5                    = {sRel = .Scale(.Data.I_Supraspinatus5_pos*.Mirror);};
  AnyRefNode I_Supraspinatus6                    = {sRel = .Scale(.Data.I_Supraspinatus6_pos*.Mirror);};

  AnyRefNode I_Infraspinatus1                    = {sRel = .Scale(.Data.I_Infraspinatus1_pos*.Mirror);};
  AnyRefNode I_Infraspinatus2                    = {sRel = .Scale(.Data.I_Infraspinatus2_pos*.Mirror);};
  AnyRefNode I_Infraspinatus3                    = {sRel = .Scale(.Data.I_Infraspinatus3_pos*.Mirror);};
  AnyRefNode I_Infraspinatus4                    = {sRel = .Scale(.Data.I_Infraspinatus4_pos*.Mirror);};
  AnyRefNode I_Infraspinatus5                    = {sRel = .Scale(.Data.I_Infraspinatus5_pos*.Mirror);};
  AnyRefNode I_Infraspinatus6                    = {sRel = .Scale(.Data.I_Infraspinatus6_pos*.Mirror);};

  AnyRefNode I_TeresMinor1                      = {sRel = .Scale(.Data.I_TeresMinor1_pos*.Mirror);};
  AnyRefNode I_TeresMinor2                      = {sRel = .Scale(.Data.I_TeresMinor2_pos*.Mirror);};
  AnyRefNode I_TeresMinor3                      = {sRel = .Scale(.Data.I_TeresMinor3_pos*.Mirror);};
  AnyRefNode I_TeresMinor4                      = {sRel = .Scale(.Data.I_TeresMinor4_pos*.Mirror);};
  AnyRefNode I_TeresMinor5                      = {sRel = .Scale(.Data.I_TeresMinor5_pos*.Mirror);};
  AnyRefNode I_TeresMinor6                      = {sRel = .Scale(.Data.I_TeresMinor6_pos*.Mirror);};

  AnyRefNode I_TeresMajor1                      = {sRel = .Scale(.Data.I_TeresMajor1_pos*.Mirror);};
  AnyRefNode I_TeresMajor2                      = {sRel = .Scale(.Data.I_TeresMajor2_pos*.Mirror);};
  AnyRefNode I_TeresMajor3                      = {sRel = .Scale(.Data.I_TeresMajor3_pos*.Mirror);};
  AnyRefNode I_TeresMajor4                      = {sRel = .Scale(.Data.I_TeresMajor4_pos*.Mirror);};
  AnyRefNode I_TeresMajor5                      = {sRel = .Scale(.Data.I_TeresMajor5_pos*.Mirror);};
  AnyRefNode I_TeresMajor6                      = {sRel = .Scale(.Data.I_TeresMajor6_pos*.Mirror);};

  AnyRefNode I_Coracobrachialis1                 = {sRel = .Scale(.Data.I_Coracobrachialis1_pos*.Mirror);};
  AnyRefNode I_Coracobrachialis2                 = {sRel = .Scale(.Data.I_Coracobrachialis2_pos*.Mirror);};
  AnyRefNode I_Coracobrachialis3                 = {sRel = .Scale(.Data.I_Coracobrachialis3_pos*.Mirror);};
  AnyRefNode I_Coracobrachialis4                 = {sRel = .Scale(.Data.I_Coracobrachialis4_pos*.Mirror);};
  AnyRefNode I_Coracobrachialis5                 = {sRel = .Scale(.Data.I_Coracobrachialis5_pos*.Mirror);};
  AnyRefNode I_Coracobrachialis6                 = {sRel = .Scale(.Data.I_Coracobrachialis6_pos*.Mirror);};
  AnyRefNode I_TricepsBrachii1                  = {sRel = .Scale(.Data.I_TricepsBrachii1_pos*.Mirror);};
  AnyRefNode I_TricepsBrachii2                  = {sRel = .Scale(.Data.I_TricepsBrachii2_pos*.Mirror);};

  AnyRefNode I_LatissimusDorsi1                 = {sRel = .Scale(.Data.I_LatissimusDorsi1_pos*.Mirror);};
  AnyRefNode I_LatissimusDorsi2                 = {sRel = .Scale(.Data.I_LatissimusDorsi2_pos*.Mirror);};
  AnyRefNode I_LatissimusDorsi3                 = {sRel = .Scale(.Data.I_LatissimusDorsi3_pos*.Mirror);};
  AnyRefNode I_LatissimusDorsi4                 = {sRel = .Scale(.Data.I_LatissimusDorsi4_pos*.Mirror);};
  AnyRefNode I_LatissimusDorsi5                 = {sRel = .Scale(.Data.I_LatissimusDorsi5_pos*.Mirror);};
  AnyRefNode I_LatissimusDorsi6                 = {sRel = .Scale(.Data.I_LatissimusDorsi6_pos*.Mirror);};
  AnyRefNode I_LatissimusDorsi7                 = {sRel = .Scale(.Data.I_LatissimusDorsi7_pos*.Mirror);};
  AnyRefNode I_LatissimusDorsi8                 = {sRel = .Scale(.Data.I_LatissimusDorsi8_pos*.Mirror);};
  AnyRefNode I_LatissimusDorsi9                 = {sRel = .Scale(.Data.I_LatissimusDorsi9_pos*.Mirror);};
  AnyRefNode I_LatissimusDorsi10                 = {sRel = .Scale(.Data.I_LatissimusDorsi10_pos*.Mirror);};
  AnyRefNode I_LatissimusDorsi11                 = {sRel = .Scale(.Data.I_LatissimusDorsi11_pos*.Mirror);};

  AnyRefNode I_PectoralisMajorSternocostal1   = {sRel = .Scale(.Data.I_PectoralisMajorSternocostal1_pos*.Mirror);};
  AnyRefNode I_PectoralisMajorSternocostal2   = {sRel = .Scale(.Data.I_PectoralisMajorSternocostal2_pos*.Mirror);};
  AnyRefNode I_PectoralisMajorSternocostal3   = {sRel = .Scale(.Data.I_PectoralisMajorSternocostal3_pos*.Mirror);};
  AnyRefNode I_PectoralisMajorSternocostal4   = {sRel = .Scale(.Data.I_PectoralisMajorSternocostal4_pos*.Mirror);};
  AnyRefNode I_PectoralisMajorSternocostal5   = {sRel = .Scale(.Data.I_PectoralisMajorSternocostal5_pos*.Mirror);};
  AnyRefNode I_PectoralisMajorSternocostal6   = {sRel = .Scale(.Data.I_PectoralisMajorSternocostal6_pos*.Mirror);};
  AnyRefNode I_PectoralisMajorSternocostal7   = {sRel = .Scale(.Data.I_PectoralisMajorSternocostal7_pos*.Mirror);};
  AnyRefNode I_PectoralisMajorSternocostal8   = {sRel = .Scale(.Data.I_PectoralisMajorSternocostal8_pos*.Mirror);};
  AnyRefNode I_PectoralisMajorSternocostal9   = {sRel = .Scale(.Data.I_PectoralisMajorSternocostal9_pos*.Mirror);};
  AnyRefNode I_PectoralisMajorSternocostal10   = {sRel = .Scale(.Data.I_PectoralisMajorSternocostal10_pos*.Mirror);};

  AnyRefNode I_PectoralisMajorClavicular1 = {sRel = .Scale(.Data.I_PectoralisMajorClavicular1_pos*.Mirror);};
  AnyRefNode I_PectoralisMajorClavicular2 = {sRel = .Scale(.Data.I_PectoralisMajorClavicular2_pos*.Mirror);};
  AnyRefNode I_PectoralisMajorClavicular3 = {sRel = .Scale(.Data.I_PectoralisMajorClavicular3_pos*.Mirror);};
  AnyRefNode I_PectoralisMajorClavicular4 = {sRel = .Scale(.Data.I_PectoralisMajorClavicular4_pos*.Mirror);};
  AnyRefNode I_PectoralisMajorClavicular5 = {sRel = .Scale(.Data.I_PectoralisMajorClavicular5_pos*.Mirror);};

  AnyRefNode O_Brachialis1                   = {sRel = .Scale(.Data.O_Brachialis1_pos*.Mirror);};
  AnyRefNode O_Brachialis2                   = {sRel = .Scale(.Data.O_Brachialis2_pos*.Mirror);};

  AnyRefNode Via_TricepsBrachiiLongum1                   = {sRel = .Scale(.Data.Via_TricepsBrachiiLongum1_pos*.Mirror);};
  AnyRefNode Via_TricepsBrachiiLongum2                   = {sRel = .Scale(.Data.Via_TricepsBrachiiLongum2_pos*.Mirror);};

  AnyRefNode O_TricepsBrachiiMediale1                   = {sRel = .Scale(.Data.O_TricepsBrachiiMediale1_pos*.Mirror);};
  AnyRefNode O_TricepsBrachiiMediale2                   = {sRel = .Scale(.Data.O_TricepsBrachiiMediale2_pos*.Mirror);};

  AnyRefNode O_TricepsBrachiiLaterale1                   = {sRel = .Scale(.Data.O_TricepsBrachiiLaterale1_pos*.Mirror);};
  AnyRefNode O_TricepsBrachiiLaterale2                   = {sRel = .Scale(.Data.O_TricepsBrachiiLaterale2_pos*.Mirror);};

  AnyRefNode O_Brachioradialis1                    = {sRel = .Scale(.Data.O_Brachioradialis1_pos*.Mirror);};
  AnyRefNode O_Brachioradialis2                    = {sRel = .Scale(.Data.O_Brachioradialis2_pos*.Mirror);};

  AnyRefNode O_Anconeus1                     = {sRel = .Scale(.Data.O_Anconeus1_pos*.Mirror);};
  AnyRefNode O_Anconeus2                     = {sRel = .Scale(.Data.O_Anconeus2_pos*.Mirror);};
  AnyRefNode O_PronatorTeresHumeral1 = {sRel = .Scale(.Data.O_PronatorTeresHumeral1_pos*.Mirror);};
  AnyRefNode O_PronatorTeresHumeral2 = {sRel = .Scale(.Data.O_PronatorTeresHumeral2_pos*.Mirror);};

  AnyRefNode O_SupinatorHumerus1       = {sRel = .Scale(.Data.O_SupinatorHumerus1_pos*.Mirror);};
  AnyRefNode O_SupinatorHumerus2       = {sRel = .Scale(.Data.O_SupinatorHumerus2_pos*.Mirror);};
  AnyRefNode I_Cor_brach_1                    = {sRel = .Scale(.Data.I_Cor_brach_1_pos*.Mirror);};
  AnyRefNode I_Cor_brach_2                    = {sRel = .Scale(.Data.I_Cor_brach_2_pos*.Mirror);};


  AnyRefNode O_ExtensorCarpiUlnaris         = {sRel = .Scale(.Data.O_ExtensorCarpiUlnaris_pos*.Mirror);};
  AnyRefNode O_ExtensorCarpiRadialisBrevis = {sRel = .Scale(.Data.O_ExtensorCarpiRadialisBrevis_pos*.Mirror);};

  AnyRefNode O_ExtensorCarpiRadialisLongus = {sRel = .Scale(.Data.O_ExtensorCarpiRadialisLongus_pos*.Mirror);};
  AnyRefNode O_FlexorCarpiUlnaris           = {sRel = .Scale(.Data.O_FlexorCarpiUlnaris_pos*.Mirror);};
  AnyRefNode O_FlexorCarpiRadialis          = {sRel = .Scale(.Data.O_FlexorCarpiRadialis_pos*.Mirror);};
  AnyRefNode O_PalmarisLongus                = {sRel = .Scale(.Data.O_PalmarisLongus_pos*.Mirror);};

  AnyRefNode O_FlexorDigitorumSuperficialis = {sRel = .Scale(.Data.O_FlexorDigitorumSuperficialispos*.Mirror);};
  AnyRefNode O_ExtensorDigitorum             = {sRel = .Scale(.Data.O_ExtensorDigitorumpos*.Mirror);};
  AnyRefNode O_ExtensorDigitiMinimi         = {sRel = .Scale(.Data.O_ExtensorDigitiMinimi_pos*.Mirror);};

};
