SelectedOutput.Left = {

  AnyFolder ShoulderArm = {

    SelectedOutputGroup JointReactionForce = {

      /// Medial positive
      AnyVar SternoClavicular_MedioLateralForce = ....Left.ShoulderArm.Joints.SternoClavicularJoint.Constraints.Reaction.Fout[0];
      /// Superior positive
      AnyVar SternoClavicular_InferoSuperiorForce = ....Left.ShoulderArm.Joints.SternoClavicularJoint.Constraints.Reaction.Fout[1];
      /// Posterior positive
      AnyVar SternoClavicular_AnteroPosteriorForce = ....Left.ShoulderArm.Joints.SternoClavicularJoint.Constraints.Reaction.Fout[2];

      /// Lateral positive
      AnyVar AcromioClavicular_MedioLateralForce = ....Left.ShoulderArm.Joints.AcromioClavicularJoint.Constraints.Reaction.Fout[0];
      /// Inferior positive
      AnyVar AcromioClavicular_InferoSuperiorForce = ....Left.ShoulderArm.Joints.AcromioClavicularJoint.Constraints.Reaction.Fout[1];
      /// Posterior positive
      AnyVar AcromioClavicular_AnteroPosteriorForce = ....Left.ShoulderArm.Joints.AcromioClavicularJoint.Constraints.Reaction.Fout[2];
      // Clavicula acj ref

      /// Distraction positive
      AnyVar GlenoHumeral_DistractionForce = (1)*....Left.ShoulderArm.Joints.GHReactions.ResultantForce.FTotalLocal[2];
      /// Inferior positive
      AnyVar GlenoHumeral_InferoSuperiorForce = (-1)*....Left.ShoulderArm.Joints.GHReactions.ResultantForce.FTotalLocal[1];
      /// Posterior positive
      AnyVar GlenoHumeral_AnteroPosteriorForce = ....Left.ShoulderArm.Joints.GHReactions.ResultantForce.FTotalLocal[0];
      // scapula gh ref

      /// Medial positive
      AnyVar ElbowHumeroUlnar_MedioLateralForce = ....Left.ShoulderArm.Joints.HumeroUlnarJoint.Constraints.Reaction.Fout[0];
      /// Proximal positive
      AnyVar ElbowHumeroUlnar_ProximoDistalForce = ....Left.ShoulderArm.Joints.HumeroUlnarJoint.Constraints.Reaction.Fout[1];
      /// Posterior positive
      AnyVar ElbowHumeroUlnar_AnteroPosteriorForce = ....Left.ShoulderArm.Joints.HumeroUlnarJoint.Constraints.Reaction.Fout[2];
      /// External positive
      AnyVar ElbowHumeroUlnar_AxialMoment = ....Left.ShoulderArm.MomentMeasure.ElbowJointReactionMoments.Mlocal[1];
      /// Medial positive
      AnyVar ElbowHumeroUlnar_LateralMoment = ....Left.ShoulderArm.MomentMeasure.ElbowJointReactionMoments.Mlocal[2];
      // humerus fe ref

      /// Ulnar positive
      AnyVar ProximalRadioUlnar_RadialForce = ....Left.ShoulderArm.Joints.ProximalRadioUlnarJoint.ReacForce.Fout[0];
      /// Volar positive
      AnyVar ProximalRadioUlnar_DorsoVolarForce = ....Left.ShoulderArm.Joints.ProximalRadioUlnarJoint.ReacForce.Fout[1];
      // ulna ps2Reac ref

      /// Distal Positive
      AnyVar RadioHumeral_ProximoDistalForce = ....Left.ShoulderArm.Joints.HumeroRadialJoint.ReacForce.Fout[0];
      // radius ps2Reac ref

      /// Ulnar positive
      AnyVar DistalRadioUlnar_RadialForce = ....Left.ShoulderArm.Joints.DistalRadioUlnarJoint.Constraints.Reaction.Fout[0];
      /// Volar positive
      AnyVar DistalRadioUlnar_DorsoVolarForce = ....Left.ShoulderArm.Joints.DistalRadioUlnarJoint.Constraints.Reaction.Fout[1];
      // ulna us ref

      #ifndef WRIST_EXPERIMENTAL
      // Radial positive
      AnyVar WristRadioCarpal_RadialForce = ....Left.ShoulderArm.Joints.WristJointFlexion.Constraints.Reaction.Fout[1];
      /// Proximal positive
      AnyVar WristRadioCarpal_ProximoDistalForce = ....Left.ShoulderArm.Joints.WristJointFlexion.Constraints.Reaction.Fout[0];
      /// Dorsal positive
      AnyVar WristRadioCarpal_DorsoVolarForce = ....Left.ShoulderArm.Joints.WristJointFlexion.Constraints.Reaction.Fout[2];
      /// External positive
      AnyVar WristRadioCarpal_AxialMoment = ....Left.ShoulderArm.MomentMeasure.WristJointReactionMoments.Mlocal[0];
      // radius wj ref
      #endif
    };

    SelectedOutputGroup JointMomentMeasure = {
      AnyVar GlenoHumeralAbduction = ....Left.ShoulderArm.MomentMeasure.GHNetMomentMuscles.GHAbduction;
      // Scapula.gh.Rotnode ref
      AnyVar GlenoHumeralFlexion = ....Left.ShoulderArm.MomentMeasure.GHNetMomentMuscles.GHFlexion;
      // Scapula.gh.Rotnode ref
      AnyVar GlenoHumeralExternalRotation = ....Left.ShoulderArm.MomentMeasure.GHNetMomentMuscles.GHExternalRotation;
      // Scapula.gh.Rotnode ref

      AnyVar ElbowFlexion = ....Left.ShoulderArm.MomentMeasure.ElbowFlexionNetMomentMuscles.ElbowFlexion;
      // Humerus.fe.Rotnode ref

      AnyVar ElbowPronation = ....Left.ShoulderArm.MomentMeasure.ElbowPronationNetMomentMuscles.ElbowPronation;
      // Ulna.ps2.Rotnode ref

      AnyVar WristFlexion = ....Left.ShoulderArm.MomentMeasure.WristFlexionNetMomentMuscles.WristFlexion;
      // Radius.wj.Rotnode ref

      AnyVar WristAbduction = ....Left.ShoulderArm.MomentMeasure.WristAbductionNetMomentMuscles.WristAbduction;
      // WristJointSeg.RadialUlnarDeviation.Rotnode ref
    };

    /// Joint angles in degrees
    SelectedOutputGroup JointAngles = {
      /// Sterno Clavicular Protraction angle in degrees
      AnyVar SternoClavicularProtraction = ....Interface.Left.SternoClavicularProtraction.Pos[0] * 180/pi;
      /// Sterno Clavicular Elevation angle in degrees
      AnyVar SternoClavicularElevation = ....Interface.Left.SternoClavicularElevation.Pos[0] * 180/pi;
      /// Sterno Clavicular Rotation angle in degrees
      AnyVar SternoClavicularAxialRotation = ....Interface.Left.SternoClavicularAxialRotation.Pos[0] * 180/pi;
      /// Glenohumeral Flexion angle in degrees
      AnyVar GlenohumeralFlexion = ....Interface.Left.GlenohumeralFlexion.Pos[0] * 180/pi;
      /// Glenohumeral Abduction angle in degrees
      AnyVar GlenohumeralAbduction = ....Interface.Left.GlenohumeralAbduction.Pos[0] * 180/pi;
      /// Glenohumeral External Rotation angle in degrees
      AnyVar GlenohumeralExternalRotation = ....Interface.Left.GlenohumeralExternalRotation.Pos[0] * 180/pi;
      /// Elbow Flexion angle in degrees
      AnyVar ElbowFlexion = ....Interface.Left.ElbowFlexion.Pos[0] * 180/pi;
      /// Elbow Pronation angle in degrees
      AnyVar ElbowPronation = ....Interface.Left.ElbowPronation.Pos[0] * 180/pi;
      /// Wrist Flexion angle in degrees
      AnyVar WristFlexion = ....Interface.Left.WristFlexion.Pos[0] * 180/pi;
      /// Wrist Abduction angle in degrees
      AnyVar WristAbduction = ....Interface.Left.WristAbduction.Pos[0] * 180/pi;
    };


    AnyFolder Muscles = {
      AnySearchFun MuscleList = {
        Search =
        #if BM_ARM_MUSCLES_LEFT == OFF
         ".....Left.ShoulderArm.JointMuscles.*.*.dof0.Muscle.*.Activity";
        #else
         ".....Left.ShoulderArm.Muscles.*.*.Activity";
        #endif
      };

      AnyVar Envelope = max(MuscleList());

    };
  };
};
