//Arm
AnyVar AnyVar_SternoClavicularProtraction = ...Interface.Left.SternoClavicularProtraction.Pos[0]*180/pi;
AnyVar AnyVar_SternoClavicularElevation = ...Interface.Left.SternoClavicularElevation.Pos[0]*180/pi;

AnyVar AnyVar_GlenohumeralFlexion = ...Interface.Left.GlenohumeralFlexion.Pos[0]*180/pi;
AnyVar AnyVar_GlenohumeralAbduction = ...Interface.Left.GlenohumeralAbduction.Pos[0]*180/pi;
AnyVar AnyVar_GlenohumeralExternalRotation = ...Interface.Left.GlenohumeralExternalRotation.Pos[0]*180/pi;

AnyVar AnyVar_ElbowFlexion = ...Interface.Left.ElbowFlexion.Pos[0]*180/pi;
AnyVar AnyVar_ElbowPronation = ...Interface.Left.ElbowPronation.Pos[0]*180/pi;
