SelectedOutput.Right = {

  AnyFolder ShoulderArm = {


    SelectedOutputGroup JointReactionForce = {

      /// Lateral positive
      AnyVar SternoClavicular_MedioLateralForce = ....Right.ShoulderArm.Joints.SternoClavicularJoint.Constraints.Reaction.Fout[0];
      /// Superior positive
      AnyVar SternoClavicular_InferoSuperiorForce = ....Right.ShoulderArm.Joints.SternoClavicularJoint.Constraints.Reaction.Fout[1];
      /// Posterior positive
      AnyVar SternoClavicular_AnteroPosteriorForce = ....Right.ShoulderArm.Joints.SternoClavicularJoint.Constraints.Reaction.Fout[2];
      // Thorax scj ref, warning : rotated regarding to thorax ref

      /// Lateral positive
      AnyVar AcromioClavicular_MedioLateralForce = ....Right.ShoulderArm.Joints.AcromioClavicularJoint.Constraints.Reaction.Fout[0];
      /// Superior positive
      AnyVar AcromioClavicular_InferoSuperiorForce = ....Right.ShoulderArm.Joints.AcromioClavicularJoint.Constraints.Reaction.Fout[1];
      /// Posterior positive
      AnyVar AcromioClavicular_AnteroPosteriorForce = ....Right.ShoulderArm.Joints.AcromioClavicularJoint.Constraints.Reaction.Fout[2];
      // Clavicula acj ref

      // include 3 reaction point of scapula
//      AnyVar ScapulaAIPushForce = ....Right.ShoulderArm.Joints.ScapulaAIThoraxNodeReaction.Ft;
//      AnyVar ScapulaTSPushForce = ....Right.ShoulderArm.Joints.ScapulaTSThoraxNodeReaction.Ft;
//      AnyVar ConoidLigamentPullForce = ....Right.ShoulderArm.Joints.ConoidLigamentReaction.Ft;
//      AnyVar TrapezoidLigamentPullForce = ....Right.ShoulderArm.Joints.TrapezoidLigamentReaction.Ft;


      /// Distraction positive
      AnyVar GlenoHumeral_DistractionForce = (-1)*....Right.ShoulderArm.Joints.GHReactions.ResultantForce.FTotalLocal[2];
      /// Inferior positive
      AnyVar GlenoHumeral_InferoSuperiorForce = (-1)*....Right.ShoulderArm.Joints.GHReactions.ResultantForce.FTotalLocal[1];
      /// Posterior positive
      AnyVar GlenoHumeral_AnteroPosteriorForce = ....Right.ShoulderArm.Joints.GHReactions.ResultantForce.FTotalLocal[0];
      // scapula gh ref


      /// Medial positive
      AnyVar ElbowHumeroUlnar_MedioLateralForce = ....Right.ShoulderArm.Joints.HumeroUlnarJoint.Constraints.Reaction.Fout[0];
      /// Proximal positive
      AnyVar ElbowHumeroUlnar_ProximoDistalForce = ....Right.ShoulderArm.Joints.HumeroUlnarJoint.Constraints.Reaction.Fout[1];
      /// Anterior positive
      AnyVar ElbowHumeroUlnar_AnteroPosteriorForce = ....Right.ShoulderArm.Joints.HumeroUlnarJoint.Constraints.Reaction.Fout[2];
      /// Internal positive
      AnyVar ElbowHumeroUlnar_AxialMoment = ....Right.ShoulderArm.MomentMeasure.ElbowJointReactionMoments.Mlocal[1];
      /// Medial positive
      AnyVar ElbowHumeroUlnar_LateralMoment = ....Right.ShoulderArm.MomentMeasure.ElbowJointReactionMoments.Mlocal[2];
      // humerus fe ref

      /// Ulnar positive
      AnyVar ProximalRadioUlnar_RadialForce = ....Right.ShoulderArm.Joints.ProximalRadioUlnarJoint.ReacForce.Fout[0];
      /// Dorsal positive
      AnyVar ProximalRadioUlnar_DorsoVolarForce = ....Right.ShoulderArm.Joints.ProximalRadioUlnarJoint.ReacForce.Fout[1];
      // ulna ps2Reac ref

      /// Distal Positive
      AnyVar RadioHumeral_ProximoDistalForce = ....Right.ShoulderArm.Joints.HumeroRadialJoint.ReacForce.Fout[0];
      // radius ps2Reac ref

      /// Ulnar positive
      AnyVar DistalRadioUlnar_RadialForce = ....Right.ShoulderArm.Joints.DistalRadioUlnarJoint.Constraints.Reaction.Fout[0];
      /// Volar positive
      AnyVar DistalRadioUlnar_DorsoVolarForce = ....Right.ShoulderArm.Joints.DistalRadioUlnarJoint.Constraints.Reaction.Fout[1];
      // ulna us ref

      // Ulnar positive
     #ifndef WRIST_EXPERIMENTAL
      AnyVar WristRadioCarpal_RadialForce = ....Right.ShoulderArm.Joints.WristJointFlexion.Constraints.Reaction.Fout[1];
      /// Proximal positive
      AnyVar WristRadioCarpal_ProximoDistalForce = ....Right.ShoulderArm.Joints.WristJointFlexion.Constraints.Reaction.Fout[0];
      /// Dorsal positive
      AnyVar WristRadioCarpal_DorsoVolarForce = ....Right.ShoulderArm.Joints.WristJointFlexion.Constraints.Reaction.Fout[2];
      /// Internal positive
      AnyVar WristRadioCarpal_AxialMoment = ....Right.ShoulderArm.MomentMeasure.WristJointReactionMoments.Mlocal[0];
      // radius wj ref
#endif


    }; //End JointReactionForce


    SelectedOutputGroup JointMomentMeasure = {


      AnyVar GlenoHumeralAbduction = ....Right.ShoulderArm.MomentMeasure.GHNetMomentMuscles.GHAbduction;
      // Scapula.gh.Rotnode ref
      AnyVar GlenoHumeralFlexion = ....Right.ShoulderArm.MomentMeasure.GHNetMomentMuscles.GHFlexion;
      // Scapula.gh.Rotnode ref
      AnyVar GlenoHumeralExternalRotation = ....Right.ShoulderArm.MomentMeasure.GHNetMomentMuscles.GHExternalRotation;
      // Scapula.gh.Rotnode ref

      AnyVar ElbowFlexion = ....Right.ShoulderArm.MomentMeasure.ElbowFlexionNetMomentMuscles.ElbowFlexion;
      // Humerus.fe.Rotnode ref

      AnyVar ElbowPronation = ....Right.ShoulderArm.MomentMeasure.ElbowPronationNetMomentMuscles.ElbowPronation;
      // Ulna.ps2.Rotnode ref

      AnyVar WristFlexion = ....Right.ShoulderArm.MomentMeasure.WristFlexionNetMomentMuscles.WristFlexion;
      // Radius.wj.Rotnode ref

      AnyVar WristAbduction = ....Right.ShoulderArm.MomentMeasure.WristAbductionNetMomentMuscles.WristAbduction;
      // WristJointSeg.RadialUlnarDeviation.Rotnode ref


    }; //End JointMomentMeasure


    AnyFolder Muscles = {

      AnySearchFun MuscleList = {
        Search =
        #if BM_ARM_MUSCLES_RIGHT == OFF
         ".....Right.ShoulderArm.JointMuscles.*.*.dof0.Muscle.*.Activity";
        #else
         ".....Right.ShoulderArm.Muscles.*.*.Activity";
        #endif
      };

      AnyVar Envelope = max(MuscleList());

    }; //End Muscles


  }; //End Arm


}; //End Right
