//Arm
AnyVar AnyVar_SternoClavicularProtraction = ...Interface.Right.SternoClavicularProtraction.Pos[0]*180/pi;
AnyVar AnyVar_SternoClavicularElevation = ...Interface.Right.SternoClavicularElevation.Pos[0]*180/pi;

AnyVar AnyVar_GlenohumeralFlexion = ...Interface.Right.GlenohumeralFlexion.Pos[0]*180/pi;
AnyVar AnyVar_GlenohumeralAbduction = ...Interface.Right.GlenohumeralAbduction.Pos[0]*180/pi;
AnyVar AnyVar_GlenohumeralExternalRotation = ...Interface.Right.GlenohumeralExternalRotation.Pos[0]*180/pi;

AnyVar AnyVar_ElbowFlexion = ...Interface.Right.ElbowFlexion.Pos[0]*180/pi;
AnyVar AnyVar_ElbowPronation = ...Interface.Right.ElbowPronation.Pos[0]*180/pi;
