// Nodes for muscle attachments bml etc. data from VU sub2
AnyFolder &Scapula =..Segments.Scapula;

Scapula = {


  // Definition of cylinder used for wrapping of the trapezius muscles
  // the cylinder starts in ai and points towards ts.
  AnyRefNode margo_medialis={

    AnyVec3 P2= .Scale(.Data.margo_medialis_P2_pos*.Mirror);
    AnyVec3 P3= .Scale(.Data.margo_medialis_P3_pos*.Mirror);

    sRel=.Scale(.Data.margo_medialis_pos*.Mirror);

    //Calculate rot matrix for cylinder using three points
    //p2-p1 used to find x axis
    //p3-p1 used to find the y axis
    //z axis found as cross product
    AnyMat33  Mat = RotMat(sRel,P2,P3);

    //Switch around the on the columns to compensate that the cylinder has
    //main axis along the zaxis
    ARel={
      {Mat[0][1],Mat[0][2],Mat[0][0]},
      {Mat[1][1],Mat[1][2],Mat[1][0]},
      {Mat[2][1],Mat[2][2],Mat[2][0]}};

    AnySurfCylinder cyl = {
      Radius= vnorm(.sRel-.P3);
      Length= vnorm(.sRel-.P2);
      CapRatio=1.0;
      //AnyDrawParamSurf drw={RGB={1,0,0};};
    };
  };

  AnyRefNode deltoid_cyl_P1 = {sRel = .Scale(.Data.deltoid_cyl_P1_pos*.Mirror);};

//  // Definition of cylinder used for wrapping of Deltoid scapula muscles
//  // the cylinder starts in gh and points towards ts.
//  AnyRefNode deltoid_cyl={
//
//    AnyVec3 P1 = .Scale(.Data.deltoid_cyl_P1_pos*.Mirror); //P2=.ai.sRel + VZ*Length;
//    AnyVec3 P2 = .Scale(.Data.deltoid_cyl_P2_pos*.Mirror); //P2=.ai.sRel + VZ*Length;
//    AnyVec3 P3 = .Scale(.Data.deltoid_cyl_P3_pos*.Mirror); //P3=.ai.sRel - VX*Radius;
//
//    sRel= P1;
//    ARel=RotMat(sRel,P3,P2)*RotMat(-pi/2,x)*RotMat(-pi/2,z);
//
//    AnySurfCylinder cyl = {
//      Radius= vnorm(.sRel-.P3);
//      Length= vnorm(.sRel-.P2)*2;
//      CapRatio=1.0;
//      //AnyDrawParamSurf drw={RGB={0,0,1};};
//      CenterOrigin = On;
//    };
//
//  };

//  // Definition of cylinder used for wrapping of Deltoid scapula muscles
//  // the cylinder starts in gh and points towards ts.
//  AnyRefNode Deltoid_Scapula_Cyl={
//
//    AnyVec3 P1 = .Scale(.Data.deltoid_cyl_P1_pos*.Mirror); //P2=.ai.sRel + VZ*Length;
//    AnyVec3 P2 = .Scale(.Data.gh_pos*.Mirror); //P2=.ai.sRel + VZ*Length;
//    AnyVec3 P3 = .GHReactionCenterNode.sRel;//.Scale(.Data.deltoid_cyl_P3_pos*.Mirror); //P3=.ai.sRel - VX*Radius;
//
//    sRel= P1;
//    ARel=RotMat(sRel,P2,P3)*RotMat(pi/2,y);
//
//    AnySurfCylinder cyl = {
//      Radius= vnorm(.P2-.P3)*1.3;
//      Length= vnorm(.sRel-.P2)*2;
//      CapRatio=1;
//      //AnyDrawParamSurf drw={RGB={0,0,1};};
//      CenterOrigin = On;
//    };
//
//  };
//  AnyRefNode Deltoid_Scapula_Cyl_Extra={
//
//    AnyVec3 P1 = .Scale(.Data.deltoid_cyl_P1_pos*.Mirror); //P2=.ai.sRel + VZ*Length;
//    AnyVec3 P1_1 = .Scale((.Data.deltoid_cyl_P1_pos+{-0.04,0.04,0})*.Mirror); //P2=.ai.sRel + VZ*Length;
//    AnyVec3 P2 = .Scale(.Data.gh_pos*.Mirror); //P2=.ai.sRel + VZ*Length;
//    AnyVec3 P3 = .GHReactionCenterNode.sRel;//.Scale(.Data.deltoid_cyl_P3_pos*.Mirror); //P3=.ai.sRel - VX*Radius;
//
//    sRel= P1_1;
//    ARel=RotMat(P1,P2,P3)*RotMat(pi/2,y);
//
//    AnySurfCylinder cyl = {
//      Radius= vnorm(.P2-.P3)*1.3;
//      Length= vnorm(.sRel-.P2)*2;
//      CapRatio=1;
//      //AnyDrawParamSurf drw={RGB={0,0,1};};
//      CenterOrigin = On;
//    };
//
//  };

//  AnyRefNode Deltoid_Scapula_Cyl_Stop1={
//
//    AnyVec3 P1 = .Scale(.Data.gh_pos*.Mirror); //P2=.ai.sRel + VZ*Length;
//    AnyVec3 P2 = .O_DeltoideusLateral1.sRel; //P2=.ai.sRel + VZ*Length;
//    AnyVec3 P3 = .GHReactionCenterNode.sRel;//.Scale(.Data.deltoid_cyl_P3_pos*.Mirror); //P3=.ai.sRel - VX*Radius;
//
//    sRel= P1;
//    ARel=RotMat(sRel,P2,P3)*RotMat(pi/2,y);
//
//    AnySurfCylinder cyl = {
//      Radius= ..Deltoid_Scapula_Cyl.cyl.Radius*0.98;
//      Length= vnorm(.sRel-.P2)*5;
//      CapRatio=1;
//      //AnyDrawParamSurf drw={RGB={0,0,1};};
////      CenterOrigin = On;
//    };
//
//  };
//  AnyRefNode Deltoid_Scapula_Cyl_Stop2={
//
//    AnyVec3 P1 = .Scale(.Data.gh_pos*.Mirror); //P2=.ai.sRel + VZ*Length;
//    AnyVec3 P2 = .O_DeltoideusLateral2.sRel; //P2=.ai.sRel + VZ*Length;
//    AnyVec3 P3 = .GHReactionCenterNode.sRel;//.Scale(.Data.deltoid_cyl_P3_pos*.Mirror); //P3=.ai.sRel - VX*Radius;
//
//    sRel= P1;
//    ARel=RotMat(sRel,P2,P3)*RotMat(pi/2,y);
//
//    AnySurfCylinder cyl = {
//      Radius= ..Deltoid_Scapula_Cyl.cyl.Radius*0.98;
//      Length= vnorm(.sRel-.P2)*5;
//      CapRatio=1;
//      //AnyDrawParamSurf drw={RGB={0,0,1};};
////      CenterOrigin = On;
//    };
//
//  };
//  AnyRefNode Deltoid_Scapula_Cyl_Stop3={
//
//    AnyVec3 P1 = .Scale(.Data.gh_pos*.Mirror); //P2=.ai.sRel + VZ*Length;
//    AnyVec3 P2 = .O_DeltoideusLateral3.sRel; //P2=.ai.sRel + VZ*Length;
//    AnyVec3 P3 = .GHReactionCenterNode.sRel;//.Scale(.Data.deltoid_cyl_P3_pos*.Mirror); //P3=.ai.sRel - VX*Radius;
//
//    sRel= P1;
//    ARel=RotMat(sRel,P2,P3)*RotMat(pi/2,y);
//
//    AnySurfCylinder cyl = {
//      Radius= ..Deltoid_Scapula_Cyl.cyl.Radius*0.98;
//      Length= vnorm(.sRel-.P2)*5;
//      CapRatio=1;
//      //AnyDrawParamSurf drw={RGB={0,0,1};};
////      CenterOrigin = On;
//    };
//
//  };
//  AnyRefNode Deltoid_Scapula_Cyl_Stop4={
//
//    AnyVec3 P1 = .Scale(.Data.gh_pos*.Mirror); //P2=.ai.sRel + VZ*Length;
//    AnyVec3 P2 = .O_DeltoideusLateral4.sRel; //P2=.ai.sRel + VZ*Length;
//    AnyVec3 P3 = .GHReactionCenterNode.sRel;//.Scale(.Data.deltoid_cyl_P3_pos*.Mirror); //P3=.ai.sRel - VX*Radius;
//
//    sRel= P1;
//    ARel=RotMat(sRel,P2,P3)*RotMat(pi/2,y);
//
//    AnySurfCylinder cyl = {
//      Radius= ..Deltoid_Scapula_Cyl.cyl.Radius*0.98;
//      Length= vnorm(.sRel-.P2)*5;
//      CapRatio=1;
//      //AnyDrawParamSurf drw={RGB={0,0,1};};
////      CenterOrigin = On;
//    };
//
//  };
////////////////  AnyRefNode Deltoid_Scapula_Cyl_Stop3_Ant={
////////////////
////////////////    AnyVec3 P1 = .Scale(.Data.gh_pos*.Mirror); //P2=.ai.sRel + VZ*Length;
////////////////    AnyVec3 P2 = .O_DeltoideusLateral3.sRel; //P2=.ai.sRel + VZ*Length;
////////////////    AnyVec3 P3 = .GHReactionCenterNode.sRel;//.Scale(.Data.deltoid_cyl_P3_pos*.Mirror); //P3=.ai.sRel - VX*Radius;
////////////////
////////////////    sRel= P1;
////////////////    ARel=RotMat(sRel,P2,P3)*RotMat(pi/2,y);
////////////////
////////////////    AnySurfCylinder cyl = {
////////////////      Radius= ..Deltoid_Scapula_Cyl.cyl.Radius*0.98*0.7;
////////////////      Length= vnorm(.sRel-.P2)*5;
////////////////      CapRatio=1;
////////////////      //AnyDrawParamSurf drw={RGB={0,0,1};};
//////////////////      CenterOrigin = On;
////////////////    };
////////////////
////////////////  };

//    AnyRefNode Deltoid_Clavicula_Cyl_Stop1={
//
//    AnyVec3 P1 = .Scale(.Data.gh_pos*.Mirror); //P2=.ai.sRel + VZ*Length;
//    AnyVec3 P2 = .Scale(.Data.Deltoid_Anterior_CylStop1_pos*.Mirror); //P2=.ai.sRel + VZ*Length;
//    AnyVec3 P3 = .GHReactionCenterNode.sRel;//.Scale(.Data.deltoid_cyl_P3_pos*.Mirror); //P3=.ai.sRel - VX*Radius;
//
//    sRel= P1;
//    ARel=RotMat(sRel,P2,P3)*RotMat(pi/2,y);
//
//    AnySurfCylinder cyl = {
//      Radius= ..Deltoid_Scapula_Cyl.cyl.Radius*0.98;
//      Length= vnorm(.sRel-.P2)*0.3;
//      CapRatio=3;
//      CapRatio2 = 1;
//      //AnyDrawParamSurf drw={RGB={0,0,1};};
////      CenterOrigin = On;
//    };
//
//  };
//    AnyRefNode Deltoid_Clavicula_Cyl_Stop2={
//
//    AnyVec3 P1 = .Scale(.Data.gh_pos*.Mirror); //P2=.ai.sRel + VZ*Length;
//    AnyVec3 P2 = .Scale(.Data.Deltoid_Anterior_CylStop2_pos*.Mirror); //P2=.ai.sRel + VZ*Length;
//    AnyVec3 P3 = .GHReactionCenterNode.sRel;//.Scale(.Data.deltoid_cyl_P3_pos*.Mirror); //P3=.ai.sRel - VX*Radius;
//
//    sRel= P1;
//    ARel=RotMat(sRel,P2,P3)*RotMat(pi/2,y);
//
//    AnySurfCylinder cyl = {
//      Radius= ..Deltoid_Scapula_Cyl.cyl.Radius*0.98;
//      Length= vnorm(.sRel-.P2)*0.3;
//      CapRatio=3;
//      CapRatio2 = 1;
//      //AnyDrawParamSurf drw={RGB={0,0,1};};
////      CenterOrigin = On;
//    };
//
//  };
//    AnyRefNode Deltoid_Clavicula_Cyl_Stop3={
//
//    AnyVec3 P1 = .Scale(.Data.gh_pos*.Mirror); //P2=.ai.sRel + VZ*Length;
//    AnyVec3 P2 = .Scale(.Data.Deltoid_Anterior_CylStop3_pos*.Mirror); //P2=.ai.sRel + VZ*Length;
//    AnyVec3 P3 = .GHReactionCenterNode.sRel;//.Scale(.Data.deltoid_cyl_P3_pos*.Mirror); //P3=.ai.sRel - VX*Radius;
//
//    sRel= P1;
//    ARel=RotMat(sRel,P2,P3)*RotMat(pi/2,y);
//
//    AnySurfCylinder cyl = {
//      Radius= ..Deltoid_Scapula_Cyl.cyl.Radius*0.98;
//      Length= vnorm(.sRel-.P2)*0.3;
//      CapRatio=3;
//      CapRatio2 = 1;
//      //AnyDrawParamSurf drw={RGB={0,0,1};};
////      CenterOrigin = On;
//    };
//
//  };
//    AnyRefNode Deltoid_Clavicula_Cyl_Stop4={
//
//    AnyVec3 P1 = .Scale(.Data.gh_pos*.Mirror); //P2=.ai.sRel + VZ*Length;
//    AnyVec3 P2 = .Scale(.Data.Deltoid_Anterior_CylStop4_pos*.Mirror); //P2=.ai.sRel + VZ*Length;
//    AnyVec3 P3 = .GHReactionCenterNode.sRel;//.Scale(.Data.deltoid_cyl_P3_pos*.Mirror); //P3=.ai.sRel - VX*Radius;
//
//    sRel= P1;
//    ARel=RotMat(sRel,P2,P3)*RotMat(pi/2,y);
//
//    AnySurfCylinder cyl = {
//      Radius= ..Deltoid_Scapula_Cyl.cyl.Radius*0.98;
//      Length= vnorm(.sRel-.P2)*2;
//      CapRatio=1;
//      //AnyDrawParamSurf drw={RGB={0,0,1};};
////      CenterOrigin = On;
//    };
//
//  };

//  AnyRefNode Deltoid_Anterior_CylNode = {sRel = .Scale(.Data.Deltoid_Anterior_Cyl_pos*.Mirror);};

//    AnyRefNode Deltoid_Clavicula_Cyl1={
//
//    AnyVec3 P1 = .Scale(.Data.Deltoid_Anterior_Cyl1_pos*.Mirror); //P2=.ai.sRel + VZ*Length;
//    AnyVec3 P2 = .Scale(.Data.gh_pos*.Mirror); //P2=.ai.sRel + VZ*Length;
//    AnyVec3 P3 = .GHReactionCenterNode.sRel;//.Scale(.Data.deltoid_cyl_P3_pos*.Mirror); //P3=.ai.sRel - VX*Radius;
//
//    sRel= P1;
//    ARel=RotMat(sRel,P2,P3)*RotMat(pi/2,y);
//
//    AnySurfCylinder cyl = {
//      Radius= vnorm(.P2-.P3)*1.3;
//      Length= vnorm(.sRel-.P2)*2;
//      CapRatio=1;
//      //AnyDrawParamSurf drw={RGB={0,0,1};};
//      CenterOrigin = On;
//    };
//  };
//
//  AnyRefNode Deltoid_Clavicula_Cyl2={
//
//    AnyVec3 P1 = .Scale(.Data.Deltoid_Anterior_Cyl2_pos*.Mirror); //P2=.ai.sRel + VZ*Length;
//    AnyVec3 P2 = .Scale(.Data.gh_pos*.Mirror); //P2=.ai.sRel + VZ*Length;
//    AnyVec3 P3 = .GHReactionCenterNode.sRel;//.Scale(.Data.deltoid_cyl_P3_pos*.Mirror); //P3=.ai.sRel - VX*Radius;
//
//    sRel= P1;
//    ARel=RotMat(sRel,P2,P3)*RotMat(pi/2,y);
//
//    AnySurfCylinder cyl = {
//      Radius= vnorm(.P2-.P3)*1.3;
//      Length= vnorm(.sRel-.P2)*2;
//      CapRatio=1;
//      //AnyDrawParamSurf drw={RGB={0,0,1};};
//      CenterOrigin = On;
//    };
//  };
//
//  AnyRefNode Deltoid_Clavicula_Cyl={
//
//    AnyVec3 P1 = .Scale(.Data.Deltoid_Anterior_Cyl_pos*.Mirror); //P2=.ai.sRel + VZ*Length;
//    AnyVec3 P2 = .Scale(.Data.gh_pos*.Mirror); //P2=.ai.sRel + VZ*Length;
//    AnyVec3 P3 = .GHReactionCenterNode.sRel;//.Scale(.Data.deltoid_cyl_P3_pos*.Mirror); //P3=.ai.sRel - VX*Radius;
//
//    sRel= P1;
//    ARel=RotMat(sRel,P2,P3)*RotMat(pi/2,y);
//
//    AnySurfCylinder cyl = {
//      Radius= vnorm(.P2-.P3)*1.3;
//      Length= vnorm(.sRel-.P2)*2;
//      CapRatio=1;
//      //AnyDrawParamSurf drw={RGB={0,0,1};};
//      CenterOrigin = On;
//    };
//  };

//    AnyRefNode Deltoid_Cyl_Anterior_Stopper1={
//
//    AnyVec3 P1 = .Scale(.Data.gh_pos*.Mirror); //P2=.ai.sRel + VZ*Length;
//    AnyVec3 P2 = ..Clavicula.O_DeltoideusAnterior1.sRel; //P2=.ai.sRel + VZ*Length;
//    AnyVec3 P3 = .GHReactionCenterNode.sRel;//.Scale(.Data.deltoid_cyl_P3_pos*.Mirror); //P3=.ai.sRel - VX*Radius;
//
//    sRel= P1;
//    ARel=RotMat(sRel,P2,P3)*RotMat(pi/2,y);
//
//    AnySurfCylinder cyl = {
//      Radius= ..Deltoid_Scapula_Cyl.cyl.Radius*0.98;
//      Length= vnorm(.sRel-.P2)*5;
//      CapRatio=1;
//      //AnyDrawParamSurf drw={RGB={0,0,1};};
////      CenterOrigin = On;
//    };
//  };

//  AnyRefNode deltoid_torus = {
//    AnyVar minor_radius = 0.96*abs(.gh.sRel-.I_Infraspinatus5.sRel)[0];
//    AnyVar major_radius = minor_radius*1.9;
//
//    AnyVec3 minor_center = {0, .I_Infraspinatus5.sRel[1],0};
//    AnyMat33 orientation = RotMat(0.0*....Sign,y);
//
//    AnyVec3 major_center = minor_center+major_radius*....Sign*orientation'[0];
//
//    sRel=major_center;
//    ARel = orientation;
//    //viewRefFrame.Visible = Off;
//
//    AnySurfTorus torus = {
//       MajorRadius = ..Deltoid_Scapula_Cyl.cyl.Radius;
//       MinorRadius = ..Deltoid_Scapula_Cyl.cyl.Radius;
//       //viewSurface.Visible=On;
//    };
//
//  };


  AnyRefNode TricepsBrachiiLongumellipsoid = {

    sRel = .GHReactionCenterNode.sRel + (.GHReactionCenterNode.sRel-.gh.sRel);
    ARel = RotMat(.O_TricepsBrachiiLongum2.sRel, .O_TricepsBrachiiLongum1.sRel, sRel)*RotMat(pi/2, y);
    AnySurfEllipsoid surf = {
      AnyVar ra = 0.97*min({vnorm(.sRel-..O_TricepsBrachiiLongum2.sRel), vnorm(.sRel-..O_TricepsBrachiiLongum1.sRel) });
      Radius= {ra,ra,2.5*ra};
    };

  };

  AnyRefNode Lattisimus_wrap={

    AnyVec3 P = .GHReactionCenterNode.sRel + (.GHReactionCenterNode.sRel -.gh.sRel);
    AnyVec3 Dir = (.coronoid.sRel-.gh.sRel)/vnorm(.coronoid.sRel-.gh.sRel);

    AnyVar Length = 0.09;
    sRel= P + Dir*Length*0.8;

    ARel = RotMat(sRel, sRel+Dir, {0,0,0.0})*RotMat(-pi/2,y);


    AnySurfCylinder cyl = {
      Radius= 0.9*vnorm(..GHReactionCenterNode.sRel -..gh.sRel);
      Length= .Length;
      CapRatio=1.0;
    };

  };


  // Definition of cylinder used for wrapping Teres major muscles.
  // The cylinder starts in gh and points inwards into scapula and has the same
  // radius as the cylinder on humerus.
  AnyRefNode TeresMajorcyl={

    AnyVec3 P2 = 1.4*.GHReactionCenterNode.sRel -0.4*.EdgeNode1.sRel;
    AnyVec3 P3 = .ai.sRel;

    sRel=.gh.sRel;


    //Calculate rot matrix for cylinder using three points
    //p2-p1 used to find x axis
    //p3-p1 used to find the y axis
    //z axis found as cross product
    AnyMat33  Mat = RotMat(sRel,P2,P3);

    //Switch around the on the columns to compensate that the cylinder has
    //main axis along the zaxis
    ARel =Mat*RotMat(0.5*pi,y);
    AnySurfCylinder cyl = {
      Radius= 0.99*...Humerus.collum_hum_TeresMinormajor.cyl.Radius;
      Length= vnorm(.sRel-..ts.sRel);
      CapRatio=1.0;
    };
  };


  // Definition of cylinder used for wrapping of Deltoid scapula muscles
  // the cylinder starts in deltoid O_DeltoideusPosterior1 and points towards acromion.
  AnyRefNode acromion_cyl={
    /*
    AnyVar Radius=0.01;
    AnyVar Length=0.08;

    AnyVec3 P1 = sRel;
    AnyVec3 P2 =sRel+VZ*Length;
    AnyVec3 P3 =sRel+VX*Radius;


    AnyVec3 p2=sRel; // Starting point of the vector.
    AnyVec3 p1= p2+{0.025,...Sign*0.005,-0.09}; // End point of the vector
    AnyVec3 v ={0,1,0}; // arbitary vector for cross product.

    AnyVec3 VecZ={(p1[0]-p2[0]),(p1[1]-p2[1]),(p1[2]-p2[2])}; // Direction of the cylinder.
    AnyVec3 VecY={(v[1]*VecZ[2]-v[2]*VecZ[1]),(v[2]*VecZ[0]-v[0]*VecZ[2]),(v[0]*VecZ[1]-v[1]*VecZ[0])};
    AnyVec3 VecX={(VecY[1]*VecZ[2]-VecY[2]*VecZ[1]),(VecY[2]*VecZ[0]-VecY[0]*VecZ[2]),(VecY[0]*VecZ[1]-VecY[1]*VecZ[0])};

    sRel=.O_deltoideus_scapular_part_3.sRel+{0.03,...Sign*-0.005,0};

    //Length calculation
    AnyVar LengthX=sqrt((VecX[0])^2+(VecX[1])^2+(VecX[2])^2);
    AnyVar LengthZ=sqrt((VecZ[0])^2+(VecZ[1])^2+(VecZ[2])^2);
    AnyVar LengthY=sqrt((VecY[0])^2+(VecY[1])^2+(VecY[2])^2);

    //Normalizing
    AnyVec3 VX=VecX/LengthX;
    AnyVec3 VY=VecY/LengthY;
    AnyVec3 VZ=VecZ/LengthZ;

    //Note STC issue for scaling
    ARel = {
      {VX[0],VY[0],VZ[0]},
      {VX[1],VY[1],VZ[1]},
      {VX[2],VY[2],VZ[2]}};

    AnySurfCylinder cyl = {
      Radius=0.01;
      Length=0.08;
      CapRatio=1.0;
    };

    */                                                                              // TO DO: to be deleted

    AnyVec3 P2 =.Scale(.Data.acromion_cyl_P2_pos*.Mirror);//sRel+VZ*Length;
    AnyVec3 P3 =.Scale(.Data.acromion_cyl_P3_pos*.Mirror);//sRel+VX*Radius;


    sRel=.Scale(.Data.acromion_cyl_pos*.Mirror);
    //Calculate rot matrix for cylinder using three points
    //p2-p1 used to find x axis
    //p3-p1 used to find the y axis
    //z axis found as cross product
    AnyMat33  Mat = RotMat(sRel,P3,P2);

    //Switch around the on the columns to compensate that the cylinder has
    //main axis along the zaxis
    ARel={
      {Mat[0][2],Mat[0][0],Mat[0][1]},
      {Mat[1][2],Mat[1][0],Mat[1][1]},
      {Mat[2][2],Mat[2][0],Mat[2][1]}};

    AnySurfCylinder cyl = {
      Radius=vnorm(.sRel-.P3);
      Length= vnorm(.sRel-.P2);
      CapRatio=1.0;
      //AnyDrawParamSurf drw={RGB={1,1,0};};
    };

  };


  //AnyRefNode P1 ={sRel=.coracoid_cyl2.P3;AnyDrawRefFrame  Drw={RGB={0,0,1};};};
  //AnyRefNode P2 ={sRel=.coracoid_cyl2.P2; AnyDrawRefFrame Drw={RGB={0,1,0};};};
                                                                                // TO DO: to be deleted


     // Definition of cylinder used for wrapping of subscapularis muscles
  // the cylinder replicates the shape of the  coracoid process.
  AnyRefNode coracoid_cyl={

    AnyVec3 P2 =.Scale(.Data.coracoid_cyl_P2_pos*.Mirror);
    AnyVec3 P3 =.Scale(.Data.coracoid_cyl_P3_pos*.Mirror);//sRel+VX*Radius;

    //AnyDrawRefFrame drw={};
    sRel=.Scale(.Data.coracoid_cyl_pos*.Mirror);

    //Calculate rot matrix for cylinder using three points
    //p2-p1 used to find x axis
    //p3-p1 used to find the y axis
    //z axis found as cross product

     AnyMat33  Mat = RotMat(sRel,P2,P3);

     //AnyDrawRefFrame drw={RGB={0.2,0.2,0.2};};
    //Switch around the on the columns to compensate that the cylinder has
    //main axis along the zaxis

    ARel={
      {Mat[0][1],Mat[0][2],Mat[0][0]},
      {Mat[1][1],Mat[1][2],Mat[1][0]},
      {Mat[2][1],Mat[2][2],Mat[2][0]}};


    AnySurfCylinder cyl = {
      Radius=vnorm(.sRel-.P3);
      Length= vnorm(.sRel-.P2);
      CapRatio=1.0;
//      AnyDrawParamSurf drw={RGB={0,1,0};};
    };

  };


  // Definition of torus used for wrapping of subscapularis muscles
  AnyRefNode Subscapularistorus={

    // Points for achoring the wrapping torus to the scapula geometry. This ensure the torus will
    // scale witht the scapula
    AnyVec3 P1 = .GHReactionCenterNode.sRel + 1.3*(.GHReactionCenterNode.sRel-.EdgeNode1.sRel)+1.5*(.GHReactionCenterNode.sRel-.EdgeNode2.sRel);
    AnyVec3 P2 = .O_Subscapularis1.sRel;//0.5*(.O_Subscapularis1.sRel+.O_Subscapularis4.sRel);
    AnyVar dist = vnorm(.gh.sRel-.GHReactionCenterNode.sRel);

    ARel = RotMat(.GHReactionCenterNode.sRel,.EdgeNode1.sRel,.EdgeNode2.sRel)*RotMat(0*....Sign*pi/180, y);
    sRel=P1 + 0.7*dist*((P2-P1)/vnorm(P2-P1));

    AnySurfTorus surface = {
      MajorRadius = 1*vnorm(..GHReactionCenterNode.sRel-..EdgeNode2.sRel)+MinorRadius;
      MinorRadius = 0.4*.dist;
      viewSurface.Opacity = 0.5;
    };

  };

  AnyVec3 T={-0.02,0.012,0.005}; //corections
#if BM_ARM_DELTOID_WRAPPING == _DELTOID_WRAPPING_RAKE_
  AnyRefNode O_deltoideus_scapular_part_1 = {sRel = .Scale(.Data.O_deltoideus_scapular_part_1_pos*.Mirror);};
  AnyRefNode O_deltoideus_scapular_part_2 = {sRel = .Scale(.Data.O_deltoideus_scapular_part_2_pos*.Mirror);};
  AnyRefNode O_deltoideus_scapular_part_3 = {sRel = .Scale(.Data.O_deltoideus_scapular_part_3_pos*.Mirror);};
  AnyRefNode O_deltoideus_scapular_part_4 = {sRel = .Scale(.Data.O_deltoideus_scapular_part_4_pos*.Mirror);};
  AnyRefNode O_deltoideus_scapular_part_5 = {sRel = .Scale(.Data.O_deltoideus_scapular_part_5_pos*.Mirror);};
  AnyRefNode O_deltoideus_scapular_part_6 = {sRel = .Scale(.Data.O_deltoideus_scapular_part_6_pos*.Mirror);};
#else
  AnyRefNode O_DeltoideusPosterior1 = {sRel = .Scale(.Data.O_DeltoideusPosterior1_pos*.Mirror);};
  AnyRefNode O_DeltoideusPosterior2 = {sRel = .Scale(.Data.O_DeltoideusPosterior2_pos*.Mirror);};
  AnyRefNode O_DeltoideusPosterior3 = {sRel = .Scale(.Data.O_DeltoideusPosterior3_pos*.Mirror);};
  AnyRefNode O_DeltoideusPosterior4 = {sRel = .Scale(.Data.O_DeltoideusPosterior4_pos*.Mirror);};
  AnyRefNode O_DeltoideusLateral1 = {sRel = .Scale(.Data.O_DeltoideusLateral1_pos*.Mirror);};
  AnyRefNode O_DeltoideusLateral2 = {sRel = .Scale(.Data.O_DeltoideusLateral2_pos*.Mirror);};
  AnyRefNode O_DeltoideusLateral3 = {sRel = .Scale(.Data.O_DeltoideusLateral3_pos*.Mirror);};
  AnyRefNode O_DeltoideusLateral4 = {sRel = .Scale(.Data.O_DeltoideusLateral4_pos*.Mirror);};
#endif
  AnyRefNode O_Subscapularis1 = {sRel = .Scale(.Data.O_Subscapularis1_pos*.Mirror);};
  AnyRefNode O_Subscapularis2 = {sRel = .Scale(.Data.O_Subscapularis2_pos*.Mirror);};
  AnyRefNode O_Subscapularis3 = {sRel = .Scale(.Data.O_Subscapularis3_pos*.Mirror);};
  AnyRefNode O_Subscapularis4 = {sRel = .Scale(.Data.O_Subscapularis4_pos*.Mirror);};
  AnyRefNode O_Subscapularis5 = {sRel = .Scale(.Data.O_Subscapularis5_pos*.Mirror);};
  AnyRefNode O_Subscapularis6 = {sRel = .Scale(.Data.O_Subscapularis6_pos*.Mirror);};
  AnyRefNode O_Supraspinatus1 = {sRel = .Scale(.Data.O_Supraspinatus1_pos*.Mirror);};
  AnyRefNode O_Supraspinatus2 = {sRel = .Scale(.Data.O_Supraspinatus2_pos*.Mirror);};
  AnyRefNode O_Supraspinatus3 = {sRel = .Scale(.Data.O_Supraspinatus3_pos*.Mirror);};
  AnyRefNode O_Supraspinatus4 = {sRel = .Scale(.Data.O_Supraspinatus4_pos*.Mirror);};
  AnyRefNode O_Supraspinatus5 = {sRel = .Scale(.Data.O_Supraspinatus5_pos*.Mirror);};
  AnyRefNode O_Supraspinatus6 = {sRel = .Scale(.Data.O_Supraspinatus6_pos*.Mirror);};
  AnyRefNode O_Infraspinatus1 = {sRel = .Scale(.Data.O_Infraspinatus1_pos*.Mirror);};
  AnyRefNode O_Infraspinatus2 = {sRel = .Scale(.Data.O_Infraspinatus2_pos*.Mirror);};
  AnyRefNode O_Infraspinatus3 = {sRel = .Scale(.Data.O_Infraspinatus3_pos*.Mirror);};
  AnyRefNode O_Infraspinatus4 = {sRel = .Scale(.Data.O_Infraspinatus4_pos*.Mirror);};
  AnyRefNode O_Infraspinatus5 = {sRel = .Scale(.Data.O_Infraspinatus5_pos*.Mirror);};
  AnyRefNode O_Infraspinatus6 = {sRel = .Scale(.Data.O_Infraspinatus6_pos*.Mirror);};

  AnyRefNode O_TeresMinor1 = {sRel = .Scale(.Data.O_TeresMinor1_pos*.Mirror);};
  AnyRefNode O_TeresMinor2 = {sRel = .Scale(.Data.O_TeresMinor2_pos*.Mirror);};
  AnyRefNode O_TeresMinor3 = {sRel = .Scale(.Data.O_TeresMinor3_pos*.Mirror);};
  AnyRefNode O_TeresMinor4 = {sRel = .Scale(.Data.O_TeresMinor4_pos*.Mirror);};
  AnyRefNode O_TeresMinor5 = {sRel = .Scale(.Data.O_TeresMinor5_pos*.Mirror);};
  AnyRefNode O_TeresMinor6 = {sRel = .Scale(.Data.O_TeresMinor6_pos*.Mirror);};

  AnyRefNode O_TeresMajor1 = {sRel = .Scale(.Data.O_TeresMajor1_pos*.Mirror);};
  AnyRefNode O_TeresMajor2 = {sRel = .Scale(.Data.O_TeresMajor2_pos*.Mirror);};
  AnyRefNode O_TeresMajor3 = {sRel = .Scale(.Data.O_TeresMajor3_pos*.Mirror);};
  AnyRefNode O_TeresMajor4 = {sRel = .Scale(.Data.O_TeresMajor4_pos*.Mirror);};
  AnyRefNode O_TeresMajor5 = {sRel = .Scale(.Data.O_TeresMajor5_pos*.Mirror);};
  AnyRefNode O_TeresMajor6 = {sRel = .Scale(.Data.O_TeresMajor6_pos*.Mirror);};

  AnyRefNode O_BicepsBrachiiBreve  = {sRel = .Scale(.Data.O_BicepsBrachiiBreve_pos*.Mirror);};
  AnyRefNode O_BicepsBrachiiLongum = {sRel = .Scale(.Data.O_BicepsBrachiiLongum_pos*.Mirror);};
  AnyRefNode O_Coracobrachialis1          = {sRel = .Scale(.Data.O_Coracobrachialis1_pos*.Mirror);};
  AnyRefNode O_Coracobrachialis2          = {sRel = .Scale(.Data.O_Coracobrachialis2_pos*.Mirror);};
  AnyRefNode O_Coracobrachialis3          = {sRel = .Scale(.Data.O_Coracobrachialis3_pos*.Mirror);};
  AnyRefNode O_Coracobrachialis4          = {sRel = .Scale(.Data.O_Coracobrachialis4_pos*.Mirror);};
  AnyRefNode O_Coracobrachialis5          = {sRel = .Scale(.Data.O_Coracobrachialis5_pos*.Mirror);};
  AnyRefNode O_Coracobrachialis6          = {sRel = .Scale(.Data.O_Coracobrachialis6_pos*.Mirror);};

  AnyRefNode I_TrapeziusScapular1 = {sRel = .Scale(.Data.I_TrapeziusScapular1_pos*.Mirror);};
  AnyRefNode I_TrapeziusScapular2 = {sRel = .Scale(.Data.I_TrapeziusScapular2_pos*.Mirror);};
  AnyRefNode I_TrapeziusScapular3 = {sRel = .Scale(.Data.I_TrapeziusScapular3_pos*.Mirror);};
  AnyRefNode I_TrapeziusScapular4 = {sRel = .Scale(.Data.I_TrapeziusScapular4_pos*.Mirror);};
  AnyRefNode I_TrapeziusScapular5 = {sRel = .Scale(.Data.I_TrapeziusScapular5_pos*.Mirror);};
  AnyRefNode I_TrapeziusScapular6 = {sRel = .Scale(.Data.I_TrapeziusScapular6_pos*.Mirror);};
  AnyRefNode I_TrapeziusScapular7 = {sRel = .Scale(.Data.I_TrapeziusScapular7_pos*.Mirror);};
  AnyRefNode I_TrapeziusScapular8 = {sRel = .Scale(.Data.I_TrapeziusScapular8_pos*.Mirror);};
  AnyRefNode I_TrapeziusScapular9 = {sRel = .Scale(.Data.I_TrapeziusScapular9_pos*.Mirror);};
  AnyRefNode I_TrapeziusScapular10 = {sRel = .Scale(.Data.I_TrapeziusScapular10_pos*.Mirror);};
  AnyRefNode I_TrapeziusScapular11 = {sRel = .Scale(.Data.I_TrapeziusScapular11_pos*.Mirror);};
  AnyRefNode I_TrapeziusScapular12 = {sRel = .Scale(.Data.I_TrapeziusScapular12_pos*.Mirror);};
  AnyRefNode I_TrapeziusScapular13 = {sRel = .Scale(.Data.I_TrapeziusScapular13_pos*.Mirror);};
  AnyRefNode I_TrapeziusScapular14 = {sRel = .Scale(.Data.I_TrapeziusScapular14_pos*.Mirror);};

  AnyRefNode I_Rhomboideus1             = {sRel = .Scale(.Data.I_Rhomboideus1_pos*.Mirror);};
  AnyRefNode I_Rhomboideus2             = {sRel = .Scale(.Data.I_Rhomboideus2_pos*.Mirror);};
  AnyRefNode I_Rhomboideus3             = {sRel = .Scale(.Data.I_Rhomboideus3_pos*.Mirror);};
  AnyRefNode I_Rhomboideus4             = {sRel = .Scale(.Data.I_Rhomboideus4_pos*.Mirror);};
  AnyRefNode I_Rhomboideus5             = {sRel = .Scale(.Data.I_Rhomboideus5_pos*.Mirror);};
  AnyRefNode I_Rhomboideus6             = {sRel = .Scale(.Data.I_Rhomboideus6_pos*.Mirror);};

  AnyRefNode I_LevatorScapulae1        = {sRel = .Scale(.Data.I_LevatorScapulae1_pos*.Mirror);};
  AnyRefNode I_LevatorScapulae2        = {sRel = .Scale(.Data.I_LevatorScapulae2_pos*.Mirror);};
  AnyRefNode I_LevatorScapulae3        = {sRel = .Scale(.Data.I_LevatorScapulae3_pos*.Mirror);};
  AnyRefNode I_LevatorScapulae4        = {sRel = .Scale(.Data.I_LevatorScapulae4_pos*.Mirror);}; //this point has been added

  AnyRefNode I_PectoralisMinor1        = {sRel = .Scale(.Data.I_PectoralisMinor1_pos*.Mirror);};
  AnyRefNode I_PectoralisMinor2        = {sRel = .Scale(.Data.I_PectoralisMinor2_pos*.Mirror);};
  AnyRefNode I_PectoralisMinor3        = {sRel = .Scale(.Data.I_PectoralisMinor3_pos*.Mirror);};

  AnyRefNode I_SerratusAnterior1       = {sRel = .Scale(.Data.I_SerratusAnterior1_pos*.Mirror);};
  AnyRefNode I_SerratusAnterior2       = {sRel = .Scale(.Data.I_SerratusAnterior2_pos*.Mirror);};
  AnyRefNode I_SerratusAnterior3       = {sRel = .Scale(.Data.I_SerratusAnterior3_pos*.Mirror);};
  AnyRefNode I_SerratusAnterior4       = {sRel = .Scale(.Data.I_SerratusAnterior4_pos*.Mirror);};
  AnyRefNode I_SerratusAnterior5       = {sRel = .Scale(.Data.I_SerratusAnterior5_pos*.Mirror);};
  AnyRefNode I_SerratusAnterior6       = {sRel = .Scale(.Data.I_SerratusAnterior6_pos*.Mirror);};
  AnyRefNode I_SerratusAnterior7       = {sRel = .Scale(.Data.I_SerratusAnterior7_pos*.Mirror);};
  AnyRefNode I_SerratusAnterior8       = {sRel = .Scale(.Data.I_SerratusAnterior8_pos*.Mirror);};
  AnyRefNode I_SerratusAnterior9       = {sRel = .Scale(.Data.I_SerratusAnterior9_pos*.Mirror);};
  //  AnyRefNode conoid = {sRel = .Scale({-0.030040, -0.008900, -0.035754})*.Mirror;};


  // Nodes for muscle attachments bml etc. data from MAYO sub2
  AnyRefNode O_Biceps_LH                 = {sRel = .Scale(.Data.O_Biceps_LH_pos*.Mirror);};
  AnyRefNode O_Biceps_SH                 = {sRel = .Scale(.Data.O_Biceps_SH_pos*.Mirror);};
  AnyRefNode O_Cor_brach_1               = {sRel = .Scale(.Data.O_Cor_brach_1_pos*.Mirror);};
  AnyRefNode O_Cor_brach_2               = {sRel = .Scale(.Data.O_Cor_brach_2_pos*.Mirror);};
  AnyRefNode O_TricepsBrachiiLongum1              = {sRel = .Scale(.Data.O_TricepsBrachiiLongum1_pos*.Mirror);}; //corrected
  AnyRefNode O_TricepsBrachiiLongum2              = {sRel = .Scale(.Data.O_TricepsBrachiiLongum2_pos*.Mirror);};//corrected

};
