// References to recreate structure for ammr 3.0
AnyFolder &Levator_Scapulae_1 = LevatorScapulae.LevatorScapulae1;
AnyFolder &Levator_Scapulae_2 = LevatorScapulae.LevatorScapulae2;
AnyFolder &Levator_Scapulae_3 = LevatorScapulae.LevatorScapulae3;
AnyFolder &Levator_Scapulae_4 = LevatorScapulae.LevatorScapulae4;
AnyFolder &Sternocleidomastoid_caput_clavicular = Sternocleidomastoid.Sternocleidomastoid1;
AnyFolder &Sternocleidomastoid_caput_Sternum = Sternocleidomastoid.Sternocleidomastoid2;
AnyFolder &trapezius_scapular_part_1 = TrapeziusScapular.TrapeziusScapular1;
AnyFolder &trapezius_scapular_part_2 = TrapeziusScapular.TrapeziusScapular2;
AnyFolder &trapezius_scapular_part_3 = TrapeziusScapular.TrapeziusScapular3;
AnyFolder &trapezius_scapular_part_4 = TrapeziusScapular.TrapeziusScapular4;
AnyFolder &trapezius_scapular_part_5 = TrapeziusScapular.TrapeziusScapular5;
AnyFolder &trapezius_scapular_part_6 = TrapeziusScapular.TrapeziusScapular6;
AnyFolder &trapezius_scapular_part_7 = TrapeziusScapular.TrapeziusScapular7;
AnyFolder &trapezius_scapular_part_8 = TrapeziusScapular.TrapeziusScapular8;
AnyFolder &trapezius_scapular_part_9 = TrapeziusScapular.TrapeziusScapular9;
AnyFolder &trapezius_scapular_part_10 = TrapeziusScapular.TrapeziusScapular10;
AnyFolder &trapezius_scapular_part_11 = TrapeziusScapular.TrapeziusScapular11;
AnyFolder &trapezius_scapular_part_12 = TrapeziusScapular.TrapeziusScapular12;
AnyFolder &trapezius_scapular_part_13 = TrapeziusScapular.TrapeziusScapular13;
AnyFolder &trapezius_scapular_part_14 = TrapeziusScapular.TrapeziusScapular14;
AnyFolder &trapezius_clavicular_part_1 = TrapeziusClavicular.TrapeziusClavicular1;
AnyFolder &trapezius_clavicular_part_2 = TrapeziusClavicular.TrapeziusClavicular2;
AnyFolder &trapezius_clavicular_part_3 = TrapeziusClavicular.TrapeziusClavicular3;
AnyFolder &trapezius_clavicular_part_4 = TrapeziusClavicular.TrapeziusClavicular4;
AnyFolder &trapezius_clavicular_part_5 = TrapeziusClavicular.TrapeziusClavicular5;
AnyFolder &trapezius_clavicular_part_6 = TrapeziusClavicular.TrapeziusClavicular6;
AnyFolder &biceps_brachii_caput_breve = BicepsBrachiiBreve.BicepsBrachiiBreve;
AnyFolder &biceps_brachii_caput_longum = BicepsBrachiiLongum.BicepsBrachiiLongum;
AnyFolder &coracobrachialis_1 = Coracobrachialis.Coracobrachialis1;
AnyFolder &coracobrachialis_2 = Coracobrachialis.Coracobrachialis2;
AnyFolder &coracobrachialis_3 = Coracobrachialis.Coracobrachialis3;
AnyFolder &coracobrachialis_4 = Coracobrachialis.Coracobrachialis4;
AnyFolder &coracobrachialis_5 = Coracobrachialis.Coracobrachialis5;
AnyFolder &coracobrachialis_6 = Coracobrachialis.Coracobrachialis6;

#if BM_ARM_DELTOID_WRAPPING == _DELTOID_WRAPPING_RAKE_
  AnyFolder &deltoideus_scapular_part_1 = DeltoideusScapular.deltoideus_scapular_part_1;
  AnyFolder &deltoideus_scapular_part_2 = DeltoideusScapular.deltoideus_scapular_part_2;
  AnyFolder &deltoideus_scapular_part_3 = DeltoideusScapular.deltoideus_scapular_part_3;
  AnyFolder &deltoideus_scapular_part_4 = DeltoideusScapular.deltoideus_scapular_part_4;
  AnyFolder &deltoideus_scapular_part_5 = DeltoideusScapular.deltoideus_scapular_part_5;
  AnyFolder &deltoideus_scapular_part_6 = DeltoideusScapular.deltoideus_scapular_part_6;
  AnyFolder &deltoideus_clavicular_part_1 = DeltoideusClavicular.deltoideus_clavicular_part_1;
  AnyFolder &deltoideus_clavicular_part_2 = DeltoideusClavicular.deltoideus_clavicular_part_2;
  AnyFolder &deltoideus_clavicular_part_3 = DeltoideusClavicular.deltoideus_clavicular_part_3;
  AnyFolder &deltoideus_clavicular_part_4 = DeltoideusClavicular.deltoideus_clavicular_part_4;
  AnyFolder &deltoideus_clavicular_part_5 = DeltoideusClavicular.deltoideus_clavicular_part_5;
  AnyFolder &deltoideus_clavicular_part_6 = DeltoideusClavicular.deltoideus_clavicular_part_6;
#else
  AnyFolder &deltoideus_posterior_part_1 = DeltoideusPosterior.DeltoideusPosterior1;
  AnyFolder &deltoideus_posterior_part_3 = DeltoideusPosterior.DeltoideusPosterior3;
  AnyFolder &deltoideus_posterior_part_2 = DeltoideusPosterior.DeltoideusPosterior2;
  AnyFolder &deltoideus_posterior_part_4 = DeltoideusPosterior.DeltoideusPosterior4;
  AnyFolder &deltoideus_lateral_part_1 = DeltoideusLateral.DeltoideusLateral1;
  AnyFolder &deltoideus_lateral_part_3 = DeltoideusLateral.DeltoideusLateral3;
  AnyFolder &deltoideus_lateral_part_2 = DeltoideusLateral.DeltoideusLateral2;
  AnyFolder &deltoideus_lateral_part_4 = DeltoideusLateral.DeltoideusLateral4;
  AnyFolder &deltoideus_anterior_part_1 = DeltoideusAnterior.DeltoideusAnterior1;
  AnyFolder &deltoideus_anterior_part_2 = DeltoideusAnterior.DeltoideusAnterior2;
  AnyFolder &deltoideus_anterior_part_3 = DeltoideusAnterior.DeltoideusAnterior3;
  AnyFolder &deltoideus_anterior_part_4 = DeltoideusAnterior.DeltoideusAnterior4;
#endif

AnyFolder &infraspinatus_1 = Infraspinatus.Infraspinatus1;
AnyFolder &infraspinatus_2 = Infraspinatus.Infraspinatus2;
AnyFolder &infraspinatus_3 = Infraspinatus.Infraspinatus3;
AnyFolder &infraspinatus_4 = Infraspinatus.Infraspinatus4;
AnyFolder &infraspinatus_5 = Infraspinatus.Infraspinatus5;
AnyFolder &infraspinatus_6 = Infraspinatus.Infraspinatus6;
AnyFolder &latissimus_dorsi_1 = LatissimusDorsi.LatissimusDorsi1;
AnyFolder &latissimus_dorsi_2 = LatissimusDorsi.LatissimusDorsi2;
AnyFolder &latissimus_dorsi_3 = LatissimusDorsi.LatissimusDorsi3;
AnyFolder &latissimus_dorsi_4 = LatissimusDorsi.LatissimusDorsi4;
AnyFolder &latissimus_dorsi_5 = LatissimusDorsi.LatissimusDorsi5;
AnyFolder &latissimus_dorsi_6 = LatissimusDorsi.LatissimusDorsi6;
AnyFolder &latissimus_dorsi_7 = LatissimusDorsi.LatissimusDorsi7;
AnyFolder &latissimus_dorsi_8 = LatissimusDorsi.LatissimusDorsi8;
AnyFolder &latissimus_dorsi_9 = LatissimusDorsi.LatissimusDorsi9;
AnyFolder &latissimus_dorsi_10 = LatissimusDorsi.LatissimusDorsi10;
AnyFolder &latissimus_dorsi_11 = LatissimusDorsi.LatissimusDorsi11;
AnyFolder &pectoralis_major_thoracic_part_1 = PectoralisMajorSternocostal.PectoralisMajorSternocostal1;
AnyFolder &pectoralis_major_thoracic_part_2 = PectoralisMajorSternocostal.PectoralisMajorSternocostal2;
AnyFolder &pectoralis_major_thoracic_part_3 = PectoralisMajorSternocostal.PectoralisMajorSternocostal3;
AnyFolder &pectoralis_major_thoracic_part_4 = PectoralisMajorSternocostal.PectoralisMajorSternocostal4;
AnyFolder &pectoralis_major_thoracic_part_5 = PectoralisMajorSternocostal.PectoralisMajorSternocostal5;
AnyFolder &pectoralis_major_thoracic_part_6 = PectoralisMajorSternocostal.PectoralisMajorSternocostal6;
AnyFolder &pectoralis_major_thoracic_part_7 = PectoralisMajorSternocostal.PectoralisMajorSternocostal7;
AnyFolder &pectoralis_major_thoracic_part_8 = PectoralisMajorSternocostal.PectoralisMajorSternocostal8;
AnyFolder &pectoralis_major_thoracic_part_9 = PectoralisMajorSternocostal.PectoralisMajorSternocostal9;
AnyFolder &pectoralis_major_thoracic_part_10 = PectoralisMajorSternocostal.PectoralisMajorSternocostal10;
AnyFolder &pectoralis_major_clavicular_part_1 = PectoralisMajorClavicular.PectoralisMajorClavicular1;
AnyFolder &pectoralis_major_clavicular_part_2 = PectoralisMajorClavicular.PectoralisMajorClavicular2;
AnyFolder &pectoralis_major_clavicular_part_3 = PectoralisMajorClavicular.PectoralisMajorClavicular3;
AnyFolder &pectoralis_major_clavicular_part_4 = PectoralisMajorClavicular.PectoralisMajorClavicular4;
AnyFolder &pectoralis_major_clavicular_part_5 = PectoralisMajorClavicular.PectoralisMajorClavicular5;
AnyFolder &pectoralis_minor_1 = PectoralisMinor.PectoralisMinor1;
AnyFolder &pectoralis_minor_2 = PectoralisMinor.PectoralisMinor2;
AnyFolder &pectoralis_minor_3 = PectoralisMinor.PectoralisMinor3;
AnyFolder &rhomboideus_1 = Rhomboideus.Rhomboideus1;
AnyFolder &rhomboideus_2 = Rhomboideus.Rhomboideus2;
AnyFolder &rhomboideus_3 = Rhomboideus.Rhomboideus3;
AnyFolder &rhomboideus_4 = Rhomboideus.Rhomboideus4;
AnyFolder &rhomboideus_5 = Rhomboideus.Rhomboideus5;
AnyFolder &rhomboideus_6 = Rhomboideus.Rhomboideus6;
AnyFolder &serratus_anterior_1 = SerratusAnterior.SerratusAnterior1;
AnyFolder &serratus_anterior_2 = SerratusAnterior.SerratusAnterior2;
AnyFolder &serratus_anterior_3 = SerratusAnterior.SerratusAnterior3;
AnyFolder &serratus_anterior_4 = SerratusAnterior.SerratusAnterior4;
AnyFolder &serratus_anterior_5 = SerratusAnterior.SerratusAnterior5;
AnyFolder &serratus_anterior_6 = SerratusAnterior.SerratusAnterior6;
AnyFolder &serratus_anterior_7 = SerratusAnterior.SerratusAnterior7;
AnyFolder &serratus_anterior_8 = SerratusAnterior.SerratusAnterior8;
AnyFolder &serratus_anterior_9 = SerratusAnterior.SerratusAnterior9;
AnyFolder &subscapularis_1 = Subscapularis.Subscapularis1;
AnyFolder &subscapularis_2 = Subscapularis.Subscapularis2;
AnyFolder &subscapularis_3 = Subscapularis.Subscapularis3;
AnyFolder &subscapularis_4 = Subscapularis.Subscapularis4;
AnyFolder &subscapularis_5 = Subscapularis.Subscapularis5;
AnyFolder &subscapularis_6 = Subscapularis.Subscapularis6;
AnyFolder &supraspinatus_1 = Supraspinatus.Supraspinatus1;
AnyFolder &supraspinatus_2 = Supraspinatus.Supraspinatus2;
AnyFolder &supraspinatus_3 = Supraspinatus.Supraspinatus3;
AnyFolder &supraspinatus_4 = Supraspinatus.Supraspinatus4;
AnyFolder &supraspinatus_5 = Supraspinatus.Supraspinatus5;
AnyFolder &supraspinatus_6 = Supraspinatus.Supraspinatus6;
AnyFolder &teres_major_1 = TeresMajor.TeresMajor1;
AnyFolder &teres_major_2 = TeresMajor.TeresMajor2;
AnyFolder &teres_major_3 = TeresMajor.TeresMajor3;
AnyFolder &teres_major_4 = TeresMajor.TeresMajor4;
AnyFolder &teres_major_5 = TeresMajor.TeresMajor5;
AnyFolder &teres_major_6 = TeresMajor.TeresMajor6;
AnyFolder &teres_minor_1 = TeresMinor.TeresMinor1;
AnyFolder &teres_minor_2 = TeresMinor.TeresMinor2;
AnyFolder &teres_minor_3 = TeresMinor.TeresMinor3;
AnyFolder &teres_minor_4 = TeresMinor.TeresMinor4;
AnyFolder &teres_minor_5 = TeresMinor.TeresMinor5;
AnyFolder &teres_minor_6 = TeresMinor.TeresMinor6;
AnyFolder &Brachialis_1 = Brachialis.Brachialis1;
AnyFolder &Brachialis_2 = Brachialis.Brachialis2;
AnyFolder &Triceps_LH_1 = TricepsBrachiiLongum.TricepsBrachiiLongum1;
AnyFolder &Triceps_LH_2 = TricepsBrachiiLongum.TricepsBrachiiLongum2;
AnyFolder &Triceps_ME_1 = TricepsBrachiiMediale.TricepsBrachiiMediale1;
AnyFolder &Triceps_ME_2 = TricepsBrachiiMediale.TricepsBrachiiMediale2;
AnyFolder &Triceps_LA_1 = TricepsBrachiiLaterale.TricepsBrachiiLaterale1;
AnyFolder &Triceps_LA_2 = TricepsBrachiiLaterale.TricepsBrachiiLaterale2;
AnyFolder &Brach_rad_1 = Brachioradialis.Brachioradialis1;
AnyFolder &Brach_rad_2 = Brachioradialis.Brachioradialis2;
AnyFolder &Anconeus_1 = Anconeus.Anconeus1;
AnyFolder &Anconeus_2 = Anconeus.Anconeus2;
AnyFolder &Pronator_teres_caput_humeral_1 = PronatorTeres.PronatorTeresHumeral1;
AnyFolder &Pronator_teres_caput_humeral_2 = PronatorTeres.PronatorTeresHumeral2;
AnyFolder &Pronator_teres_caput_ulnare_1 = PronatorTeres.PronatorTeresUlnare1;
AnyFolder &Supinator_humerus_part_1 = Supinator.SupinatorHumerus1;
AnyFolder &Supinator_humerus_part_2 = Supinator.SupinatorHumerus2;
AnyFolder &Supinator_ulna_part_1 = Supinator.SupinatorUlnare1;
AnyFolder &Supinator_ulna_part_2 = Supinator.SupinatorUlnare2;
AnyFolder &Pron_quadr_1 = PronatorQuadratus.PronatorQuadratus1;
AnyFolder &Pron_quadr_2 = PronatorQuadratus.PronatorQuadratus2;
AnyFolder &Extensor_Indicis = ExtensorIndicis.ExtensorIndicis;
AnyFolder &Abductor_Pollicis_Longus = AbductorPollicisLongus.AbductorPollicisLongus;
AnyFolder &Extensor_Pollicis_Brevis = ExtensorPollicisBrevis.ExtensorPollicisBrevis;
AnyFolder &Extensor_Pollicis_Longus = ExtensorPollicisLongus.ExtensorPollicisLongus;
AnyFolder &Extensor_Carpi_Radialis_Brevis = ExtensorCarpiRadialisBrevis.ExtensorCarpiRadialisBrevis;
AnyFolder &Extensor_Carpi_Radialis_Longus = ExtensorCarpiRadialisLongus.ExtensorCarpiRadialisLongus;
AnyFolder &Extensor_Carpi_Ulnaris = ExtensorCarpiUlnaris.ExtensorCarpiUlnaris;
AnyFolder &Flexor_Carpi_Ulnaris = FlexorCarpiUlnaris.FlexorCarpiUlnaris;
AnyFolder &Flexor_Carpi_Radialis = FlexorCarpiRadialis.FlexorCarpiRadialis;
AnyFolder &Palmaris_Longus = PalmarisLongus.PalmarisLongus;
AnyFolder &Flexor_Digitorum_Superficialis__Digit5 = FlexorDigitorumSuperficialis.FlexorDigitorumSuperficialisDigit5;
AnyFolder &Flexor_Digitorum_Superficialis__Digit4 = FlexorDigitorumSuperficialis.FlexorDigitorumSuperficialisDigit4;
AnyFolder &Flexor_Digitorum_Superficialis__Digit3 = FlexorDigitorumSuperficialis.FlexorDigitorumSuperficialisDigit3;
AnyFolder &Flexor_Digitorum_Superficialis__Digit2 = FlexorDigitorumSuperficialis.FlexorDigitorumSuperficialisDigit2;
AnyFolder &Flexor_Digitorum_Profundus__Digit5 = FlexorDigitorumProfundus.FlexorDigitorumProfundusDigit5;
AnyFolder &Flexor_Digitorum_Profundus__Digit4 = FlexorDigitorumProfundus.FlexorDigitorumProfundusDigit4;
AnyFolder &Flexor_Digitorum_Profundus__Digit3 = FlexorDigitorumProfundus.FlexorDigitorumProfundusDigit3;
AnyFolder &Flexor_Digitorum_Profundus__Digit2 = FlexorDigitorumProfundus.FlexorDigitorumProfundusDigit2;
AnyFolder &Extensor_Digitorum__Digit5 = ExtensorDigitorum.ExtensorDigitorumDigit5;
AnyFolder &Extensor_Digitorum__Digit4 = ExtensorDigitorum.ExtensorDigitorumDigit4;
AnyFolder &Extensor_Digitorum__Digit3 = ExtensorDigitorum.ExtensorDigitorumDigit3;
AnyFolder &Extensor_Digitorum__Digit2 = ExtensorDigitorum.ExtensorDigitorumDigit2;
AnyFolder &Extensor_Digiti_Minimi = ExtensorDigitiMinimi.ExtensorDigitiMinimi;
AnyFolder &Flexor_Pollicis_Longus = FlexorPollicisLongus.FlexorPollicisLongus;
