#if (ANYBODY_V1 < 8) | (ANYBODY_V1  ==  8 & ANYBODY_V2 < 2)
  // AnyGUIPlugin is not supported in AnyBody Studio (introduced in version 8.2)
  //but we want to keep it for backwards compatibility with older versions of AnyBody.
  #if ANYBODY_BUILTIN_PYTHON_AVAILABLE
    AnyGUIPlugin BMPlugin = {

      #ifndef __BMPLUGIN_PATH__
        #path __BMPLUGIN_PATH__ "<ANYBODY_PATH_AMMR>/Tools/Plugins/BM_Plugin-1.1.3-py3.13.egg"
        //#path __BMPLUGIN_PATH__ "<pathto>\bm-plugin\__main__.py"
      #endif

      PluginFile = __BMPLUGIN_PATH__;

      #ifndef BM_CONFIG_PLUGIN
        #define BM_CONFIG_PLUGIN ""
      #endif

      AnyStringVar BodyModelConfigFile = BM_CONFIG_PLUGIN;

      ToolTip = "Change configuration of Body model";
      Extra = CompleteNameOf(&.BMPlugin);
      //Console = On;
      //Interactive = On;
      DisplayName = CompleteNameOf(&...HumanModel) + ": Configuration";

      #ifdef BM_CONFIG_PLUGIN
        #if BM_CONFIG_PLUGIN != ""
          // The BM_CONFIG_PLUGIN file is set so we can assume it is included by the users.
          // Thus, we don't need to include it here.
          #ifnpathexists BM_CONFIG_PLUGIN
            AnyInt BM_config_file_missing= warn(0, strformat("\n"+
              "------------------------------------------------------------------------------------------------------\n"+
              "    The BodyModel configuration file defined by `BM_CONFIG_PLUGIN` does not seem to exist.\n"+
              "    Please create the file or remove the path definition.\n"+
              "-------------------------------------------------------------------------------------------------------"));
          #endif
        #endif
      #else
      #endif
    };
  #endif
#endif
