/**
  Folder containing the range of motion used for calibration.
  By Default the values are taken from the data defined in the BodyModel.
*/
BodyModelFolderStructure RangeOfMotion() = {
  Trunk = {
    AnyVar MaxSkullThoraxFlexionAngle ??= ...BodyModel.Trunk.Data.RangeOfMotion.MaxSkullThoraxFlexionAngle;
    AnyVar MaxSkullThoraxExtensionAngle ??= ...BodyModel.Trunk.Data.RangeOfMotion.MaxSkullThoraxExtensionAngle;
    AnyVar MaxSkullThoraxLateralBendingAngle ??= ...BodyModel.Trunk.Data.RangeOfMotion.MaxSkullThoraxLateralBendingAngle;
    AnyVar MinSkullThoraxLateralBendingAngle ??= ...BodyModel.Trunk.Data.RangeOfMotion.MinSkullThoraxLateralBendingAngle;
    AnyVar MaxSkullThoraxAxialRotationAngle ??= ...BodyModel.Trunk.Data.RangeOfMotion.MaxSkullThoraxAxialRotationAngle;
    AnyVar MinSkullThoraxAxialRotationAngle ??= ...BodyModel.Trunk.Data.RangeOfMotion.MinSkullThoraxAxialRotationAngle;
    AnyVar MaxPelvisThoraxFlexionAngle ??= ...BodyModel.Trunk.Data.RangeOfMotion.MaxPelvisThoraxFlexionAngle;
    AnyVar MaxPelvisThoraxExtensionAngle ??= ...BodyModel.Trunk.Data.RangeOfMotion.MaxPelvisThoraxExtensionAngle;
    AnyVar MaxPelvisThoraxLateralBendingAngle ??= ...BodyModel.Trunk.Data.RangeOfMotion.MaxPelvisThoraxLateralBendingAngle;
    AnyVar MinPelvisThoraxLateralBendingAngle ??= ...BodyModel.Trunk.Data.RangeOfMotion.MinPelvisThoraxLateralBendingAngle;
    AnyVar MaxPelvisThoraxAxialRotationAngle ??= ...BodyModel.Trunk.Data.RangeOfMotion.MaxPelvisThoraxAxialRotationAngle;
    AnyVar MinPelvisThoraxAxialRotationAngle ??= ...BodyModel.Trunk.Data.RangeOfMotion.MinPelvisThoraxAxialRotationAngle;
    AnyVar MaxPelvisSacrumFlexionAngle ??= ...BodyModel.Trunk.Data.RangeOfMotion.MaxPelvisSacrumFlexionAngle;
    AnyVar MaxPelvisSacrumExtensionAngle ??= ...BodyModel.Trunk.Data.RangeOfMotion.MaxPelvisSacrumExtensionAngle;
    AnyVar MaxPelvisSacrumLateralBendingAngle ??= ...BodyModel.Trunk.Data.RangeOfMotion.MaxPelvisSacrumLateralBendingAngle;
    AnyVar MinPelvisSacrumLateralBendingAngle ??= ...BodyModel.Trunk.Data.RangeOfMotion.MinPelvisSacrumLateralBendingAngle;
    AnyVar Neutral ??= ...BodyModel.Trunk.Data.RangeOfMotion.Neutral;

    AnyObjectPtr ActiveRoMThoraxFlexion ??= ...BodyModel.Trunk.Data.RangeOfMotion.ActiveRoMThoraxFlexion;
    AnyObjectPtr ActiveRoMThoraxLateralBending ??= ...BodyModel.Trunk.Data.RangeOfMotion.ActiveRoMThoraxLateralBending;
    AnyObjectPtr ActiveRoMThoraxAxialRotation ??= ...BodyModel.Trunk.Data.RangeOfMotion.ActiveRoMThoraxAxialRotation;
    AnyObjectPtr ActiveRoMSkullFlexion ??= ...BodyModel.Trunk.Data.RangeOfMotion.ActiveRoMSkullFlexion;
    AnyObjectPtr ActiveRoMSkullLateralBending ??= ...BodyModel.Trunk.Data.RangeOfMotion.ActiveRoMSkullLateralBending;
    AnyObjectPtr ActiveRoMSkullAxialRotation ??= ...BodyModel.Trunk.Data.RangeOfMotion.ActiveRoMSkullAxialRotation;
  };

  #if BM_ARM_RIGHT
    Right.ShoulderArm.Shoulder = {
      AnyVar MaxGlenohumeralFlexionAngle ??= .....BodyModel.Right.ShoulderArm.Data.RangeOfMotion.Shoulder.MaxGlenohumeralFlexionAngle;
      AnyVar MaxGlenohumeralExtensionAngle ??= .....BodyModel.Right.ShoulderArm.Data.RangeOfMotion.Shoulder.MaxGlenohumeralExtensionAngle;
      AnyVar MaxGlenohumeralAbductionAngle ??= .....BodyModel.Right.ShoulderArm.Data.RangeOfMotion.Shoulder.MaxGlenohumeralAbductionAngle;
      AnyVar MaxGlenohumeralAdductionAngle ??= .....BodyModel.Right.ShoulderArm.Data.RangeOfMotion.Shoulder.MaxGlenohumeralAdductionAngle;
      AnyVar MaxGlenohumeralExternalRotationAngle ??= .....BodyModel.Right.ShoulderArm.Data.RangeOfMotion.Shoulder.MaxGlenohumeralExternalRotationAngle;
      AnyVar MaxGlenohumeralInternalRotationAngle ??= .....BodyModel.Right.ShoulderArm.Data.RangeOfMotion.Shoulder.MaxGlenohumeralInternalRotationAngle;
      AnyVar MaxScapulaClaviculaElevationAngle ??= .....BodyModel.Right.ShoulderArm.Data.RangeOfMotion.Shoulder.MaxScapulaClaviculaElevationAngle;
      AnyVar MaxScapulaClaviculaDepressionAngle ??= .....BodyModel.Right.ShoulderArm.Data.RangeOfMotion.Shoulder.MaxScapulaClaviculaDepressionAngle;
      AnyVar MaxScapulaClaviculaProtractionAngle ??= .....BodyModel.Right.ShoulderArm.Data.RangeOfMotion.Shoulder.MaxScapulaClaviculaProtractionAngle;
      AnyVar MaxScapulaClaviculaRetractionAngle ??= .....BodyModel.Right.ShoulderArm.Data.RangeOfMotion.Shoulder.MaxScapulaClaviculaRetractionAngle;
      AnyVar ScapulaNeutral ??= .....BodyModel.Right.ShoulderArm.Data.RangeOfMotion.Shoulder.ScapulaNeutral;

      // Shoulder positions
      AnyFloat Neutral ??= .....BodyModel.Right.ShoulderArm.Data.RangeOfMotion.Shoulder.Neutral;
      AnyFloat Flexed ??= .....BodyModel.Right.ShoulderArm.Data.RangeOfMotion.Shoulder.Flexed;
      AnyFloat Extended ??= .....BodyModel.Right.ShoulderArm.Data.RangeOfMotion.Shoulder.Extended;
      AnyFloat Abducted ??= .....BodyModel.Right.ShoulderArm.Data.RangeOfMotion.Shoulder.Abducted;
      AnyFloat Adducted ??= .....BodyModel.Right.ShoulderArm.Data.RangeOfMotion.Shoulder.Adducted;
      AnyFloat ExternallyRotated ??= .....BodyModel.Right.ShoulderArm.Data.RangeOfMotion.Shoulder.ExternallyRotated;
      AnyFloat InternallyRotated ??= .....BodyModel.Right.ShoulderArm.Data.RangeOfMotion.Shoulder.InternallyRotated;
      AnyFloat FlexedAndExternallyRotated ??= .....BodyModel.Right.ShoulderArm.Data.RangeOfMotion.Shoulder.FlexedAndExternallyRotated;
      AnyFloat FlexedAndInternallyRotated ??= .....BodyModel.Right.ShoulderArm.Data.RangeOfMotion.Shoulder.FlexedAndInternallyRotated;
      AnyFloat ExtendedAndExternallyRotated ??= .....BodyModel.Right.ShoulderArm.Data.RangeOfMotion.Shoulder.ExtendedAndExternallyRotated;
      AnyFloat ExtendedAndInternallyRotated ??= .....BodyModel.Right.ShoulderArm.Data.RangeOfMotion.Shoulder.ExtendedAndInternallyRotated;
      AnyFloat FlexedAndAdducted ??= .....BodyModel.Right.ShoulderArm.Data.RangeOfMotion.Shoulder.FlexedAndAdducted;
      AnyFloat FlexedAndAbducted ??= .....BodyModel.Right.ShoulderArm.Data.RangeOfMotion.Shoulder.FlexedAndAbducted;

      AnyObjectPtr ActiveRoMShoulder ??= .....BodyModel.Right.ShoulderArm.Data.RangeOfMotion.Shoulder.ActiveRoMShoulder;
      AnyObjectPtr ActiveRoMScapulaElevation ??= .....BodyModel.Right.ShoulderArm.Data.RangeOfMotion.Shoulder.ActiveRoMScapulaElevation;
      AnyObjectPtr ActiveRoMScapulaProtraction ??= .....BodyModel.Right.ShoulderArm.Data.RangeOfMotion.Shoulder.ActiveRoMScapulaProtraction;
    };

    Right.ShoulderArm.Elbow = {
      AnyVar MaxFlexionAngle ??= .....BodyModel.Right.ShoulderArm.Data.RangeOfMotion.Elbow.MaxFlexionAngle;
      AnyVar MaxExtensionAngle ??= .....BodyModel.Right.ShoulderArm.Data.RangeOfMotion.Elbow.MaxExtensionAngle;
      AnyVar MaxPronationAngle ??= .....BodyModel.Right.ShoulderArm.Data.RangeOfMotion.Elbow.MaxPronationAngle;
      AnyVar MaxSupinationAngle ??= .....BodyModel.Right.ShoulderArm.Data.RangeOfMotion.Elbow.MaxSupinationAngle;
      AnyVar Neutral ??= .....BodyModel.Right.ShoulderArm.Data.RangeOfMotion.Elbow.Neutral;

      AnyObjectPtr ActiveRoMFlexion ??= .....BodyModel.Right.ShoulderArm.Data.RangeOfMotion.Elbow.ActiveRoMFlexion;
      AnyObjectPtr ActiveRoMPronation ??= .....BodyModel.Right.ShoulderArm.Data.RangeOfMotion.Elbow.ActiveRoMPronation;
    };

    Right.ShoulderArm.Wrist = {
      AnyVar MaxFlexionAngle ??= .....BodyModel.Right.ShoulderArm.Data.RangeOfMotion.Wrist.MaxFlexionAngle;
      AnyVar MaxExtensionAngle ??= .....BodyModel.Right.ShoulderArm.Data.RangeOfMotion.Wrist.MaxExtensionAngle;
      AnyVar MaxAbductionAngle ??= .....BodyModel.Right.ShoulderArm.Data.RangeOfMotion.Wrist.MaxAbductionAngle;
      AnyVar MaxAdductionAngle ??= .....BodyModel.Right.ShoulderArm.Data.RangeOfMotion.Wrist.MaxAdductionAngle;
      AnyVar Neutral ??= .....BodyModel.Right.ShoulderArm.Data.RangeOfMotion.Wrist.Neutral;

      AnyObjectPtr ActiveRoMFlexion ??= .....BodyModel.Right.ShoulderArm.Data.RangeOfMotion.Wrist.ActiveRoMFlexion;
      AnyObjectPtr ActiveRoMAbduction ??= .....BodyModel.Right.ShoulderArm.Data.RangeOfMotion.Wrist.ActiveRoMAbduction;
    };
  #endif

  #if BM_LEG_RIGHT & (BM_LEG_MODEL == _LEG_MODEL_TLEM2_)
    Right.Leg.Hip = {
      AnyVar MaxExternalRotationAngle ??= .....BodyModel.Right.Leg.Data.RangeOfMotion.Hip.MaxExternalRotationAngle;
      AnyVar MaxInternalRotationAngle ??= .....BodyModel.Right.Leg.Data.RangeOfMotion.Hip.MaxInternalRotationAngle;
      AnyVar MaxAdductionAngle ??= .....BodyModel.Right.Leg.Data.RangeOfMotion.Hip.MaxAdductionAngle;
      AnyVar MaxAdductionInExtensionAngle ??= .....BodyModel.Right.Leg.Data.RangeOfMotion.Hip.MaxAdductionInExtensionAngle;
      AnyVar MaxAbductionAngle ??= .....BodyModel.Right.Leg.Data.RangeOfMotion.Hip.MaxAbductionAngle;
      AnyVar MaxFlexionAngle ??= .....BodyModel.Right.Leg.Data.RangeOfMotion.Hip.MaxFlexionAngle;
      AnyVar MaxExtensionAngle ??= .....BodyModel.Right.Leg.Data.RangeOfMotion.Hip.MaxExtensionAngle;
      AnyVar MaxExtensionInAdductionAngle ??= .....BodyModel.Right.Leg.Data.RangeOfMotion.Hip.MaxExtensionInAdductionAngle;
      AnyVar MaxFlexionInAbductionAngle ??= .....BodyModel.Right.Leg.Data.RangeOfMotion.Hip.MaxFlexionInAbductionAngle;
      AnyVar MinFlexionInAdduction ??= .....BodyModel.Right.Leg.Data.RangeOfMotion.Hip.MinFlexionInAdduction;

      // Hip positions
      AnyFloat Neutral ??= .....BodyModel.Right.Leg.Data.RangeOfMotion.Hip.Neutral;
      AnyFloat InternallyRotated ??= .....BodyModel.Right.Leg.Data.RangeOfMotion.Hip.InternallyRotated;
      AnyFloat ExternallyRotated ??= .....BodyModel.Right.Leg.Data.RangeOfMotion.Hip.ExternallyRotated;
      AnyFloat Adduction ??= .....BodyModel.Right.Leg.Data.RangeOfMotion.Hip.Adduction;
      AnyFloat Abduction ??= .....BodyModel.Right.Leg.Data.RangeOfMotion.Hip.Abduction;
      AnyFloat Flexed ??= .....BodyModel.Right.Leg.Data.RangeOfMotion.Hip.Flexed;
      AnyFloat FlexedAndAdducted ??= .....BodyModel.Right.Leg.Data.RangeOfMotion.Hip.FlexedAndAdducted;
      AnyFloat FlexedAndAbducted ??= .....BodyModel.Right.Leg.Data.RangeOfMotion.Hip.FlexedAndAbducted;
      AnyFloat Extended ??= .....BodyModel.Right.Leg.Data.RangeOfMotion.Hip.Extended;
      AnyFloat ExtendedAndAdducted ??= .....BodyModel.Right.Leg.Data.RangeOfMotion.Hip.ExtendedAndAdducted;
      AnyFloat AbductedAndExternallyRotated ??= .....BodyModel.Right.Leg.Data.RangeOfMotion.Hip.AbductedAndExternallyRotated;

      AnyObjectPtr ActiveRoM ??= .....BodyModel.Right.Leg.Data.RangeOfMotion.Hip.ActiveRoM;
    };

    Right.Leg.Knee = {
      AnyVar Neutral ??= .....BodyModel.Right.Leg.Data.RangeOfMotion.Knee.Neutral;
      AnyVar MaxFlexionAngle ??= .....BodyModel.Right.Leg.Data.RangeOfMotion.Knee.MaxFlexionAngle;
      AnyVar MaxExtensionAngle ??= .....BodyModel.Right.Leg.Data.RangeOfMotion.Knee.MaxExtensionAngle;

      AnyObjectPtr ActiveRoM ??= .....BodyModel.Right.Leg.Data.RangeOfMotion.Knee.ActiveRoM;
    };

    Right.Leg.Ankle = {
      AnyVar Neutral ??= .....BodyModel.Right.Leg.Data.RangeOfMotion.Ankle.Neutral;
      AnyVar MaxPlantarFlexionAngle ??= .....BodyModel.Right.Leg.Data.RangeOfMotion.Ankle.MaxPlantarFlexionAngle;
      AnyVar MaxDorsiFlexionAngle ??= .....BodyModel.Right.Leg.Data.RangeOfMotion.Ankle.MaxDorsiFlexionAngle;
      AnyVar MaxInversionAngle ??= .....BodyModel.Right.Leg.Data.RangeOfMotion.Ankle.MaxInversionAngle;
      AnyVar MaxEversionAngle ??= .....BodyModel.Right.Leg.Data.RangeOfMotion.Ankle.MaxEversionAngle;

      AnyObjectPtr ActiveRoMFlexion ??= .....BodyModel.Right.Leg.Data.RangeOfMotion.Ankle.ActiveRoMFlexion;
      AnyObjectPtr ActiveRoMEversion ??= .....BodyModel.Right.Leg.Data.RangeOfMotion.Ankle.ActiveRoMEversion;
    };
  #endif

  #if BM_ARM_LEFT
    Left.ShoulderArm.Shoulder = {
      AnyVar MaxGlenohumeralFlexionAngle ??= .....BodyModel.Left.ShoulderArm.Data.RangeOfMotion.Shoulder.MaxGlenohumeralFlexionAngle;
      AnyVar MaxGlenohumeralExtensionAngle ??= .....BodyModel.Left.ShoulderArm.Data.RangeOfMotion.Shoulder.MaxGlenohumeralExtensionAngle;
      AnyVar MaxGlenohumeralAbductionAngle ??= .....BodyModel.Left.ShoulderArm.Data.RangeOfMotion.Shoulder.MaxGlenohumeralAbductionAngle;
      AnyVar MaxGlenohumeralAdductionAngle ??= .....BodyModel.Left.ShoulderArm.Data.RangeOfMotion.Shoulder.MaxGlenohumeralAdductionAngle;
      AnyVar MaxGlenohumeralExternalRotationAngle ??= .....BodyModel.Left.ShoulderArm.Data.RangeOfMotion.Shoulder.MaxGlenohumeralExternalRotationAngle;
      AnyVar MaxGlenohumeralInternalRotationAngle ??= .....BodyModel.Left.ShoulderArm.Data.RangeOfMotion.Shoulder.MaxGlenohumeralInternalRotationAngle;
      AnyVar MaxScapulaClaviculaElevationAngle ??= .....BodyModel.Left.ShoulderArm.Data.RangeOfMotion.Shoulder.MaxScapulaClaviculaElevationAngle;
      AnyVar MaxScapulaClaviculaDepressionAngle ??= .....BodyModel.Left.ShoulderArm.Data.RangeOfMotion.Shoulder.MaxScapulaClaviculaDepressionAngle;
      AnyVar MaxScapulaClaviculaProtractionAngle ??= .....BodyModel.Left.ShoulderArm.Data.RangeOfMotion.Shoulder.MaxScapulaClaviculaProtractionAngle;
      AnyVar MaxScapulaClaviculaRetractionAngle ??= .....BodyModel.Left.ShoulderArm.Data.RangeOfMotion.Shoulder.MaxScapulaClaviculaRetractionAngle;
      AnyVar ScapulaNeutral ??= .....BodyModel.Left.ShoulderArm.Data.RangeOfMotion.Shoulder.ScapulaNeutral;

      // Shoulder positions
      AnyFloat Neutral ??= .....BodyModel.Left.ShoulderArm.Data.RangeOfMotion.Shoulder.Neutral;
      AnyFloat Flexed ??= .....BodyModel.Left.ShoulderArm.Data.RangeOfMotion.Shoulder.Flexed;
      AnyFloat Extended ??= .....BodyModel.Left.ShoulderArm.Data.RangeOfMotion.Shoulder.Extended;
      AnyFloat Abducted ??= .....BodyModel.Left.ShoulderArm.Data.RangeOfMotion.Shoulder.Abducted;
      AnyFloat Adducted ??= .....BodyModel.Left.ShoulderArm.Data.RangeOfMotion.Shoulder.Adducted;
      AnyFloat ExternallyRotated ??= .....BodyModel.Left.ShoulderArm.Data.RangeOfMotion.Shoulder.ExternallyRotated;
      AnyFloat InternallyRotated ??= .....BodyModel.Left.ShoulderArm.Data.RangeOfMotion.Shoulder.InternallyRotated;
      AnyFloat FlexedAndExternallyRotated ??= .....BodyModel.Left.ShoulderArm.Data.RangeOfMotion.Shoulder.FlexedAndExternallyRotated;
      AnyFloat FlexedAndInternallyRotated ??= .....BodyModel.Left.ShoulderArm.Data.RangeOfMotion.Shoulder.FlexedAndInternallyRotated;
      AnyFloat ExtendedAndExternallyRotated ??= .....BodyModel.Left.ShoulderArm.Data.RangeOfMotion.Shoulder.ExtendedAndExternallyRotated;
      AnyFloat ExtendedAndInternallyRotated ??= .....BodyModel.Left.ShoulderArm.Data.RangeOfMotion.Shoulder.ExtendedAndInternallyRotated;
      AnyFloat FlexedAndAdducted ??= .....BodyModel.Left.ShoulderArm.Data.RangeOfMotion.Shoulder.FlexedAndAdducted;
      AnyFloat FlexedAndAbducted ??= .....BodyModel.Left.ShoulderArm.Data.RangeOfMotion.Shoulder.FlexedAndAbducted;

      AnyObjectPtr ActiveRoMShoulder ??= .....BodyModel.Left.ShoulderArm.Data.RangeOfMotion.Shoulder.ActiveRoMShoulder;
      AnyObjectPtr ActiveRoMScapulaElevation ??= .....BodyModel.Left.ShoulderArm.Data.RangeOfMotion.Shoulder.ActiveRoMScapulaElevation;
      AnyObjectPtr ActiveRoMScapulaProtraction ??= .....BodyModel.Left.ShoulderArm.Data.RangeOfMotion.Shoulder.ActiveRoMScapulaProtraction;
    };

    Left.ShoulderArm.Elbow = {
      AnyVar MaxFlexionAngle ??= .....BodyModel.Left.ShoulderArm.Data.RangeOfMotion.Elbow.MaxFlexionAngle;
      AnyVar MaxExtensionAngle ??= .....BodyModel.Left.ShoulderArm.Data.RangeOfMotion.Elbow.MaxExtensionAngle;
      AnyVar MaxPronationAngle ??= .....BodyModel.Left.ShoulderArm.Data.RangeOfMotion.Elbow.MaxPronationAngle;
      AnyVar MaxSupinationAngle ??= .....BodyModel.Left.ShoulderArm.Data.RangeOfMotion.Elbow.MaxSupinationAngle;
      AnyVar Neutral ??= .....BodyModel.Left.ShoulderArm.Data.RangeOfMotion.Elbow.Neutral;

      AnyObjectPtr ActiveRoMFlexion ??= .....BodyModel.Left.ShoulderArm.Data.RangeOfMotion.Elbow.ActiveRoMFlexion;
      AnyObjectPtr ActiveRoMPronation ??= .....BodyModel.Left.ShoulderArm.Data.RangeOfMotion.Elbow.ActiveRoMPronation;
    };

    Left.ShoulderArm.Wrist = {
      AnyVar MaxFlexionAngle ??= .....BodyModel.Left.ShoulderArm.Data.RangeOfMotion.Wrist.MaxFlexionAngle;
      AnyVar MaxExtensionAngle ??= .....BodyModel.Left.ShoulderArm.Data.RangeOfMotion.Wrist.MaxExtensionAngle;
      AnyVar MaxAbductionAngle ??= .....BodyModel.Left.ShoulderArm.Data.RangeOfMotion.Wrist.MaxAbductionAngle;
      AnyVar MaxAdductionAngle ??= .....BodyModel.Left.ShoulderArm.Data.RangeOfMotion.Wrist.MaxAdductionAngle;
      AnyVar Neutral ??= .....BodyModel.Left.ShoulderArm.Data.RangeOfMotion.Wrist.Neutral;

      AnyObjectPtr ActiveRoMFlexion ??= .....BodyModel.Left.ShoulderArm.Data.RangeOfMotion.Wrist.ActiveRoMFlexion;
      AnyObjectPtr ActiveRoMAbduction ??= .....BodyModel.Left.ShoulderArm.Data.RangeOfMotion.Wrist.ActiveRoMAbduction;
    };
  #endif

  #if BM_LEG_LEFT & (BM_LEG_MODEL == _LEG_MODEL_TLEM2_)
    // Left side is by default a mirror of the right side
    Left.Leg.Hip = {
      AnyVar MaxExternalRotationAngle ??= .....BodyModel.Left.Leg.Data.RangeOfMotion.Hip.MaxExternalRotationAngle;
      AnyVar MaxInternalRotationAngle ??= .....BodyModel.Left.Leg.Data.RangeOfMotion.Hip.MaxInternalRotationAngle;
      AnyVar MaxAdductionAngle ??= .....BodyModel.Left.Leg.Data.RangeOfMotion.Hip.MaxAdductionAngle;
      AnyVar MaxAdductionInExtensionAngle ??= .....BodyModel.Left.Leg.Data.RangeOfMotion.Hip.MaxAdductionInExtensionAngle;
      AnyVar MaxAbductionAngle ??= .....BodyModel.Left.Leg.Data.RangeOfMotion.Hip.MaxAbductionAngle;
      AnyVar MaxFlexionAngle ??= .....BodyModel.Left.Leg.Data.RangeOfMotion.Hip.MaxFlexionAngle;
      AnyVar MaxExtensionAngle ??= .....BodyModel.Left.Leg.Data.RangeOfMotion.Hip.MaxExtensionAngle;
      AnyVar MaxExtensionInAdductionAngle ??= .....BodyModel.Left.Leg.Data.RangeOfMotion.Hip.MaxExtensionInAdductionAngle;
      AnyVar MaxFlexionInAbductionAngle ??= .....BodyModel.Left.Leg.Data.RangeOfMotion.Hip.MaxFlexionInAbductionAngle;
      AnyVar MinFlexionInAdduction ??= .....BodyModel.Left.Leg.Data.RangeOfMotion.Hip.MinFlexionInAdduction;

      // Hip positions
      AnyFloat Neutral ??= .....BodyModel.Left.Leg.Data.RangeOfMotion.Hip.Neutral;
      AnyFloat InternallyRotated ??= .....BodyModel.Left.Leg.Data.RangeOfMotion.Hip.InternallyRotated;
      AnyFloat ExternallyRotated ??= .....BodyModel.Left.Leg.Data.RangeOfMotion.Hip.ExternallyRotated;
      AnyFloat Adduction ??= .....BodyModel.Left.Leg.Data.RangeOfMotion.Hip.Adduction;
      AnyFloat Abduction ??= .....BodyModel.Left.Leg.Data.RangeOfMotion.Hip.Abduction;
      AnyFloat Flexed ??= .....BodyModel.Left.Leg.Data.RangeOfMotion.Hip.Flexed;
      AnyFloat FlexedAndAdducted ??= .....BodyModel.Left.Leg.Data.RangeOfMotion.Hip.FlexedAndAdducted;
      AnyFloat FlexedAndAbducted ??= .....BodyModel.Left.Leg.Data.RangeOfMotion.Hip.FlexedAndAbducted;
      AnyFloat Extended ??= .....BodyModel.Left.Leg.Data.RangeOfMotion.Hip.Extended;
      AnyFloat ExtendedAndAdducted ??= .....BodyModel.Left.Leg.Data.RangeOfMotion.Hip.ExtendedAndAdducted;
      AnyFloat AbductedAndExternallyRotated ??= .....BodyModel.Left.Leg.Data.RangeOfMotion.Hip.AbductedAndExternallyRotated;

      AnyObjectPtr ActiveRoM ??= .....BodyModel.Left.Leg.Data.RangeOfMotion.Hip.ActiveRoM;
  };

    Left.Leg.Knee = {
      AnyVar Neutral ??= .....BodyModel.Left.Leg.Data.RangeOfMotion.Knee.Neutral;
      AnyVar MaxFlexionAngle ??= .....BodyModel.Left.Leg.Data.RangeOfMotion.Knee.MaxFlexionAngle;
      AnyVar MaxExtensionAngle ??= .....BodyModel.Left.Leg.Data.RangeOfMotion.Knee.MaxExtensionAngle;

      AnyObjectPtr ActiveRoM ??= .....BodyModel.Left.Leg.Data.RangeOfMotion.Knee.ActiveRoM;
    };

    Left.Leg.Ankle = {
      AnyVar Neutral ??= .....BodyModel.Left.Leg.Data.RangeOfMotion.Ankle.Neutral;
      AnyVar MaxPlantarFlexionAngle ??= .....BodyModel.Left.Leg.Data.RangeOfMotion.Ankle.MaxPlantarFlexionAngle;
      AnyVar MaxDorsiFlexionAngle ??= .....BodyModel.Left.Leg.Data.RangeOfMotion.Ankle.MaxDorsiFlexionAngle;
      AnyVar MaxInversionAngle ??= .....BodyModel.Left.Leg.Data.RangeOfMotion.Ankle.MaxInversionAngle;
      AnyVar MaxEversionAngle ??= .....BodyModel.Left.Leg.Data.RangeOfMotion.Ankle.MaxEversionAngle;

      AnyObjectPtr ActiveRoMFlexion ??= .....BodyModel.Left.Leg.Data.RangeOfMotion.Ankle.ActiveRoMFlexion;
      AnyObjectPtr ActiveRoMEversion ??= .....BodyModel.Left.Leg.Data.RangeOfMotion.Ankle.ActiveRoMEversion;

    };
  #endif
};
