//This file controls which calibrations to be made on the model
#include "Calibration/CalibrationStudy.ClassTemplates.any"
#include "BodyModel.ClassTemplates.any"

AnyFolder Calibration={
  AnyComponentDefinition obj = {};
  #if BM_CALIBRATION_TYPE == _CALIBRATION_TYPE_2PAR_
    AnyFloat RMin = DesignVar(0.5); ///< Muscle fiber length's ratio to the optimal fiber length at the lower extreme for the given range of motion.
    AnyFloat RMax = DesignVar(1.0); ///< Muscle fiber length's ratio to the optimal fiber length at the upper extreme for the given range of motion.
  #endif

  #if BM_CALIBRATION_TYPE ==_EXPERIMENTAL_CALIBRATION_TYPE_2PAR_


    #include "Calibration/RValues.any"
    #include "Calibration/RangeOfMotionDefinition.any"


  #endif

  #if BM_LEG_RIGHT & BM_LEG_MODEL_IS_TLEM & (BM_LEG_MUSCLES_RIGHT == _MUSCLES_3E_HILL_)
    #if BM_CALIBRATION_TYPE == _CALIBRATION_TYPE_1PAR_
      #include "<BM_LEG_TLEM_PATH>/Calibration/CalibrationSequenceRight.any"
    #endif
    #if BM_CALIBRATION_TYPE == _CALIBRATION_TYPE_2PAR_
      AnyFolder &refRightLegDefaultMusPar = .BodyModel.Right.Leg.MuscleModels.DefaultMusPar;
      refRightLegDefaultMusPar = {
        PEFactor = 2.0;
      };
      #include "<BM_LEG_TLEM_PATH>/Calibration/CalibrationSequenceRight2Par.any"
    #endif
    #if (BM_CALIBRATION_TYPE == _EXPERIMENTAL_CALIBRATION_TYPE_2PAR_) & (BM_LEG_MODEL != _LEG_MODEL_TLEM1_)
       #include "<BM_LEG_TLEM_PATH>/Calibration/2ParRightCalStudies.any"
    #endif
    #if BM_CALIBRATION_TYPE == _CALIBRATION_TYPE_CUSTOM_
      // Allow user to implement their own calibration
    #endif
  #endif

  #if BM_LEG_LEFT & BM_LEG_MODEL_IS_TLEM & (BM_LEG_MUSCLES_LEFT == _MUSCLES_3E_HILL_)
    #if BM_CALIBRATION_TYPE == _CALIBRATION_TYPE_1PAR_
      #include "<BM_LEG_TLEM_PATH>/Calibration/CalibrationSequenceLeft.any"
    #endif
    #if BM_CALIBRATION_TYPE == _CALIBRATION_TYPE_2PAR_
      AnyFolder &refLeftLegDefaultMusPar = .BodyModel.Left.Leg.MuscleModels.DefaultMusPar;
      refLeftLegDefaultMusPar = {
        PEFactor = 2.0;
      };
      #include "<BM_LEG_TLEM_PATH>/Calibration/CalibrationSequenceLeft2Par.any"
    #endif
    #if (BM_CALIBRATION_TYPE == _EXPERIMENTAL_CALIBRATION_TYPE_2PAR_) & (BM_LEG_MODEL != _LEG_MODEL_TLEM1_)
      #include "<BM_LEG_TLEM_PATH>/Calibration/2ParLeftCalStudies.any"
    #endif
    #if BM_CALIBRATION_TYPE == _CALIBRATION_TYPE_CUSTOM_
      // Allow user to implement their own calibration
    #endif
  #endif

  #if BM_LEG_RIGHT & (BM_LEG_MODEL== _LEG_MODEL_LEG_) & (BM_LEG_MUSCLES_RIGHT == _MUSCLES_3E_HILL_)
    #if BM_CALIBRATION_TYPE != _CALIBRATION_TYPE_CUSTOM_
      #include "../../Leg/CalibrationSequenceRight.any"
    #endif
    #if BM_CALIBRATION_TYPE == _CALIBRATION_TYPE_CUSTOM_
      // Allow user to implement their own calibration
    #endif
  #endif

  #if BM_LEG_LEFT & (BM_LEG_MODEL== _LEG_MODEL_LEG_) & (BM_LEG_MUSCLES_LEFT == _MUSCLES_3E_HILL_)
    #if BM_CALIBRATION_TYPE != _CALIBRATION_TYPE_CUSTOM_
      #include "../../Leg/CalibrationSequenceLeft.any"
    #endif
    #if BM_CALIBRATION_TYPE == _CALIBRATION_TYPE_CUSTOM_
      // Allow user to implement their own calibration
    #endif
  #endif

  #if ((BM_ARM_RIGHT == ON) & (BM_ARM_MUSCLES_RIGHT == _MUSCLES_3E_HILL_))
  #if BM_CALIBRATION_TYPE == _CALIBRATION_TYPE_1PAR_
    #include "../../Arm/Calibration/CalibrationSequenceRight.any"
  #endif
  #if BM_CALIBRATION_TYPE == _CALIBRATION_TYPE_2PAR_
    // 2Par PEFactor will be set here
    #include "../../Arm/Calibration/CalibrationSequenceRight2Par.any"
  #endif
  #if BM_CALIBRATION_TYPE == _EXPERIMENTAL_CALIBRATION_TYPE_2PAR_
    // 2Par PEFactor will be set here
    #include "../../Arm/Calibration/CalibrationSequenceRight2Par.any"
  #endif
  #if BM_CALIBRATION_TYPE == _CALIBRATION_TYPE_CUSTOM_
    // Allow user to implement their own calibration
  #endif
  #endif

  #if ((BM_ARM_LEFT == ON) & (BM_ARM_MUSCLES_LEFT == _MUSCLES_3E_HILL_))
  #if BM_CALIBRATION_TYPE == _CALIBRATION_TYPE_1PAR_
    #include "../../Arm/Calibration/CalibrationSequenceLeft.any"
  #endif
  #if BM_CALIBRATION_TYPE == _CALIBRATION_TYPE_2PAR_
    // 2Par PEFactor will be set here
    #include "../../Arm/Calibration/CalibrationSequenceLeft2Par.any"
  #endif
  #if BM_CALIBRATION_TYPE == _EXPERIMENTAL_CALIBRATION_TYPE_2PAR_
    // 2Par PEFactor will be set here
    #include "../../Arm/Calibration/CalibrationSequenceLeft2Par.any"
  #endif
  #if BM_CALIBRATION_TYPE == _CALIBRATION_TYPE_CUSTOM_
    // Allow user to implement their own calibration
  #endif
  #endif

  #if (BM_TRUNK_MUSCLES == _MUSCLES_3E_HILL_)
  #if BM_CALIBRATION_TYPE == _CALIBRATION_TYPE_1PAR_
    #include "../../Trunk/Calibration/MuscleCalibrationSequence.any"
  #endif
  #if BM_CALIBRATION_TYPE == _CALIBRATION_TYPE_2PAR_
    // 2Par PEFactor will be set here
    #include "../../Trunk/Calibration/MuscleCalibrationSequence2Par.any"
  #endif
  #if BM_CALIBRATION_TYPE == _EXPERIMENTAL_CALIBRATION_TYPE_2PAR_
    // 2Par PEFactor will be set here
    #include "../../Trunk/Calibration/MuscleCalibrationSequence2Par.any"
  #endif
  #if BM_CALIBRATION_TYPE == _CALIBRATION_TYPE_CUSTOM_
    // Allow user to implement their own calibration
  #endif
  #endif

  #if (BM_TRUNK_LIGAMENTS | BM_TRUNK_LUMBAR_LIGAMENTS | BM_TRUNK_THORACIC_LIGAMENTS | BM_TRUNK_CERVICAL_LIGAMENTS)
  #if BM_CALIBRATION_TYPE == _CALIBRATION_TYPE_CUSTOM_
    // Allow user to implement their own calibration
  #else
    #include "../../Trunk/Calibration/LigamentCalibrationSequence.any"
  #endif
  #endif

  AnyOperationSequence CalibrationSequence ={
     AnyOperationDummy PlaceHolderOpr = {};
  };
};
