#ifndef COMPONENTTREECONFIG_ROOT_TOKEN
#define COMPONENTTREECONFIG_ROOT_TOKEN "([a-zA-Z0-9]+)\.([a-zA-Z0-9\._]+)"
#endif

Trunk={

  // trunk component (just an item for trunk in the Flat Tree)
  AnyComponentDefinition CDef = {Hidden = 1;};

  #if (BM_TRUNK_MUSCLES != _MUSCLES_NONE_) | ((BM_LEG_RIGHT == ON ) & (BM_LEG_MUSCLES_RIGHT != OFF))
  // muscles
  Muscles.Right = {
    AnyComponentDefinition CDef = {
      NameCast = "MusclesRight";
      SubGroupRegexSearch = COMPONENTTREECONFIG_ROOT_TOKEN;
    };

  };
  #endif

  #if (BM_TRUNK_MUSCLES != _MUSCLES_NONE_) |  ((BM_LEG_LEFT == ON ) & (BM_LEG_MUSCLES_LEFT != OFF))
  Muscles.Left = {
    AnyComponentDefinition CDef = {
      NameCast = "MusclesLeft";
      SubGroupRegexSearch = COMPONENTTREECONFIG_ROOT_TOKEN;
    };
  };
  #endif

  #if (BM_TRUNK_MUSCLES != _MUSCLES_NONE_)
#if BM_TRUNK_CAVITY_MODEL == _CAVITY_MODEL_BUCKLE_
  Buckle = {
    AnyComponentDefinition CDef = {
      SubGroupRegexSearch = COMPONENTTREECONFIG_ROOT_TOKEN;
    };
  };
#else
  Abdominal = {
    AnyComponentDefinition CDef = {
      SubGroupRegexSearch = COMPONENTTREECONFIG_ROOT_TOKEN;
    };
  };
#endif

  Muscles = {
    AnyComponentDefinition CDef = {
      NameCast = "MusclesCenter";
      SubGroupRegexSearch = COMPONENTTREECONFIG_ROOT_TOKEN;
    };
  };
  #endif

  #if BM_TRUNK_MUSCLES == OFF
    JointMuscles = {
      AnyComponentDefinition CDef = {};
    };
  #endif

  // segments
  Segments = {
    AnyComponentDefinition CDef = {
      NameCast = "Lumbar";
    };
  };
//  Segments = {
//    AnyComponentDefinition CDef = {
//      NameCast = "CervicalSpine";
//    };
//  };
//  Segments = {
//    AnyComponentDefinition CDef = {
//      NameCast = "Thorax";
//    };
//  };
//
//  Segments = {
//    AnyComponentDefinition CDef = {
//      SubGroupRegexSearch = ROOT_TOKEN;
//
//      NameCast = "RibCage";
//    };
//  };

  // joints
  Joints.Lumbar = {
    AnyComponentDefinition CDef = {
      NameCast = "Lumbar";
    };
  };
  Joints.Cervical = {
    AnyComponentDefinition CDef = {
      NameCast = "Cervical";
    };
  };

   Joints.Thorax = {
     AnyComponentDefinition CDef = {
       NameCast = "Thorax";
     };
   };
   Joints.RibCage = {
     AnyComponentDefinition CDel = {
       NameCast = "RibCage";
     };
   };

};

#if BM_ARM_RIGHT == ON
Right.ShoulderArm = {
  AnyComponentDefinition CDef = {};

  #if BM_ARM_DETAILED_HAND == ON
    Segments.Hand = {
      AnyComponentDefinition CDef = {
        SubGroupRegexSearch = "^(Finger\d{1})\.([_[:alnum:]]+)\.([_[:alnum:]]+).*?";
        SubGroupRegexReplace = "$1/$3";
      };
    };
  #endif

  Joints = {
    AnyComponentDefinition CDef = {};
  };
  #if BM_ARM_MUSCLES_RIGHT == OFF
  JointMuscles = {AnyComponentDefinition CDef = {};};
  #endif
};
#endif

#if BM_ARM_LEFT == ON
Left.ShoulderArm = {
  AnyComponentDefinition CDef = {};

  #if BM_ARM_DETAILED_HAND == ON
    Segments.Hand = {
      AnyComponentDefinition CDef = {
        SubGroupRegexSearch = "^(Finger\d{1})\.([_[:alnum:]]+)\.([_[:alnum:]]+).*?";
        SubGroupRegexReplace = "$1/$3";
      };
    };
  #endif
  Joints = {AnyComponentDefinition CDef = {};};
  #if BM_ARM_MUSCLES_LEFT == OFF
  JointMuscles = {AnyComponentDefinition CDef = {};};
  #endif
};
#endif


#if BM_LEG_RIGHT == ON
Right.Leg = {
  AnyComponentDefinition CDef = {};
  Joints = {AnyComponentDefinition CDef = {};};
  #if BM_LEG_MUSCLES_RIGHT == OFF
  JointMuscles = {AnyComponentDefinition CDef = {};};
  #endif
};
#endif
#if BM_LEG_LEFT == ON
Left.Leg = {
  AnyComponentDefinition CDef = {};
  Joints = {AnyComponentDefinition CDef = {};};
  #if BM_LEG_MUSCLES_LEFT == OFF
  JointMuscles = {AnyComponentDefinition CDef = {};};
  #endif
};
#endif
