Left = {

  AnyFolder Leg = {


    #ifdef SignRef
      #undef SignRef
    #endif
    #define SignRef 0

    #ifdef _SIDE_
      #undef _SIDE_
    #endif
    #define _SIDE_ Left

    AnyFolder Data = {
      AnyFolder unscaled = {
        AnyFolder &ModelParameters = ..ModelParameters;
        AnyFolder &STL = ..Segments.STL;
        AnyFolder &StandardParameters = .....ScalingLaw.StandardParameters.Right;
      };

      #if BM_LEG_MODEL == _LEG_MODEL_TLEM_
        #include "<BM_LEG_TLEM_PATH>/rangeOfMotion.any"
      #endif

      #include "MassDistribution.any"
    };

    #include "<BM_LEG_DATASET_PATH>\ModelParameters.any"

    #define _LEFT_RIGHT_ "Left"

    #include "<BM_LEG_TLEM_PATH>\Leg.root.any"

    #if (BM_FOOT_MODEL == _FOOT_MODEL_RIGID_GM_) | (BM_FOOT_MODEL == _FOOT_MODEL_TOE_FLEX_GM_) | (BM_FOOT_MODEL == _FOOT_MODEL_DETAILED_GM_)
      #include "<ANYBODY_PATH_BODY>/FootGM/GM_Foot_ModelParameters.any"
      #include "<ANYBODY_PATH_BODY>/FootGM/GM_foot.root.any"
    #endif

    #undef _LEFT_RIGHT_

    AnyFolder &InterfaceFolder = ..Interface.Left;

    AnyFolder &MannequinValuesFolder = ..MannequinValuesFromModel.AnyFolder_Posture.AnyFolder_Left;

    #include "../Include/SettingsLeg.any"

    AnyFolder &Scaling = ...Scaling;
    AnyFolder &GeoScaling = ...Scaling.GeometricalScaling.Left;
    AnyFolder &MassScaling = ...Scaling.MassScaling.Left;
    AnyFolder &FiberLengthScaling = ...Scaling.FiberLengthScaling.Left;
    AnyFolder &StrengthScaling = ...Scaling.StrengthScaling.Left;


    AnyFolder BonesOpacity = {
      AnyVar Foot = Main.DrawSettings.BonesOpacity.LeftFoot;
      AnyVar Shank = Main.DrawSettings.BonesOpacity.LeftShank;
      AnyVar Thigh = Main.DrawSettings.BonesOpacity.LeftThigh;
      AnyVar Talus = Main.DrawSettings.BonesOpacity.LeftTalus;
      AnyVar Patella = Main.DrawSettings.BonesOpacity.LeftPatella;
    };

    #if (BM_LEG_MUSCLES_LEFT != OFF) | (BM_TRUNK_MUSCLES != OFF)
      AnyFolder &TrunkMuscles = ..Trunk.Muscles.Left;
    #endif

    #if (BM_LEG_MUSCLES_LEFT == OFF)
      AnyFolder MomentMeasure = {
        #if BM_TRUNK_MUSCLES == _MUSCLES_SIMPLE_
          #define LEG_WITH_PSOAS_MUSCLES
        #endif

        #define LEG_WITH_JOINT_MUSCLES
        #include "<BM_LEG_TLEM_PATH>\LegMoments.any"
        #undef LEG_WITH_JOINT_MUSCLES

        #ifdef LEG_WITH_PSOAS_MUSCLES
          #undef LEG_WITH_PSOAS_MUSCLES
        #endif
      };
    #else
      AnyFolder MomentMeasure = {
        #include "<BM_LEG_TLEM_PATH>\LegMoments.any"
      };
    #endif

    AnyVar Sign = -1;
  }; //End Leg
};

#include "<BM_LEG_TLEM_PATH>/LeftLegSelectedOutput.any"
