AnyFolder Right = {
  /// Reference to folder containing joint angles used for initial positions
  AnyFolder &JointPos = ..Mannequin.Posture.Right;
};

Interface = { AnyFolder Right = { AnyFolder RotVectorMeasures = {}; }; };

SelectedOutput = { AnyFolder Right = {}; };
