Right = {

  AnyFolder Leg = {

    #ifdef SignRef
      #undef SignRef
    #endif
    #define SignRef 1

    #ifdef _SIDE_
      #undef _SIDE_
    #endif
    #define _SIDE_ Right

    AnyFolder Data = {
      AnyFolder unscaled = {
        AnyFolder &ModelParameters = ..ModelParameters;
        AnyFolder &STL = ..Segments.STL;
        AnyFolder &StandardParameters = .....ScalingLaw.StandardParameters.Right;
      };

      #if BM_LEG_MODEL == _LEG_MODEL_TLEM_
        #include "<BM_LEG_TLEM_PATH>/rangeOfMotion.any"
      #endif

      #include "MassDistribution.any"
    };

    #include "<BM_LEG_DATASET_PATH>/ModelParameters.any"

    #define _LEFT_RIGHT_ "Right"

    #include "<BM_LEG_TLEM_PATH>\Leg.root.any"

    #if (BM_FOOT_MODEL == _FOOT_MODEL_RIGID_GM_) | (BM_FOOT_MODEL == _FOOT_MODEL_TOE_FLEX_GM_) | (BM_FOOT_MODEL == _FOOT_MODEL_DETAILED_GM_)
      #include "<ANYBODY_PATH_BODY>/FootGM/GM_Foot_ModelParameters.any"
      #include "<ANYBODY_PATH_BODY>/FootGM/GM_foot.root.any"
    #endif

    #undef _LEFT_RIGHT_

    //Reference to folder which contains the interface of the right side
    AnyFolder &InterfaceFolder = ..Interface.Right;

    //Reference to mannequin value from model folder
    AnyFolder &MannequinValuesFolder = ..MannequinValuesFromModel.AnyFolder_Posture.AnyFolder_Right;

    #include "../Include/SettingsLeg.any"

    AnyFolder &Scaling = ...Scaling;
    AnyFolder &StandardParameters = ...Scaling.StandardParameters.Right;
    AnyFolder &GeoScaling = ...Scaling.GeometricalScaling.Right;
    AnyFolder &MassScaling = ...Scaling.MassScaling.Right;
    AnyFolder &FiberLengthScaling = ...Scaling.FiberLengthScaling.Right;
    AnyFolder &StrengthScaling = ...Scaling.StrengthScaling.Right;

    AnyFolder BonesOpacity = {
      AnyVar Foot = Main.DrawSettings.BonesOpacity.RightFoot;
      AnyVar Shank = Main.DrawSettings.BonesOpacity.RightShank;
      AnyVar Thigh = Main.DrawSettings.BonesOpacity.RightThigh;
      AnyVar Talus = Main.DrawSettings.BonesOpacity.RightTalus;
      AnyVar Patella = Main.DrawSettings.BonesOpacity.RightPatella;
    };

    #if BM_LEG_MUSCLES_RIGHT  | BM_TRUNK_MUSCLES
      AnyFolder &TrunkMuscles = ..Trunk.Muscles.Right;
    #endif

    #if BM_LEG_MUSCLES_RIGHT == OFF
      AnyFolder MomentMeasure = {
        #if BM_TRUNK_MUSCLES == _MUSCLES_SIMPLE_
          #define LEG_WITH_PSOAS_MUSCLES
         #endif

        #define LEG_WITH_JOINT_MUSCLES
        #include "<BM_LEG_TLEM_PATH>\LegMoments.any"
        #undef LEG_WITH_JOINT_MUSCLES

        #ifdef LEG_WITH_PSOAS_MUSCLES
          #undef LEG_WITH_PSOAS_MUSCLES
        #endif
      };
    #else
      AnyFolder MomentMeasure = {
        #include "<BM_LEG_TLEM_PATH>\LegMoments.any"
      };
    #endif

    AnyVar Sign = 1;
  }; //End Leg
};

#include "<BM_LEG_TLEM_PATH>/RightLegSelectedOutput.any"
