 #ifdef BM_SCALING
 #undef BM_SCALING
 #endif

 #ifdef BM_CONFIG_MESSAGES
 #undef BM_CONFIG_MESSAGES
 #endif

 #ifdef BM_CONFIG_VALUES
 #undef BM_CONFIG_VALUES
 #endif

 #ifdef BM_DRAWSETTINGS_SKIP
 #undef BM_DRAWSETTINGS_SKIP
 #endif

 #ifdef BM_FOOT_MODEL
 #undef BM_FOOT_MODEL
 #endif

 #ifdef BM_FOOT_MODEL_TOE_FLEX_GM_REACTION
 #undef BM_FOOT_MODEL_TOE_FLEX_GM_REACTION
 #endif

 #ifdef BM_LEG_MODEL
 #undef BM_LEG_MODEL
 #endif

 #ifdef BM_LEG_MODEL_IS_TLEM
 #undef BM_LEG_MODEL_IS_TLEM
 #endif

 #ifdef BM_ARM_THORAX_SCAPULA_CONTACT
 #undef BM_ARM_THORAX_SCAPULA_CONTACT
 #endif

 #ifdef BM_LEG_LEFT
 #undef BM_LEG_LEFT
 #endif

 #ifdef BM_LEG_RIGHT
 #undef BM_LEG_RIGHT
 #endif

 #ifdef BM_LEG_STRENGTH_INDEX
 #undef BM_LEG_STRENGTH_INDEX
 #endif

 #ifdef BM_LEG_MUSCLES_BOTH
 #undef BM_LEG_MUSCLES_BOTH
 #endif

 #ifdef BM_LEG_MUSCLES_LEFT
 #undef BM_LEG_MUSCLES_LEFT
 #endif

 #ifdef BM_LEG_MUSCLES_RIGHT
 #undef BM_LEG_MUSCLES_RIGHT
 #endif

 #ifdef BM_FOOT_MUSCLES_BOTH
 #undef BM_FOOT_MUSCLES_BOTH
 #endif

 #ifdef BM_FOOT_MUSCLES_LEFT
 #undef BM_FOOT_MUSCLES_LEFT
 #endif

 #ifdef BM_FOOT_MUSCLES_RIGHT
 #undef BM_FOOT_MUSCLES_RIGHT
 #endif

 #ifdef BM_TRUNK_DATASET
 #undef BM_TRUNK_DATASET
 #endif

 #ifdef BM_TRUNK_STRENGTH_INDEX
 #undef BM_TRUNK_STRENGTH_INDEX
 #endif

 #ifdef BM_TRUNK_EXPERIMENTAL_RECTUS_ABDOMINIS
 #undef BM_TRUNK_EXPERIMENTAL_RECTUS_ABDOMINIS
 #endif

 #ifdef BM_TRUNK_EXPERIMENTAL_FLOATINGRIBS_KINETICS
 #undef BM_TRUNK_EXPERIMENTAL_FLOATINGRIBS_KINETICS
 #endif

 #ifdef BM_TRUNK_EXPERIMENTAL_RIBCAGE_REACTION
 #undef BM_TRUNK_EXPERIMENTAL_RIBCAGE_REACTION
 #endif

 #ifdef BM_TRUNK_THORACIC_MODEL
 #undef BM_TRUNK_THORACIC_MODEL
 #endif

 #ifdef BM_TRUNK_CAVITY_MODEL
 #undef BM_TRUNK_CAVITY_MODEL
 #endif

 #ifdef BM_EXPERIMENTAL_ERECTORSPINAE_VIANODES
 #undef BM_EXPERIMENTAL_ERECTORSPINAE_VIANODES
 #endif

 #ifdef BM_TRUNK_DIAGPHRAM_FIXED_POSITION
 #undef BM_TRUNK_DIAGPHRAM_FIXED_POSITION
 #endif

 #ifdef BM_TRUNK_THORACIC_STERNUM_TOPOLOGY
 #undef BM_TRUNK_THORACIC_STERNUM_TOPOLOGY
 #endif

 #ifdef BM_TRUNK_MUSCLES
 #undef BM_TRUNK_MUSCLES
 #endif

 #ifdef BM_TRUNK_CERVICAL_MUSCLES
 #undef BM_TRUNK_CERVICAL_MUSCLES
 #endif

 #ifdef BM_TRUNK_DISC_STIFNESS
 #undef BM_TRUNK_DISC_STIFNESS
 #endif

 #ifdef BM_TRUNK_LUMBAR_DISC_STIFNESS
 #undef BM_TRUNK_LUMBAR_DISC_STIFNESS
 #endif

 #ifdef BM_TRUNK_CERVICAL_DISC_STIFNESS
 #undef BM_TRUNK_CERVICAL_DISC_STIFNESS
 #endif

 #ifdef BM_TRUNK_DISC_STIFFNESS
 #undef BM_TRUNK_DISC_STIFFNESS
 #endif

 #ifdef BM_TRUNK_LUMBAR_DISC_STIFFNESS
 #undef BM_TRUNK_LUMBAR_DISC_STIFFNESS
 #endif

 #ifdef BM_TRUNK_THORACIC_DISC_STIFFNESS
 #undef BM_TRUNK_THORACIC_DISC_STIFFNESS
 #endif

 #ifdef BM_TRUNK_CERVICAL_DISC_STIFFNESS
 #undef BM_TRUNK_CERVICAL_DISC_STIFFNESS
 #endif

 #ifdef BM_TRUNK_RHYTHM
 #undef BM_TRUNK_RHYTHM
 #endif

 #ifdef BM_TRUNK_LUMBAR_RHYTHM
 #undef BM_TRUNK_LUMBAR_RHYTHM
 #endif

 #ifdef BM_TRUNK_THORACIC_RHYTHM
 #undef BM_TRUNK_THORACIC_RHYTHM
 #endif

 #ifdef BM_TRUNK_CERVICAL_RHYTHM
 #undef BM_TRUNK_CERVICAL_RHYTHM
 #endif

 #ifdef BM_TRUNK_CERVICAL_THORACIC_LINK
 #undef BM_TRUNK_CERVICAL_THORACIC_LINK
 #endif

 #ifdef BM_TRUNK_LUMBAR_THORACIC_LINK
 #undef BM_TRUNK_LUMBAR_THORACIC_LINK
 #endif

 #ifdef BM_TRUNK_LIGAMENTS
 #undef BM_TRUNK_LIGAMENTS
 #endif

 #ifdef BM_TRUNK_CERVICAL_LIGAMENTS
 #undef BM_TRUNK_CERVICAL_LIGAMENTS
 #endif

 #ifdef BM_TRUNK_THORACIC_LIGAMENTS
 #undef BM_TRUNK_THORACIC_LIGAMENTS
 #endif

 #ifdef BM_TRUNK_LUMBAR_LIGAMENTS
 #undef BM_TRUNK_LUMBAR_LIGAMENTS
 #endif

 #ifdef BM_ARM_STRENGTH_INDEX
 #undef BM_ARM_STRENGTH_INDEX
 #endif

 #ifdef BM_ARM_LEFT
 #undef BM_ARM_LEFT
 #endif

 #ifdef BM_ARM_DETAIL_HAND_LEFT
 #undef BM_ARM_DETAIL_HAND_LEFT
 #endif

 #ifdef BM_ARM_SHOULDER_RHYTHM_LEFT
 #undef BM_ARM_SHOULDER_RHYTHM_LEFT
 #endif

 #ifdef BM_ARM_RIGHT
 #undef BM_ARM_RIGHT
 #endif

 #ifdef BM_ARM_DETAIL_HAND_RIGHT
 #undef BM_ARM_DETAIL_HAND_RIGHT
 #endif

 #ifdef BM_ARM_SHOULDER_RHYTHM_RIGHT
 #undef BM_ARM_SHOULDER_RHYTHM_RIGHT
 #endif

 #ifdef BM_ARM_SHOULDER_RHYTHM
 #undef BM_ARM_SHOULDER_RHYTHM
 #endif

 #ifdef BM_ARM_CLAVICULA_ROTATION_RHYTHM
 #undef BM_ARM_CLAVICULA_ROTATION_RHYTHM
 #endif

 #ifdef BM_ARM_DETAILED_HAND
 #undef BM_ARM_DETAILED_HAND
 #endif

 #ifdef BM_ARM_DELTOID_WRAPPING
 #undef BM_ARM_DELTOID_WRAPPING
 #endif

 #ifdef BM_ARM_MUSCLES_BOTH
 #undef BM_ARM_MUSCLES_BOTH
 #endif

 #ifdef BM_ARM_MUSCLES_LEFT
 #undef BM_ARM_MUSCLES_LEFT
 #endif

 #ifdef BM_ARM_MUSCLES_RIGHT
 #undef BM_ARM_MUSCLES_RIGHT
 #endif

 #ifdef BM_PELVIS_DISPLAY
 #undef BM_PELVIS_DISPLAY
 #endif

 #ifdef BM_MANNEQUIN_DRIVER_DEFAULT
 #undef BM_MANNEQUIN_DRIVER_DEFAULT
 #endif

 #ifdef BM_MANNEQUIN_DRIVER_WEAK_SWITCH
 #undef BM_MANNEQUIN_DRIVER_WEAK_SWITCH
 #endif

 #ifdef BM_LEG_TRUNK_INTERFACE
 #undef BM_LEG_TRUNK_INTERFACE
 #endif

 #ifdef BM_CALIBRATION_TYPE
 #undef BM_CALIBRATION_TYPE
 #endif

 #ifdef BM_MANNEQUIN_DRIVER_PELVIS_POS_X
 #undef BM_MANNEQUIN_DRIVER_PELVIS_POS_X
 #endif

 #ifdef BM_MANNEQUIN_DRIVER_PELVIS_POS_Y
 #undef BM_MANNEQUIN_DRIVER_PELVIS_POS_Y
 #endif

 #ifdef BM_MANNEQUIN_DRIVER_PELVIS_POS_Z
 #undef BM_MANNEQUIN_DRIVER_PELVIS_POS_Z
 #endif

 #ifdef BM_MANNEQUIN_DRIVER_PELVIS_ROT_Z
 #undef BM_MANNEQUIN_DRIVER_PELVIS_ROT_Z
 #endif

 #ifdef BM_MANNEQUIN_DRIVER_PELVIS_ROT_Y
 #undef BM_MANNEQUIN_DRIVER_PELVIS_ROT_Y
 #endif

 #ifdef BM_MANNEQUIN_DRIVER_PELVIS_ROT_X
 #undef BM_MANNEQUIN_DRIVER_PELVIS_ROT_X
 #endif

 #ifdef BM_MANNEQUIN_DRIVER_NECK
 #undef BM_MANNEQUIN_DRIVER_NECK
 #endif

 #ifdef BM_MANNEQUIN_DRIVER_SKULL_THORAX_FLEXION
 #undef BM_MANNEQUIN_DRIVER_SKULL_THORAX_FLEXION
 #endif

 #ifdef BM_MANNEQUIN_DRIVER_SKULL_THORAX_LATERALBENDING
 #undef BM_MANNEQUIN_DRIVER_SKULL_THORAX_LATERALBENDING
 #endif

 #ifdef BM_MANNEQUIN_DRIVER_SKULL_THORAX_ROTATION
 #undef BM_MANNEQUIN_DRIVER_SKULL_THORAX_ROTATION
 #endif

 #ifdef BM_MANNEQUIN_DRIVER_PELVIS_THORAX_LATERAL_BENDING
 #undef BM_MANNEQUIN_DRIVER_PELVIS_THORAX_LATERAL_BENDING
 #endif

 #ifdef BM_MANNEQUIN_DRIVER_PELVIS_THORAX_ROTATION
 #undef BM_MANNEQUIN_DRIVER_PELVIS_THORAX_ROTATION
 #endif

 #ifdef BM_MANNEQUIN_DRIVER_PELVIS_THORAX_EXTENSION
 #undef BM_MANNEQUIN_DRIVER_PELVIS_THORAX_EXTENSION
 #endif

 #ifdef BM_MANNEQUIN_DRIVER_STERNO_CLAVICULAR_RIGHT
 #undef BM_MANNEQUIN_DRIVER_STERNO_CLAVICULAR_RIGHT
 #endif

 #ifdef BM_MANNEQUIN_DRIVER_STERNOCLAVICULAR_PROTRACTION_RIGHT
 #undef BM_MANNEQUIN_DRIVER_STERNOCLAVICULAR_PROTRACTION_RIGHT
 #endif

 #ifdef BM_MANNEQUIN_DRIVER_STERNOCLAVICULAR_ELEVATION_RIGHT
 #undef BM_MANNEQUIN_DRIVER_STERNOCLAVICULAR_ELEVATION_RIGHT
 #endif

 #ifdef BM_MANNEQUIN_DRIVER_STERNOCLAVICULAR_AXIAL_ROTATION_RIGHT
 #undef BM_MANNEQUIN_DRIVER_STERNOCLAVICULAR_AXIAL_ROTATION_RIGHT
 #endif

 #ifdef BM_MANNEQUIN_DRIVER_GLENOHUMERAL_ABDUCTION_RIGHT
 #undef BM_MANNEQUIN_DRIVER_GLENOHUMERAL_ABDUCTION_RIGHT
 #endif

 #ifdef BM_MANNEQUIN_DRIVER_GLENOHUMERAL_FLEXION_RIGHT
 #undef BM_MANNEQUIN_DRIVER_GLENOHUMERAL_FLEXION_RIGHT
 #endif

 #ifdef BM_MANNEQUIN_DRIVER_GLENOHUMERAL_EXTERNAL_ROTATION_RIGHT
 #undef BM_MANNEQUIN_DRIVER_GLENOHUMERAL_EXTERNAL_ROTATION_RIGHT
 #endif

 #ifdef BM_MANNEQUIN_DRIVER_ELBOW_FLEXION_RIGHT
 #undef BM_MANNEQUIN_DRIVER_ELBOW_FLEXION_RIGHT
 #endif

 #ifdef BM_MANNEQUIN_DRIVER_ELBOW_PRONATION_RIGHT
 #undef BM_MANNEQUIN_DRIVER_ELBOW_PRONATION_RIGHT
 #endif

 #ifdef BM_MANNEQUIN_DRIVER_WRIST_FLEXION_RIGHT
 #undef BM_MANNEQUIN_DRIVER_WRIST_FLEXION_RIGHT
 #endif

 #ifdef BM_MANNEQUIN_DRIVER_WRIST_ABDUCTION_RIGHT
 #undef BM_MANNEQUIN_DRIVER_WRIST_ABDUCTION_RIGHT
 #endif

 #ifdef BM_MANNEQUIN_DRIVER_HAND_RIGHT
 #undef BM_MANNEQUIN_DRIVER_HAND_RIGHT
 #endif

 #ifdef BM_MANNEQUIN_DRIVER_STERNO_CLAVICULAR_LEFT
 #undef BM_MANNEQUIN_DRIVER_STERNO_CLAVICULAR_LEFT
 #endif

 #ifdef BM_MANNEQUIN_DRIVER_STERNOCLAVICULAR_PROTRACTION_LEFT
 #undef BM_MANNEQUIN_DRIVER_STERNOCLAVICULAR_PROTRACTION_LEFT
 #endif

 #ifdef BM_MANNEQUIN_DRIVER_STERNOCLAVICULAR_ELEVATION_LEFT
 #undef BM_MANNEQUIN_DRIVER_STERNOCLAVICULAR_ELEVATION_LEFT
 #endif

 #ifdef BM_MANNEQUIN_DRIVER_STERNOCLAVICULAR_AXIAL_ROTATION_LEFT
 #undef BM_MANNEQUIN_DRIVER_STERNOCLAVICULAR_AXIAL_ROTATION_LEFT
 #endif

 #ifdef BM_MANNEQUIN_DRIVER_GLENOHUMERAL_ABDUCTION_LEFT
 #undef BM_MANNEQUIN_DRIVER_GLENOHUMERAL_ABDUCTION_LEFT
 #endif

 #ifdef BM_MANNEQUIN_DRIVER_GLENOHUMERAL_FLEXION_LEFT
 #undef BM_MANNEQUIN_DRIVER_GLENOHUMERAL_FLEXION_LEFT
 #endif

 #ifdef BM_MANNEQUIN_DRIVER_GLENOHUMERAL_EXTERNAL_ROTATION_LEFT
 #undef BM_MANNEQUIN_DRIVER_GLENOHUMERAL_EXTERNAL_ROTATION_LEFT
 #endif

 #ifdef BM_MANNEQUIN_DRIVER_ELBOW_FLEXION_LEFT
 #undef BM_MANNEQUIN_DRIVER_ELBOW_FLEXION_LEFT
 #endif

 #ifdef BM_MANNEQUIN_DRIVER_ELBOW_PRONATION_LEFT
 #undef BM_MANNEQUIN_DRIVER_ELBOW_PRONATION_LEFT
 #endif

 #ifdef BM_MANNEQUIN_DRIVER_WRIST_FLEXION_LEFT
 #undef BM_MANNEQUIN_DRIVER_WRIST_FLEXION_LEFT
 #endif

 #ifdef BM_MANNEQUIN_DRIVER_WRIST_ABDUCTION_LEFT
 #undef BM_MANNEQUIN_DRIVER_WRIST_ABDUCTION_LEFT
 #endif

 #ifdef BM_MANNEQUIN_DRIVER_HAND_LEFT
 #undef BM_MANNEQUIN_DRIVER_HAND_LEFT
 #endif

 #ifdef BM_MANNEQUIN_DRIVER_HIP_FLEXION_RIGHT
 #undef BM_MANNEQUIN_DRIVER_HIP_FLEXION_RIGHT
 #endif

 #ifdef BM_MANNEQUIN_DRIVER_HIP_EXTERNAL_ROTATION_RIGHT
 #undef BM_MANNEQUIN_DRIVER_HIP_EXTERNAL_ROTATION_RIGHT
 #endif

 #ifdef BM_MANNEQUIN_DRIVER_HIP_ABDUCTION_RIGHT
 #undef BM_MANNEQUIN_DRIVER_HIP_ABDUCTION_RIGHT
 #endif

 #ifdef BM_MANNEQUIN_DRIVER_KNEE_FLEXION_RIGHT
 #undef BM_MANNEQUIN_DRIVER_KNEE_FLEXION_RIGHT
 #endif

 #ifdef BM_MANNEQUIN_DRIVER_ANKLE_FLEXION_RIGHT
 #undef BM_MANNEQUIN_DRIVER_ANKLE_FLEXION_RIGHT
 #endif

 #ifdef BM_MANNEQUIN_DRIVER_ANKLE_EVERSION_RIGHT
 #undef BM_MANNEQUIN_DRIVER_ANKLE_EVERSION_RIGHT
 #endif

 #ifdef BM_MANNEQUIN_DRIVER_ANKLE_SUBTALAR_EVERSION_RIGHT
 #undef BM_MANNEQUIN_DRIVER_ANKLE_SUBTALAR_EVERSION_RIGHT
 #endif

 #ifdef BM_MANNEQUIN_DRIVER_TOES_FLEXION_RIGHT
 #undef BM_MANNEQUIN_DRIVER_TOES_FLEXION_RIGHT
 #endif

 #ifdef BM_MANNEQUIN_DRIVER_HIP_FLEXION_LEFT
 #undef BM_MANNEQUIN_DRIVER_HIP_FLEXION_LEFT
 #endif

 #ifdef BM_MANNEQUIN_DRIVER_HIP_EXTERNAL_ROTATION_LEFT
 #undef BM_MANNEQUIN_DRIVER_HIP_EXTERNAL_ROTATION_LEFT
 #endif

 #ifdef BM_MANNEQUIN_DRIVER_HIP_ABDUCTION_LEFT
 #undef BM_MANNEQUIN_DRIVER_HIP_ABDUCTION_LEFT
 #endif

 #ifdef BM_MANNEQUIN_DRIVER_KNEE_FLEXION_LEFT
 #undef BM_MANNEQUIN_DRIVER_KNEE_FLEXION_LEFT
 #endif

 #ifdef BM_MANNEQUIN_DRIVER_ANKLE_FLEXION_LEFT
 #undef BM_MANNEQUIN_DRIVER_ANKLE_FLEXION_LEFT
 #endif

 #ifdef BM_MANNEQUIN_DRIVER_ANKLE_EVERSION_LEFT
 #undef BM_MANNEQUIN_DRIVER_ANKLE_EVERSION_LEFT
 #endif

 #ifdef BM_MANNEQUIN_DRIVER_ANKLE_SUBTALAR_EVERSION_LEFT
 #undef BM_MANNEQUIN_DRIVER_ANKLE_SUBTALAR_EVERSION_LEFT
 #endif

 #ifdef BM_MANNEQUIN_DRIVER_TOES_FLEXION_LEFT
 #undef BM_MANNEQUIN_DRIVER_TOES_FLEXION_LEFT
 #endif

 #ifdef BM_JOINT_TYPE_HIP_RIGHT
 #undef BM_JOINT_TYPE_HIP_RIGHT
 #endif

 #ifdef BM_JOINT_TYPE_HIP_LEFT
 #undef BM_JOINT_TYPE_HIP_LEFT
 #endif

 #ifdef BM_JOINT_TYPE_KNEE_RIGHT
 #undef BM_JOINT_TYPE_KNEE_RIGHT
 #endif

 #ifdef BM_JOINT_TYPE_KNEE_LEFT
 #undef BM_JOINT_TYPE_KNEE_LEFT
 #endif

 #ifdef BM_JOINT_TYPE_PATELLOFEMORAL_RIGHT
 #undef BM_JOINT_TYPE_PATELLOFEMORAL_RIGHT
 #endif

 #ifdef BM_JOINT_TYPE_PATELLOFEMORAL_LEFT
 #undef BM_JOINT_TYPE_PATELLOFEMORAL_LEFT
 #endif

 #ifdef BM_JOINT_TYPE_ANKLE_RIGHT
 #undef BM_JOINT_TYPE_ANKLE_RIGHT
 #endif

 #ifdef BM_JOINT_TYPE_ANKLE_LEFT
 #undef BM_JOINT_TYPE_ANKLE_LEFT
 #endif

 #ifdef BM_JOINT_TYPE_SUBTALAR_RIGHT
 #undef BM_JOINT_TYPE_SUBTALAR_RIGHT
 #endif

 #ifdef BM_JOINT_TYPE_SUBTALAR_LEFT
 #undef BM_JOINT_TYPE_SUBTALAR_LEFT
 #endif

 #ifdef BM_JOINT_TYPE_PATELLATENDON_RIGHT
 #undef BM_JOINT_TYPE_PATELLATENDON_RIGHT
 #endif

 #ifdef BM_JOINT_TYPE_PATELLATENDON_LEFT
 #undef BM_JOINT_TYPE_PATELLATENDON_LEFT
 #endif

 #ifdef BM_GLOBAL_REFERENCE_FRAME_SWITCH
 #undef BM_GLOBAL_REFERENCE_FRAME_SWITCH
 #endif

 #ifdef BM_GLOBAL_REFERENCE_FRAME
 #undef BM_GLOBAL_REFERENCE_FRAME
 #endif

 #ifdef BM_COMPATIBILITY_24_TRUNK_SELECTED_OUTPUTS_JRF
 #undef BM_COMPATIBILITY_24_TRUNK_SELECTED_OUTPUTS_JRF
 #endif

 #ifdef BM_COMPATIBILITY_MUSCLE_STRUCTURE
 #undef BM_COMPATIBILITY_MUSCLE_STRUCTURE
 #endif

 #ifdef BM_COMPATIBILITY_BODYMODEL_STRUCTURE
 #undef BM_COMPATIBILITY_BODYMODEL_STRUCTURE
 #endif

 #ifdef _BM_PELVIS_DISPLAY_
 #undef _BM_PELVIS_DISPLAY_
 #endif
