  // **********************************************************
  //  This is a reference to where the colors for the model are located
  //  The model will need the following quantities
  //  AnyVec3 Nodes
  //  AnyVec3 Segments
  //  **********************************************************
  AnyFolder &ColorRef = Main.DrawSettings.Colors;

  // **********************************************************
  //This is a reference to the specific muscle stress for the muscles in the leg
  // **********************************************************
  AnyFolder &StrengthRef = ...StrengthParameters;
