ModelParameters = {

  Shank = {
    AnyVec3 LigTibioTalarPosterior = {0.005, 0.006, -0.025}*.TF';
    AnyVec3 LigTibioTalarAnterior = {0.026, 0.008, -0.021}*.TF';
    AnyVec3 LigTibioCalcaneal = {0.018, 0.002, -0.027}*.TF';
    AnyVec3 LigTibioNavicular = {0.026, 0.004, -0.021}*.TF';
    AnyVec3 LigTaloFibularPosterior = {-0.0199,  -0.0085,   0.021}*.TF';
    AnyVec3 LigTaloFibularAnterior = {-0.00,  -0.004,   0.0255}*.TF';
    AnyVec3 LigCalcaneoFibular = {-0.013,  -0.0126,   0.0240}*.TF';
    AnyVec3 PeroneusTertius1Node = { -0.01402+0.005,0.09700-0.03,0.02065-0.005}*.TF';
    AnyVec3 PeroneusTertius2Node = { -0.01402+0.01,0.09700-0.05,0.02065-0.005 }*.TF';
    AnyVec3 PeroneusTertius3Node = { -0.01402+0.01,0.09700-0.04,0.02065-0.005 }*.TF';
    AnyVec3 PeroneusTertiusViaNode1 = { 0.01858+0.008,0.00757+0.0,0.01443+0.01}*.TF';
  };

  AnyFolder FootGM = {

    AnyVar MassStandard = 1.30; // kg Klein Horsman dataset Mass of Foot
    AnyVar LengthStandard = 0.2353423; ///< Back of heel (tuber calcanei) to second toe tip.
    AnyVar WidthStandard = 0.07649351; ///< MPjnt1 center to MPjnt5 center.
    AnyVar HeightStandard = 0.07116012; ///< Vertical from base of heel (medial process) to ankle joint.
    AnyVar LengthStandard_Landmark = vnorm(.FootGM.DistalPhalange1.BigToeNode-.FootGM.Calcaneus.HeelNode); ///< Landmark based definition as in TLEM foot.
    AnyVar HeightStandard_Landmark = vnorm(.FootGM.Calcaneus.SubTalarJoint-.FootGM.Calcaneus.HeelContactNodeLow); ///< Landmark based definition as in TLEM foot
    AnyVar WidthStandard_Landmark = vnorm(.FootGM.ProximalPhalange5.ToeLateralContactNode-.FootGM.ProximalPhalange1.ToeMedialContactNode); ///< Landmark based definition as in TLEM foot
    AnyVar Density = 1000;
    AnyVar HeelHeight=0.05;  //measured from floor to ankle joint


    AnyVec3 LateralMalleolus = {0.0429171, 0.0815658, 0.032548}*.TF'; // LatMal - estimated from skin
    AnyVec3 MedialMalleolus = {0.0604137, 0.063059, -0.040193}*.TF'; // MedMal - estimated from skin
    AnyVec3 Metatarsal1PlantarNode = {-0.01293344, -0.05830658, -0.01899186}*.TF';
    AnyVec3 Metatarsal2PlantarNode = {-0.007463424, -0.06155794, 0.01020253}*.TF';
    AnyVec3 Metatarsal5PlantarNode = {-0.01524367, -0.03055783, 0.04927201}*.TF';
    AnyVec3 HeelPlantarNode = {-0.01923199, 0.08287545, -0.005511518}*.TF';

    // Model parameters from TLEM 2 dataset transformed to GM Foot segmental frame.
    AnyVec3 SubTalarJoint = ....Segments.Foot.InterfaceMorphingDef.IM_Foot_TLEM_To_GM(.Foot.SubTalarJoint);
    AnyVec3 SubTalarJointAxisNode = ....Segments.Foot.InterfaceMorphingDef.IM_Foot_TLEM_To_GM(.Foot.SubTalarJointAxisNode);
    AnyVec3 AnkleJoint = ....Segments.Foot.InterfaceMorphingDef.IM_Foot_TLEM_To_GM(.Talus.AnkleJoint);
    AnyVec3 LateralControlPoint = ....Segments.Foot.InterfaceMorphingDef.IM_Foot_TLEM_To_GM(.Talus.LateralControlPoint);
    AnyVec3 MedialControlPoint = ....Segments.Foot.InterfaceMorphingDef.IM_Foot_TLEM_To_GM(.Talus.MedialControlPoint);

    AnyVec3 HeelNode = ....Segments.Foot.InterfaceMorphingDef.IM_Foot_TLEM_To_GM(.Foot.HeelNode);
    AnyVec3 HeelContactNodeLow = ....Segments.Foot.InterfaceMorphingDef.IM_Foot_TLEM_To_GM(.Foot.HeelContactNodeLow);
    AnyVec3 HeelContactNodeLateral = ....Segments.Foot.InterfaceMorphingDef.IM_Foot_TLEM_To_GM(.Foot.HeelContactNodeLow + {0.02, 0.0, ....Sign*0.015});
    AnyVec3 HeelContactNodeMedial = ....Segments.Foot.InterfaceMorphingDef.IM_Foot_TLEM_To_GM(.Foot.HeelContactNodeLow + {0.02, 0.0, ....Sign*-0.015});
    AnyVec3 ToeMedialContactNode = ....Segments.Foot.InterfaceMorphingDef.IM_Foot_TLEM_To_GM(.Foot.ToeMedialContactNode);
    AnyVec3 ToeLateralContactNode = ....Segments.Foot.InterfaceMorphingDef.IM_Foot_TLEM_To_GM(.Foot.ToeLateralContactNode);
    AnyVec3 Metatarsal1ContactNode = ....Segments.Foot.InterfaceMorphingDef.IM_Foot_TLEM_To_GM(.Foot.Metatarsal1ContactNode);
    AnyVec3 Metatarsal2ContactNode = ....Segments.Foot.InterfaceMorphingDef.IM_Foot_TLEM_To_GM(.Foot.Metatarsal2ContactNode);
    AnyVec3 Metatarsal5ContactNode = ....Segments.Foot.InterfaceMorphingDef.IM_Foot_TLEM_To_GM(.Foot.Metatarsal5ContactNode);

    AnyFolder Talus = {

      AnyVar MassStandard = .MassStandard*0.20286341; //calculated from volume ratio
      AnyVar Density = .Density;
      AnyVar LengthStandard = 0.133*.LengthStandard;

      AnyVec3 LateralMalleolus = .LateralMalleolus;
      AnyVec3 MedialMalleolus = .MedialMalleolus;
      AnyVec3 Metatarsal1PlantarNode = .Metatarsal1PlantarNode;
      AnyVec3 Metatarsal2PlantarNode = .Metatarsal2PlantarNode;
      AnyVec3 Metatarsal5PlantarNode = .Metatarsal5PlantarNode;
      AnyVec3 HeelPlantarNode = .HeelPlantarNode;
      AnyVec3 SubTalarJoint = .SubTalarJoint;
      AnyVec3 SubTalarJointAxisNode = .SubTalarJointAxisNode;
      AnyVec3 AnkleJoint = .AnkleJoint;
      AnyVec3 LateralControlPoint = .LateralControlPoint;
      AnyVec3 MedialControlPoint = .MedialControlPoint;

      AnyVec3 LigTibioTalarPosterior = {0.04580961, 0.08192314, -0.01961863}*..TF';
      AnyVec3 LigTibioTalarAnterior = {0.04588817, 0.0290883, -0.01547349}*..TF';
      AnyVec3 LigTaloFibularPosterior = {0.04148086, 0.08878258, 0.002125482}*..TF';
      AnyVec3 LigTaloFibularAnterior = {0.0491532, 0.03202142, 0.010479483}*..TF';
      AnyVec3 FlexorHallucisLongusViaNode1 = {0.02368694+0.0125, 0.0760648+0.01, (-0.01597639-0.002)}*..TF';
    }; // Talus

    AnyFolder Calcaneus = {

      AnyVar MassStandard = .MassStandard*0.360683468;

      AnyVec3 SubTalarJoint = .SubTalarJoint;
      AnyVec3 SubTalarJointAxisNode = .SubTalarJointAxisNode;
      AnyVec3 SubTalarJointAxisRef = {-0.012, 0.105, 0.015}*..TF';
      AnyVec3 HeelNode = .HeelNode; //Taken from TLEM2 dataset
      AnyVec3 HeelPlantarNode = .HeelPlantarNode;
      AnyVec3 TuberCalcanei = {-0.001, 0.113, -0.003}*..TF';
      AnyVec3 MedialProcess = {-0.02043697, 0.08772377, -0.005106899}*..TF';
      AnyVec3 HeelFlatNode = {-0.02043697, 0.09172377, -0.005106899}*..TF';
      AnyVec3 HeelStrikeNode = {-0.01643697, 0.10272377, -0.005106899}*..TF';
      AnyVec3 HeelContactNodeLow = .HeelContactNodeLow;
      AnyVec3 HeelContactNodeLateral = .HeelContactNodeLateral;
      AnyVec3 HeelContactNodeMedial = .HeelContactNodeMedial;
      AnyVec3 SustentaculumTali = {0.02883537, 0.05635495, -0.0216453}*..TF';
      AnyVec3 CenterNode = {0.01294929, 0.08385631, 0.002736367}*..TF';
      AnyVec3 LongitudinalMedialArchNode = {-0.02006503, 0.08246424, -0.008728675}*..TF';
      AnyVec3 LongitudinalLateralArchNode = {-0.01604069, 0.08384896, 0.006851214}*..TF';
      //***********************
      //Muscles nodes
      //***********************
      // Muscle nodes from TLEM 2 dataset transformed to GM Foot segmental frame.
      AnyVec3 TendonCalcaneusNode = .....Segments.Foot.InterfaceMorphingDef.IM_Foot_TLEM_To_GM(..Foot.TendonCalcaneusNode);
      AnyVec3 TendonCalcaneusMedialisNode = .....Segments.Foot.InterfaceMorphingDef.IM_Foot_TLEM_To_GM(..Foot.TendonCalcaneusMedialisNode);
      AnyVec3 TendonCalcaneusLateralisNode = .....Segments.Foot.InterfaceMorphingDef.IM_Foot_TLEM_To_GM(..Foot.TendonCalcaneusLateralisNode);
      AnyVec3 GastrocnemiusLateralis1Node = .....Segments.Foot.InterfaceMorphingDef.IM_Foot_TLEM_To_GM(..Foot.GastrocnemiusLateralis1Node);
      AnyVec3 GastrocnemiusMedialis1Node =  .....Segments.Foot.InterfaceMorphingDef.IM_Foot_TLEM_To_GM(..Foot.GastrocnemiusMedialis1Node);
      AnyVec3 Plantaris1Node = .....Segments.Foot.InterfaceMorphingDef.IM_Foot_TLEM_To_GM(..Foot.Plantaris1Node);
      AnyVec3 SoleusMedialis1Node = .....Segments.Foot.InterfaceMorphingDef.IM_Foot_TLEM_To_GM(..Foot.SoleusMedialis1Node);
      AnyVec3 SoleusMedialis2Node = .....Segments.Foot.InterfaceMorphingDef.IM_Foot_TLEM_To_GM(..Foot.SoleusMedialis2Node);
      AnyVec3 SoleusMedialis3Node = .....Segments.Foot.InterfaceMorphingDef.IM_Foot_TLEM_To_GM(..Foot.SoleusMedialis3Node);
      AnyVec3 SoleusLateralis1Node = .....Segments.Foot.InterfaceMorphingDef.IM_Foot_TLEM_To_GM(..Foot.SoleusLateralis1Node);
      AnyVec3 SoleusLateralis2Node = .....Segments.Foot.InterfaceMorphingDef.IM_Foot_TLEM_To_GM(..Foot.SoleusLateralis2Node);
      AnyVec3 SoleusLateralis3Node = .....Segments.Foot.InterfaceMorphingDef.IM_Foot_TLEM_To_GM(..Foot.SoleusLateralis3Node);

      AnyVec3 TendonCalcaneusSuperiorNode = .....Segments.Foot.InterfaceMorphingDef.IM_Foot_TLEM_To_GM(..Foot.TendonCalcaneusSuperiorNode);
      AnyVec3 TendonCalcaneusMedialisSuperiorNode = .....Segments.Foot.InterfaceMorphingDef.IM_Foot_TLEM_To_GM(..Foot.TendonCalcaneusMedialisSuperiorNode);
      AnyVec3 TendonCalcaneusLateralisSuperiorNode = .....Segments.Foot.InterfaceMorphingDef.IM_Foot_TLEM_To_GM(..Foot.TendonCalcaneusLateralisSuperiorNode);
      AnyVec3 GastrocnemiusLateralis1SuperiorNode = .....Segments.Foot.InterfaceMorphingDef.IM_Foot_TLEM_To_GM(..Foot.GastrocnemiusLateralis1SuperiorNode);
      AnyVec3 GastrocnemiusMedialis1SuperiorNode = .....Segments.Foot.InterfaceMorphingDef.IM_Foot_TLEM_To_GM(..Foot. GastrocnemiusMedialis1SuperiorNode);
      AnyVec3 Plantaris1SuperiorNode = .....Segments.Foot.InterfaceMorphingDef.IM_Foot_TLEM_To_GM(..Foot.Plantaris1SuperiorNode);
      AnyVec3 SoleusMedialis1SuperiorNode = .....Segments.Foot.InterfaceMorphingDef.IM_Foot_TLEM_To_GM(..Foot.SoleusMedialis1SuperiorNode);
      AnyVec3 SoleusMedialis2SuperiorNode = .....Segments.Foot.InterfaceMorphingDef.IM_Foot_TLEM_To_GM(..Foot.SoleusMedialis2SuperiorNode);
      AnyVec3 SoleusMedialis3SuperiorNode = .....Segments.Foot.InterfaceMorphingDef.IM_Foot_TLEM_To_GM(..Foot.SoleusMedialis3SuperiorNode);
      AnyVec3 SoleusLateralis1SuperiorNode = .....Segments.Foot.InterfaceMorphingDef.IM_Foot_TLEM_To_GM(..Foot.SoleusLateralis1SuperiorNode);
      AnyVec3 SoleusLateralis2SuperiorNode = .....Segments.Foot.InterfaceMorphingDef.IM_Foot_TLEM_To_GM(..Foot.SoleusLateralis2SuperiorNode);
      AnyVec3 SoleusLateralis3SuperiorNode = .....Segments.Foot.InterfaceMorphingDef.IM_Foot_TLEM_To_GM(..Foot.SoleusLateralis3SuperiorNode);

      AnyVec3 FlexorHallucisLongusViaNode6 = {0.02368694+0.0, 0.0760648-0.005, (-0.01597639+0.00)}*..TF';
      AnyVec3 FlexorHallucisLongusViaNode7 = {0.02368694-0.01, 0.0760648-0.02, (-0.01597639+0.005)}*..TF';
      AnyVec3 FlexorHallucisLongusViaNode8 = {0.01211299, 0.04574652, -0.01602832}*..TF';
      AnyVec3 PeroneusBrevisViaNode3 = {0.03133927, 0.08328237, 0.02153673}*..TF';
      AnyVec3 PeroneusBrevisViaNode4 = {0.02350508, 0.07291825, 0.02593871}*..TF';
      AnyVec3 PeroneusLongusViaNode3 = {0.03133927, 0.08328237, 0.02153673}*..TF';
      AnyVec3 PeroneusLongusViaNode4 = {0.02350508, 0.07291825, 0.02593871}*..TF';
      AnyVec3 TibialisPosteriorLateralisViaNode8 = {0.04018413, 0.05800213, -0.02329967}*..TF';
      AnyVec3 TibialisPosteriorMedialisViaNode9 = {0.04018413, 0.05800213, -0.02329967}*..TF';
      AnyVec3 TibialisPosteriorViaNode10 = {0.02982681, 0.04620523, -0.02078786}*..TF';
      AnyVec3 TibialisPosteriorViaNode11 = {0.01982681, 0.03420523, -0.01828786}*..TF';
      AnyVec3 FlexorDigitorumLongusViaNode7 = {0.0294201, 0.0560923, -0.0246059}*..TF';
      AnyVec3 PeroneusTertiusViaNode3 = {0.0408379558, 0.03140739, 0.03076334}*..TF';
      AnyVec3 ExtensorDigitorumLongusViaNode5 = {0.05546308, 0.0229197, 0.01298886}*..TF';
      AnyVec3 ExtensorDigitorumLongusViaNode5Bis = {0.05346308, 0.0200197, 0.01348886}*..TF';
      AnyVec3 ExtensorHallucisLongusViaNode7 = {0.05312341, 0.007704016, -0.001000253} *..TF';
      //***********************
      //Ligaments nodes
      //***********************
      AnyVec3 LigAponeurosisPlantaris = {-0.02043697, 0.08772377, -0.005106899}*..TF';
      AnyVec3 LigPlantareLongum = {-0.01080559, 0.07788986, 0.007302227}*..TF';
      AnyVec3 LigCalcaneoFibular = {0.0195808, 0.08178937, 0.02061121}*..TF';
      AnyVec3 LigCalcaneoNavicularPlantar1 = {0.02675, 0.0499, -0.017598}*..TF';
      AnyVec3 LigCalcaneoNavicularPlantar2 = {0.02407, 0.0501, -0.01756}*..TF';
      AnyVec3 LigCalcaneoNavicularPlantar3 = {0.0246272,0.0479734,-0.0141797}*..TF';
      AnyVec3 LigCalcaneoNavicularPlantar4 = {0.0245362,0.0466405,-0.0114098}*..TF';
      AnyVec3 LigCalcaneoNavicularPlantar5 = {0.0246202,0.0453331,-0.00826111}*..TF';
      AnyVec3 LigCalcaneoNavicularPlantar6 = {0.0249016,0.0444283,-0.00519779}*..TF';
      AnyVec3 LigCalcaneoCuboidPlantar1 = {0.001287836, 0.05222258, 0.01243312}*..TF';
      AnyVec3 LigCalcaneoCuboidPlantar2 = {0.005218107, 0.05034289, 0.00337628}*..TF';
    }; // Calcaneus

    AnyFolder Cuboid = {

      AnyVar MassStandard = .MassStandard*0.071723351;

      AnyVec3 CalcaneoCuboidJoint = {0.01998136, 0.04740945, 0.01530706}*..TF';
      AnyVec3 RefDist = {0.0169189, 0.006236519, 0.02435441}*..TF';
      AnyVec3 RefProx = {0.01501178, 0.04133683, 0.02271292}*..TF';
      AnyVec3 TubOsCub = {-0.002, 0.033, 0.021}*..TF';
      AnyVec3 LongitudinalLateralArchNode = {-0.00105371, 0.03435358, 0.02918606}*..TF';
      //***********************
      //Muscles nodes
      //***********************
      AnyVec3 PeroneusLongusViaNode5 = {-0.001156988, 0.0307862, 0.03085269}*..TF';
      AnyVec3 PeroneusLongusViaNode6 = {0.0004379558, 0.01480739, 0.01776334}*..TF';
      AnyVec3 PeroneusLongusViaNode7 = {0.0008379558, 0.01140739, 0.01476334}*..TF';
      AnyVec3 TibialisPosteriorNode = {0.0004530015, 0.02105248, 0.01581421}*..TF';
      //***********************
      //Ligaments nodes
      //***********************
      AnyVec3 LigPlantareLongumMtII = {-0.0004846412, 0.01922924, 0.01212822}*..TF';
      AnyVec3 LigPlantareLongumMtIII = {-0.002242119, 0.02497191, 0.01706126}*..TF';
      AnyVec3 LigPlantareLongumMtIV = {-0.002894016, 0.029622, 0.02131046}*..TF';
      AnyVec3 LigPlantareLongumMtV = {-0.003003175, 0.03331616, 0.02554463}*..TF';
      AnyVec3 LigCalcaneoCuboidPlantar1 = {0.0021128067, 0.03313358, 0.01663392}*..TF';
      AnyVec3 LigCalcaneoCuboidPlantar2 = {0.007521058, 0.02705763, 0.010644199}*..TF';
    }; // Cuboid

    AnyFolder Navicular = {

      AnyVar MassStandard = .MassStandard*0.048581127;

      AnyVec3 TaloNavicularJoint = {0.0412847, 0.0394277, -0.00418293}*..TF';
      AnyVec3 RefDist = {0.03207851, 0.006374134, -0.00}*..TF';
      AnyVec3 RefProx = {0.04078921, 0.03050495, -0.004127318}*..TF';
      AnyVec3 LongitudinalMedialArchNode = {0.01951499, 0.02558564, -0.0119657}*..TF';
      //***********************
      //Muscles nodes
      //***********************
      AnyVec3 TibialisAnteriorViaNode2 = {0.04531562, 0.007037465, -0.01684052}*..TF';
      AnyVec3 TibialisPosteriorNode = {0.02541901, 0.02378803, -0.02439365}*..TF';
      AnyVec3 TibialisPosteriorViaNode11 = {0.01982681, 0.03420523, -0.01828786}*..TF';
      //***********************
      //Ligaments nodes
      //***********************
      AnyVec3 LigTibioNavicular = {0.03749775, 0.0215443, -0.02213777}*..TF';
      AnyVec3 LigCalcaneoNavicularPlantar1 = {0.0286, 0.02998, -0.02464}*..TF';
      AnyVec3 LigCalcaneoNavicularPlantar2 = {0.0256, 0.02888, -0.02468}*..TF';
      AnyVec3 LigCalcaneoNavicularPlantar3 = {0.0254785,0.0312751,-0.0175138}*..TF';
      AnyVec3 LigCalcaneoNavicularPlantar4 = {0.02459,0.0324901,-0.0126953}*..TF';
      AnyVec3 LigCalcaneoNavicularPlantar5 = { 0.0228703,0.0333343,-0.00746194}*..TF';
      AnyVec3 LigCalcaneoNavicularPlantar6 = { 0.022755,0.0341731,-0.00223565}*..TF';
      AnyVec3 ExtensorHallucisLongusViaNode7 = {0.05312341, 0.007704016, -0.001000253}*..TF';
    }; // Navicular

    AnyFolder MedialCuneiform = {

      AnyVar MassStandard = .MassStandard*0.048888141;

      AnyVec3 CuneiNaviJoint = {0.03425049, 0.02063769, -0.0120163}*..TF';
      AnyVec3 RefDist = {0.02021981, -0.01710036, -0.00764076}*..TF';
      AnyVec3 RefProx = {0.02274339, 0.01484567, -0.01290666}*..TF';
      AnyVec3 FDLSegNode = {0.006972241, 0.003908742, -0.01273537}*..TF';
      //***********************
      //Muscles nodes
      //***********************
      AnyVec3 ExtensorHallucisLongusViaNode8 = {0.03492677, -0.02143653, -0.00564653}*..TF';
      AnyVec3 TibialisAnteriorViaNode3 = {0.02531562, -0.004037465, -0.02284052}*..TF';
      AnyVec3 TibialisAnteriorNode = {0.003783489, -0.001798439, -0.01854955}*..TF';
      AnyVec3 PeroneusLongusNode = {0.005196392, -0.001617243, -0.003879015}*..TF';
      AnyVec3 TibialisPosteriorNode = {0.007535917, 0.0138324, -0.01333547}*..TF';
    }; // MedialCuneiform

    AnyFolder IntermediateCuneiform = {

      AnyVar MassStandard = .MassStandard*0.011344111;

      AnyVec3 CuneiNaviJoint = {0.03425049, 0.02163769, -0.00}*..TF';
      AnyVec3 RefDist = {0.02720337, -0.007425747, 0.004325873}*..TF';
      AnyVec3 RefProx = {0.02901805, 0.01426308, 0.003278877}*..TF';
      //***********************
      //Muscles nodes
      //***********************
      AnyVec3 TibialisPosteriorNode = {0.01643715, 0.009019729, 0.001469}*..TF';
    }; // IntermediateCuneiform

    AnyFolder LateralCuneiform = {

      AnyVar MassStandard = .MassStandard*0.021885718;

      AnyVec3 CuneiNaviJoint = {0.03425049, 0.02663769, 0.008}*..TF';
      AnyVec3 RefDist = {0.01832511, -0.002470206, 0.01754009}*..TF';
      AnyVec3 RefProx = {0.03005463, 0.02050315, 0.01087503}*..TF';
      //***********************
      //Muscles nodes
      //***********************
      AnyVec3 TibialisPosteriorNode = {0.01260536, 0.01329963, 0.003394764}*..TF';
    };

    AnyFolder Metatarsal1 = {

      AnyVar MassStandard = .MassStandard*0.079950498;

      AnyVec3 TarsoMtJoint = {0.01914963, -0.005595438, -0.007328187}*..TF';
      AnyVec3 RefDist = {0.001281104, -0.07378177, -0.01694805}*..TF';
      AnyVec3 RefProx = {0.02043713, -0.01768618, -0.005930602}*..TF';
      AnyVec3 MtPhalJoint = .ProximalPhalange1.MtPhalJoint;
      AnyVec3 ToeMedialContactNode = {-0.009935249, -0.06863255, -0.01473953}*..TF';
      AnyVec3 MTHeadPlantarNode = {-0.008955133, -0.06022283, -0.01254332}*..TF';
      AnyVec3 MTBasePlantarNode = {0.003362707, -0.01443166, -0.007165866}*..TF';
      AnyVec3 MTHeadMedialNode = {0.004, -0.066, -0.031}*..TF';
      AnyVec3 Metatarsal1PlantarNode = .Metatarsal1PlantarNode;
      AnyVec3 Metatarsal1ContactNode = .Metatarsal1ContactNode;
      //***********************
      //Muscles nodes
      //***********************
      AnyVec3 ExtensorHallucisLongusViaNode9 = {0.01556493, -0.06811287, -0.01827705}*..TF';
      AnyVec3 FlexorHallucisLongusViaNode9 = {-0.014, -0.062, (-0.014+0.003)}*..TF';
      AnyVec3 TibialisAnteriorNode = {0.002034105, -0.01681538, -0.01692949}*..TF';
      AnyVec3 PeroneusLongusNode = {0.004046949, -0.01758855, -0.00379118}*..TF';
      //***********************
      //Ligaments nodes
      //***********************
      AnyVec3 LigAponeurosisPlantaris = {-0.012895353, -0.06379488, -0.01172546}*..TF';
      AnyVec3 LigMtTransversumProfundum = {-0.008019808, -0.05859427, -0.01423272}*..TF';
      AnyVec3 LigMtTransversumProfundumVia1 = {-0.008019808+0.002, -0.05859427-0.001, (-0.01423272+0.01)}*..TF';
      AnyVec3 LigMtTransversumProfundumVia2 = {-0.008019808+0.003, -0.05859427-0.004, (-0.01423272-0.003)}*..TF';
    }; // Metatarsal1

    AnyFolder Metatarsal2 = {

      AnyVar MassStandard = .MassStandard*0.022272746;

      AnyVec3 TarsoMtJoint = {0.02818961, 0.00300708, 0.005696584}*..TF';
      AnyVec3 RefDist = {-0.002583532, -0.07378442, 0.01133846}*..TF';
      AnyVec3 RefProx = {0.03360497, -0.003129372, 0.00865457}*..TF';
      AnyVec3 MTHeadPlantarNode = {-0.006963247, -0.06338102, 0.009121777}*..TF';
      AnyVec3 MTBasePlantarNode = {0.01356838, -0.005666247, 0.00490277}*..TF';
      AnyVec3 Metatarsal2PlantarNode = .Metatarsal2PlantarNode;
      AnyVec3 Metatarsal2ContactNode = .Metatarsal2ContactNode;
      //***********************
      //Muscles nodes
      //***********************
      AnyVec3 TibialisPosteriorNode = {0.01476131, -0.007845885, 0.004612114}*..TF';
      AnyVec3 ExtensorDigitorumLongusViaNode6 = {0.008556107, -0.06897692, 0.01293468}*..TF';
      AnyVec3 ExtensorDigitorumLongusViaNode6Bis = {0.010556107, -0.06497692, 0.01293468}*..TF';
      AnyVec3 FlexorDigitorumLongusViaNode9 = {-0.009987976, -0.06425791, 0.00922974}*..TF';
      //***********************
      //Ligaments nodes
      //***********************
      AnyVec3 LigAponeurosisPlantaris = {-0.008818686, -0.06633225, 0.00991033}*..TF';
      AnyVec3 LigPlantareLongum = {0.01366725, -0.008698959, 0.006294541}*..TF';
      AnyVec3 LigMtTransversumProfundum = {-0.00756642, -0.06334756, 0.01050367}*..TF';
      AnyVec3 LigMtTransversumProfundumVia1 = {-0.00756642+0.002, -0.06334756+0.002, (0.01050367+0.004)}*..TF';
      AnyVec3 LigMtTransversumProfundumVia2 = {-0.00756642+0.003, -0.06334756-0.00, (0.01050367-0.004)}*..TF';
    }; // Metatarsal2

    AnyFolder Metatarsal3 = {

      AnyVar MassStandard = .MassStandard*0.018827431;

      AnyVec3 TarsoMtJoint = {0.02039496, 0.00767156, 0.01477314}*..TF';
      AnyVec3 RefDist = {-0.003279205, -0.06856769, 0.02516251}*..TF';
      AnyVec3 RefProx = {0.02540494, 0.001358806, 0.02256901}*..TF';
      AnyVec3 MTHeadPlantarNode = {-0.008146089, -0.05959793, 0.02372242}*..TF';
      AnyVec3 MTBasePlantarNode = {0.007215903, -0.002471606, 0.01179935}*..TF';
      //***********************
      //Muscles nodes
      //***********************
      AnyVec3 TibialisPosteriorNode = {0.009710893, -0.005824256, 0.01222676}*..TF';
      AnyVec3 ExtensorDigitorumLongusViaNode9 = {0.006101825, -0.06353456, 0.02756303}*..TF';
      AnyVec3 ExtensorDigitorumLongusViaNode9Bis = {0.008101825, -0.05953456, 0.02716303}*..TF';
      AnyVec3 FlexorDigitorumLongusViaNode12 = {-0.011, -0.059, 0.023}*..TF';
      //***********************
      //Ligaments nodes
      //***********************
      AnyVec3 LigAponeurosisPlantaris = {-0.010482872, -0.06023365, 0.02313049}*..TF';
      AnyVec3 LigPlantareLongum = {0.007420158, -0.006300809, 0.01260412}*..TF';
      AnyVec3 LigMtTransversumProfundum = {-0.009191576, -0.05713054, 0.02343944}*..TF';
      AnyVec3 LigMtTransversumProfundumVia1 = {-0.009191576+0.002, -0.05713054+0.004, (0.02343944+0.004)}*..TF';
      AnyVec3 LigMtTransversumProfundumVia2 = {-0.009191576+0.004, -0.05713054-0.002, (0.02343944-0.004)}*..TF';
    }; // Metatarsal3

    AnyFolder Metatarsal4 = {

      AnyVar MassStandard = .MassStandard*0.017399045;

      AnyVec3 TarsoMtJoint = {0.01154973, 0.01612223, 0.0229518}*..TF';
      AnyVec3 RefDist = {-0.004182283, -0.05773099, 0.03925701}*..TF';
      AnyVec3 RefProx = {0.01618675, 0.01049928, 0.03054708}*..TF';
      AnyVec3 MTHeadPlantarNode = {-0.01083598, -0.0483197, 0.03714457}*..TF';
      AnyVec3 MTBasePlantarNode = {0.00155934, 1.747418e-005, 0.02085457}*..TF';
      //***********************
      //Muscles nodes
      //***********************
      AnyVec3 TibialisPosteriorNode = {0.002704195, -0.002160678, 0.02093688}*..TF';
      AnyVec3 ExtensorDigitorumLongusViaNode12 = {0.005002459, -0.05358112, 0.04083552}*..TF';
      AnyVec3 ExtensorDigitorumLongusViaNode12Bis = {0.007002459, -0.04958112, 0.04013552}*..TF';
      AnyVec3 FlexorDigitorumLongusViaNode15 = {-0.013, -0.048, 0.036}*..TF';
      //***********************
      //Ligaments nodes
      //***********************
      AnyVec3 LigAponeurosisPlantaris = {-0.01247978, -0.04689572, 0.0368894}*..TF';
      AnyVec3 LigPlantareLongum = {0.002316924, -0.0005054712, 0.02031012}*..TF';
      AnyVec3 LigMtTransversumProfundum = {-0.01114404, -0.0452928, 0.03696619}*..TF';
      AnyVec3 LigMtTransversumProfundumVia1 = {-0.01114404+0.002, -0.0452928+0.004, (0.03696619+0.004)}*..TF';
      AnyVec3 LigMtTransversumProfundumVia2 = {-0.01114404+0.003, -0.0452928-0.004, (0.03696619-0.004)}*..TF';
    };

    AnyFolder Metatarsal5 = {

      AnyVar MassStandard = .MassStandard*0.038130794;

      AnyVec3 TarsoMtJoint = {0.006738373, 0.02296503, 0.02914318}*..TF';
      AnyVec3 RefDist = {-0.001300164, 0.006966656, 0.04349853}*..TF';
      AnyVec3 RefDist2 = {-0.00878843, -0.04335999, 0.05328835}*..TF';
      AnyVec3 RefProx = {0.007439617, 0.01899536, 0.03620561}*..TF';
      AnyVec3 ToeLateralContactNode = {-0.01395678, -0.04078208, 0.0500268}*..TF';
      AnyVec3 FDLSegNode = {-0.003476697, 0.01189963, 0.03306715}*..TF';
      AnyVec3 MTHeadPlantarNode = {-0.01412619, -0.03599002, 0.05112629}*..TF';
      AnyVec3 MTBasePlantarNode = {-0.007076697, 0.01189963, 0.03306715}*..TF';
      AnyVec3 MTHeadLateralNode = {-0.01012619, -0.03599002, 0.06112629}*..TF';
      AnyVec3 Metatarsal5PlantarNode = .Metatarsal5PlantarNode;
      AnyVec3 Metatarsal5ContactNode = .Metatarsal5ContactNode;
      //***********************
      //Muscles nodes
      //***********************
      AnyVec3 PeroneusBrevis1Node = {-0.00299591, 0.02599151, 0.03968708}*..TF';
      AnyVec3 PeroneusBrevis2Node = {-0.00299591-0.003, 0.02599151+0.001, 0.03968708}*..TF';
      AnyVec3 PeroneusBrevis3Node = {-0.00299591-0.005, 0.02599151+0.002, 0.03968708}*..TF';
      AnyVec3 PeroneusTertius1Node = {0.007367618, 0.00374845, 0.04305841}*..TF';
      AnyVec3 PeroneusTertius2Node = {0.007367618, 0.00374845, 0.04305841}*..TF';
      AnyVec3 PeroneusTertius3Node = {0.007367618, 0.00374845, 0.04305841}*..TF';
      AnyVec3 ExtensorDigitorumLongusViaNode15 = {-0.000330596, -0.03888475, 0.05644042}*..TF';
      AnyVec3 FlexorDigitorumLongusViaNode18 = {-0.0150506, -0.03604911, 0.04730838}*..TF';
      //***********************
      //Ligaments nodes
      //***********************
      AnyVec3 LigAponeurosisPlantaris = {-0.01507671, -0.03593956, 0.04811938}*..TF';
      AnyVec3 LigPlantareLongum = {-0.006880364, 0.01088403, 0.03285331}*..TF';
      AnyVec3 LigMtTransversumProfundum = {-0.01374553, -0.03369623, 0.05109619}*..TF';
      AnyVec3 LigMtTransversumProfundumVia1 = {-0.01374553+0.002, -0.03369623+0.004, (0.05109619+0.004)}*..TF';
      AnyVec3 LigMtTransversumProfundumVia2 = {-0.01374553+0.003, -0.03369623-0.004, (0.05109619-0.004)}*..TF';
    };

    AnyFolder ProximalPhalange1 = {

      AnyVar MassStandard = .MassStandard*0.017790222;

      AnyVec3 MtPhalJoint = {0.00461532, -0.0629641, -0.0155316}*..TF';
      AnyVec3 RefDist = {-0.000441674, -0.1014964, -0.006944514}*..TF';
      AnyVec3 ToeMedialContactNode = .ToeMedialContactNode;
      //***********************
      //Muscles nodes
      //***********************
      AnyVec3 ExtensorHallucisLongusViaNode10 = {0.005761685, -0.09947411, -0.007985534}*..TF';
      AnyVec3 FlexorHallucisLongusViaNode10 = {-0.008933837, -0.09484615, -0.00810336}*..TF';
      //***********************
      //Ligaments nodes
      //***********************
      AnyVec3 LigAponeurosisPlantaris = {-0.007756465, -0.07420416, -0.01336598}*..TF';
    };

    AnyFolder ProximalPhalange2 = {

      AnyVar MassStandard = .MassStandard*0.007562741;

      AnyVec3 MtPhalJoint = {0.0006, -0.0675, 0.0126588}*..TF';
      AnyVec3 RefDist = {-0.001707296, -0.09941698, 0.01747704}*..TF';
      AnyVec3 RefProx = {0.005556107, -0.07297692, 0.01393468}*..TF';
      //***********************
      //Muscles nodes
      //***********************
      AnyVec3 ExtensorDigitorumLongusViaNode7 = {0.004356564, -0.09994124, 0.01804176}*..TF';
      AnyVec3 FlexorDigitorumLongusViaNode10 = {-0.00711984, -0.09624732, 0.01596708}*..TF';
      //***********************
      //Ligaments nodes
      //***********************
      AnyVec3 LigAponeurosisPlantaris = {-0.009073988, -0.07490946, 0.01194693}*..TF';
    };

    AnyFolder ProximalPhalange3 = {

      AnyVar MassStandard = .MassStandard*0.006408771;

      AnyVec3 MtPhalJoint = {-0.00169444, -0.063321, 0.0259938}*..TF';
      AnyVec3 RefDist = {-0.002001345, -0.09177314, 0.03132222}*..TF';
      AnyVec3 RefProx = {0.003101825, -0.06753456, 0.02756303}*..TF';
      //***********************
      //Muscles nodes
      //***********************
      AnyVec3 ExtensorDigitorumLongusViaNode10 = {0.003532243, -0.09107391, 0.03195742}*..TF';
      AnyVec3 FlexorDigitorumLongusViaNode13 = {-0.007466041, -0.09024897, 0.03119982}*..TF';
      //***********************
      //Ligaments nodes
      //***********************
      AnyVec3 LigAponeurosisPlantaris = {-0.010546552, -0.07198454, 0.0270324}*..TF';
    };

    AnyFolder ProximalPhalange4 = {

      AnyVar MassStandard = .MassStandard*0.00596366;

      AnyVec3 MtPhalJoint = {-0.00371203, -0.052253, 0.0387849}*..TF';
      AnyVec3 RefDist = {-0.001343082, -0.07598902, 0.04605937}*..TF';
      AnyVec3 RefProx = {0.00141203, -0.056253, 0.0417849}*..TF';
      //***********************
      //Muscles nodes
      //***********************
      AnyVec3 ExtensorDigitorumLongusViaNode13 = {0.002651, -0.0754736, 0.04705616}*..TF';
      AnyVec3 FlexorDigitorumLongusViaNode16 = {-0.008409728, -0.07458583, 0.04537511}*..TF';
      //***********************
      //Ligaments nodes
      //***********************
      AnyVec3 LigAponeurosisPlantaris = {-0.010898785, -0.06055018, 0.04002751}*..TF';
    };

    AnyFolder ProximalPhalange5 = {

      AnyVar MassStandard = .MassStandard*0.00440014;

      AnyVec3 MtPhalJoint = {-0.00784451, -0.0350961, 0.0532479}*..TF';
      AnyVec3 RefDist = {-0.006638374, -0.06325011, 0.05860036}*..TF';
      AnyVec3 RefProx = {-0.00484451, -0.0400961, 0.0562479}*..TF';
      AnyVec3 ToeLateralContactNode = .ToeLateralContactNode;
      //***********************
      //Muscles nodes
      //***********************
      AnyVec3 ExtensorDigitorumLongusViaNode16 = {-0.002418618, -0.06236667, 0.06261555}*..TF';
      AnyVec3 FlexorDigitorumLongusViaNode19 = {-0.011552142, -0.06120244, 0.05494571}*..TF';
      //***********************
      //Ligaments nodes
      //***********************
      AnyVec3 LigAponeurosisPlantaris = {-0.01350584, -0.04699492, 0.04993995}*..TF';
    };

    AnyFolder MiddlePhalange2 = {

      AnyVar MassStandard = .MassStandard*0.001591376;

      AnyVec3 ProxPhalJoint = {-0.003158194+0.002, -0.0962966, 0.01694824}*..TF';
      AnyVec3 RefDist = {-0.00495792, -0.111385, 0.02043704}*..TF';
      AnyVec3 RefProx = {0.004356564, -0.09994124, 0.01804176}*..TF';
      //***********************
      //Muscles nodes
      //***********************
      AnyVec3 ExtensorDigitorumLongusViaNode8 = {0.001242716, -0.1129332, 0.0203853}*..TF';
      AnyVec3 ExtensorDigitorumLongusNode = {0.003538499, -0.1052887, 0.01918585}*..TF';
      AnyVec3 FlexorDigitorumLongusViaNode11 = {-0.008963993, -0.1082601, 0.02008046}*..TF';
    };

    AnyFolder MiddlePhalange3 = {

      AnyVar MassStandard = .MassStandard*0.001243466;

      AnyVec3 ProxPhalJoint = {-0.001918323, -0.08935672, 0.03099156}*..TF';
      AnyVec3 RefDist = {-0.004356479, -0.1043722, 0.03404669}*..TF';
      AnyVec3 RefProx = {0.003532243, -0.09107391, 0.03195742}*..TF';
      //***********************
      //Muscles nodes
      //***********************
      AnyVec3 ExtensorDigitorumLongusViaNode11 = {-0.001146739, -0.1043938, 0.03473453}*..TF';
      AnyVec3 ExtensorDigitorumLongusNode = {0.001891965, -0.09497174, 0.03286684}*..TF';
      AnyVec3 FlexorDigitorumLongusViaNode14 = {-0.011867984, -0.1033654, 0.03382728}*..TF';
    };

    AnyFolder MiddlePhalange4 = {

      AnyVar MassStandard = .MassStandard*0.001188346;

      AnyVec3 ProxPhalJoint = {-0.0027960183, -0.07382266-0.003, 0.0455907}*..TF';
      AnyVec3 RefDist = {-0.008519062, -0.08734421, 0.04636958}*..TF';
      AnyVec3 RefProx = {0.00146524, -0.07926898, 0.0481871}*..TF';
      //***********************
      //Muscles nodes
      //***********************
      AnyVec3 ExtensorDigitorumLongusViaNode14 = {-0.003069028, -0.08662697, 0.04718238}*..TF';
      AnyVec3 ExtensorDigitorumLongusNode = {0.00146524, -0.07926898, 0.0471871}*..TF';
      AnyVec3 FlexorDigitorumLongusViaNode17 = {-0.013455604, -0.08522411, 0.04647234}*..TF';
    };

    AnyFolder MiddlePhalange5 = {

      AnyVar MassStandard = .MassStandard*0.000644255;

      AnyVec3 ProxPhalJoint = {-0.007358133, -0.06222843, 0.05913591}*..TF';
      AnyVec3 RefDist = {-0.009230679, -0.06886453, 0.0593412}*..TF';
      AnyVec3 RefProx = {-0.003861642, -0.06663538, 0.06283306}*..TF';
      //***********************
      //Muscles nodes
      //***********************
      AnyVec3 ExtensorDigitorumLongusViaNode17 = {-0.003813683, -0.06775461, 0.06296785}*..TF';
      AnyVec3 ExtensorDigitorumLongusNode = {-0.003861642, -0.06663538, 0.06283306}*..TF';
      AnyVec3 FlexorDigitorumLongusViaNode20 = {-0.012477285, -0.06599057, 0.0557292}*..TF';
    };

    AnyFolder DistalPhalange1 = {

      AnyVar MassStandard = .MassStandard*0.008262117;

      AnyVec3 DistPhalJoint = {-0.001083079, -0.10166927+0.003, -0.008109532}*..TF';
      AnyVec3 RefDist = {0.00136714, -0.1228519, 0.002927616}*..TF';
      AnyVec3 ToeTip = {0.00136714, -0.1268519, 0.002927616}*..TF';
      AnyVec3 BigToeNode = ToeTip; // for compatibility
      AnyVec3 GroundContactNode = {-0.006705874, -0.1152933, -0.001366105}*..TF';
      //***********************
      //Muscles nodes
      //***********************
      AnyVec3 ExtensorHallucisLongus1Node = {0.00544894, -0.1095213, -0.001445225}*..TF';
      AnyVec3 ExtensorHallucisLongus2Node = {0.00544894, -0.1095213, -0.001445225}*..TF';
      AnyVec3 ExtensorHallucisLongus3Node = {0.00544894, -0.1095213, -0.001445225}*..TF';
      AnyVec3 FlexorHallucisLongus1Node = {-0.009178465, -0.1076628, -0.00480216}*..TF';
      AnyVec3 FlexorHallucisLongus2Node = {-0.009178465, -0.1076628, -0.00480216}*..TF';
      AnyVec3 FlexorHallucisLongus3Node = {-0.009178465, -0.1076628, -0.00480216}*..TF';
    };

    AnyFolder DistalPhalange2 = {

      AnyVar MassStandard = .MassStandard*0.000724269;

      AnyVec3 DistPhalJoint = {-0.004708046, -0.1116229, 0.01957764}*..TF';
      AnyVec3 RefDist = {-0.004763274, -0.1197475, 0.02273006}*..TF';
      AnyVec3 RefProx = {0.001242716, -0.1129332, 0.0203853}*..TF';
      AnyVec3 ToeTip = {-0.005, -0.121, 0.022}*..TF';
      AnyVec3 GroundContactNode = {-0.009118326, -0.1161024, 0.02166108}*..TF';
      //***********************
      //Muscles nodes
      //***********************
      AnyVec3 ExtensorDigitorumLongusNode = {6.538419e-006, -0.1161063, 0.02165135}*..TF';
      AnyVec3 FlexorDigitorumLongusNode = {-0.01012872, -0.1122994, 0.0213305}*..TF';
    };

    AnyFolder DistalPhalange3 = {

      AnyVar MassStandard = .MassStandard*0.000608694;

      AnyVec3 DistPhalJoint = {-0.006065235, -0.1034911, 0.03371704}*..TF';
      AnyVec3 RefDist = {-0.008175768, -0.1130482, 0.03630654}*..TF';
      AnyVec3 RefProx = {-0.0023865434, -0.1051697, 0.03456902}*..TF';
      //***********************
      //Muscles nodes
      //***********************
      AnyVec3 ExtensorDigitorumLongusNode = {-0.0023865434, -0.1081697, 0.03616902}*..TF';
      AnyVec3 FlexorDigitorumLongusNode = {-0.012194342, -0.1070788, 0.03491143}*..TF';
    };

    AnyFolder DistalPhalange4 = {

      AnyVar MassStandard = .MassStandard*0.000541127;

      AnyVec3 DistPhalJoint = {-0.007880441, -0.08457409, 0.04647917}*..TF';
      AnyVec3 RefDist = {-0.01278651, -0.09533569, 0.0466897}*..TF';
      AnyVec3 RefProx = {-0.003069028, -0.08662697, 0.04918238}*..TF';
      //***********************
      //Muscles nodes
      //***********************
      AnyVec3 ExtensorDigitorumLongusNode = {-0.005394551, -0.09145389, 0.04734398}*..TF';
      AnyVec3 FlexorDigitorumLongusNode = {-0.01565704, -0.08984173, 0.04657206}*..TF';
    };

    AnyFolder DistalPhalange5 = {

      AnyVar MassStandard = .MassStandard*0.000520976;

      AnyVec3 DistPhalJoint = {-0.009056971, -0.06675649, 0.05883433}*..TF';
      AnyVec3 RefDist = {-0.01316917, -0.0758413, 0.05632038}*..TF';
      AnyVec3 RefProx = {-0.00686618, -0.07157046, 0.06129555}*..TF';
      //***********************
      //Muscles nodes
      //***********************
      AnyVec3 ExtensorDigitorumLongusNode = {-0.00686618, -0.07357046, 0.06129555}*..TF';
      AnyVec3 FlexorDigitorumLongusNode = {-0.014865597, -0.06998953, 0.05481513}*..TF';
    };
  }; // FootGM
};
