//This file is used for making a interface to the dof of the foot
//the added rotnodes are needed to be able to have the same rotation definitions for
//the right and left side

#if BM_FOOT_MODEL == _FOOT_MODEL_DETAILED_GM_

AnyKinMeasureOrg CalcaneoCuboidDorsiFlexion = {
  AnyFolder &Calcaneus = ..Segments.Foot.Calcaneus.CalcaneoCuboidJoint;
  Calcaneus ={
//    AnyDrawRefFrame drw = {};
    AnyRefNode RotNode={
      ARel={{....Sign*-1,0,0},{0,....Sign*-1,0},{0,0,1}};
//      AnyDrawRefFrame drw = {};
    };
  };
  AnyFolder &Cuboid = ..Segments.Foot.Cuboid.CalcaneoCuboidJoint;
  Cuboid ={
    AnyRefNode RotNode={
      ARel={{....Sign*-1,0,0},{0,....Sign*-1,0},{0,0,1}};
    };
  };
  AnyKinRotational Rot={
    AnyRefNode &CalcaneusNode = ...Segments.Foot.Calcaneus.CalcaneoCuboidJoint.RotNode;
    AnyRefNode &CuboidNode = ...Segments.Foot.Cuboid.CalcaneoCuboidJoint.RotNode;
    Type=RotAxesAngles;
  };
  MeasureOrganizer={0};//z
};
AnyKinMeasureOrg CalcaneoCuboidAbduction = {
  AnyKinRotational &Rot =.CalcaneoCuboidDorsiFlexion.Rot;
  MeasureOrganizer={1};//y
};
AnyKinMeasureOrg CalcaneoCuboidEversion ={
  AnyKinRotational &Rot =.CalcaneoCuboidDorsiFlexion.Rot;
  MeasureOrganizer={2};//x
};


AnyKinMeasureOrg TaloNavicularDorsiFlexion = {
  AnyFolder &Calcaneus = ..Segments.Foot.Talus.TaloNavicularJoint;
  Calcaneus ={
//    AnyDrawRefFrame drw = {};
    AnyRefNode RotNode={
      ARel={{....Sign*-1,0,0},{0,....Sign*-1,0},{0,0,1}};
//      AnyDrawRefFrame drw = {};
    };
  };
  AnyFolder &Navicular = ..Segments.Foot.Navicular.TaloNavicularJoint;
  Navicular ={
    AnyRefNode RotNode={
      ARel={{....Sign*-1,0,0},{0,....Sign*-1,0},{0,0,1}};
    };
  };
  AnyKinRotational Rot={
    AnyRefNode &TalusNode = ...Segments.Foot.Talus.TaloNavicularJoint.RotNode;
    AnyRefNode &NavicularNode = ...Segments.Foot.Navicular.TaloNavicularJoint.RotNode;
    Type=RotAxesAngles;
  };
  MeasureOrganizer={0};//z
};
AnyKinMeasureOrg TaloNavicularAbduction = {
  AnyKinRotational &Rot =.TaloNavicularDorsiFlexion.Rot;
  MeasureOrganizer={1};//y
};
AnyKinMeasureOrg TaloNavicularEversion ={
  AnyKinRotational &Rot =.TaloNavicularDorsiFlexion.Rot;
  MeasureOrganizer={2};//x
};


AnyKinMeasureOrg NaviculoMedialCuneiformDorsiFlexion = {
  AnyFolder &Navicular = ..Segments.Foot.Navicular.MedCuneiNaviJoint;
  Navicular ={
//    AnyDrawRefFrame drw = {};
    AnyRefNode RotNode={
      ARel={{....Sign*-1,0,0},{0,....Sign*-1,0},{0,0,1}};
//      AnyDrawRefFrame drw = {};
    };
  };
  AnyFolder &MedialCuneiform = ..Segments.Foot.MedialCuneiform.CuneiNaviJoint;
  MedialCuneiform ={
    AnyRefNode RotNode={
      ARel={{....Sign*-1,0,0},{0,....Sign*-1,0},{0,0,1}};
    };
  };
  AnyKinRotational Rot={
    AnyRefNode &NavicularNode = ...Segments.Foot.Navicular.MedCuneiNaviJoint.RotNode;
    AnyRefNode &MedialCuneiformNode = ...Segments.Foot.MedialCuneiform.CuneiNaviJoint.RotNode;
    Type=RotAxesAngles;
  };
  MeasureOrganizer={0};//z
};
AnyKinMeasureOrg NaviculoMedialCuneiformAbduction = {
  AnyKinRotational &Rot =.NaviculoMedialCuneiformDorsiFlexion.Rot;
  MeasureOrganizer={1};//y
};
//AnyKinMeasureOrg NaviculoMedialCuneiformEversion ={
//  AnyKinRotational &Rot =.NaviculoMedialCuneiformDorsiFlexion.Rot;
//  MeasureOrganizer={2};//x
//};


AnyKinMeasureOrg NaviculoIntermediateCuneiformDorsiFlexion = {
  AnyFolder &Navicular = ..Segments.Foot.Navicular.IntCuneiNaviJoint;
  Navicular ={
//    AnyDrawRefFrame drw = {};
    AnyRefNode RotNode={
      ARel={{....Sign*-1,0,0},{0,....Sign*-1,0},{0,0,1}};
//      AnyDrawRefFrame drw = {};
    };
  };
  AnyFolder &IntermediateCuneiform = ..Segments.Foot.IntermediateCuneiform.CuneiNaviJoint;
  IntermediateCuneiform ={
    AnyRefNode RotNode={
      ARel={{....Sign*-1,0,0},{0,....Sign*-1,0},{0,0,1}};
    };
  };
  AnyKinRotational Rot={
    AnyRefNode &NavicularNode = ...Segments.Foot.Navicular.IntCuneiNaviJoint.RotNode;
    AnyRefNode &IntermediateCuneiformNode = ...Segments.Foot.IntermediateCuneiform.CuneiNaviJoint.RotNode;
    Type=RotAxesAngles;
  };
  MeasureOrganizer={0};//z
};
AnyKinMeasureOrg NaviculoIntermediateCuneiformAbduction = {
  AnyKinRotational &Rot =.NaviculoIntermediateCuneiformDorsiFlexion.Rot;
  MeasureOrganizer={1};//y
};


AnyKinMeasureOrg NaviculoLateralCuneiformDorsiFlexion = {
  AnyFolder &Navicular = ..Segments.Foot.Navicular.LatCuneiNaviJoint;
  Navicular ={
//    AnyDrawRefFrame drw = {};
    AnyRefNode RotNode={
      ARel={{....Sign*-1,0,0},{0,....Sign*-1,0},{0,0,1}};
//      AnyDrawRefFrame drw = {};
    };
  };
  AnyFolder &LateralCuneiform = ..Segments.Foot.LateralCuneiform.CuneiNaviJoint;
  LateralCuneiform ={
    AnyRefNode RotNode={
      ARel={{....Sign*-1,0,0},{0,....Sign*-1,0},{0,0,1}};
    };
  };
  AnyKinRotational Rot={
    AnyRefNode &NavicularNode = ...Segments.Foot.Navicular.LatCuneiNaviJoint.RotNode;
    AnyRefNode &LateralCuneiformNode = ...Segments.Foot.LateralCuneiform.CuneiNaviJoint.RotNode;
    Type=RotAxesAngles;
  };
  MeasureOrganizer={0};//z
};
AnyKinMeasureOrg NaviculoLateralCuneiformAbduction = {
  AnyKinRotational &Rot =.NaviculoLateralCuneiformDorsiFlexion.Rot;
  MeasureOrganizer={1};//y
};


AnyKinMeasureOrg TarsoMetatarsal1DorsiFlexion = {
  AnyFolder &MedialCuneiform = ..Segments.Foot.MedialCuneiform.TarsoMtJoint;
  MedialCuneiform ={
//    AnyDrawRefFrame drw = {};
    AnyRefNode RotNode={
      ARel={{....Sign*-1,0,0},{0,....Sign*-1,0},{0,0,1}};
//      AnyDrawRefFrame drw = {};
    };
  };
  AnyFolder &Metatarsal1 = ..Segments.Foot.Metatarsal1.TarsoMtJoint;
  Metatarsal1 ={
    AnyRefNode RotNode={
      ARel={{....Sign*-1,0,0},{0,....Sign*-1,0},{0,0,1}};
    };
  };
  AnyKinRotational Rot={
    AnyRefNode &MedialCuneiformNode = ...Segments.Foot.MedialCuneiform.TarsoMtJoint.RotNode;
    AnyRefNode &Metatarsal1 = ...Segments.Foot.Metatarsal1.TarsoMtJoint.RotNode;
    Type=RotAxesAngles;
  };
  MeasureOrganizer={0};//z
};
AnyKinMeasureOrg TarsoMetatarsal1Abduction = {
  AnyKinRotational &Rot =.TarsoMetatarsal1DorsiFlexion.Rot;
  MeasureOrganizer={1};//y
};
//AnyKinMeasureOrg TarsoMetatarsal1Eversion ={
//  AnyKinRotational &Rot =.TarsoMetatarsal1DorsiFlexion.Rot;
//  MeasureOrganizer={2};//x
//};


AnyKinMeasureOrg TarsoMetatarsal2DorsiFlexion = {
  AnyFolder &IntermediateCuneiform = ..Segments.Foot.IntermediateCuneiform.TarsoMtJoint;
  IntermediateCuneiform ={
//    AnyDrawRefFrame drw = {};
    AnyRefNode RotNode={
      ARel={{....Sign*-1,0,0},{0,....Sign*-1,0},{0,0,1}};
//      AnyDrawRefFrame drw = {};
    };
  };
  AnyFolder &Metatarsal2 = ..Segments.Foot.Metatarsal2.TarsoMtJoint;
  Metatarsal2 ={
    AnyRefNode RotNode={
      ARel={{....Sign*-1,0,0},{0,....Sign*-1,0},{0,0,1}};
    };
  };
  AnyKinRotational Rot={
    AnyRefNode &IntermediateCuneiformNode = ...Segments.Foot.IntermediateCuneiform.TarsoMtJoint.RotNode;
    AnyRefNode &Metatarsal2 = ...Segments.Foot.Metatarsal2.TarsoMtJoint.RotNode;
    Type=RotAxesAngles;
  };
  MeasureOrganizer={0};//z
};
AnyKinMeasureOrg TarsoMetatarsal2Abduction = {
  AnyKinRotational &Rot =.TarsoMetatarsal2DorsiFlexion.Rot;
  MeasureOrganizer={1};//y
};


AnyKinMeasureOrg TarsoMetatarsal3DorsiFlexion = {
  AnyFolder &LateralCuneiform = ..Segments.Foot.LateralCuneiform.TarsoMtJoint;
  LateralCuneiform ={
//    AnyDrawRefFrame drw = {};
    AnyRefNode RotNode={
      ARel={{....Sign*-1,0,0},{0,....Sign*-1,0},{0,0,1}};
//      AnyDrawRefFrame drw = {};
    };
  };
  AnyFolder &Metatarsal3 = ..Segments.Foot.Metatarsal3.TarsoMtJoint;
  Metatarsal3 ={
    AnyRefNode RotNode={
      ARel={{....Sign*-1,0,0},{0,....Sign*-1,0},{0,0,1}};
    };
  };
  AnyKinRotational Rot={
    AnyRefNode &LateralCuneiformNode = ...Segments.Foot.LateralCuneiform.TarsoMtJoint.RotNode;
    AnyRefNode &Metatarsal3 = ...Segments.Foot.Metatarsal3.TarsoMtJoint.RotNode;
    Type=RotAxesAngles;
  };
  MeasureOrganizer={0};//z
};
AnyKinMeasureOrg TarsoMetatarsal3Abduction = {
  AnyKinRotational &Rot =.TarsoMetatarsal3DorsiFlexion.Rot;
  MeasureOrganizer={1};//y
};


AnyKinMeasureOrg TarsoMetatarsal4DorsiFlexion = {
  AnyFolder &Cuboid = ..Segments.Foot.Cuboid.TarsoMt4Joint;
  Cuboid ={
//    AnyDrawRefFrame drw = {};
    AnyRefNode RotNode={
      ARel={{....Sign*-1,0,0},{0,....Sign*-1,0},{0,0,1}};
//      AnyDrawRefFrame drw = {};
    };
  };
  AnyFolder &Metatarsal4 = ..Segments.Foot.Metatarsal4.TarsoMtJoint;
  Metatarsal4 ={
    AnyRefNode RotNode={
      ARel={{....Sign*-1,0,0},{0,....Sign*-1,0},{0,0,1}};
    };
  };
  AnyKinRotational Rot={
    AnyRefNode &CuboidNode = ...Segments.Foot.Cuboid.TarsoMt4Joint.RotNode;
    AnyRefNode &Metatarsal4 = ...Segments.Foot.Metatarsal4.TarsoMtJoint.RotNode;
    Type=RotAxesAngles;
  };
  MeasureOrganizer={0};//z
};
AnyKinMeasureOrg TarsoMetatarsal4Abduction = {
  AnyKinRotational &Rot =.TarsoMetatarsal4DorsiFlexion.Rot;
  MeasureOrganizer={1};//y
};


AnyKinMeasureOrg TarsoMetatarsal5SkewDorsiFlexion = {
  AnyFolder &Cuboid = ..Segments.Foot.Cuboid.TarsoMt5Joint;
  Cuboid ={
//    AnyDrawRefFrame drw = {};
    AnyRefNode RotNode={
      ARel={{....Sign*-1,0,0},{0,....Sign*-1,0},{0,0,1}};
//      AnyDrawRefFrame drw = {};
    };
  };
  AnyFolder &Metatarsal5 = ..Segments.Foot.Metatarsal5.TarsoMtJoint;
  Metatarsal5 ={
    AnyRefNode RotNode={
      ARel={{....Sign*-1,0,0},{0,....Sign*-1,0},{0,0,1}};
    };
  };
  AnyKinRotational Rot={
    AnyRefNode &CuboidNode = ...Segments.Foot.Cuboid.TarsoMt5Joint.RotNode;
    AnyRefNode &Metatarsal5 = ...Segments.Foot.Metatarsal5.TarsoMtJoint.RotNode;
    Type=RotAxesAngles;
  };
  MeasureOrganizer={0};//z
};
AnyKinMeasureOrg TarsoMetatarsal5Abduction = {
  AnyKinRotational &Rot =.TarsoMetatarsal5SkewDorsiFlexion.Rot;
  MeasureOrganizer={1};//y
};
//AnyKinMeasureOrg TarsoMetatarsal5SkewEversion = {
//  AnyKinRotational &Rot =.TarsoMetatarsal5SkewDorsiFlexion.Rot;
//  MeasureOrganizer={2};//x
//};


#endif //BM_FOOT_MODEL == _FOOT_MODEL_DETAILED_GM_


AnyKinMeasureOrg MetatarsoPhalangeal1DorsiFlexion = {
  AnyFolder &Metatarsal1 = ..Segments.Foot.Metatarsal1.MtPhalJoint;
  Metatarsal1 ={
//    AnyDrawRefFrame drw = {};
    AnyRefNode RotNode={
      ARel={{....Sign*-1,0,0},{0,....Sign*-1,0},{0,0,1}};
//      AnyDrawRefFrame drw = {};
    };
  };
  AnyFolder &ProximalPhalange1 = ..Segments.Foot.ProximalPhalange1.MtPhalJoint;
  ProximalPhalange1 ={
    AnyRefNode RotNode={
      ARel={{....Sign*-1,0,0},{0,....Sign*-1,0},{0,0,1}};
    };
  };
  AnyKinRotational Rot={
    AnyRefNode &Metatarsal1Node = ...Segments.Foot.Metatarsal1.MtPhalJoint.RotNode;
    AnyRefNode &ProximalPhalange1 = ...Segments.Foot.ProximalPhalange1.MtPhalJoint.RotNode;
    Type=RotAxesAngles;
  };
  MeasureOrganizer={0};//z
};

#if BM_FOOT_MODEL == _FOOT_MODEL_DETAILED_GM_
AnyKinMeasureOrg MetatarsoPhalangeal1Abduction = {
  AnyKinRotational &Rot =.MetatarsoPhalangeal1DorsiFlexion.Rot;
  MeasureOrganizer={1};//y
};
#endif


AnyKinMeasureOrg MetatarsoPhalangeal2DorsiFlexion = {
  AnyFolder &Metatarsal2 = ..Segments.Foot.Metatarsal2.MtPhalJoint;
  Metatarsal2 ={
//    AnyDrawRefFrame drw = {};
    AnyRefNode RotNode={
      ARel={{....Sign*-1,0,0},{0,....Sign*-1,0},{0,0,1}};
//      AnyDrawRefFrame drw = {};
    };
  };
  AnyFolder &ProximalPhalange2 = ..Segments.Foot.ProximalPhalange2.MtPhalJoint;
  ProximalPhalange2 ={
    AnyRefNode RotNode={
      ARel={{....Sign*-1,0,0},{0,....Sign*-1,0},{0,0,1}};
    };
  };
  AnyKinRotational Rot={
    AnyRefNode &Metatarsal2Node = ...Segments.Foot.Metatarsal2.MtPhalJoint.RotNode;
    AnyRefNode &ProximalPhalange2 = ...Segments.Foot.ProximalPhalange2.MtPhalJoint.RotNode;
    Type=RotAxesAngles;
  };
  MeasureOrganizer={0};//z
};

#if BM_FOOT_MODEL == _FOOT_MODEL_DETAILED_GM_
AnyKinMeasureOrg MetatarsoPhalangeal2Abduction = {
  AnyKinRotational &Rot =.MetatarsoPhalangeal2DorsiFlexion.Rot;
  MeasureOrganizer={1};//y
};
#endif


AnyKinMeasureOrg MetatarsoPhalangeal3DorsiFlexion = {
  AnyFolder &Metatarsal3 = ..Segments.Foot.Metatarsal3.MtPhalJoint;
  Metatarsal3 ={
//    AnyDrawRefFrame drw = {};
    AnyRefNode RotNode={
      ARel={{....Sign*-1,0,0},{0,....Sign*-1,0},{0,0,1}};
//      AnyDrawRefFrame drw = {};
    };
  };
  AnyFolder &ProximalPhalange3 = ..Segments.Foot.ProximalPhalange3.MtPhalJoint;
  ProximalPhalange3 ={
    AnyRefNode RotNode={
      ARel={{....Sign*-1,0,0},{0,....Sign*-1,0},{0,0,1}};
    };
  };
  AnyKinRotational Rot={
    AnyRefNode &Metatarsal3Node = ...Segments.Foot.Metatarsal3.MtPhalJoint.RotNode;
    AnyRefNode &ProximalPhalange3 = ...Segments.Foot.ProximalPhalange3.MtPhalJoint.RotNode;
    Type=RotAxesAngles;
  };
  MeasureOrganizer={0};//z
};

#if BM_FOOT_MODEL == _FOOT_MODEL_DETAILED_GM_
AnyKinMeasureOrg MetatarsoPhalangeal3Abduction = {
  AnyKinRotational &Rot =.MetatarsoPhalangeal3DorsiFlexion.Rot;
  MeasureOrganizer={1};//y
};
#endif


AnyKinMeasureOrg MetatarsoPhalangeal4DorsiFlexion = {
  AnyFolder &Metatarsal4 = ..Segments.Foot.Metatarsal4.MtPhalJoint;
  Metatarsal4 ={
//    AnyDrawRefFrame drw = {};
    AnyRefNode RotNode={
      ARel={{....Sign*-1,0,0},{0,....Sign*-1,0},{0,0,1}};
//      AnyDrawRefFrame drw = {};
    };
  };
  AnyFolder &ProximalPhalange4 = ..Segments.Foot.ProximalPhalange4.MtPhalJoint;
  ProximalPhalange4 ={
    AnyRefNode RotNode={
      ARel={{....Sign*-1,0,0},{0,....Sign*-1,0},{0,0,1}};
    };
  };
  AnyKinRotational Rot={
    AnyRefNode &Metatarsal4Node = ...Segments.Foot.Metatarsal4.MtPhalJoint.RotNode;
    AnyRefNode &ProximalPhalange4 = ...Segments.Foot.ProximalPhalange4.MtPhalJoint.RotNode;
    Type=RotAxesAngles;
  };
  MeasureOrganizer={0};//z
};

#if BM_FOOT_MODEL == _FOOT_MODEL_DETAILED_GM_
AnyKinMeasureOrg MetatarsoPhalangeal4Abduction = {
  AnyKinRotational &Rot =.MetatarsoPhalangeal4DorsiFlexion.Rot;
  MeasureOrganizer={1};//y
};
#endif


AnyKinMeasureOrg MetatarsoPhalangeal5DorsiFlexion = {
  AnyFolder &Metatarsal5 = ..Segments.Foot.Metatarsal5.MtPhalJoint;
  Metatarsal5 ={
//    AnyDrawRefFrame drw = {};
    AnyRefNode RotNode={
      ARel={{....Sign*-1,0,0},{0,....Sign*-1,0},{0,0,1}};
//      AnyDrawRefFrame drw = {};
    };
  };
  AnyFolder &ProximalPhalange5 = ..Segments.Foot.ProximalPhalange5.MtPhalJoint;
  ProximalPhalange5 ={
    AnyRefNode RotNode={
      ARel={{....Sign*-1,0,0},{0,....Sign*-1,0},{0,0,1}};
    };
  };
  AnyKinRotational Rot={
    AnyRefNode &Metatarsal5Node = ...Segments.Foot.Metatarsal5.MtPhalJoint.RotNode;
    AnyRefNode &ProximalPhalange5 = ...Segments.Foot.ProximalPhalange5.MtPhalJoint.RotNode;
    Type=RotAxesAngles;
  };
  MeasureOrganizer={0};//z
};

#if BM_FOOT_MODEL == _FOOT_MODEL_DETAILED_GM_
AnyKinMeasureOrg MetatarsoPhalangeal5Abduction = {
  AnyKinRotational &Rot =.MetatarsoPhalangeal5DorsiFlexion.Rot;
  MeasureOrganizer={1};//y
};


AnyKinMeasureOrg ProximoDistalPhalange1DorsiFlexion = {
  AnyRevoluteJoint &JntProxPhal1 = ..Joints.Foot.ProxPhDistPh1;
};


AnyKinMeasureOrg ProximoMedialPhalange2DorsiFlexion = {
  AnyRevoluteJoint &JntProxPhal2 = ..Joints.Foot.ProxPhMidPh2;
};


AnyKinMeasureOrg ProximoMedialPhalange3DorsiFlexion = {
  AnyRevoluteJoint &JntProxPhal3 = ..Joints.Foot.ProxPhMidPh3;
};


AnyKinMeasureOrg ProximoMedialPhalange4DorsiFlexion = {
  AnyRevoluteJoint &JntProxPhal4 = ..Joints.Foot.ProxPhMidPh4;
};


AnyKinMeasureOrg ProximoMedialPhalange5DorsiFlexion = {
  AnyRevoluteJoint &JntProxPhal5 = ..Joints.Foot.ProxPhMidPh5;
};


AnyKinMeasureOrg MedioDistalPhalange2DorsiFlexion = {
  AnyRevoluteJoint &JntDistPhal2 = ..Joints.Foot.MidPhDistPh2;
};


AnyKinMeasureOrg MedioDistalPhalange3DorsiFlexion = {
  AnyRevoluteJoint &JntDistPhal3 = ..Joints.Foot.MidPhDistPh3;
};


AnyKinMeasureOrg MedioDistalPhalange4DorsiFlexion = {
  AnyRevoluteJoint &JntDistPhal4 = ..Joints.Foot.MidPhDistPh4;
};


AnyKinMeasureOrg MedioDistalPhalange5DorsiFlexion = {
  AnyRevoluteJoint &JntDistPhal5 = ..Joints.Foot.MidPhDistPh5;
};


//Measures for applying joint muscles
//***********************************


AnyKinMeasureOrg CalcaneoCuboidDorsiFlexionJntMus = {
  AnyKinRotational Rot={
    AnyRefNode &CalcaneusNode = ...Segments.Foot.Calcaneus.CalcaneoCuboidJoint.RotNode;
    AnyRefNode &CuboidNode = ...Segments.Foot.Cuboid.CalcaneoCuboidJoint.RotNode;
    AngVelOnOff = On;
    Type=RotAxesAngles;
  };
  MeasureOrganizer={0};//z
};
AnyKinMeasureOrg CalcaneoCuboidAbductionJntMus = {
  AnyKinRotational &Rot =.CalcaneoCuboidDorsiFlexionJntMus.Rot;
  MeasureOrganizer={1};//y
};
AnyKinMeasureOrg CalcaneoCuboidEversionJntMus ={
  AnyKinRotational &Rot =.CalcaneoCuboidDorsiFlexionJntMus.Rot;
  MeasureOrganizer={2};//x
};


AnyKinMeasureOrg TaloNavicularDorsiFlexionJntMus = {
  AnyKinRotational Rot={
    AnyRefNode &TalusNode = ...Segments.Foot.Talus.TaloNavicularJoint.RotNode;
    AnyRefNode &NavicularNode = ...Segments.Foot.Navicular.TaloNavicularJoint.RotNode;
    AngVelOnOff = On;
    Type=RotAxesAngles;
  };
  MeasureOrganizer={0};//z
};
AnyKinMeasureOrg TaloNavicularAbductionJntMus = {
  AnyKinRotational &Rot =.TaloNavicularDorsiFlexionJntMus.Rot;
  MeasureOrganizer={1};//y
};
AnyKinMeasureOrg TaloNavicularEversionJntMus ={
  AnyKinRotational &Rot =.TaloNavicularDorsiFlexionJntMus.Rot;
  MeasureOrganizer={2};//x
};


//AnyKinMeasureOrg NaviculoMedialCuneiformDorsiFlexionJntMus = {
//  AnyKinRotational Rot={
//    AnyRefNode &NavicularNode = ...Segments.Foot.Navicular.MedCuneiNaviJoint.RotNode;
//    AnyRefNode &MedialCuneiformNode = ...Segments.Foot.MedialCuneiform.CuneiNaviJoint.RotNode;
//    AngVelOnOff = On;
//    Type=RotAxesAngles;
//  };
//  MeasureOrganizer={0};//z
//};
//AnyKinMeasureOrg NaviculoMedialCuneiformAbductionJntMus = {
//  AnyKinRotational &Rot =.NaviculoMedialCuneiformDorsiFlexionJntMus.Rot;
//  MeasureOrganizer={1};//y
//};
//AnyKinMeasureOrg NaviculoMedialCuneiformEversionJntMus ={
//  AnyKinRotational &Rot =.NaviculoMedialCuneiformDorsiFlexionJntMus.Rot;
//  MeasureOrganizer={2};//x
//};


//AnyKinMeasureOrg TarsoMetatarsal1DorsiFlexionJntMus = {
//  AnyKinRotational Rot={
//    AnyRefNode &MedialCuneiformNode = ...Segments.Foot.MedialCuneiform.TarsoMtJoint.RotNode;
//    AnyRefNode &Metatarsal1 = ...Segments.Foot.Metatarsal1.TarsoMtJoint.RotNode;
//    AngVelOnOff = On;
//    Type=RotAxesAngles;
//  };
//  MeasureOrganizer={0};//z
//};
//AnyKinMeasureOrg TarsoMetatarsal1AbductionJntMus = {
//  AnyKinRotational &Rot =.TarsoMetatarsal1DorsiFlexionJntMus.Rot;
//  MeasureOrganizer={1};//y
//};
//AnyKinMeasureOrg TarsoMetatarsal1EversionJntMus ={
//  AnyKinRotational &Rot =.TarsoMetatarsal1DorsiFlexionJntMus.Rot;
//  MeasureOrganizer={2};//x
//};


//AnyKinMeasureOrg TarsoMetatarsal5SkewDorsiFlexionJntMus = {
//  AnyKinRotational Rot={
//    AnyRefNode &CuboidNode = ...Segments.Foot.Cuboid.TarsoMt5Joint.RotNode;
//    AnyRefNode &Metatarsal5 = ...Segments.Foot.Metatarsal5.TarsoMtJoint.RotNode;
//    AngVelOnOff = On;
//    Type=RotAxesAngles;
//  };
//  MeasureOrganizer={0};//z
//};
//AnyKinMeasureOrg TarsoMetatarsal5AbductionJntMus = {
//  AnyKinRotational &Rot =.TarsoMetatarsal5SkewDorsiFlexionJntMus.Rot;
//  MeasureOrganizer={1};//y
//};
//AnyKinMeasureOrg TarsoMetatarsal5SkewEversionJntMus = {
//  AnyKinRotational &Rot =.TarsoMetatarsal5SkewDorsiFlexionJntMus.Rot;
//  MeasureOrganizer={2};//x
//};

#endif //BM_FOOT_MODEL == _FOOT_MODEL_DETAILED_GM_
