AnyFolder Foot = {

  //************************************************
  //              JntMtPhal
  //************************************************
  // Flexion Extension only

  AnyRevoluteJoint MtProxPh1 =
  {
    Axis = z;
    AnyRefFrame &MT1 = ...Segments.Foot.Metatarsal1.MtPhalJoint;
    AnyRefFrame &ProxPhal1 = ...Segments.Foot.ProximalPhalange1.MtPhalJoint;
    Constraints.Reaction ={#include "DrawForceInJoint.any"};
  };


  AnyRevoluteJoint MtProxPh2 =
  {
    Axis = z;
    AnyRefFrame &MT2 = ...Segments.Foot.Metatarsal2.MtPhalJoint;
    AnyRefFrame &ProxPhal2 = ...Segments.Foot.ProximalPhalange2.MtPhalJoint;
    Constraints.Reaction ={#include "DrawForceInJoint.any"};
  };


  AnyRevoluteJoint MtProxPh3 =
  {
    Axis = z;
    AnyRefFrame &MT3 = ...Segments.Foot.Metatarsal3.MtPhalJoint;
    AnyRefFrame &ProxPhal3 = ...Segments.Foot.ProximalPhalange3.MtPhalJoint;
    Constraints.Reaction ={#include "DrawForceInJoint.any"};
  };


  AnyRevoluteJoint MtProxPh4 =
  {
    Axis = z;
    AnyRefFrame &MT4 = ...Segments.Foot.Metatarsal4.MtPhalJoint;
    AnyRefFrame &ProxPhal4 = ...Segments.Foot.ProximalPhalange4.MtPhalJoint;
    Constraints.Reaction ={#include "DrawForceInJoint.any"};
  };


  AnyRevoluteJoint MtProxPh5 =
  {
    Axis = z;
    AnyRefFrame &MT5 = ...Segments.Foot.Metatarsal5.MtPhalJoint;
    AnyRefFrame &ProxPhal5 = ...Segments.Foot.ProximalPhalange5.MtPhalJoint;
    Constraints.Reaction ={#include "DrawForceInJoint.any"};
  };

  ///Constrain flexion extension angle of the Metatarsal-ProximalPhalange joints to be equal
  AnyKinEqSimpleDriver LinkMtProxPhJoints = {
    AnyKinMeasureLinComb MeasureMtProxPhJointAngles = {
      AnyKinMeasure &MtProxPh1 = ..MtProxPh1;
      AnyKinMeasure &MtProxPh2 = ..MtProxPh2;
      AnyKinMeasure &MtProxPh3 = ..MtProxPh3;
      AnyKinMeasure &MtProxPh4 = ..MtProxPh4;
      AnyKinMeasure &MtProxPh5 = ..MtProxPh5;
      OutDim = 4;
      Coef = {
              {-1,1,0,0,0},
              {-1,0,1,0,0},
              {-1,0,0,1,0},
              {-1,0,0,0,1},
             };
      Const = {0,0,0,0};
    };
    DriverPos = {0,0,0,0};
    DriverVel = {0,0,0,0};
    Reaction.Type = {Off,Off,Off,Off};
  };


}; //FootJnt
