//Those ligaments are constructed in a special way. They represent the lock of the phalangeal joints when
//they are fully extended. They are modeled as a muscle which strength is zero when the joint is flexed and
//full strength in the locked position.


AnyFolder LigamentsPhalangealPlantar = {
  //Ligaments stiffness is scaled together with the muscle strength so the same variable is reused.
//  AnyVar FootLigStiffnessScale = ..StrengthScaling.Foot.StrengthScale;
//  AnyVar StiffnessCoeff = 0.5;
//  AnyVar Pretension =0.98;

  //The FullStrengthAngle is taken from the toe off position during gait,
  //this is beleived to be the extended position.
  //StartStrengthAngle is taken 3 deg before.


  AnyLigamentViaPoint ProxPhDistPh1Lig = {

    AnyRefNode &ref1 = ...Segments.Foot.ProximalPhalange1.PhalangealLigNode;
    AnyRefNode &ref2 = ...Segments.Foot.DistalPhalange1.PhalangealLigNode;


    //AnyVar Pretension=..PretensionFactor;
    AnyFolder &LigParms=..LigParams.PlantarProxPhDistPh1Lig;
    AnyVar StiffScale=..FootLigStiffnessScale;

    #include "LigParms.any"
  #include "LigDriverAndMuscle.any"


    AnyVar Eps = (Line.Pos[0] - LigMdl.L0)/LigMdl.L0;
  };


  AnyLigamentViaPoint ProxPhMidPh2Lig = {


    AnyRefNode &ref1= ...Segments.Foot.ProximalPhalange2.PhalangealLigNode;
    AnyRefNode &ref2 = ...Segments.Foot.MiddlePhalange2.PhalangealLigNodeProx;

    //AnyVar Pretension=..PretensionFactor;
    AnyFolder &LigParms=..LigParams.PlantarProxPhMidPh2Lig;
    AnyVar StiffScale=..FootLigStiffnessScale;
    #include "LigParms.any"
   #include "LigDriverAndMuscle.any"
    AnyVar Eps = (Line.Pos[0] - LigMdl.L0)/LigMdl.L0;
  };


  AnyLigamentViaPoint ProxPhMidPh3Lig = {


    AnyRefNode &ref1= ...Segments.Foot.ProximalPhalange3.PhalangealLigNode;
    AnyRefNode &ref2 = ...Segments.Foot.MiddlePhalange3.PhalangealLigNodeProx;

    //AnyVar Pretension=..PretensionFactor;
    AnyFolder &LigParms=..LigParams.PlantarProxPhMidPh3Lig;
    AnyVar StiffScale=..FootLigStiffnessScale;
    #include "LigParms.any"
  #include "LigDriverAndMuscle.any"

    AnyVar Eps = (Line.Pos[0] - LigMdl.L0)/LigMdl.L0;
  };


  AnyLigamentViaPoint ProxPhMidPh4Lig = {


    AnyRefNode &ref1= ...Segments.Foot.ProximalPhalange4.PhalangealLigNode;
    AnyRefNode &ref2 = ...Segments.Foot.MiddlePhalange4.PhalangealLigNodeProx;

    //AnyVar Pretension=..PretensionFactor;
    AnyFolder &LigParms=..LigParams.PlantarProxPhMidPh4Lig;
    AnyVar StiffScale=..FootLigStiffnessScale;
    #include "LigParms.any"
   #include "LigDriverAndMuscle.any"

    AnyVar Eps = (Line.Pos[0] - LigMdl.L0)/LigMdl.L0;
  };


  AnyLigamentViaPoint ProxPhMidPh5Lig = {


    AnyRefNode &ref1= ...Segments.Foot.ProximalPhalange5.PhalangealLigNode;
    AnyRefNode &ref2 = ...Segments.Foot.MiddlePhalange5.PhalangealLigNodeProx;

    //AnyVar Pretension=..PretensionFactor;
    AnyFolder &LigParms=..LigParams.PlantarProxPhMidPh5Lig;
    AnyVar StiffScale=..FootLigStiffnessScale;
    #include "LigParms.any"
   #include "LigDriverAndMuscle.any"

    AnyVar Eps = (Line.Pos[0] - LigMdl.L0)/LigMdl.L0;
  };


  AnyLigamentViaPoint MidPhDistPh2Lig = {


    AnyRefNode &ref1= ...Segments.Foot.MiddlePhalange2.PhalangealLigNodeDist;
    AnyRefNode &ref2 = ...Segments.Foot.DistalPhalange2.PhalangealLigNode;

    //AnyVar Pretension=..PretensionFactor;
    AnyFolder &LigParms=..LigParams.PlantarMidPhDistPh2Lig;
    AnyVar StiffScale=..FootLigStiffnessScale;
    #include "LigParms.any"
  #include "LigDriverAndMuscle.any"

    AnyVar Eps = (Line.Pos[0] - LigMdl.L0)/LigMdl.L0;
  };


  AnyLigamentViaPoint MidPhDistPh3Lig = {


    AnyRefNode &ref1= ...Segments.Foot.MiddlePhalange3.PhalangealLigNodeDist;
    AnyRefNode &ref2 = ...Segments.Foot.DistalPhalange3.PhalangealLigNode;

    //AnyVar Pretension=..PretensionFactor;
    AnyFolder &LigParms=..LigParams.PlantarMidPhDistPh3Lig;
    AnyVar StiffScale=..FootLigStiffnessScale;
    #include "LigParms.any"
  #include "LigDriverAndMuscle.any"

    AnyVar Eps = (Line.Pos[0] - LigMdl.L0)/LigMdl.L0;
  };


  AnyLigamentViaPoint MidPhDistPh4Lig = {


    AnyRefNode &ref1= ...Segments.Foot.MiddlePhalange4.PhalangealLigNodeDist;
    AnyRefNode &ref2 = ...Segments.Foot.DistalPhalange4.PhalangealLigNode;
    //AnyVar Pretension=..PretensionFactor;
    AnyFolder &LigParms=..LigParams.PlantarMidPhDistPh4Lig;
    AnyVar StiffScale=..FootLigStiffnessScale;
    #include "LigParms.any"

    #include "LigDriverAndMuscle.any"

    AnyVar Eps = (Line.Pos[0] - LigMdl.L0)/LigMdl.L0;
  };


  AnyLigamentViaPoint MidPhDistPh5Lig = {


    AnyRefNode &ref1= ...Segments.Foot.MiddlePhalange5.PhalangealLigNodeDist;
    AnyRefNode &ref2 = ...Segments.Foot.DistalPhalange5.PhalangealLigNode;
    //AnyVar Pretension=..PretensionFactor;
    AnyFolder &LigParms=..LigParams.PlantarMidPhDistPh5Lig;
    AnyVar StiffScale=..FootLigStiffnessScale;
    #include "LigParms.any"
   #include "LigDriverAndMuscle.any"

    AnyVar Eps = (Line.Pos[0] - LigMdl.L0)/LigMdl.L0;


  };

};


AnyFolder LigamentsPhalangealDorsal = {
  //Ligaments stiffness is scaled together with the muscle strength so the same variable is reused.
  //  AnyVar FootLigStiffnessScale = ..StrengthScaling.Foot.StrengthScale;
  //  AnyVar StiffnessCoeff = 0.5;
  //
  //  AnyVar Pretension=0.98;
  //  //The FullStrengthAngle is taken from the toe off position during gait,
  //this is beleived to be the extended position.
  //StartStrengthAngle is taken 3 deg before.


  AnyLigamentViaPoint ProxPhDistPh1Lig = {


    AnyRefNode &ref1= ...Segments.Foot.ProximalPhalange1.PhalangealLigNodeDorsal;
    AnyRefNode &ref2 = ...Segments.Foot.DistalPhalange1.ExtensorHallucisLongus1Node;


    //AnyVar Pretension=..PretensionFactor;
    AnyFolder &LigParms=..LigParams.DorsalProxPhDistPh1Lig;
    AnyVar StiffScale=..FootLigStiffnessScale;
    #include "LigParms.any"
  #include "LigDriverAndMuscle.any"


    AnyVar Eps = (Line.Pos[0] - LigMdl.L0)/LigMdl.L0;
  };


  AnyLigamentViaPoint ProxPhMidPh2Lig = {


    AnyRefNode &ref1= ...Segments.Foot.ProximalPhalange2.PhalangealLigNodeDorsal;
    AnyRefNode &ref2 = ...Segments.Foot.MiddlePhalange2.PhalangealLigNodeProxDorsal;
    //AnyVar Pretension=..PretensionFactor;
    AnyFolder &LigParms=..LigParams.DorsalProxPhMidPh2Lig;
    AnyVar StiffScale=..FootLigStiffnessScale;
    #include "LigParms.any"
   #include "LigDriverAndMuscle.any"

    AnyVar Eps = (Line.Pos[0] - LigMdl.L0)/LigMdl.L0;
  };


  AnyLigamentViaPoint ProxPhMidPh3Lig = {

    AnyRefNode &ref1= ...Segments.Foot.ProximalPhalange3.PhalangealLigNodeDorsal;
    AnyRefNode &ref2 = ...Segments.Foot.MiddlePhalange3.PhalangealLigNodeProxDorsal;
    //AnyVar Pretension=..PretensionFactor;
    AnyFolder &LigParms=..LigParams.DorsalProxPhMidPh3Lig;
    AnyVar StiffScale=..FootLigStiffnessScale;
    #include "LigParms.any"
    #include "LigDriverAndMuscle.any"

    AnyVar Eps = (Line.Pos[0] - LigMdl.L0)/LigMdl.L0;
  };


  AnyLigamentViaPoint ProxPhMidPh4Lig = {


    AnyRefNode &ref1= ...Segments.Foot.ProximalPhalange4.PhalangealLigNodeDorsal;
    AnyRefNode &ref2 = ...Segments.Foot.MiddlePhalange4.PhalangealLigNodeProxDorsal;
    //AnyVar Pretension=..PretensionFactor;
    AnyFolder &LigParms=..LigParams.DorsalProxPhMidPh4Lig;
    AnyVar StiffScale=..FootLigStiffnessScale;
    #include "LigParms.any"
   #include "LigDriverAndMuscle.any"

    AnyVar Eps = (Line.Pos[0] - LigMdl.L0)/LigMdl.L0;
  };


  AnyLigamentViaPoint ProxPhMidPh5Lig = {


    AnyRefNode &ref1= ...Segments.Foot.ProximalPhalange5.PhalangealLigNodeDorsal;
    AnyRefNode &ref2 = ...Segments.Foot.MiddlePhalange5.PhalangealLigNodeProxDorsal;
    //AnyVar Pretension=..PretensionFactor;
    AnyFolder &LigParms=..LigParams.DorsalProxPhMidPh5Lig;
    AnyVar StiffScale=..FootLigStiffnessScale;
    #include "LigParms.any"
   #include "LigDriverAndMuscle.any"

    AnyVar Eps = (Line.Pos[0] - LigMdl.L0)/LigMdl.L0;
  };


  AnyLigamentViaPoint MidPhDistPh2Lig = {


    AnyRefNode &ref1= ...Segments.Foot.MiddlePhalange2.PhalangealLigNodeDistDorsal;
    AnyRefNode &ref2 = ...Segments.Foot.DistalPhalange2.ExtensorDigitorumLongusNode;
    //AnyVar Pretension=..PretensionFactor;
    AnyFolder &LigParms=..LigParams.DorsalMidPhDistPh2Lig;
    AnyVar StiffScale=..FootLigStiffnessScale;
    #include "LigParms.any"
    #include "LigDriverAndMuscle.any"

    AnyVar Eps = (Line.Pos[0] - LigMdl.L0)/LigMdl.L0;
  };


  AnyLigamentViaPoint MidPhDistPh3Lig = {


    AnyRefNode &ref1= ...Segments.Foot.MiddlePhalange3.PhalangealLigNodeDistDorsal;
    AnyRefNode &ref2 = ...Segments.Foot.DistalPhalange3.ExtensorDigitorumLongusNode;
    //AnyVar Pretension=..PretensionFactor;
    AnyFolder &LigParms=..LigParams.DorsalMidPhDistPh3Lig;
    AnyVar StiffScale=..FootLigStiffnessScale;
    #include "LigParms.any"
    #include "LigDriverAndMuscle.any"
    AnyVar Eps = (Line.Pos[0] - LigMdl.L0)/LigMdl.L0;
  };


  AnyLigamentViaPoint MidPhDistPh4Lig = {


    AnyRefNode &ref1= ...Segments.Foot.MiddlePhalange4.PhalangealLigNodeDistDorsal;
    AnyRefNode &ref2 = ...Segments.Foot.DistalPhalange4.ExtensorDigitorumLongusNode;
    //AnyVar Pretension=..PretensionFactor;
    AnyFolder &LigParms=..LigParams.DorsalMidPhDistPh4Lig;
    AnyVar StiffScale=..FootLigStiffnessScale;
    #include "LigParms.any"
   #include "LigDriverAndMuscle.any"

    AnyVar Eps = (Line.Pos[0] - LigMdl.L0)/LigMdl.L0;
  };


  AnyLigamentViaPoint MidPhDistPh5Lig = {


    AnyRefNode &ref1= ...Segments.Foot.MiddlePhalange5.PhalangealLigNodeDistDorsal;
    AnyRefNode &ref2 = ...Segments.Foot.DistalPhalange5.ExtensorDigitorumLongusNode;
    //AnyVar Pretension=..PretensionFactor;
    AnyFolder &LigParms=..LigParams.DorsalMidPhDistPh5Lig;
    AnyVar StiffScale=..FootLigStiffnessScale;
    #include "LigParms.any"
  #include "LigDriverAndMuscle.any"

    AnyVar Eps = (Line.Pos[0] - LigMdl.L0)/LigMdl.L0;

  };


};
