RGB = ........DrawSettings.Muscle.RGB;
Bulging = 3; // Set to avoid the ligament part to bulge
ColorScale = ........DrawSettings.Muscle.ColorScale;
RGBColorScale = ........DrawSettings.Muscle.RGBColorScale;
MaxStress = ........DrawSettings.Muscle.MaxStress;
Opacity = ........DrawSettings.Muscle.Opacity;
DrawScaleOnOff = ........DrawSettings.Muscle.DrawScaleOnOff;


//#include "DrawMuscleForce.any"
