AnyFolder &AbductorHallucis1 = AbductorHallucis.AbductorHallucis1;
AnyFolder &FlexorHallucisBrevisLateralis_1 = FlexorHallucisBrevisLateralis.FlexorHallucisBrevisLateralis_1;
AnyFolder &FlexorHallucisBrevisLateralis_2 = FlexorHallucisBrevisLateralis.FlexorHallucisBrevisLateralis_2;
AnyFolder &FlexorHallucisBrevisMedialis1 = FlexorHallucisBrevisMedialis.FlexorHallucisBrevisMedialis1;
AnyFolder &AdductorHallucisOblique1 = AdductorHallucisOblique.AdductorHallucisOblique1;
AnyFolder &AdductorHallucisOblique2 = AdductorHallucisOblique.AdductorHallucisOblique2;
AnyFolder &AdductorHallucisOblique3 = AdductorHallucisOblique.AdductorHallucisOblique3;
AnyFolder &AdductorHallucisOblique4 = AdductorHallucisOblique.AdductorHallucisOblique4;
AnyFolder &AdductorHallucisOblique5 = AdductorHallucisOblique.AdductorHallucisOblique5;
AnyFolder &AdductorHallucisTransverse1 = AdductorHallucisTransverse.AdductorHallucisTransverse1;
AnyFolder &AdductorHallucisTransverse2 = AdductorHallucisTransverse.AdductorHallucisTransverse2;
AnyFolder &AdductorHallucisTransverse3 = AdductorHallucisTransverse.AdductorHallucisTransverse3;
AnyFolder &ExtensorHallucisBrevis1 = ExtensorHallucisBrevis.ExtensorHallucisBrevis1;
AnyFolder &DorsalInterosseous1Part1 = DorsalInterosseous.DorsalInterosseous1Part1;
AnyFolder &DorsalInterosseous1Part2 = DorsalInterosseous.DorsalInterosseous1Part2;
AnyFolder &DorsalInterosseous2Part1 = DorsalInterosseous.DorsalInterosseous2Part1;
AnyFolder &DorsalInterosseous2Part2 = DorsalInterosseous.DorsalInterosseous2Part2;
AnyFolder &DorsalInterosseous3Part1 = DorsalInterosseous.DorsalInterosseous3Part1;
AnyFolder &DorsalInterosseous3Part2 = DorsalInterosseous.DorsalInterosseous3Part2;
AnyFolder &DorsalInterosseous4Part1 = DorsalInterosseous.DorsalInterosseous4Part1;
AnyFolder &DorsalInterosseous4Part2 = DorsalInterosseous.DorsalInterosseous4Part2;
AnyFolder &ExtensorDigitoriumBrevis2 = ExtensorDigitoriumBrevis.ExtensorDigitoriumBrevis2;
AnyFolder &ExtensorDigitoriumBrevis3 = ExtensorDigitoriumBrevis.ExtensorDigitoriumBrevis3;
AnyFolder &ExtensorDigitoriumBrevis4 = ExtensorDigitoriumBrevis.ExtensorDigitoriumBrevis4;
AnyFolder &PlantarInterosseous1 = PlantarInterosseous.PlantarInterosseous1;
AnyFolder &PlantarInterosseous2Part1 = PlantarInterosseous.PlantarInterosseous2Part1;
AnyFolder &PlantarInterosseous2Part2 = PlantarInterosseous.PlantarInterosseous2Part2;
AnyFolder &PlantarInterosseous2Part3 = PlantarInterosseous.PlantarInterosseous2Part3;
AnyFolder &PlantarInterosseous3Part1 = PlantarInterosseous.PlantarInterosseous3Part1;
AnyFolder &PlantarInterosseous3Part2 = PlantarInterosseous.PlantarInterosseous3Part2;
AnyFolder &PlantarInterosseous3Part3 = PlantarInterosseous.PlantarInterosseous3Part3;
AnyFolder &FlexorDigitorumBrevis2 = FlexorDigitorumBrevis.FlexorDigitorumBrevis2;
AnyFolder &FlexorDigitorumBrevis3 = FlexorDigitorumBrevis.FlexorDigitorumBrevis3;
AnyFolder &FlexorDigitorumBrevis4 = FlexorDigitorumBrevis.FlexorDigitorumBrevis4;
AnyFolder &FlexorDigitorumBrevis5 = FlexorDigitorumBrevis.FlexorDigitorumBrevis5;
AnyFolder &QuadratusPlantarMedialis1 = QuadratusPlantarMedialis.QuadratusPlantarMedialis1;
AnyFolder &QuadratusPlantarMedialis2 = QuadratusPlantarMedialis.QuadratusPlantarMedialis2;
AnyFolder &QuadratusPlantarMedialis3 = QuadratusPlantarMedialis.QuadratusPlantarMedialis3;
AnyFolder &QuadratusPlantarLateralis1 = QuadratusPlantarLateralis.QuadratusPlantarLateralis1;
AnyFolder &QuadratusPlantarLateralis2 = QuadratusPlantarLateralis.QuadratusPlantarLateralis2;
AnyFolder &QuadratusPlantarLateralis3 = QuadratusPlantarLateralis.QuadratusPlantarLateralis3;
AnyFolder &Lumbrical2 = Lumbrical.Lumbrical2;
AnyFolder &Lumbrical3 = Lumbrical.Lumbrical3;
AnyFolder &Lumbrical4 = Lumbrical.Lumbrical4;
AnyFolder &Lumbrical5 = Lumbrical.Lumbrical5;
AnyFolder &AbductorDigitiMinimi1 = AbductorDigitiMinimi.AbductorDigitiMinimi1;
AnyFolder &AbductorDigitiMinimi2 = AbductorDigitiMinimi.AbductorDigitiMinimi2;
AnyFolder &AbductorDigitiMinimi3 = AbductorDigitiMinimi.AbductorDigitiMinimi3;
AnyFolder &FlexorDigitiMinimiBrevis1 = FlexorDigitiMinimiBrevis.FlexorDigitiMinimiBrevis1;
AnyFolder &PeroneusTertius1 = PeroneusTertius.PeroneusTertius1;
AnyFolder &PeroneusTertius2 = PeroneusTertius.PeroneusTertius2;
AnyFolder &PeroneusTertius3 = PeroneusTertius.PeroneusTertius3;
