AnyFolder &SoleusMedialis1 = SoleusMedialis.SoleusMedialis1;
AnyFolder &SoleusMedialis2 = SoleusMedialis.SoleusMedialis2;
AnyFolder &SoleusMedialis3 = SoleusMedialis.SoleusMedialis3;
AnyFolder &SoleusLateralis1 = SoleusLateralis.SoleusLateralis1;
AnyFolder &SoleusLateralis2 = SoleusLateralis.SoleusLateralis2;
AnyFolder &SoleusLateralis3 = SoleusLateralis.SoleusLateralis3;
AnyFolder &GastrocnemiusLateralis1 = GastrocnemiusLateralis.GastrocnemiusLateralis1;
AnyFolder &GastrocnemiusMedialis1 = GastrocnemiusMedialis.GastrocnemiusMedialis1;
AnyFolder &FlexorDigitorumLongus1 = FlexorDigitorumLongus.FlexorDigitorumLongus1;
AnyFolder &FlexorDigitorumLongus2 = FlexorDigitorumLongus.FlexorDigitorumLongus2;
AnyFolder &FlexorDigitorumLongus3 = FlexorDigitorumLongus.FlexorDigitorumLongus3;
AnyFolder &FlexorDigitorumLongus4 = FlexorDigitorumLongus.FlexorDigitorumLongus4;
AnyFolder &FlexorHallucisLongus1 = FlexorHallucisLongus.FlexorHallucisLongus1;
AnyFolder &FlexorHallucisLongus2 = FlexorHallucisLongus.FlexorHallucisLongus2;
AnyFolder &FlexorHallucisLongus3 = FlexorHallucisLongus.FlexorHallucisLongus3;
AnyFolder &TibialisPosteriorLateralis1 = TibialisPosteriorLateralis.TibialisPosteriorLateralis1;
AnyFolder &TibialisPosteriorLateralis2 = TibialisPosteriorLateralis.TibialisPosteriorLateralis2;
AnyFolder &TibialisPosteriorLateralis3 = TibialisPosteriorLateralis.TibialisPosteriorLateralis3;
AnyFolder &TibialisPosteriorMedialis1 = TibialisPosteriorMedialis.TibialisPosteriorMedialis1;
AnyFolder &TibialisPosteriorMedialis2 = TibialisPosteriorMedialis.TibialisPosteriorMedialis2;
AnyFolder &TibialisPosteriorMedialis3 = TibialisPosteriorMedialis.TibialisPosteriorMedialis3;
AnyFolder &TibialisAnterior1 = TibialisAnterior.TibialisAnterior1;
AnyFolder &TibialisAnterior2 = TibialisAnterior.TibialisAnterior2;
AnyFolder &TibialisAnterior3 = TibialisAnterior.TibialisAnterior3;
AnyFolder &PeroneusBrevis1 = PeroneusBrevis.PeroneusBrevis1;
AnyFolder &PeroneusBrevis2 = PeroneusBrevis.PeroneusBrevis2;
AnyFolder &PeroneusBrevis3 = PeroneusBrevis.PeroneusBrevis3;
AnyFolder &PeroneusLongus1 = PeroneusLongus.PeroneusLongus1;
AnyFolder &PeroneusLongus2 = PeroneusLongus.PeroneusLongus2;
AnyFolder &PeroneusLongus3 = PeroneusLongus.PeroneusLongus3;
AnyFolder &ExtensorDigitorumLongus1 = ExtensorDigitorumLongus.ExtensorDigitorumLongus1;
AnyFolder &ExtensorDigitorumLongus2 = ExtensorDigitorumLongus.ExtensorDigitorumLongus2;
AnyFolder &ExtensorDigitorumLongus3 = ExtensorDigitorumLongus.ExtensorDigitorumLongus3;
AnyFolder &ExtensorDigitorumLongus4 = ExtensorDigitorumLongus.ExtensorDigitorumLongus4;
AnyFolder &ExtensorHallucisLongus1 = ExtensorHallucisLongus.ExtensorHallucisLongus1;
AnyFolder &ExtensorHallucisLongus2 = ExtensorHallucisLongus.ExtensorHallucisLongus2;
AnyFolder &ExtensorHallucisLongus3 = ExtensorHallucisLongus.ExtensorHallucisLongus3;
//AnyFolder &Plantaris1 = Plantaris.Plantaris1;

AnyFolder &FlexorDigitorumLongusToe2Tendon = Foot.FlexorDigitorumLongusToeTendon.FlexorDigitorumLongusToe2Tendon;
AnyFolder &FlexorDigitorumLongusToe3Tendon = Foot.FlexorDigitorumLongusToeTendon.FlexorDigitorumLongusToe3Tendon;
AnyFolder &FlexorDigitorumLongusToe4Tendon = Foot.FlexorDigitorumLongusToeTendon.FlexorDigitorumLongusToe4Tendon;
AnyFolder &FlexorDigitorumLongusToe5Tendon = Foot.FlexorDigitorumLongusToeTendon.FlexorDigitorumLongusToe5Tendon;
AnyFolder &ExtensorDigitorumLongusToe2TendonPart1 = Foot.ExtensorDigitorumLongusToeTendon.ExtensorDigitorumLongusToe2TendonPart1;
AnyFolder &ExtensorDigitorumLongusToe2TendonPart2 = Foot.ExtensorDigitorumLongusToeTendon.ExtensorDigitorumLongusToe2TendonPart2;
AnyFolder &ExtensorDigitorumLongusToe2TendonPart3 = Foot.ExtensorDigitorumLongusToeTendon.ExtensorDigitorumLongusToe2TendonPart3;
AnyFolder &ExtensorDigitorumLongusToe2TendonPart4 = Foot.ExtensorDigitorumLongusToeTendon.ExtensorDigitorumLongusToe2TendonPart4;
AnyFolder &ExtensorDigitorumLongusToe3TendonPart1 = Foot.ExtensorDigitorumLongusToeTendon.ExtensorDigitorumLongusToe3TendonPart1;
AnyFolder &ExtensorDigitorumLongusToe3TendonPart2 = Foot.ExtensorDigitorumLongusToeTendon.ExtensorDigitorumLongusToe3TendonPart2;
AnyFolder &ExtensorDigitorumLongusToe3TendonPart3 = Foot.ExtensorDigitorumLongusToeTendon.ExtensorDigitorumLongusToe3TendonPart3;
AnyFolder &ExtensorDigitorumLongusToe3TendonPart4 = Foot.ExtensorDigitorumLongusToeTendon.ExtensorDigitorumLongusToe3TendonPart4;
AnyFolder &ExtensorDigitorumLongusToe4TendonPart1 = Foot.ExtensorDigitorumLongusToeTendon.ExtensorDigitorumLongusToe4TendonPart1;
AnyFolder &ExtensorDigitorumLongusToe4TendonPart2 = Foot.ExtensorDigitorumLongusToeTendon.ExtensorDigitorumLongusToe4TendonPart2;
AnyFolder &ExtensorDigitorumLongusToe4TendonPart3 = Foot.ExtensorDigitorumLongusToeTendon.ExtensorDigitorumLongusToe4TendonPart3;
AnyFolder &ExtensorDigitorumLongusToe4TendonPart4 = Foot.ExtensorDigitorumLongusToeTendon.ExtensorDigitorumLongusToe4TendonPart4;
AnyFolder &ExtensorDigitorumLongusToe5TendonPart1 = Foot.ExtensorDigitorumLongusToeTendon.ExtensorDigitorumLongusToe5TendonPart1;
AnyFolder &ExtensorDigitorumLongusToe5TendonPart2 = Foot.ExtensorDigitorumLongusToeTendon.ExtensorDigitorumLongusToe5TendonPart2;
AnyFolder &ExtensorDigitorumLongusToe5TendonPart3 = Foot.ExtensorDigitorumLongusToeTendon.ExtensorDigitorumLongusToe5TendonPart3;
AnyFolder &ExtensorDigitorumLongusToe5TendonPart4 = Foot.ExtensorDigitorumLongusToeTendon.ExtensorDigitorumLongusToe5TendonPart4;
AnyFolder &ExtensorHallucisLongusTendonPart1 = Foot.ExtensorHallucisLongusTendon.ExtensorHallucisLongusTendonPart1;
AnyFolder &ExtensorHallucisLongusTendonPart2 = Foot.ExtensorHallucisLongusTendon.ExtensorHallucisLongusTendonPart2;
AnyFolder &ExtensorHallucisLongusTendonPart3 = Foot.ExtensorHallucisLongusTendon.ExtensorHallucisLongusTendonPart3;
