#include "BodyModels/GenericBodyModel/BodyModel.constants.any"
#include "BodyModels/GenericBodyModel/Helper.ClassTemplates.any"
#include "BodyModels/GenericBodyModel/AnyMan.ClassTemplates.any"
#include "BodyModels/GenericBodyModel/PointGenerator.ClassTemplate.any"
#include "BodyModels/GenericBodyModel/SplineMuscle.ClassTemplate.any"
#include "BodyModels/GenericBodyModel/Spline.ClassTemplate.any"
#include "BodyModels/GenericBodyModel/inertia.ClassTemplate.any"
#include "BodyModels/GenericBodyModel/LigamentModelParameter.ClassTemplate.any"
#include "BodyModels/GenericBodyModel/ScaleFunctions.ClassTemplate.any"
#include "<ANYBODY_PATH_AMMR>/Tools/GRFPrediction/FootPlateConditionalContact.any"
#include "<ANYBODY_PATH_MODELUTILS>/WrappingSurfaces/include_templates.any"
#include "<ANYBODY_PATH_MODELUTILS>/Rhythms/SimpleRhythms.any"
#include "<ANYBODY_PATH_MODELUTILS>/WrappingSurfaces/Torus3PointOuterFit.any"
#include "<ANYBODY_PATH_MODELUTILS>/Video/VideoLookAtCamera.any"
#include "BodyModels/GenericBodyModel/RigidBodyAverageMeasure.ClassTemplate.any"
#include "BodyModels/GenericBodyModel/ComponentAndGroupDefinitions.ClassTemplate.any"
#ifndef ANYBODY_PATH_TOOLBOX
// Deprecated
#path ANYBODY_PATH_TOOLBOX "<ANYBODY_PATH_MODELUTILS>"
#else
Error("ANYBODY_PATH_TOOLBOX is deprecated. Use ANYBODY_PATH_MODELUTILS instead")
#endif
