AnyFolder Model = {
  // Model parts included in the study
  AnyFolder SegmentsRef = {
    AnyFolder &Pelvis = .....BodyModelRef.Trunk.Segments.PelvisSeg;
    AnyFolder &Thorax = ......BodyModel.Trunk.Segments.ThoraxSeg;
    AnyFolder &Sacrum = ......BodyModel.Trunk.Segments.SacrumSeg;
    AnyFolder &L5Seg = ......BodyModel.Trunk.Segments.L5Seg;
    AnyFolder &L4Seg = ......BodyModel.Trunk.Segments.L4Seg;
    AnyFolder &L3Seg = ......BodyModel.Trunk.Segments.L3Seg;
    AnyFolder &L2Seg = ......BodyModel.Trunk.Segments.L2Seg;
    AnyFolder &L1Seg = ......BodyModel.Trunk.Segments.L1Seg;
  };

  AnyFolder &JointsLumberRef = .....BodyModel.Trunk.Joints.Lumbar;

  AnyFolder &LegSegSideRef = .SideBodyModelRef.Leg.Segments;
  AnyFolder &LegJntsRef =  .SideBodyModelRef.Leg.Joints;
  AnyFolder &LegMusRef = .SideBodyModelRef.Leg.Muscles;
  AnyFolder &MusRef = .SideBodyModelRef.Leg.EvaluateJointStrengthMusRef ;

 AnyFixedRefFrame ground = {
   AnyRefNode node = {
     ARel = ..SegmentsRef.Pelvis.Axes0;
     sRel = ..SegmentsRef.Pelvis.r0;
   };
 };


AnyFolder Drivers = {
   AnyVar AngularVelocity = (..RangeOfMotion[1]-..RangeOfMotion[0])*pi/180;

 AnyKinMeasureOrg LegMeasure = {
  AnyKinMeasure& HipFlexion= ...SideBodyInterfaceRef.HipFlexion;
  AnyKinMeasure& HipAbduction= ...SideBodyInterfaceRef.HipAbduction;
  AnyKinMeasure& HipExternalRotation= ...SideBodyInterfaceRef.HipExternalRotation;
  AnyKinMeasure& KneeFlexion= ...SideBodyInterfaceRef.KneeFlexion;
  AnyKinMeasure& AnklePlantarFlexion= ...SideBodyInterfaceRef.AnklePlantarFlexion;
  AnyKinMeasure& AnkleEversion= ...SideBodyInterfaceRef.AnkleEversion;
 };

 AnyStdJoint PelvisGround={
    AnyRefFrame &Ground = ..ground.node;
    AnyRefFrame &Sacrum= ..SegmentsRef.Pelvis;
 };

 AnyReacForce SpineReacForce =
 {
   AnyKinMeasure& ref1 =  .......BodyModel.Interface.Trunk.IntervertebralAngles.L5Sacrum.Jnt;
   AnyKinMeasure& ref2 =  .......BodyModel.Interface.Trunk.IntervertebralAngles.L4L5.Jnt;
   AnyKinMeasure& ref3 =  .......BodyModel.Interface.Trunk.IntervertebralAngles.L3L4.Jnt;
   AnyKinMeasure& ref4 =  .......BodyModel.Interface.Trunk.IntervertebralAngles.L2L3.Jnt;
   AnyKinMeasure& ref5 =  .......BodyModel.Interface.Trunk.IntervertebralAngles.L1L2.Jnt;
 };

 AnyKinEq ThoraxFix =
 {
   AnyKinMeasure& PelvisThoraxExtension= .......BodyModel.Interface.Trunk.PelvisThoraxExtension;
   AnyKinMeasure& PelvisThoraxLateralBending= .......BodyModel.Interface.Trunk.PelvisThoraxLateralBending;
   AnyKinMeasure& PelvisThoraxRotation= .......BodyModel.Interface.Trunk.PelvisThoraxRotation;
   Reaction.Type = repmat(nDim, On);
 };

};// Drivers
  AnyForce JointLoad = {
      AnyKinMeasure& ref = .Drivers.LegMeasure;
      AnyInt Sign = -round(.Drivers.AngularVelocity/abs(.Drivers.AngularVelocity));
      F = 30*Sign*not(not(.Drivers.LegDriver.DriverVel));
  };

};


AnyBodyStudy Study = {
  Gravity = {0,0,0};
  tStart = 0;
  tEnd = 1;
  #ifdef EVALUATE_JOINT_STRENGTH_NSTEP
  nStep = EVALUATE_JOINT_STRENGTH_NSTEP;
  #else
  nStep = 40;
  #endif

  Kinematics.PosAnalysisOnlyOnOff = On;
  InitialConditions.PosAnalysisOnlyOnOff = On;

  InverseDynamics.Criterion.Type = MR_MinMaxStrict;
  InverseDynamics.Criterion.UpperBoundOnOff = Off;


  AnyFolder &Model = .Model;

  AnyFolder JointStrength = {
     AnyFolder Abscissa  = {
        AnyVar JointAngle = not(not(..Model.Drivers.LegDriver.DriverVel))*..Model.Drivers.LegMeasure.Pos'*180/pi;
     };
     AnyVar JointStrength = max(abs(.Model.JointLoad.F))/(.MaxMuscleActivity+0.00000001);

     //AnyVar PsoasMajorT12I = -1*.Model.SpineMusRef.PsoasMajor.PsoasMajorT12.LmtDot/.Model.Drivers.AngularVelocity;
  };
#if (BM_LEG_MUSCLES_LEFT & BM_LEG_MUSCLES_RIGHT & (BM_TRUNK_MUSCLES != OFF))

  AnyFolder MuscleEffectiveStrengthCalculations = {
    AnyFolder Abscissa = {
      AnyVar JointAngle =  not(not(..Model.Drivers.LegDriver.DriverVel))*..Model.Drivers.LegMeasure.Pos'*180/pi  ;
    };

#define _CODE_MACRO_(name) AnyVar name = ( .Model.MusRef.LegMuscles.name.Strength *  .Model.MusRef.LegMuscles.name.Activity);
    #include "legmuscles_for_output.any"
#undef _CODE_MACRO_
  };
#endif
};


#if (ANYBODY_V1 >= 6) & (ANYBODY_V2 >= 1)
AnyFolder ModelViews = { AnyFolder Views =  {}; };
#else
AnyProject ModelViews = {};
#endif

ModelViews = {
  AnyDrawGroup Selection = {
    Objects = arrcat(
      ObjSearchRecursive(CompleteNameOf(&..Model.SegmentsRef ), "*", "AnyDrawObject"),
      ObjSearchRecursive(CompleteNameOf(&..Model.LegSegSideRef ), "*", "AnyDrawObject"),
      ObjSearchRecursive(CompleteNameOf(&..Model.MusRef.LegMuscles  ), "*", "AnyDrawMuscle"),
      ObjSearchRecursive(CompleteNameOf(&..Model.MusRef.SpineMuscles  ), "*", "AnyDrawMuscle"),
      ObjSearchRecursive(CompleteNameOf(&..Model.MusRef), "*", "AnyDrawMuscle")
    );
  };
  Views = {
    AnyProjectModelViewDefinition SelectedView = {
      DrawGroupSequence = {&..Selection};
      Reset = {On};
    };
  };
};


AnyOperationSequence Run =
{
    AnyOperationMacro SetView =
    {
      MacroStr = { "classoperation " + CompleteNameOf(&..ModelViews.Views.SelectedView) + strquote("Set View") };
    };
    AnyOperation &Study = .Study.InverseDynamics;
//    #ifdef ANYBODY_PATH_OUTPUT
//    AnyOperationMacro Save =
//    {
//      MacroStr = {
//           "classoperation " + CompleteNameOf(&.Study.Output) + strquote("Save data")
//           + " --type=" + strquote("Deep") +" --file=" + strquote(
//           ANYBODY_PATH_OUTPUT + .OutputFileName + ".anydata.h5")
//      };
//    #endif
};
