/* This file is used when there is no real muscles in the model
it adds reaction forces to the open dof in the leg*/


AnyFolder JointReactions = {


  AnyReacForce HipJoint={

    AnyKinMeasure& DOF = ..Joints.Hip;

  };

  AnyReacForce  KneeJoint={
    AnyKinMeasure& DOF = ..Joints.Knee;

  };


  AnyReacForce AnkleJnt={
    AnyKinMeasure& DOF = ..Joints.Ankle;
  };

};// End of JointsLumbar
