AnyVar AnyVar_HipFlexion = ...Interface.Left.HipFlexion.Pos[0]*180/pi;
AnyVar AnyVar_HipAbduction = ...Interface.Left.HipAbduction.Pos[0]*180/pi;
AnyVar AnyVar_HipExternalRotation = ...Interface.Left.HipExternalRotation.Pos[0]*180/pi;

AnyVar AnyVar_KneeFlexion = ...Interface.Left.KneeFlexion.Pos[0]*180/pi;

#if BM_FOOT_MODEL == _FOOT_MODEL_LEG_FOOT_
AnyVar AnyVar_AnklePlantarFlexion =...Interface.Left.AnklePlantarFlexion.Pos[0]*180/pi;
AnyVar AnyVar_AnkleEversion =...Interface.Left.AnkleEversion.Pos[0]*180/pi;
#endif
