//This is the calibration2 file it will calibrate specfic muscles on the leg
AnyFolder LegCal2 ={
  AnyComponentDefinition obj = {};

  AnyFolder &Pelvis = ...BodyModel.Trunk.Segments.PelvisSeg; //This is a reference to the folder which holds the human part of the model
  AnyFolder &LegSegSide = .SideHumanFolderRef.Leg.Segments; //This is a reference to the folder which holds the human part of the model

  AnyFolder &JointsCal2 =  .SideHumanFolderRef.Leg.Joints;


  AnyFixedRefFrame ground = {
    AnyRefNode node = {
       ARel=..Pelvis.Axes0;
      sRel=..Pelvis.r0;
    };
  };

  AnyRevoluteJoint PelvisGround={
    AnyRefFrame &Ground = .ground.node;
    AnyRefFrame &Sacrum= ....BodyModel.Trunk.Segments.PelvisSeg;
    Axis=z;
  };

  AnyKinEqSimpleDriver PelvisGroundRot = {
    AnyRevoluteJoint &Jnt = .PelvisGround;
    DriverPos = {0};
    DriverVel = {0};
    Reaction.Type = {Off};
  };


  #if BM_FOOT_MODEL == _FOOT_MODEL_LEG_FOOT_
  AnyKinEqSimpleDriver JntDOFDriverRight = {
    AnyKinMeasure& Joint = ..SideHumanFolderRef.Leg.JntDOF;
    DriverPos = {1.83,0.0,0,0,0,-0.87}; //-15 degrees dorsal flexion
    DriverVel = {0.0,0.0,0,0,0,0};
    Reaction.Type = {Off,Off,Off,Off,Off,Off};
  };//JntDOFDriverRight
  #endif

  // Calibration2 calibrates the following muscles of the lower leg:
  // Soleus, Gastrocnemius, Hamstrings, Gluteus maximus, Iliopsoas
  AnyFolder &MuscleParRightCal2 =  .SideHumanFolderRef.Leg.MuscleModels;

  AnyFolder MusRight={
    #if BM_FOOT_MODEL == _FOOT_MODEL_LEG_FOOT_
    AnyMuscleViaPoint &TibialisPosterior = ..SideHumanFolderRef.Leg.Muscles.TibialisPosterior; //added
    AnyMuscleViaPoint &Soleus =  ..SideHumanFolderRef.Leg.Muscles.Soleus;
    AnyMuscleViaPoint &Gastrocnemius =  ..SideHumanFolderRef.Leg.Muscles.Gastrocnemius;
    #endif
    AnyMuscleViaPoint &GluteusMaximus2 =  ..SideHumanFolderRef.Leg.Muscles.GluteusMaximus2;
    AnyMuscleViaPoint &Semitendinosus =  ..SideHumanFolderRef.Leg.Muscles.Semitendinosus;
//  AnyMuscleViaPoint &Semimembranosus =  ..SideHumanFolderRef.Leg.Muscles.Semimembranosus;
    AnyMuscleViaPoint &BicepsFemorisCaputLongum =  ..SideHumanFolderRef.Leg.Muscles.BicepsFemorisCaputLongum;
    AnyMuscleViaPoint &Sartorius =  ..SideHumanFolderRef.Leg.Muscles.Sartorius;

    AnyMuscleViaPoint &GemmelusSuperior =  ..SideHumanFolderRef.Leg.Muscles.GemmelusSuperior;
    AnyMuscleViaPoint &GemmelusInferior=  ..SideHumanFolderRef.Leg.Muscles.GemmelusInferior;
    AnyMuscleViaPoint &Pictineus=  ..SideHumanFolderRef.Leg.Muscles.Pictineus;
    AnyMuscleViaPoint &ObturatoriusInternus=  ..SideHumanFolderRef.Leg.Muscles.ObturatoriusInternus;
    AnyMuscleViaPoint &ObturatoriusExternus=  ..SideHumanFolderRef.Leg.Muscles.ObturatoriusExternus;

    AnyMuscleViaPoint &QuadratusFemoris = ..SideHumanFolderRef.Leg.Muscles.QuadratusFemoris;
   };
};

// The study: Operations to be performed on the model
AnyBodyCalibrationStudy LegCalibrationStudy2 = {
  AnyFolder &ref=.LegCal2;
  nStep = 1;
  InitialConditions.SolverType = KinSolDeterminate;
  Kinematics.SolverType = KinSolDeterminate;
  InitialConditions.SmallStepAssumptionOnOff = Off;
  Kinematics.SmallStepAssumptionOnOff = Off;
};
