//This file can be used for making shortcuts to the muscle data

#if BM_FOOT_MODEL == _FOOT_MODEL_LEG_FOOT_
AnyFolder &mus1=..Muscles.Soleus;
AnyFolder &mus2=..Muscles.Gastrocnemius;
AnyFolder &mus3=..Muscles.FlexorDigitorumLongus;
AnyFolder &mus4=..Muscles.FlexorHallucisLongus;
AnyFolder &mus6=..Muscles.TibialisPosterior;
AnyFolder &mus5=..Muscles.PeroneusBrevis   ;
AnyFolder &mus7=..Muscles.ExtensorDigitorumLongus;
AnyFolder &mus8=..Muscles.ExtensorHallucisLongus;
#endif
AnyFolder &mus9=..Muscles.VastusLateralis;
AnyFolder &mus10=..Muscles.VastusMedialis;
AnyFolder &mus11=..Muscles.VastusIntermedius;
AnyFolder &mus12=..Muscles.RectusFemoris;
AnyFolder &mus13=..Muscles.Semitendinosus;
AnyFolder &mus14=..Muscles.Semimembranosus;
AnyFolder &mus15=..Muscles.BicepsFemorisCaputLongum;
AnyFolder &mus16=..Muscles.BicepsFemorisCaputBreve;
AnyFolder &mus17=..Muscles.Sartorius;
AnyFolder &mus18=..Muscles.Gracilis;
AnyFolder &mus19=..Muscles.Iliopsoas;
AnyFolder &mus20=..Muscles.GluteusMinimus1;
AnyFolder &mus21=..Muscles.GluteusMinimus2;
AnyFolder &mus22=..Muscles.GluteusMinimus3;
AnyFolder &mus23=..Muscles.GluteusMedius1;
AnyFolder &mus24=..Muscles.GluteusMedius2;
AnyFolder &mus25=..Muscles.GluteusMedius3;
AnyFolder &mus26=..Muscles.GluteusMaximus1;
AnyFolder &mus27=..Muscles.GluteusMaximus2;
AnyFolder &mus28=..Muscles.GluteusMaximus3;
AnyFolder &mus29=..Muscles.TensorFasciaeLatae;
AnyFolder &mus30=..Muscles.Piriformis;
AnyFolder &mus31=..Muscles.AdductorLongus;
AnyFolder &mus32=..Muscles.AdductorMagnus1;
AnyFolder &mus33=..Muscles.AdductorMagnus2;
AnyFolder &mus34=..Muscles.AdductorMagnus3;
AnyFolder &mus35=..Muscles.QuadratusFemoris ;
AnyFolder &mus36=..Muscles.AbductorBrevis ;
AnyFolder &mus37=..Muscles.ObturatoriusInternus ;
AnyFolder &mus38=..Muscles.ObturatoriusExternus  ;
AnyFolder &mus39=..Muscles.Pictineus ;
AnyFolder &mus40=..Muscles.GemmelusInferior ;
AnyFolder &mus41=..Muscles.GemmelusSuperior ;

AnyFolder &mus42= .TrunkMuscles.PsoasMajor.PsoasMajorT12;
AnyFolder &mus43= .TrunkMuscles.PsoasMajor.PsoasMajorL1_1;
AnyFolder &mus44= .TrunkMuscles.PsoasMajor.PsoasMajorL1_2;
AnyFolder &mus45= .TrunkMuscles.PsoasMajor.PsoasMajorL2_1;
AnyFolder &mus46= .TrunkMuscles.PsoasMajor.PsoasMajorL2_2;
AnyFolder &mus47= .TrunkMuscles.PsoasMajor.PsoasMajorL3_1;
AnyFolder &mus48= .TrunkMuscles.PsoasMajor.PsoasMajorL3_2;
AnyFolder &mus49= .TrunkMuscles.PsoasMajor.PsoasMajorL4_1;
AnyFolder &mus50= .TrunkMuscles.PsoasMajor.PsoasMajorL4_2;
AnyFolder &mus51= .TrunkMuscles.PsoasMajor.PsoasMajorL5_1;
AnyFolder &mus52= .TrunkMuscles.PsoasMajor.PsoasMajorL5_2;
