// Definitions of muscles in the right lower extremity

// Mark de Zee

// Sartorius, gracilis added to "hamstrings" biarticular
// muscles 26-6-02. GMax split into three, tensor fasciae
// latae added 5-9-02
// Mark Thompson

// -------------------------------------------------------
// This is an interface reference to make sure that the
// include file MusDrawSettings2.any always can be left
// unchanged and not affected by different directory
// levels.
// -------------------------------------------------------

AnyFolder &Ref = ....DrawSettings.Muscle;

#if BM_FOOT_MODEL == _FOOT_MODEL_LEG_FOOT_
AnyMuscleViaPoint Soleus = {
  AnyMuscleModel &MusMdl = ..MuscleModels.SoleusPar;
  AnyRefNode &Org = ..Segments.Shank.SoleusNode;
  AnyRefNode &Ins = ..Segments.Foot.SoleusNode;
  viewMuscle = {#include "../DrawSettings/MusDrawSettings2.any"};
};

AnyMuscleViaPoint Gastrocnemius = {
  AnyMuscleModel &MusMdl = ..MuscleModels.GastrocnemiusPar;
  AnyRefNode &Org = ..Segments.Thigh.GastrocnemiusNode;
  AnyRefNode &Via = ..Segments.Shank.GastrocnemiusViaNode;
  AnyRefNode &Ins = ..Segments.Foot.GastrocnemiusNode;
  viewMuscle = {#include "../DrawSettings/MusDrawSettings2.any"};
};

AnyMuscleViaPoint FlexorDigitorumLongus = {
  AnyMuscleModel &MusMdl = ..MuscleModels.FlexorDigitorumLongusPar;
  AnyRefNode &Org = ..Segments.Shank.FlexorDigitorumLongusNode;
  AnyRefNode &Via = ..Segments.Foot.FlexorDigitorumLongusViaNode;
  AnyRefNode &Ins = ..Segments.Foot.FlexorDigitorumLongusNode;
  viewMuscle = {#include "../DrawSettings/MusDrawSettings2.any"
  };
};

AnyMuscleViaPoint FlexorHallucisLongus = {
  AnyMuscleModel &MusMdl = ..MuscleModels.FlexorHallucisLongusPar;
  AnyRefNode &Org = ..Segments.Shank.FlexorHallucisLongusNode;
  AnyRefNode &Via = ..Segments.Foot.FlexorHallucisLongusViaNode;
  AnyRefNode &Ins = ..Segments.Foot.FlexorHallucisLongusNode;
  viewMuscle = {#include "../DrawSettings/MusDrawSettings2.any"};
};

AnyMuscleViaPoint TibialisPosterior = {
  AnyMuscleModel &MusMdl = ..MuscleModels.TibialisPosteriorPar;
  AnyRefNode &Org = ..Segments.Shank.TibialisPosteriorNode;
  AnyRefNode &Via = ..Segments.Foot.TibialisPosteriorViaNode;
  AnyRefNode &Ins = ..Segments.Foot.TibialisPosteriorNode;
  viewMuscle = {#include "../DrawSettings/MusDrawSettings2.any"};

};

AnyMuscleViaPoint PeroneusBrevis = {
  AnyMuscleModel &MusMdl = ..MuscleModels.PeroneusBrevisPar;
  AnyRefNode &Org = ..Segments.Shank.PeroneusBrevisNode;
  AnyRefNode &Via = ..Segments.Foot.PeroneusBrevisViaNode;
  AnyRefNode &Ins = ..Segments.Foot.PeroneusBrevisNode;
  viewMuscle = {#include "../DrawSettings/MusDrawSettings2.any"};
};

AnyMuscleViaPoint TibialisAnterior = {
  AnyMuscleModel &MusMdl = ..MuscleModels.TibialisAnteriorPar;
  AnyRefNode &Org = ..Segments.Shank.TibialisAnteriorNode;
  AnyRefNode &Via = ..Segments.Foot.TibialisAnteriorViaNode;
  AnyRefNode &Ins = ..Segments.Foot.TibialisAnteriorNode;
  viewMuscle = {#include "../DrawSettings/MusDrawSettings2.any"};
};

AnyMuscleViaPoint ExtensorDigitorumLongus = {
  AnyMuscleModel &MusMdl = ..MuscleModels.ExtensorDigitorumLongusPar;
  AnyRefNode &Org = ..Segments.Shank.ExtensorDigitorumLongusNode;
  AnyRefNode &Via = ..Segments.Foot.ExtensorDigitorumViaNode;
  AnyRefNode &Ins = ..Segments.Foot.ExtensorDigitorumLongusNode;
  viewMuscle = {#include "../DrawSettings/MusDrawSettings2.any"};
};

AnyMuscleViaPoint ExtensorHallucisLongus = {
  AnyMuscleModel &MusMdl = ..MuscleModels.ExtensorHallucisLongusPar;
  AnyRefNode &Org = ..Segments.Shank.ExtensorHallucisLongusNode;
  AnyRefNode &Via = ..Segments.Foot.ExtensorHallucisViaNode;
  AnyRefNode &Ins = ..Segments.Foot.ExtensorHallucisLongusNode;
  viewMuscle = {#include "../DrawSettings/MusDrawSettings2.any"};
};
#endif

// Start Quadriceps
AnyMuscleViaPoint VastusLateralis = {
  AnyMuscleModel &MusMdl = ..MuscleModels.VastusLateralisPar;
  AnyRefNode &Org = ..Segments.Thigh.VastusLateralisNode;
  AnyRefNode &Via1 = ..Segments.Thigh.QuadricepsViaNode1;
  AnyRefNode &Via2 = ..Segments.Thigh.QuadricepsViaNode2;
  AnyRefNode &Ins = ..Segments.Shank.QuadricepsNode;
  viewMuscle = {#include "../DrawSettings/MusDrawSettings2.any"};
};

AnyMuscleViaPoint VastusMedialis = {
  AnyMuscleModel &MusMdl = ..MuscleModels.VastusMedialisPar;
  AnyRefNode &Org = ..Segments.Thigh.VastusMedialisNode;
  AnyRefNode &Via1 = ..Segments.Thigh.QuadricepsViaNode1;
  AnyRefNode &Via2 = ..Segments.Thigh.QuadricepsViaNode2;
  AnyRefNode &Ins = ..Segments.Shank.QuadricepsNode;
  viewMuscle = {#include "../DrawSettings/MusDrawSettings2.any"};
};

AnyMuscleViaPoint VastusIntermedius = {
  AnyMuscleModel &MusMdl = ..MuscleModels.VastusIntermediusPar;
  AnyRefNode &Org = ..Segments.Thigh.VastusIntermediusNode;
  AnyRefNode &Via1 = ..Segments.Thigh.QuadricepsViaNode1;
  AnyRefNode &Via2 = ..Segments.Thigh.QuadricepsViaNode2;
  AnyRefNode &Ins = ..Segments.Shank.QuadricepsNode;
  viewMuscle = {#include "../DrawSettings/MusDrawSettings2.any"};
};

AnyMuscleViaPoint RectusFemoris = {
  AnyMuscleModel &MusMdl = ..MuscleModels.RectusFemorisPar;
  AnyRefNode &Org = ..HipNodeRef.RectusFemorisNode;
  AnyRefNode &Via1 = ..Segments.Thigh.QuadricepsViaNode1;
  AnyRefNode &Via2 = ..Segments.Thigh.QuadricepsViaNode2;
  AnyRefNode &Ins = ..Segments.Shank.QuadricepsNode;
  viewMuscle = {#include "../DrawSettings/MusDrawSettings2.any"};
};
// End Quadriceps.

//// Start of Hamstrings

AnyMuscleViaPoint Semitendinosus = {
  AnyMuscleModel &MusMdl = ..MuscleModels.SemitendinosusPar;
  AnyRefNode &Org = ..HipNodeRef.SemitendinosusNode;
  AnyRefNode &Via = ..Segments.Shank.SemitendinosusViaNode;
  AnyRefNode &Ins = ..Segments.Shank.SemitendinosusNode;
  viewMuscle = {#include "../DrawSettings/MusDrawSettings2.any"};
};

AnyMuscleViaPoint Semimembranosus = {
  AnyMuscleModel &MusMdl = ..MuscleModels.SemimembranosusPar;
  AnyRefNode &Org = ..HipNodeRef.SemimembranosusNode;
  AnyRefNode &Via = ..Segments.Shank.SemimembranosusViaNode;
  AnyRefNode &Ins = ..Segments.Shank.SemimembranosusNode;
  viewMuscle = {#include "../DrawSettings/MusDrawSettings2.any"};
};

AnyMuscleViaPoint BicepsFemorisCaputLongum = {
  AnyMuscleModel &MusMdl = ..MuscleModels.BicepsFemorisCaputLongumPar;
  AnyRefNode &Org = ..HipNodeRef.BicepsFemorisCaputLongumNode;
  AnyRefNode &Via = ..Segments.Shank.BicepsFemorisCaputLongumViaNode;
  AnyRefNode &Ins = ..Segments.Shank.BicepsFemorisCaputLongumNode;
  viewMuscle = {#include "../DrawSettings/MusDrawSettings2.any"};
};

AnyMuscleViaPoint BicepsFemorisCaputBreve = {
  AnyMuscleModel &MusMdl = ..MuscleModels.BicepsFemorisCaputBrevePar;
  AnyRefNode &Org = ..Segments.Thigh.BicepsFemorisCaputBreveNode;
  AnyRefNode &Via = ..Segments.Shank.BicepsFemorisCaputBreveViaNode;
  AnyRefNode &Ins = ..Segments.Shank.BicepsFemorisCaputBreveNode;
  viewMuscle = {#include "../DrawSettings/MusDrawSettings2.any"};
};
//
AnyMuscleViaPoint Sartorius = {
  AnyMuscleModel &MusMdl = ..MuscleModels.SartoriusPar;
  AnyRefNode &Org = ..HipNodeRef.SartoriusNode;
  AnyRefNode &Via1 = ..Segments.Thigh.SartoriusViaNode1;
  AnyRefNode &Via2 = ..Segments.Shank.SartoriusViaNode2;
  AnyRefNode &Via3 = ..Segments.Shank.SartoriusViaNode3;
  AnyRefNode &Ins = ..Segments.Shank.SartoriusNode;
  viewMuscle = {#include "../DrawSettings/MusDrawSettings2.any"};
};

AnyMuscleViaPoint Gracilis = {
  AnyMuscleModel &MusMdl = ..MuscleModels.GracilisPar;
  AnyRefNode &Org = ..HipNodeRef.GracilisNode;
  AnyRefNode &Via = ..Segments.Shank.GracilisViaNode;
  AnyRefNode &Via1 = ..Segments.Shank.GracilisViaNode1;
  AnyRefNode &Ins = ..Segments.Shank.GracilisNode;
  viewMuscle = {#include "../DrawSettings/MusDrawSettings2.any"};
};
// End of Hamstrings


// Start hip muscles
AnyMuscleShortestPath Iliopsoas = {
  AnyMuscleModel &MusMdl = ..MuscleModels.IliopsoasPar;
  AnyRefNode &Org = ..HipNodeRef.IliopsoasNode;
  //AnyRefNode &Via1 = ..HipNodeRef.IliopsoasViaNode1;
  AnyRefNode &Ins = ..Segments.Thigh.IliopsoasNode;
  viewMuscle = {#include "../DrawSettings/MusDrawSettings2.any"};
  SPLine.StringMesh = 50;
  AnySurfCylinder &Surf1 =..HipNodeRef.pecent_ossis_pubis.cyl;
  SPLine.InitWrapPosVectors = {    {0.04,0.03,0.0*..Sign}, {0.1,..Sign*0.0,0.0}  };
  SPLine.RelTol = 0.00000001;
};

 /*
AnyMuscleViaPoint Iliopsoas = {
  AnyMuscleModel &MusMdl = ..MuscleModels.IliopsoasPar;
  AnyRefNode &Org = ..HipNodeRef.IliopsoasNode;
  AnyRefNode &Via1 = ..HipNodeRef.IliopsoasViaNode1;
  AnyRefNode &Ins = ..Segments.Thigh.IliopsoasNode;
  viewMuscle = {#include "../DrawSettings/MusDrawSettings2.any"};
};*/

AnyMuscleViaPoint GluteusMinimus1 = {
  AnyMuscleModel &MusMdl = ..MuscleModels.GluteusMinimus1Par;
  AnyRefNode &Org = ..HipNodeRef.GluteusMinimus1Node;
  AnyRefNode &Ins = ..Segments.Thigh.GluteusMinimusNode;
  viewMuscle = {#include "../DrawSettings/MusDrawSettings2.any"};
};

AnyMuscleViaPoint GluteusMinimus2 = {
  AnyMuscleModel &MusMdl = ..MuscleModels.GluteusMinimus2Par;
  AnyRefNode &Org = ..HipNodeRef.GluteusMinimus2Node;
  AnyRefNode &Ins = ..Segments.Thigh.GluteusMinimusNode;
  viewMuscle = {#include "../DrawSettings/MusDrawSettings2.any"};
};

AnyMuscleViaPoint GluteusMinimus3 = {
  AnyMuscleModel &MusMdl = ..MuscleModels.GluteusMinimus3Par;
  AnyRefNode &Org = ..HipNodeRef.GluteusMinimus3Node;
  AnyRefNode &Ins = ..Segments.Thigh.GluteusMinimusNode;
  viewMuscle = {#include "../DrawSettings/MusDrawSettings2.any"};
};

AnyMuscleViaPoint GluteusMedius1 = {
  AnyMuscleModel &MusMdl = ..MuscleModels.GluteusMedius1Par;
  AnyRefNode &Org = ..HipNodeRef.GluteusMedius1Node;
  AnyRefNode &Ins = ..Segments.Thigh.GluteusMediusNode;
  viewMuscle = {#include "../DrawSettings/MusDrawSettings2.any"};
};

AnyMuscleViaPoint GluteusMedius2 = {
  AnyMuscleModel &MusMdl = ..MuscleModels.GluteusMedius2Par;
  AnyRefNode &Org = ..HipNodeRef.GluteusMedius2Node;
  AnyRefNode &Ins = ..Segments.Thigh.GluteusMediusNode;
  viewMuscle = {#include "../DrawSettings/MusDrawSettings2.any"};
};

AnyMuscleViaPoint GluteusMedius3 = {
  AnyMuscleModel &MusMdl = ..MuscleModels.GluteusMedius3Par;
  AnyRefNode &Org = ..HipNodeRef.GluteusMedius3Node;
  AnyRefNode &Ins = ..Segments.Thigh.GluteusMediusNode;
  viewMuscle = {#include "../DrawSettings/MusDrawSettings2.any"};
};

AnyMuscleViaPoint GluteusMaximus1 = {
  AnyMuscleModel &MusMdl = ..MuscleModels.GluteusMaximus1Par;
  AnyRefNode &Org = ..HipNodeRef.GluteusMaximus1Node;
  AnyRefNode &Via1 = ..HipNodeRef.GluteusMaximus1ViaNode1;
  AnyRefNode &Via2 = ..Segments.Thigh.GluteusMaximus1ViaNode2;
  AnyRefNode &Ins = ..Segments.Shank.GluteusMaximus1Node;
  viewMuscle = {#include "../DrawSettings/MusDrawSettings2.any"};
};

AnyMuscleViaPoint GluteusMaximus2 = {
  AnyMuscleModel &MusMdl = ..MuscleModels.GluteusMaximus2Par;
  AnyRefNode &Org = ..HipNodeRef.GluteusMaximus2Node;
  AnyRefNode &Via1 = ..HipNodeRef.GluteusMaximus2ViaNode1;
  AnyRefNode &Via2 = ..HipNodeRef.GluteusMaximus2ViaNode2;
  AnyRefNode &Via3 = ..Segments.Thigh.GluteusMaximus2ViaNode3;
  AnyRefNode &Ins = ..Segments.Shank.GluteusMaximus2Node;
  viewMuscle = {#include "../DrawSettings/MusDrawSettings2.any"  };
};

AnyMuscleViaPoint GluteusMaximus3 = {
  AnyMuscleModel &MusMdl = ..MuscleModels.GluteusMaximus3Par;
  AnyRefNode &Org = ..HipNodeRef.GluteusMaximus3Node;
  AnyRefNode &Via1 = ..HipNodeRef.GluteusMaximus3ViaNode1;
  AnyRefNode &Ins = ..Segments.Thigh.GluteusMaximus3Node;
  viewMuscle = {#include "../DrawSettings/MusDrawSettings2.any"  };
};

AnyMuscleViaPoint TensorFasciaeLatae = {
  AnyMuscleModel &MusMdl = ..MuscleModels.TensorFasciaeLataePar;
  AnyRefNode &Org = ..HipNodeRef.TensorFasciaeLataeNode;
  AnyRefNode &Via2 = ..Segments.Thigh.TensorFasciaeLataeViaNode2;
  AnyRefNode &Ins = ..Segments.Shank.TensorFasciaeLataeNode;
  viewMuscle = {#include "../DrawSettings/MusDrawSettings2.any"};
};

AnyMuscleViaPoint Piriformis = {
  AnyMuscleModel &MusMdl = ..MuscleModels.PiriformisPar;
  AnyRefNode &Org = ..HipNodeRef.PiriformisNode;
  AnyRefNode &Via = ..HipNodeRef.PiriformisViaNode;
  AnyRefNode &Ins = ..Segments.Thigh.PiriformisNode;
  viewMuscle = {#include "../DrawSettings/MusDrawSettings2.any"};
};

AnyMuscleViaPoint AdductorLongus = {
  AnyMuscleModel &MusMdl = ..MuscleModels.AdductorLongusPar;
  AnyRefNode &Org = ..HipNodeRef.AdductorLongusNode;
  AnyRefNode &Ins = ..Segments.Thigh.AdductorLongusNode;
  viewMuscle = {#include "../DrawSettings/MusDrawSettings2.any"};
};

AnyMuscleViaPoint AdductorMagnus1 = {
  AnyMuscleModel &MusMdl = ..MuscleModels.AdductorMagnus1Par;
  AnyRefNode &Org = ..HipNodeRef.AdductorMagnusNode;
  AnyRefNode &Ins = ..Segments.Thigh.AdductorMagnus1Node;
  viewMuscle = {#include "../DrawSettings/MusDrawSettings2.any"};
};

AnyMuscleViaPoint AdductorMagnus2 = {
  AnyMuscleModel &MusMdl = ..MuscleModels.AdductorMagnus2Par;
  AnyRefNode &Org = ..HipNodeRef.AdductorMagnusNode;
  AnyRefNode &Ins = ..Segments.Thigh.AdductorMagnus2Node;
  viewMuscle = {#include "../DrawSettings/MusDrawSettings2.any"};
};

AnyMuscleViaPoint AdductorMagnus3 = {
  AnyMuscleModel &MusMdl = ..MuscleModels.AdductorMagnus3Par;
  AnyRefNode &Org = ..HipNodeRef.AdductorMagnusNode;
  AnyRefNode &Ins = ..Segments.Thigh.AdductorMagnus3Node;
  viewMuscle = {#include "../DrawSettings/MusDrawSettings2.any"};
};


AnyMuscleViaPoint QuadratusFemoris = {
  AnyMuscleModel &MusMdl = ..MuscleModels.QuadratusFemorisPar;
  AnyRefNode &Org = ..HipNodeRef.QuadratusFemorisNode;
  AnyRefNode &Ins = ..Segments.Thigh.QuadratusFemorisNode;
  viewMuscle = {#include "../DrawSettings/MusDrawSettings2.any"};
};
AnyMuscleViaPoint AbductorBrevis = {
  AnyMuscleModel &MusMdl = ..MuscleModels.AbductorBrevisPar;
  AnyRefNode &Org = ..HipNodeRef.AbductorBrevisNode;
  AnyRefNode &Ins = ..Segments.Thigh.AbductorBrevisNode;
  viewMuscle = {#include "../DrawSettings/MusDrawSettings2.any"};

};


AnyMuscleViaPoint ObturatoriusInternus  = {
  AnyMuscleModel &MusMdl = ..MuscleModels.ObturatoriusInternusPar;

  AnyRefNode &Org = ..HipNodeRef.ObturatoriusInternusNode;
  AnyRefNode &Via =..HipNodeRef.ObturatoriusInternusViaNode;
  AnyRefNode &Ins = ..Segments.Thigh.ObturatoriusInternusNode;
  viewMuscle = {#include "../DrawSettings/MusDrawSettings2.any"};


};

  AnyMuscleViaPoint ObturatoriusExternus  = {
    AnyMuscleModel &MusMdl = ..MuscleModels.ObturatoriusExternusPar;
    AnyRefNode &Org = ..HipNodeRef.ObturatoriusExternusNode;
    AnyRefNode &Ins = ..Segments.Thigh.ObturatoriusExternusNode;
    viewMuscle = {#include "../DrawSettings/MusDrawSettings2.any"};


};

AnyMuscleViaPoint Pictineus  = {
    AnyMuscleModel &MusMdl = ..MuscleModels.PictineusPar;
    AnyRefNode &Org = ..HipNodeRef.PictineusNode;
    AnyRefNode &Ins = ..Segments.Thigh.PectineusNode ;
    viewMuscle = {#include "../DrawSettings/MusDrawSettings2.any"};
};

AnyMuscleViaPoint GemmelusInferior  = {
    AnyMuscleModel &MusMdl = ..MuscleModels.GemellusInferiorPar;
    AnyRefNode &Org = ..HipNodeRef.GemellusInferiorNode;
    AnyRefNode &Ins = ..Segments.Thigh.GemellusInferiorNode ;
    viewMuscle = {#include "../DrawSettings/MusDrawSettings2.any"};
};

AnyMuscleViaPoint GemmelusSuperior  = {
    AnyMuscleModel &MusMdl = ..MuscleModels.GemellusSuperiorPar;
    AnyRefNode &Org = ..HipNodeRef.GemellusSuperiorNode;
    AnyRefNode &Ins = ..Segments.Thigh.GemellusSuperiorNode ;
    viewMuscle = {#include "../DrawSettings/MusDrawSettings2.any"};
};


AnyMuscle &PsoasMajorT12 = .TrunkMuscles.PsoasMajor.PsoasMajorT12;//< Psoas muscles are created by the Trunk model
AnyMuscle &PsoasMajorL1_1 = .TrunkMuscles.PsoasMajor.PsoasMajorL1_1;//< Psoas muscles are created by the Trunk model
AnyMuscle &PsoasMajorL1_2 = .TrunkMuscles.PsoasMajor.PsoasMajorL1_2;//< Psoas muscles are created by the Trunk model
AnyMuscle &PsoasMajorL2_1= .TrunkMuscles.PsoasMajor.PsoasMajorL2_1;//< Psoas muscles are created by the Trunk model
AnyMuscle &PsoasMajorL2_2 = .TrunkMuscles.PsoasMajor.PsoasMajorL2_2;//< Psoas muscles are created by the Trunk model
AnyMuscle &PsoasMajorL3_1 = .TrunkMuscles.PsoasMajor.PsoasMajorL3_1;//< Psoas muscles are created by the Trunk model
AnyMuscle &PsoasMajorL3_2 = .TrunkMuscles.PsoasMajor.PsoasMajorL3_2;//< Psoas muscles are created by the Trunk model
AnyMuscle &PsoasMajorL4_1 = .TrunkMuscles.PsoasMajor.PsoasMajorL4_1;//< Psoas muscles are created by the Trunk model
AnyMuscle &PsoasMajorL4_2 = .TrunkMuscles.PsoasMajor.PsoasMajorL4_2;//< Psoas muscles are created by the Trunk model
AnyMuscle &PsoasMajorL5_1 = .TrunkMuscles.PsoasMajor.PsoasMajorL5_1;//< Psoas muscles are created by the Trunk model
AnyMuscle &PsoasMajorL5_2 = .TrunkMuscles.PsoasMajor.PsoasMajorL5_2;//< Psoas muscles are created by the Trunk model
