//This file is used for position dumping
AnyMat33 ref_Right_Leg_Seg_Foot_Axes0  =dir.Right.Leg.Segments.Foot.Axes;
AnyMat33 ref_Right_Leg_Seg_Shank_Axes0 =dir.Right.Leg.Segments.Shank.Axes;
AnyMat33 ref_Right_Leg_Seg_Thigh_Axes0 =dir.Right.Leg.Segments.Thigh.Axes;
