AnyVar AnyVar_HipFlexion = ...Interface.Right.HipFlexion.Pos[0]*180/pi;
AnyVar AnyVar_HipAbduction = ...Interface.Right.HipAbduction.Pos[0]*180/pi;
AnyVar AnyVar_HipExternalRotation = ...Interface.Right.HipExternalRotation.Pos[0]*180/pi;

AnyVar AnyVar_KneeFlexion = ...Interface.Right.KneeFlexion.Pos[0]*180/pi;

#if BM_FOOT_MODEL == _FOOT_MODEL_LEG_FOOT_
AnyVar AnyVar_AnklePlantarFlexion =...Interface.Right.AnklePlantarFlexion.Pos[0]*180/pi;
AnyVar AnyVar_AnkleEversion =...Interface.Right.AnkleEversion.Pos[0]*180/pi;
#endif
