// Definitions of muscles in the right leg
// Mark de Zee

// This is an interface reference to make sure that the
// include file MusDrawSettings.any always can be left
// unchanged and not affected of different directory
// levels.

AnyFolder &Ref = ..MusDrawRef;

AnyMuscleViaPoint Hammstrings = {
  AnyMuscleModel &MusMdl = ..MusPar.HamstringsMdl;
  AnyRefNode &Ins = ..Seg.Shank.HamstringsNodeR;
  AnyRefNode &Via1 = ..Seg.Thigh.HamstringsViaNode1R;
  AnyRefNode &Org = ..HipNodeRef.HamstringsNodeR;
  viewMuscle = {#include "../DrawSettings/MusDrawSettings.any"};
};

AnyMuscleViaPoint BicepsFemorisCaputBreve = {
  AnyMuscleModel &MusMdl = ..MusPar.BicepsFemorisCaputBreveMdl;
  AnyRefNode &Ins = ..Seg.Shank.BicepsFemorisCaputBreveNodeR;
  AnyRefNode &Org = ..Seg.Thigh.BicepsFemorisCaputBreveNodeR;
  viewMuscle = {#include "../DrawSettings/MusDrawSettings.any"};
};

AnyMuscleViaPoint GluteusMaximus = {
  AnyMuscleModel &MusMdl = ..MusPar.GluteusMaximusMdl;
  AnyRefNode &Ins = ..Seg.Thigh.GluteusMaximusNodeR;
  AnyRefNode &Via3 = ..Seg.Thigh.GluteusMaximusViaNode2R;
  AnyRefNode &Via2 = ..HipNodeRef.GluteusMaximusViaNode2R;
  AnyRefNode &Via1 = ..HipNodeRef.GluteusMaximusViaNode1R;
  AnyRefNode &Org = ..HipNodeRef.GluteusMaximusNodeR;
  viewMuscle = {#include "../DrawSettings/MusDrawSettings.any"};
};

AnyMuscleViaPoint RectusFemoris = {
  AnyMuscleModel &MusMdl = ..MusPar.RectusFemorisMdl;
  AnyRefNode &Ins = ..Seg.Shank.RectusFemorisNodeR;
  AnyRefNode &Via2 = ..Seg.Thigh.RectusFemorisViaNode2R;
  AnyRefNode &Org = ..HipNodeRef.RectusFemorisNodeR;
  viewMuscle = {#include "../DrawSettings/MusDrawSettings.any"};
};

AnyMuscleViaPoint Vasti = {
  AnyMuscleModel &MusMdl = ..MusPar.VastiMdl;
  AnyRefNode &Ins = ..Seg.Shank.VastiNodeR;
  AnyRefNode &Via2 = ..Seg.Thigh.VastiViaNode2R; //In SIMM one can define in which range this ViaPoint is working, which is not possible in AnyBody
  AnyRefNode &Via1 = ..Seg.Thigh.VastiViaNode1R;
  AnyRefNode &Org = ..Seg.Thigh.VastiNodeR;
  viewMuscle = {#include "../DrawSettings/MusDrawSettings.any"};
};

AnyMuscleViaPoint Gastrocnemius = {
  AnyMuscleModel &MusMdl = ..MusPar.GastrocnemiusMdl;
  AnyRefNode &Ins = ..Seg.Foot.GastrocnemiusNodeR;
  AnyRefNode &Via2 = ..Seg.Shank.GastrocnemiusViaNode2R;
  //AnyRefNode &Via1 = ..Seg.Thigh.GastrocnemiusViaNode1R; //In SIMM one can define in which range this ViaPoint is working, which is not possible in AnyBody
  AnyRefNode &Org = ..Seg.Thigh.GastrocnemiusNodeR;
  viewMuscle = {#include "../DrawSettings/MusDrawSettings.any"};
};

AnyMuscleViaPoint Soleus = {
  AnyMuscleModel &MusMdl = ..MusPar.SoleusMdl;
  AnyRefNode &Ins = ..Seg.Foot.SoleusNodeR;
  AnyRefNode &Org = ..Seg.Shank.SoleusNodeR;
  viewMuscle = {#include "../DrawSettings/MusDrawSettings.any"};
};

AnyMuscleViaPoint TibialisAnterior = {
  AnyMuscleModel &MusMdl = ..MusPar.TibialisAnteriorMdl;
  AnyRefNode &Ins = ..Seg.Foot.TibialisAnteriorNodeR;
  AnyRefNode &Via1 = ..Seg.Shank.TibialisAnteriorViaNode1R;
  AnyRefNode &Org = ..Seg.Shank.TibialisAnteriorNodeR;
  viewMuscle = {#include "../DrawSettings/MusDrawSettings.any"};
};
