// The leg muscle parameters.
// Mark de Zee
AnyMuscleModel HamstringsMdl = {F0 = 2080;};
AnyMuscleModel BicepsFemorisCaputBreveMdl = {F0 = 400;};
AnyMuscleModel GluteusMaximusMdl = {F0 = 1300;};
AnyMuscleModel RectusFemorisMdl = {F0 = 780;};
AnyMuscleModel VastiMdl = {F0 = 4400;};
AnyMuscleModel GastrocnemiusMdl = {F0 = 1605;};
AnyMuscleModel SoleusMdl = {F0 = 2830;};
AnyMuscleModel TibialisAnteriorMdl = {F0 = 1605;};
