//This is the calibration1 file, it will calibrate all muscle in the leg in
//a neutral position (all joint angles in the drivers are zero)
//The subsequent calibrations 2 and 3 will overwrite some of the values
//obtained in this study

AnyFolder LegCal1 ={
  AnyComponentDefinition obj = {};
  AnyFolder &Pelvis = ...BodyModel.Trunk.Segments.PelvisSeg;
  AnyFolder &Sacrum = ...BodyModel.Trunk.Segments.SacrumSeg;

  // Segments needed for the Psoas Major muscles
  AnySeg &L1 = ...BodyModel.Trunk.Segments.L1Seg;
  AnySeg &L2 = ...BodyModel.Trunk.Segments.L2Seg;
  AnySeg &L3 = ...BodyModel.Trunk.Segments.L3Seg;
  AnySeg &L4 = ...BodyModel.Trunk.Segments.L4Seg;
  AnySeg &L5 = ...BodyModel.Trunk.Segments.L5Seg;
  AnyFolder &Thorax = ...BodyModel.Trunk.Segments.ThoraxSeg;

  AnyFolder &LegSegSide = .SideHumanFolderRef.Leg.Seg;

  AnyFolder &LegJointsSide = .SideHumanFolderRef.Leg.Jnt;
  AnyFolder &TrunkJoints = ...BodyModel.Trunk.Joints.Lumbar;

  AnyFolder &MusCalSide =  .SideHumanFolderRef.Leg.Mus;


  AnyFixedRefFrame ground = {
    AnyRefNode node = {
      ARel=..Pelvis.Axes0;
      sRel=..Pelvis.r0;
    };
  };

  AnyKinEq ThoraxFix =
  {
    AnyKinMeasure& PelvisThoraxExtension = ....BodyModel.Interface.Trunk.PelvisThoraxExtension;
    AnyKinMeasure& PelvisThoraxLateralBending = ....BodyModel.Interface.Trunk.PelvisThoraxLateralBending;
    AnyKinMeasure& PelvisThoraxRotation = ....BodyModel.Interface.Trunk.PelvisThoraxRotation;
  };

AnyKinEq PelvisFix = {
    AnyKinLinear Lin = {
      AnyRefFrame &ground = ..ground.node;
      AnyRefFrame &Pelvis = .....BodyModel.Trunk.Segments.PelvisSeg;
    };
    AnyKinRotational Rot = {
      Type = RotAxesAngles;
      AnyRefFrame &ground = ..ground.node;
      AnyRefFrame &Pelvis = .....BodyModel.Trunk.Segments.PelvisSeg;
    };
  };


  AnyKinEqSimpleDriver Hip = {
    AnyKinRotational &Spherical = ..SideInterfaceFolderRef.HipFlexion.HipMeasure;
    DriverPos = {0,0,0}*pi/180; // Flexion - Abduction - external rotation
    DriverVel = {0,0,0}*pi/180;
    Reaction.Type = {Off,Off,Off};
  };


  AnyKinEqSimpleDriver Knee = {
    AnyKinMeasure& Hinge = ..SideInterfaceFolderRef.KneeFlexion;
    DriverPos = {0*pi/180};
    DriverVel = {0*pi/180};
    Reaction.Type = {Off};
  };

  #if ((BM_FOOT_MODEL == _FOOT_MODEL_DEFAULT_) | (BM_FOOT_MODEL == _FOOT_MODEL_RIGID_GM_) | (BM_FOOT_MODEL == _FOOT_MODEL_TOE_FLEX_GM_) | (BM_FOOT_MODEL == _FOOT_MODEL_DETAILED_GM_))
  AnyKinEqSimpleDriver Ankle = {
    AnyKinMeasure& Hinge = ..SideInterfaceFolderRef.AnklePlantarFlexion;
    DriverPos = {0*pi/180};
    DriverVel = {0*pi/180};
    Reaction.Type = {Off};
  };

  AnyKinEqSimpleDriver SubTalar = {
    AnyKinMeasure& Hinge = ..SideInterfaceFolderRef.SubTalarEversion;
    DriverPos = {0*pi/180};
    DriverVel = {0*pi/180};
    Reaction.Type = {Off};
  };
    #if (BM_FOOT_MODEL == _FOOT_MODEL_TOE_FLEX_GM_) | (BM_FOOT_MODEL == _FOOT_MODEL_DETAILED_GM_)
      #include "LegCalFootDrivers.any"
    #endif
  #endif

  AnyString MusPrefix = CompleteNameOf(&.SideHumanFolderRef.Leg.Mus);

  AnyObjectPtrArray FootMuscles = ObjSearchRecursive(MusPrefix+".Foot", "*", "AnyMuscle&");
};


// The study: Operations to be performed on the model
AnyBodyCalibrationStudy LegCalibrationStudy1 = {
  AnyFolder &ref=.LegCal1;
  nStep = 1;
  InitialConditions.SmallStepAssumptionOnOff = Off;
  Kinematics.SmallStepAssumptionOnOff = Off;
  Kinematics.PosAnalysisOnlyOnOff = On;
  InitialConditions.PosAnalysisOnlyOnOff = On;
#if (ANYBODY_V1 > 7)|(ANYBODY_V1 == 7 & ANYBODY_V2 > 2)|(ANYBODY_V1 == 7 & ANYBODY_V2 == 2 & ANYBODY_V3 >= 2)
  MuscleArr = set_difference(
      ObjSearchRecursive(CompleteNameOf(&.SideHumanFolderRef.Leg.Mus),"*", "AnyMuscle&"),
    arrcat(
        ref.FootMuscles,
      ..CALIBRATION_STUDY_REF(2).MuscleArr,
      ..CALIBRATION_STUDY_REF(3).MuscleArr,
      ..CALIBRATION_STUDY_REF(5).MuscleArr,
      ..CALIBRATION_STUDY_REF(6).MuscleArr,
      ..CALIBRATION_STUDY_REF(7).MuscleArr,
      ..CALIBRATION_STUDY_REF(8).MuscleArr
    )
  );
#else
  MuscleArr = arrcat(
     ObjSearch(CompleteNameOf(&.SideHumanFolderRef.Leg.Mus)+".BicepsFemorisCaput*", "AnyMuscle"),
     ObjSearch(CompleteNameOf(&.SideHumanFolderRef.Leg.Mus)+".Iliacus*", "AnyMuscle"),
     ObjSearch(CompleteNameOf(&.SideHumanFolderRef.Leg.Mus)+".PeroneusBrevis*", "AnyMuscle"),
     ObjSearch(CompleteNameOf(&.SideHumanFolderRef.Leg.Mus)+".Piriformis*", "AnyMuscle"),
     ObjSearch(CompleteNameOf(&.SideHumanFolderRef.Leg.Mus)+".Popliteus*", "AnyMuscle"),
     ObjSearch(CompleteNameOf(&.SideHumanFolderRef.Leg.Mus)+".RectusFemoris*", "AnyMuscle"),
     ObjSearch(CompleteNameOf(&.SideHumanFolderRef.Leg.Mus)+".Sartorius*", "AnyMuscle"),
     ObjSearch(CompleteNameOf(&.SideHumanFolderRef.Leg.TrunkMuscles.PsoasMajor)+".*", "AnyMuscle")
  );
#endif


};
