/*
This implements the muscle models for the GM foot muscles.

It contains all the muscle parameter data of the intrinsic foot.

The PCSA data comes from:
Quantitative Analysis of the Intrinsic Muscles of the Foot. Kura et al. THE ANATOMICAL RECORD 249:143-151 (1997)

This data set is prefered to the one from Yamaguchi (2007) because Yamaguchi data set is not complete.
In addition kura data set has more statistical value (11 subjects against 4 for Yamaguchi).
However the two data set present a good corelation.
*/

AnyFolder DefaultMusPar = {
    AnyVar SpecificStrength ??= 90; // (N/cm^2)
    //Klein Horsman used a PCSAfactor of 27 N/cm^2 this is now changed to 90 N/cm^2
    AnyVar PCSAfactor ??= SpecificStrength * .......HumanModel.StrengthParameters.StrengthIndexLeg; // = PCSAfactor in N/cm^2 , the PCSA itself is given in cm^2 so F0 is in Newton`s.
};

#if BM_FOOT_MODEL
AnyVar StrengthScaleFoot = ..StrengthScaling.Foot.StrengthScale;
AnyVar FiberLengthScaleFoot = ..FiberLengthScaling.Foot.FiberLengthScale;
// 27 N/cm2   Same value as in legTD (Klein Horsman)
//AnyVar StrengthMusFoot = 27*2*.StrengthScaling.Foot.StrengthScale*.....HumanModel.StrengthParameters.StrengthIndexLeg;
AnyVar StrengthMusFoot =DefaultMusPar.PCSAfactor*..StrengthScaling.Foot.StrengthScale*......HumanModel.StrengthParameters.StrengthIndexLeg;
#endif


#if (BM_FOOT_MODEL == _FOOT_MODEL_TOE_FLEX_GM_) | (BM_FOOT_MODEL == _FOOT_MODEL_DETAILED_GM_)

AnyMuscleModel AbductorHallucis =
{
 AnyFolder& MuscleParameters = ...Data.unscaled.ModelParameters.Muscles.Foot.AbductorHallucis;
 AnyIntVar MuscleElemNo = 1; ///< The number of this element of the muscle
 AnyIntVar MuscleElemAmount = MuscleParameters.MuscleElemAmount; ///< The total amount of elements for this muscle
 F0 ??= .DefaultMusPar.PCSAfactor*PCSA; ///< Maximum force output at optimum fiber length
 Lf0 ??= .FiberLengthScaleFoot*(MuscleParameters.OptimalFiberlength
       / cos(pi/180*MuscleParameters.Pennationangle));
 AnyVar PCSA ??= 1e4*.StrengthScaleFoot*MuscleParameters.MuscleVolumeSIScaled/(Lf0);///< PCSA (cm2) of the individual element is total volumen divided by the sum of muscle element fiber lengths.
 Vol0 ??=  1e-4* PCSA * Lf0; ///< Muscle element volume (m3)
};
#endif


#if (BM_FOOT_MODEL == _FOOT_MODEL_TOE_FLEX_GM_) | (BM_FOOT_MODEL == _FOOT_MODEL_DETAILED_GM_)

AnyMuscleModel FlexorHallucisBrevisLateralis_1 =
{
 AnyFolder& MuscleParameters = ...Data.unscaled.ModelParameters.Muscles.Foot.FlexorHallucisBrevisLateralis_1;
 AnyIntVar MuscleElemNo = 1; ///< The number of this element of the muscle
 AnyIntVar MuscleElemAmount = MuscleParameters.MuscleElemAmount; ///< The total amount of elements for this muscle
 F0 ??= .DefaultMusPar.PCSAfactor*PCSA; ///< Maximum force output at optimum fiber length
 Lf0 ??= .FiberLengthScaleFoot*(MuscleParameters.OptimalFiberlength
       / cos(pi/180*MuscleParameters.Pennationangle));
 AnyVar PCSA ??= 1e4*.StrengthScaleFoot*MuscleParameters.MuscleVolumeSIScaled/(Lf0);///< PCSA (cm2) of the individual element is total volumen divided by the sum of muscle element fiber lengths.
 Vol0 ??=  1e-4* PCSA * Lf0; ///< Muscle element volume (m3)
};
#endif


#if (BM_FOOT_MODEL == _FOOT_MODEL_TOE_FLEX_GM_) | (BM_FOOT_MODEL == _FOOT_MODEL_DETAILED_GM_)

AnyMuscleModel FlexorHallucisBrevisLateralis_2 =
{
 AnyFolder& MuscleParameters = ...Data.unscaled.ModelParameters.Muscles.Foot.FlexorHallucisBrevisLateralis_2;
 AnyIntVar MuscleElemNo = 1; ///< The number of this element of the muscle
 AnyIntVar MuscleElemAmount = MuscleParameters.MuscleElemAmount; ///< The total amount of elements for this muscle
 F0 ??= .DefaultMusPar.PCSAfactor*PCSA; ///< Maximum force output at optimum fiber length
 Lf0 ??= .FiberLengthScaleFoot*(MuscleParameters.OptimalFiberlength
       / cos(pi/180*MuscleParameters.Pennationangle));
 AnyVar PCSA ??= 1e4*.StrengthScaleFoot*MuscleParameters.MuscleVolumeSIScaled/(Lf0);///< PCSA (cm2) of the individual element is total volumen divided by the sum of muscle element fiber lengths.
 Vol0 ??=  1e-4* PCSA * Lf0; ///< Muscle element volume (m3)
};
#endif


#if (BM_FOOT_MODEL == _FOOT_MODEL_TOE_FLEX_GM_) | (BM_FOOT_MODEL == _FOOT_MODEL_DETAILED_GM_)

AnyMuscleModel FlexorHallucisBrevisMedialis =
{
 AnyFolder& MuscleParameters = ...Data.unscaled.ModelParameters.Muscles.Foot.FlexorHallucisBrevisMedialis;
 AnyIntVar MuscleElemNo = 1; ///< The number of this element of the muscle
 AnyIntVar MuscleElemAmount = MuscleParameters.MuscleElemAmount; ///< The total amount of elements for this muscle
 F0 ??= .DefaultMusPar.PCSAfactor*PCSA; ///< Maximum force output at optimum fiber length
 Lf0 ??= .FiberLengthScaleFoot*(MuscleParameters.OptimalFiberlength
       / cos(pi/180*MuscleParameters.Pennationangle));
 AnyVar PCSA ??= 1e4*.StrengthScaleFoot*MuscleParameters.MuscleVolumeSIScaled/(Lf0);///< PCSA (cm2) of the individual element is total volumen divided by the sum of muscle element fiber lengths.
 Vol0 ??=  1e-4* PCSA * Lf0; ///< Muscle element volume (m3)
};
#endif


#if (BM_FOOT_MODEL == _FOOT_MODEL_TOE_FLEX_GM_) | (BM_FOOT_MODEL == _FOOT_MODEL_DETAILED_GM_)

AnyMuscleModel AdductorHallucisOblique1 =
{
 AnyFolder& MuscleParameters = ...Data.unscaled.ModelParameters.Muscles.Foot.AdductorHallucisOblique1;
 AnyIntVar MuscleElemNo = 1; ///< The number of this element of the muscle
 AnyIntVar MuscleElemAmount = MuscleParameters.MuscleElemAmount; ///< The total amount of elements for this muscle
 F0 ??= .DefaultMusPar.PCSAfactor*PCSA; ///< Maximum force output at optimum fiber length
 Lf0 ??= .FiberLengthScaleFoot*(MuscleParameters.OptimalFiberlength
       / cos(pi/180*MuscleParameters.Pennationangle));
 AnyVar PCSA ??= 1e4*.StrengthScaleFoot*MuscleParameters.MuscleVolumeSIScaled/(Lf0);///< PCSA (cm2) of the individual element is total volumen divided by the sum of muscle element fiber lengths.
 Vol0 ??=  1e-4* PCSA * Lf0; ///< Muscle element volume (m3)
};
#endif


#if (BM_FOOT_MODEL == _FOOT_MODEL_TOE_FLEX_GM_) | (BM_FOOT_MODEL == _FOOT_MODEL_DETAILED_GM_)

AnyMuscleModel AdductorHallucisOblique2 =
{
 AnyFolder& MuscleParameters = ...Data.unscaled.ModelParameters.Muscles.Foot.AdductorHallucisOblique2;
 AnyIntVar MuscleElemNo = 1; ///< The number of this element of the muscle
 AnyIntVar MuscleElemAmount = MuscleParameters.MuscleElemAmount; ///< The total amount of elements for this muscle
 F0 ??= .DefaultMusPar.PCSAfactor*PCSA; ///< Maximum force output at optimum fiber length
 Lf0 ??= .FiberLengthScaleFoot*(MuscleParameters.OptimalFiberlength
       / cos(pi/180*MuscleParameters.Pennationangle));
 AnyVar PCSA ??= 1e4*.StrengthScaleFoot*MuscleParameters.MuscleVolumeSIScaled/(Lf0);///< PCSA (cm2) of the individual element is total volumen divided by the sum of muscle element fiber lengths.
 Vol0 ??=  1e-4* PCSA * Lf0; ///< Muscle element volume (m3)
};
#endif


#if (BM_FOOT_MODEL == _FOOT_MODEL_TOE_FLEX_GM_) | (BM_FOOT_MODEL == _FOOT_MODEL_DETAILED_GM_)

AnyMuscleModel AdductorHallucisOblique3 =
{
 AnyFolder& MuscleParameters = ...Data.unscaled.ModelParameters.Muscles.Foot.AdductorHallucisOblique3;
 AnyIntVar MuscleElemNo = 1; ///< The number of this element of the muscle
 AnyIntVar MuscleElemAmount = MuscleParameters.MuscleElemAmount; ///< The total amount of elements for this muscle
 F0 ??= .DefaultMusPar.PCSAfactor*PCSA; ///< Maximum force output at optimum fiber length
 Lf0 ??= .FiberLengthScaleFoot*(MuscleParameters.OptimalFiberlength
       / cos(pi/180*MuscleParameters.Pennationangle));
 AnyVar PCSA ??= 1e4*.StrengthScaleFoot*MuscleParameters.MuscleVolumeSIScaled/(Lf0);///< PCSA (cm2) of the individual element is total volumen divided by the sum of muscle element fiber lengths.
 Vol0 ??=  1e-4* PCSA * Lf0; ///< Muscle element volume (m3)
};
#endif


#if (BM_FOOT_MODEL == _FOOT_MODEL_TOE_FLEX_GM_) | (BM_FOOT_MODEL == _FOOT_MODEL_DETAILED_GM_)

AnyMuscleModel AdductorHallucisOblique4 =
{
 AnyFolder& MuscleParameters = ...Data.unscaled.ModelParameters.Muscles.Foot.AdductorHallucisOblique4;
 AnyIntVar MuscleElemNo = 1; ///< The number of this element of the muscle
 AnyIntVar MuscleElemAmount = MuscleParameters.MuscleElemAmount; ///< The total amount of elements for this muscle
 F0 ??= .DefaultMusPar.PCSAfactor*PCSA; ///< Maximum force output at optimum fiber length
 Lf0 ??= .FiberLengthScaleFoot*(MuscleParameters.OptimalFiberlength
       / cos(pi/180*MuscleParameters.Pennationangle));
 AnyVar PCSA ??= 1e4*.StrengthScaleFoot*MuscleParameters.MuscleVolumeSIScaled/(Lf0);///< PCSA (cm2) of the individual element is total volumen divided by the sum of muscle element fiber lengths.
 Vol0 ??=  1e-4* PCSA * Lf0; ///< Muscle element volume (m3)
};
#endif


#if (BM_FOOT_MODEL == _FOOT_MODEL_TOE_FLEX_GM_) | (BM_FOOT_MODEL == _FOOT_MODEL_DETAILED_GM_)

AnyMuscleModel AdductorHallucisOblique5 =
{
 AnyFolder& MuscleParameters = ...Data.unscaled.ModelParameters.Muscles.Foot.AdductorHallucisOblique5;
 AnyIntVar MuscleElemNo = 1; ///< The number of this element of the muscle
 AnyIntVar MuscleElemAmount = MuscleParameters.MuscleElemAmount; ///< The total amount of elements for this muscle
 F0 ??= .DefaultMusPar.PCSAfactor*PCSA; ///< Maximum force output at optimum fiber length
 Lf0 ??= .FiberLengthScaleFoot*(MuscleParameters.OptimalFiberlength
       / cos(pi/180*MuscleParameters.Pennationangle));
 AnyVar PCSA ??= 1e4*.StrengthScaleFoot*MuscleParameters.MuscleVolumeSIScaled/(Lf0);///< PCSA (cm2) of the individual element is total volumen divided by the sum of muscle element fiber lengths.
 Vol0 ??=  1e-4* PCSA * Lf0; ///< Muscle element volume (m3)
};
#endif


#if (BM_FOOT_MODEL == _FOOT_MODEL_TOE_FLEX_GM_) | (BM_FOOT_MODEL == _FOOT_MODEL_DETAILED_GM_)

AnyMuscleModel AdductorHallucisTransverse1 =
{
 AnyFolder& MuscleParameters = ...Data.unscaled.ModelParameters.Muscles.Foot.AdductorHallucisTransverse1;
 AnyIntVar MuscleElemNo = 1; ///< The number of this element of the muscle
 AnyIntVar MuscleElemAmount = MuscleParameters.MuscleElemAmount; ///< The total amount of elements for this muscle
 F0 ??= .DefaultMusPar.PCSAfactor*PCSA; ///< Maximum force output at optimum fiber length
 Lf0 ??= .FiberLengthScaleFoot*(MuscleParameters.OptimalFiberlength
       / cos(pi/180*MuscleParameters.Pennationangle));
 AnyVar PCSA ??= 1e4*.StrengthScaleFoot*MuscleParameters.MuscleVolumeSIScaled/(Lf0);///< PCSA (cm2) of the individual element is total volumen divided by the sum of muscle element fiber lengths.
 Vol0 ??=  1e-4* PCSA * Lf0; ///< Muscle element volume (m3)
};
#endif


#if (BM_FOOT_MODEL == _FOOT_MODEL_TOE_FLEX_GM_) | (BM_FOOT_MODEL == _FOOT_MODEL_DETAILED_GM_)

AnyMuscleModel AdductorHallucisTransverse2 =
{
 AnyFolder& MuscleParameters = ...Data.unscaled.ModelParameters.Muscles.Foot.AdductorHallucisTransverse2;
 AnyIntVar MuscleElemNo = 1; ///< The number of this element of the muscle
 AnyIntVar MuscleElemAmount = MuscleParameters.MuscleElemAmount; ///< The total amount of elements for this muscle
 F0 ??= .DefaultMusPar.PCSAfactor*PCSA; ///< Maximum force output at optimum fiber length
 Lf0 ??= .FiberLengthScaleFoot*(MuscleParameters.OptimalFiberlength
       / cos(pi/180*MuscleParameters.Pennationangle));
 AnyVar PCSA ??= 1e4*.StrengthScaleFoot*MuscleParameters.MuscleVolumeSIScaled/(Lf0);///< PCSA (cm2) of the individual element is total volumen divided by the sum of muscle element fiber lengths.
 Vol0 ??=  1e-4* PCSA * Lf0; ///< Muscle element volume (m3)
};
#endif


#if (BM_FOOT_MODEL == _FOOT_MODEL_TOE_FLEX_GM_) | (BM_FOOT_MODEL == _FOOT_MODEL_DETAILED_GM_)

AnyMuscleModel AdductorHallucisTransverse3 =
{
 AnyFolder& MuscleParameters = ...Data.unscaled.ModelParameters.Muscles.Foot.AdductorHallucisTransverse3;
 AnyIntVar MuscleElemNo = 1; ///< The number of this element of the muscle
 AnyIntVar MuscleElemAmount = MuscleParameters.MuscleElemAmount; ///< The total amount of elements for this muscle
 F0 ??= .DefaultMusPar.PCSAfactor*PCSA; ///< Maximum force output at optimum fiber length
 Lf0 ??= .FiberLengthScaleFoot*(MuscleParameters.OptimalFiberlength
       / cos(pi/180*MuscleParameters.Pennationangle));
 AnyVar PCSA ??= 1e4*.StrengthScaleFoot*MuscleParameters.MuscleVolumeSIScaled/(Lf0);///< PCSA (cm2) of the individual element is total volumen divided by the sum of muscle element fiber lengths.
 Vol0 ??=  1e-4* PCSA * Lf0; ///< Muscle element volume (m3)
};
#endif


#if (BM_FOOT_MODEL == _FOOT_MODEL_TOE_FLEX_GM_) | (BM_FOOT_MODEL == _FOOT_MODEL_DETAILED_GM_)

AnyMuscleModel ExtensorHallucisBrevis =
{
 AnyFolder& MuscleParameters = ...Data.unscaled.ModelParameters.Muscles.Foot.ExtensorHallucisBrevis;
 AnyIntVar MuscleElemNo = 1; ///< The number of this element of the muscle
 AnyIntVar MuscleElemAmount = MuscleParameters.MuscleElemAmount; ///< The total amount of elements for this muscle
 F0 ??= .DefaultMusPar.PCSAfactor*PCSA; ///< Maximum force output at optimum fiber length
 Lf0 ??= .FiberLengthScaleFoot*(MuscleParameters.OptimalFiberlength
       / cos(pi/180*MuscleParameters.Pennationangle));
 AnyVar PCSA ??= 1e4*.StrengthScaleFoot*MuscleParameters.MuscleVolumeSIScaled/(Lf0);///< PCSA (cm2) of the individual element is total volumen divided by the sum of muscle element fiber lengths.
 Vol0 ??=  1e-4* PCSA * Lf0; ///< Muscle element volume (m3)
};
#endif


#if (BM_FOOT_MODEL == _FOOT_MODEL_TOE_FLEX_GM_) | (BM_FOOT_MODEL == _FOOT_MODEL_DETAILED_GM_)

AnyMuscleModel DorsalInterosseous1Part1 =
{
 AnyFolder& MuscleParameters = ...Data.unscaled.ModelParameters.Muscles.Foot.DorsalInterosseous1Part1;
 AnyIntVar MuscleElemNo = 1; ///< The number of this element of the muscle
 AnyIntVar MuscleElemAmount = MuscleParameters.MuscleElemAmount; ///< The total amount of elements for this muscle
 F0 ??= .DefaultMusPar.PCSAfactor*PCSA; ///< Maximum force output at optimum fiber length
 Lf0 ??= .FiberLengthScaleFoot*(MuscleParameters.OptimalFiberlength
       / cos(pi/180*MuscleParameters.Pennationangle));
 AnyVar PCSA ??= 1e4*.StrengthScaleFoot*MuscleParameters.MuscleVolumeSIScaled/(Lf0);///< PCSA (cm2) of the individual element is total volumen divided by the sum of muscle element fiber lengths.
 Vol0 ??=  1e-4* PCSA * Lf0; ///< Muscle element volume (m3)
};
#endif


#if (BM_FOOT_MODEL == _FOOT_MODEL_TOE_FLEX_GM_) | (BM_FOOT_MODEL == _FOOT_MODEL_DETAILED_GM_)

AnyMuscleModel DorsalInterosseous1Part2 =
{
 AnyFolder& MuscleParameters = ...Data.unscaled.ModelParameters.Muscles.Foot.DorsalInterosseous1Part2;
 AnyIntVar MuscleElemNo = 1; ///< The number of this element of the muscle
 AnyIntVar MuscleElemAmount = MuscleParameters.MuscleElemAmount; ///< The total amount of elements for this muscle
 F0 ??= .DefaultMusPar.PCSAfactor*PCSA; ///< Maximum force output at optimum fiber length
 Lf0 ??= .FiberLengthScaleFoot*(MuscleParameters.OptimalFiberlength
       / cos(pi/180*MuscleParameters.Pennationangle));
 AnyVar PCSA ??= 1e4*.StrengthScaleFoot*MuscleParameters.MuscleVolumeSIScaled/(Lf0);///< PCSA (cm2) of the individual element is total volumen divided by the sum of muscle element fiber lengths.
 Vol0 ??=  1e-4* PCSA * Lf0; ///< Muscle element volume (m3)
};
#endif


#if (BM_FOOT_MODEL == _FOOT_MODEL_TOE_FLEX_GM_) | (BM_FOOT_MODEL == _FOOT_MODEL_DETAILED_GM_)

AnyMuscleModel DorsalInterosseous2Part1 =
{
 AnyFolder& MuscleParameters = ...Data.unscaled.ModelParameters.Muscles.Foot.DorsalInterosseous2Part1;
 AnyIntVar MuscleElemNo = 1; ///< The number of this element of the muscle
 AnyIntVar MuscleElemAmount = MuscleParameters.MuscleElemAmount; ///< The total amount of elements for this muscle
 F0 ??= .DefaultMusPar.PCSAfactor*PCSA; ///< Maximum force output at optimum fiber length
 Lf0 ??= .FiberLengthScaleFoot*(MuscleParameters.OptimalFiberlength
       / cos(pi/180*MuscleParameters.Pennationangle));
 AnyVar PCSA ??= 1e4*.StrengthScaleFoot*MuscleParameters.MuscleVolumeSIScaled/(Lf0);///< PCSA (cm2) of the individual element is total volumen divided by the sum of muscle element fiber lengths.
 Vol0 ??=  1e-4* PCSA * Lf0; ///< Muscle element volume (m3)
};
#endif


#if (BM_FOOT_MODEL == _FOOT_MODEL_TOE_FLEX_GM_) | (BM_FOOT_MODEL == _FOOT_MODEL_DETAILED_GM_)

AnyMuscleModel DorsalInterosseous2Part2 =
{
 AnyFolder& MuscleParameters = ...Data.unscaled.ModelParameters.Muscles.Foot.DorsalInterosseous2Part2;
 AnyIntVar MuscleElemNo = 1; ///< The number of this element of the muscle
 AnyIntVar MuscleElemAmount = MuscleParameters.MuscleElemAmount; ///< The total amount of elements for this muscle
 F0 ??= .DefaultMusPar.PCSAfactor*PCSA; ///< Maximum force output at optimum fiber length
 Lf0 ??= .FiberLengthScaleFoot*(MuscleParameters.OptimalFiberlength
       / cos(pi/180*MuscleParameters.Pennationangle));
 AnyVar PCSA ??= 1e4*.StrengthScaleFoot*MuscleParameters.MuscleVolumeSIScaled/(Lf0);///< PCSA (cm2) of the individual element is total volumen divided by the sum of muscle element fiber lengths.
 Vol0 ??=  1e-4* PCSA * Lf0; ///< Muscle element volume (m3)
};
#endif


#if (BM_FOOT_MODEL == _FOOT_MODEL_TOE_FLEX_GM_) | (BM_FOOT_MODEL == _FOOT_MODEL_DETAILED_GM_)

AnyMuscleModel DorsalInterosseous3Part1 =
{
 AnyFolder& MuscleParameters = ...Data.unscaled.ModelParameters.Muscles.Foot.DorsalInterosseous3Part1;
 AnyIntVar MuscleElemNo = 1; ///< The number of this element of the muscle
 AnyIntVar MuscleElemAmount = MuscleParameters.MuscleElemAmount; ///< The total amount of elements for this muscle
 F0 ??= .DefaultMusPar.PCSAfactor*PCSA; ///< Maximum force output at optimum fiber length
 Lf0 ??= .FiberLengthScaleFoot*(MuscleParameters.OptimalFiberlength
       / cos(pi/180*MuscleParameters.Pennationangle));
 AnyVar PCSA ??= 1e4*.StrengthScaleFoot*MuscleParameters.MuscleVolumeSIScaled/(Lf0);///< PCSA (cm2) of the individual element is total volumen divided by the sum of muscle element fiber lengths.
 Vol0 ??=  1e-4* PCSA * Lf0; ///< Muscle element volume (m3)
};
#endif


#if (BM_FOOT_MODEL == _FOOT_MODEL_TOE_FLEX_GM_) | (BM_FOOT_MODEL == _FOOT_MODEL_DETAILED_GM_)

AnyMuscleModel DorsalInterosseous3Part2 =
{
 AnyFolder& MuscleParameters = ...Data.unscaled.ModelParameters.Muscles.Foot.DorsalInterosseous3Part2;
 AnyIntVar MuscleElemNo = 1; ///< The number of this element of the muscle
 AnyIntVar MuscleElemAmount = MuscleParameters.MuscleElemAmount; ///< The total amount of elements for this muscle
 F0 ??= .DefaultMusPar.PCSAfactor*PCSA; ///< Maximum force output at optimum fiber length
 Lf0 ??= .FiberLengthScaleFoot*(MuscleParameters.OptimalFiberlength
       / cos(pi/180*MuscleParameters.Pennationangle));
 AnyVar PCSA ??= 1e4*.StrengthScaleFoot*MuscleParameters.MuscleVolumeSIScaled/(Lf0);///< PCSA (cm2) of the individual element is total volumen divided by the sum of muscle element fiber lengths.
 Vol0 ??=  1e-4* PCSA * Lf0; ///< Muscle element volume (m3)
};
#endif


#if (BM_FOOT_MODEL == _FOOT_MODEL_TOE_FLEX_GM_) | (BM_FOOT_MODEL == _FOOT_MODEL_DETAILED_GM_)

AnyMuscleModel DorsalInterosseous4Part1 =
{
 AnyFolder& MuscleParameters = ...Data.unscaled.ModelParameters.Muscles.Foot.DorsalInterosseous4Part1;
 AnyIntVar MuscleElemNo = 1; ///< The number of this element of the muscle
 AnyIntVar MuscleElemAmount = MuscleParameters.MuscleElemAmount; ///< The total amount of elements for this muscle
 F0 ??= .DefaultMusPar.PCSAfactor*PCSA; ///< Maximum force output at optimum fiber length
 Lf0 ??= .FiberLengthScaleFoot*(MuscleParameters.OptimalFiberlength
       / cos(pi/180*MuscleParameters.Pennationangle));
 AnyVar PCSA ??= 1e4*.StrengthScaleFoot*MuscleParameters.MuscleVolumeSIScaled/(Lf0);///< PCSA (cm2) of the individual element is total volumen divided by the sum of muscle element fiber lengths.
 Vol0 ??=  1e-4* PCSA * Lf0; ///< Muscle element volume (m3)
};
#endif


#if (BM_FOOT_MODEL == _FOOT_MODEL_TOE_FLEX_GM_) | (BM_FOOT_MODEL == _FOOT_MODEL_DETAILED_GM_)

AnyMuscleModel DorsalInterosseous4Part2 =
{
 AnyFolder& MuscleParameters = ...Data.unscaled.ModelParameters.Muscles.Foot.DorsalInterosseous4Part2;
 AnyIntVar MuscleElemNo = 1; ///< The number of this element of the muscle
 AnyIntVar MuscleElemAmount = MuscleParameters.MuscleElemAmount; ///< The total amount of elements for this muscle
 F0 ??= .DefaultMusPar.PCSAfactor*PCSA; ///< Maximum force output at optimum fiber length
 Lf0 ??= .FiberLengthScaleFoot*(MuscleParameters.OptimalFiberlength
       / cos(pi/180*MuscleParameters.Pennationangle));
 AnyVar PCSA ??= 1e4*.StrengthScaleFoot*MuscleParameters.MuscleVolumeSIScaled/(Lf0);///< PCSA (cm2) of the individual element is total volumen divided by the sum of muscle element fiber lengths.
 Vol0 ??=  1e-4* PCSA * Lf0; ///< Muscle element volume (m3)
};
#endif


#if (BM_FOOT_MODEL == _FOOT_MODEL_TOE_FLEX_GM_) | (BM_FOOT_MODEL == _FOOT_MODEL_DETAILED_GM_)

AnyMuscleModel ExtensorDigitoriumBrevis2 =
{
 AnyFolder& MuscleParameters = ...Data.unscaled.ModelParameters.Muscles.Foot.ExtensorDigitoriumBrevis2;
 AnyIntVar MuscleElemNo = 1; ///< The number of this element of the muscle
 AnyIntVar MuscleElemAmount = MuscleParameters.MuscleElemAmount; ///< The total amount of elements for this muscle
 F0 ??= .DefaultMusPar.PCSAfactor*PCSA; ///< Maximum force output at optimum fiber length
 Lf0 ??= .FiberLengthScaleFoot*(MuscleParameters.OptimalFiberlength
       / cos(pi/180*MuscleParameters.Pennationangle));
 AnyVar PCSA ??= 1e4*.StrengthScaleFoot*MuscleParameters.MuscleVolumeSIScaled/(Lf0);///< PCSA (cm2) of the individual element is total volumen divided by the sum of muscle element fiber lengths.
 Vol0 ??=  1e-4* PCSA * Lf0; ///< Muscle element volume (m3)
};
#endif


#if (BM_FOOT_MODEL == _FOOT_MODEL_TOE_FLEX_GM_) | (BM_FOOT_MODEL == _FOOT_MODEL_DETAILED_GM_)

AnyMuscleModel ExtensorDigitoriumBrevis3 =
{
 AnyFolder& MuscleParameters = ...Data.unscaled.ModelParameters.Muscles.Foot.ExtensorDigitoriumBrevis3;
 AnyIntVar MuscleElemNo = 1; ///< The number of this element of the muscle
 AnyIntVar MuscleElemAmount = MuscleParameters.MuscleElemAmount; ///< The total amount of elements for this muscle
 F0 ??= .DefaultMusPar.PCSAfactor*PCSA; ///< Maximum force output at optimum fiber length
 Lf0 ??= .FiberLengthScaleFoot*(MuscleParameters.OptimalFiberlength
       / cos(pi/180*MuscleParameters.Pennationangle));
 AnyVar PCSA ??= 1e4*.StrengthScaleFoot*MuscleParameters.MuscleVolumeSIScaled/(Lf0);///< PCSA (cm2) of the individual element is total volumen divided by the sum of muscle element fiber lengths.
 Vol0 ??=  1e-4* PCSA * Lf0; ///< Muscle element volume (m3)
};
#endif


#if (BM_FOOT_MODEL == _FOOT_MODEL_TOE_FLEX_GM_) | (BM_FOOT_MODEL == _FOOT_MODEL_DETAILED_GM_)

AnyMuscleModel ExtensorDigitoriumBrevis4 =
{
 AnyFolder& MuscleParameters = ...Data.unscaled.ModelParameters.Muscles.Foot.ExtensorDigitoriumBrevis4;
 AnyIntVar MuscleElemNo = 1; ///< The number of this element of the muscle
 AnyIntVar MuscleElemAmount = MuscleParameters.MuscleElemAmount; ///< The total amount of elements for this muscle
 F0 ??= .DefaultMusPar.PCSAfactor*PCSA; ///< Maximum force output at optimum fiber length
 Lf0 ??= .FiberLengthScaleFoot*(MuscleParameters.OptimalFiberlength
       / cos(pi/180*MuscleParameters.Pennationangle));
 AnyVar PCSA ??= 1e4*.StrengthScaleFoot*MuscleParameters.MuscleVolumeSIScaled/(Lf0);///< PCSA (cm2) of the individual element is total volumen divided by the sum of muscle element fiber lengths.
 Vol0 ??=  1e-4* PCSA * Lf0; ///< Muscle element volume (m3)
};
#endif


#if (BM_FOOT_MODEL == _FOOT_MODEL_TOE_FLEX_GM_) | (BM_FOOT_MODEL == _FOOT_MODEL_DETAILED_GM_)

AnyMuscleModel PlantarInterosseous1 =
{
 AnyFolder& MuscleParameters = ...Data.unscaled.ModelParameters.Muscles.Foot.PlantarInterosseous1;
 AnyIntVar MuscleElemNo = 1; ///< The number of this element of the muscle
 AnyIntVar MuscleElemAmount = MuscleParameters.MuscleElemAmount; ///< The total amount of elements for this muscle
 F0 ??= .DefaultMusPar.PCSAfactor*PCSA; ///< Maximum force output at optimum fiber length
 Lf0 ??= .FiberLengthScaleFoot*(MuscleParameters.OptimalFiberlength
       / cos(pi/180*MuscleParameters.Pennationangle));
 AnyVar PCSA ??= 1e4*.StrengthScaleFoot*MuscleParameters.MuscleVolumeSIScaled/(Lf0);///< PCSA (cm2) of the individual element is total volumen divided by the sum of muscle element fiber lengths.
 Vol0 ??=  1e-4* PCSA * Lf0; ///< Muscle element volume (m3)
};
#endif


#if (BM_FOOT_MODEL == _FOOT_MODEL_TOE_FLEX_GM_) | (BM_FOOT_MODEL == _FOOT_MODEL_DETAILED_GM_)

AnyMuscleModel PlantarInterosseous2Part1 =
{
 AnyFolder& MuscleParameters = ...Data.unscaled.ModelParameters.Muscles.Foot.PlantarInterosseous2Part1;
 AnyIntVar MuscleElemNo = 1; ///< The number of this element of the muscle
 AnyIntVar MuscleElemAmount = MuscleParameters.MuscleElemAmount; ///< The total amount of elements for this muscle
 F0 ??= .DefaultMusPar.PCSAfactor*PCSA; ///< Maximum force output at optimum fiber length
 Lf0 ??= .FiberLengthScaleFoot*(MuscleParameters.OptimalFiberlength
       / cos(pi/180*MuscleParameters.Pennationangle));
 AnyVar PCSA ??= 1e4*.StrengthScaleFoot*MuscleParameters.MuscleVolumeSIScaled/(Lf0);///< PCSA (cm2) of the individual element is total volumen divided by the sum of muscle element fiber lengths.
 Vol0 ??=  1e-4* PCSA * Lf0; ///< Muscle element volume (m3)
};
#endif


#if (BM_FOOT_MODEL == _FOOT_MODEL_TOE_FLEX_GM_) | (BM_FOOT_MODEL == _FOOT_MODEL_DETAILED_GM_)

AnyMuscleModel PlantarInterosseous2Part2 =
{
 AnyFolder& MuscleParameters = ...Data.unscaled.ModelParameters.Muscles.Foot.PlantarInterosseous2Part2;
 AnyIntVar MuscleElemNo = 1; ///< The number of this element of the muscle
 AnyIntVar MuscleElemAmount = MuscleParameters.MuscleElemAmount; ///< The total amount of elements for this muscle
 F0 ??= .DefaultMusPar.PCSAfactor*PCSA; ///< Maximum force output at optimum fiber length
 Lf0 ??= .FiberLengthScaleFoot*(MuscleParameters.OptimalFiberlength
       / cos(pi/180*MuscleParameters.Pennationangle));
 AnyVar PCSA ??= 1e4*.StrengthScaleFoot*MuscleParameters.MuscleVolumeSIScaled/(Lf0);///< PCSA (cm2) of the individual element is total volumen divided by the sum of muscle element fiber lengths.
 Vol0 ??=  1e-4* PCSA * Lf0; ///< Muscle element volume (m3)
};
#endif


#if (BM_FOOT_MODEL == _FOOT_MODEL_TOE_FLEX_GM_) | (BM_FOOT_MODEL == _FOOT_MODEL_DETAILED_GM_)

AnyMuscleModel PlantarInterosseous2Part3 =
{
 AnyFolder& MuscleParameters = ...Data.unscaled.ModelParameters.Muscles.Foot.PlantarInterosseous2Part3;
 AnyIntVar MuscleElemNo = 1; ///< The number of this element of the muscle
 AnyIntVar MuscleElemAmount = MuscleParameters.MuscleElemAmount; ///< The total amount of elements for this muscle
 F0 ??= .DefaultMusPar.PCSAfactor*PCSA; ///< Maximum force output at optimum fiber length
 Lf0 ??= .FiberLengthScaleFoot*(MuscleParameters.OptimalFiberlength
       / cos(pi/180*MuscleParameters.Pennationangle));
 AnyVar PCSA ??= 1e4*.StrengthScaleFoot*MuscleParameters.MuscleVolumeSIScaled/(Lf0);///< PCSA (cm2) of the individual element is total volumen divided by the sum of muscle element fiber lengths.
 Vol0 ??=  1e-4* PCSA * Lf0; ///< Muscle element volume (m3)
};
#endif


#if (BM_FOOT_MODEL == _FOOT_MODEL_TOE_FLEX_GM_) | (BM_FOOT_MODEL == _FOOT_MODEL_DETAILED_GM_)

AnyMuscleModel PlantarInterosseous3Part1 =
{
 AnyFolder& MuscleParameters = ...Data.unscaled.ModelParameters.Muscles.Foot.PlantarInterosseous3Part1;
 AnyIntVar MuscleElemNo = 1; ///< The number of this element of the muscle
 AnyIntVar MuscleElemAmount = MuscleParameters.MuscleElemAmount; ///< The total amount of elements for this muscle
 F0 ??= .DefaultMusPar.PCSAfactor*PCSA; ///< Maximum force output at optimum fiber length
 Lf0 ??= .FiberLengthScaleFoot*(MuscleParameters.OptimalFiberlength
       / cos(pi/180*MuscleParameters.Pennationangle));
 AnyVar PCSA ??= 1e4*.StrengthScaleFoot*MuscleParameters.MuscleVolumeSIScaled/(Lf0);///< PCSA (cm2) of the individual element is total volumen divided by the sum of muscle element fiber lengths.
 Vol0 ??=  1e-4* PCSA * Lf0; ///< Muscle element volume (m3)
};
#endif


#if (BM_FOOT_MODEL == _FOOT_MODEL_TOE_FLEX_GM_) | (BM_FOOT_MODEL == _FOOT_MODEL_DETAILED_GM_)

AnyMuscleModel PlantarInterosseous3Part2 =
{
 AnyFolder& MuscleParameters = ...Data.unscaled.ModelParameters.Muscles.Foot.PlantarInterosseous3Part2;
 AnyIntVar MuscleElemNo = 1; ///< The number of this element of the muscle
 AnyIntVar MuscleElemAmount = MuscleParameters.MuscleElemAmount; ///< The total amount of elements for this muscle
 F0 ??= .DefaultMusPar.PCSAfactor*PCSA; ///< Maximum force output at optimum fiber length
 Lf0 ??= .FiberLengthScaleFoot*(MuscleParameters.OptimalFiberlength
       / cos(pi/180*MuscleParameters.Pennationangle));
 AnyVar PCSA ??= 1e4*.StrengthScaleFoot*MuscleParameters.MuscleVolumeSIScaled/(Lf0);///< PCSA (cm2) of the individual element is total volumen divided by the sum of muscle element fiber lengths.
 Vol0 ??=  1e-4* PCSA * Lf0; ///< Muscle element volume (m3)
};
#endif


#if (BM_FOOT_MODEL == _FOOT_MODEL_TOE_FLEX_GM_) | (BM_FOOT_MODEL == _FOOT_MODEL_DETAILED_GM_)

AnyMuscleModel PlantarInterosseous3Part3 =
{
 AnyFolder& MuscleParameters = ...Data.unscaled.ModelParameters.Muscles.Foot.PlantarInterosseous3Part3;
 AnyIntVar MuscleElemNo = 1; ///< The number of this element of the muscle
 AnyIntVar MuscleElemAmount = MuscleParameters.MuscleElemAmount; ///< The total amount of elements for this muscle
 F0 ??= .DefaultMusPar.PCSAfactor*PCSA; ///< Maximum force output at optimum fiber length
 Lf0 ??= .FiberLengthScaleFoot*(MuscleParameters.OptimalFiberlength
       / cos(pi/180*MuscleParameters.Pennationangle));
 AnyVar PCSA ??= 1e4*.StrengthScaleFoot*MuscleParameters.MuscleVolumeSIScaled/(Lf0);///< PCSA (cm2) of the individual element is total volumen divided by the sum of muscle element fiber lengths.
 Vol0 ??=  1e-4* PCSA * Lf0; ///< Muscle element volume (m3)
};
#endif


#if (BM_FOOT_MODEL == _FOOT_MODEL_TOE_FLEX_GM_) | (BM_FOOT_MODEL == _FOOT_MODEL_DETAILED_GM_)

AnyMuscleModel FlexorDigitorumBrevis2 =
{
 AnyFolder& MuscleParameters = ...Data.unscaled.ModelParameters.Muscles.Foot.FlexorDigitorumBrevis2;
 AnyIntVar MuscleElemNo = 1; ///< The number of this element of the muscle
 AnyIntVar MuscleElemAmount = MuscleParameters.MuscleElemAmount; ///< The total amount of elements for this muscle
 F0 ??= .DefaultMusPar.PCSAfactor*PCSA; ///< Maximum force output at optimum fiber length
 Lf0 ??= .FiberLengthScaleFoot*(MuscleParameters.OptimalFiberlength
       / cos(pi/180*MuscleParameters.Pennationangle));
 AnyVar PCSA ??= 1e4*.StrengthScaleFoot*MuscleParameters.MuscleVolumeSIScaled/(Lf0);///< PCSA (cm2) of the individual element is total volumen divided by the sum of muscle element fiber lengths.
 Vol0 ??=  1e-4* PCSA * Lf0; ///< Muscle element volume (m3)
};
#endif


#if (BM_FOOT_MODEL == _FOOT_MODEL_TOE_FLEX_GM_) | (BM_FOOT_MODEL == _FOOT_MODEL_DETAILED_GM_)

AnyMuscleModel FlexorDigitorumBrevis3 =
{
 AnyFolder& MuscleParameters = ...Data.unscaled.ModelParameters.Muscles.Foot.FlexorDigitorumBrevis3;
 AnyIntVar MuscleElemNo = 1; ///< The number of this element of the muscle
 AnyIntVar MuscleElemAmount = MuscleParameters.MuscleElemAmount; ///< The total amount of elements for this muscle
 F0 ??= .DefaultMusPar.PCSAfactor*PCSA; ///< Maximum force output at optimum fiber length
 Lf0 ??= .FiberLengthScaleFoot*(MuscleParameters.OptimalFiberlength
       / cos(pi/180*MuscleParameters.Pennationangle));
 AnyVar PCSA ??= 1e4*.StrengthScaleFoot*MuscleParameters.MuscleVolumeSIScaled/(Lf0);///< PCSA (cm2) of the individual element is total volumen divided by the sum of muscle element fiber lengths.
 Vol0 ??=  1e-4* PCSA * Lf0; ///< Muscle element volume (m3)
};
#endif


#if (BM_FOOT_MODEL == _FOOT_MODEL_TOE_FLEX_GM_) | (BM_FOOT_MODEL == _FOOT_MODEL_DETAILED_GM_)

AnyMuscleModel FlexorDigitorumBrevis4 =
{
 AnyFolder& MuscleParameters = ...Data.unscaled.ModelParameters.Muscles.Foot.FlexorDigitorumBrevis4;
 AnyIntVar MuscleElemNo = 1; ///< The number of this element of the muscle
 AnyIntVar MuscleElemAmount = MuscleParameters.MuscleElemAmount; ///< The total amount of elements for this muscle
 F0 ??= .DefaultMusPar.PCSAfactor*PCSA; ///< Maximum force output at optimum fiber length
 Lf0 ??= .FiberLengthScaleFoot*(MuscleParameters.OptimalFiberlength
       / cos(pi/180*MuscleParameters.Pennationangle));
 AnyVar PCSA ??= 1e4*.StrengthScaleFoot*MuscleParameters.MuscleVolumeSIScaled/(Lf0);///< PCSA (cm2) of the individual element is total volumen divided by the sum of muscle element fiber lengths.
 Vol0 ??=  1e-4* PCSA * Lf0; ///< Muscle element volume (m3)
};
#endif


#if (BM_FOOT_MODEL == _FOOT_MODEL_TOE_FLEX_GM_) | (BM_FOOT_MODEL == _FOOT_MODEL_DETAILED_GM_)

AnyMuscleModel FlexorDigitorumBrevis5 =
{
 AnyFolder& MuscleParameters = ...Data.unscaled.ModelParameters.Muscles.Foot.FlexorDigitorumBrevis5;
 AnyIntVar MuscleElemNo = 1; ///< The number of this element of the muscle
 AnyIntVar MuscleElemAmount = MuscleParameters.MuscleElemAmount; ///< The total amount of elements for this muscle
 F0 ??= .DefaultMusPar.PCSAfactor*PCSA; ///< Maximum force output at optimum fiber length
 Lf0 ??= .FiberLengthScaleFoot*(MuscleParameters.OptimalFiberlength
       / cos(pi/180*MuscleParameters.Pennationangle));
 AnyVar PCSA ??= 1e4*.StrengthScaleFoot*MuscleParameters.MuscleVolumeSIScaled/(Lf0);///< PCSA (cm2) of the individual element is total volumen divided by the sum of muscle element fiber lengths.
 Vol0 ??=  1e-4* PCSA * Lf0; ///< Muscle element volume (m3)
};
#endif


#if (BM_FOOT_MODEL == _FOOT_MODEL_TOE_FLEX_GM_) | (BM_FOOT_MODEL == _FOOT_MODEL_DETAILED_GM_)

AnyMuscleModel QuadratusPlantarMedialis1 =
{
 AnyFolder& MuscleParameters = ...Data.unscaled.ModelParameters.Muscles.Foot.QuadratusPlantarMedialis1;
 AnyIntVar MuscleElemNo = 1; ///< The number of this element of the muscle
 AnyIntVar MuscleElemAmount = MuscleParameters.MuscleElemAmount; ///< The total amount of elements for this muscle
 F0 ??= .DefaultMusPar.PCSAfactor*PCSA; ///< Maximum force output at optimum fiber length
 Lf0 ??= .FiberLengthScaleFoot*(MuscleParameters.OptimalFiberlength
       / cos(pi/180*MuscleParameters.Pennationangle));
 AnyVar PCSA ??= 1e4*.StrengthScaleFoot*MuscleParameters.MuscleVolumeSIScaled/(Lf0);///< PCSA (cm2) of the individual element is total volumen divided by the sum of muscle element fiber lengths.
 Vol0 ??=  1e-4* PCSA * Lf0; ///< Muscle element volume (m3)
};
#endif


#if (BM_FOOT_MODEL == _FOOT_MODEL_TOE_FLEX_GM_) | (BM_FOOT_MODEL == _FOOT_MODEL_DETAILED_GM_)

AnyMuscleModel QuadratusPlantarMedialis2 =
{
 AnyFolder& MuscleParameters = ...Data.unscaled.ModelParameters.Muscles.Foot.QuadratusPlantarMedialis2;
 AnyIntVar MuscleElemNo = 1; ///< The number of this element of the muscle
 AnyIntVar MuscleElemAmount = MuscleParameters.MuscleElemAmount; ///< The total amount of elements for this muscle
 F0 ??= .DefaultMusPar.PCSAfactor*PCSA; ///< Maximum force output at optimum fiber length
 Lf0 ??= .FiberLengthScaleFoot*(MuscleParameters.OptimalFiberlength
       / cos(pi/180*MuscleParameters.Pennationangle));
 AnyVar PCSA ??= 1e4*.StrengthScaleFoot*MuscleParameters.MuscleVolumeSIScaled/(Lf0);///< PCSA (cm2) of the individual element is total volumen divided by the sum of muscle element fiber lengths.
 Vol0 ??=  1e-4* PCSA * Lf0; ///< Muscle element volume (m3)
};
#endif


#if (BM_FOOT_MODEL == _FOOT_MODEL_TOE_FLEX_GM_) | (BM_FOOT_MODEL == _FOOT_MODEL_DETAILED_GM_)

AnyMuscleModel QuadratusPlantarMedialis3 =
{
 AnyFolder& MuscleParameters = ...Data.unscaled.ModelParameters.Muscles.Foot.QuadratusPlantarMedialis3;
 AnyIntVar MuscleElemNo = 1; ///< The number of this element of the muscle
 AnyIntVar MuscleElemAmount = MuscleParameters.MuscleElemAmount; ///< The total amount of elements for this muscle
 F0 ??= .DefaultMusPar.PCSAfactor*PCSA; ///< Maximum force output at optimum fiber length
 Lf0 ??= .FiberLengthScaleFoot*(MuscleParameters.OptimalFiberlength
       / cos(pi/180*MuscleParameters.Pennationangle));
 AnyVar PCSA ??= 1e4*.StrengthScaleFoot*MuscleParameters.MuscleVolumeSIScaled/(Lf0);///< PCSA (cm2) of the individual element is total volumen divided by the sum of muscle element fiber lengths.
 Vol0 ??=  1e-4* PCSA * Lf0; ///< Muscle element volume (m3)
};
#endif


#if (BM_FOOT_MODEL == _FOOT_MODEL_TOE_FLEX_GM_) | (BM_FOOT_MODEL == _FOOT_MODEL_DETAILED_GM_)

AnyMuscleModel QuadratusPlantarLateralis1 =
{
 AnyFolder& MuscleParameters = ...Data.unscaled.ModelParameters.Muscles.Foot.QuadratusPlantarLateralis1;
 AnyIntVar MuscleElemNo = 1; ///< The number of this element of the muscle
 AnyIntVar MuscleElemAmount = MuscleParameters.MuscleElemAmount; ///< The total amount of elements for this muscle
 F0 ??= .DefaultMusPar.PCSAfactor*PCSA; ///< Maximum force output at optimum fiber length
 Lf0 ??= .FiberLengthScaleFoot*(MuscleParameters.OptimalFiberlength
       / cos(pi/180*MuscleParameters.Pennationangle));
 AnyVar PCSA ??= 1e4*.StrengthScaleFoot*MuscleParameters.MuscleVolumeSIScaled/(Lf0);///< PCSA (cm2) of the individual element is total volumen divided by the sum of muscle element fiber lengths.
 Vol0 ??=  1e-4* PCSA * Lf0; ///< Muscle element volume (m3)
};
#endif


#if (BM_FOOT_MODEL == _FOOT_MODEL_TOE_FLEX_GM_) | (BM_FOOT_MODEL == _FOOT_MODEL_DETAILED_GM_)

AnyMuscleModel QuadratusPlantarLateralis2 =
{
 AnyFolder& MuscleParameters = ...Data.unscaled.ModelParameters.Muscles.Foot.QuadratusPlantarLateralis2;
 AnyIntVar MuscleElemNo = 1; ///< The number of this element of the muscle
 AnyIntVar MuscleElemAmount = MuscleParameters.MuscleElemAmount; ///< The total amount of elements for this muscle
 F0 ??= .DefaultMusPar.PCSAfactor*PCSA; ///< Maximum force output at optimum fiber length
 Lf0 ??= .FiberLengthScaleFoot*(MuscleParameters.OptimalFiberlength
       / cos(pi/180*MuscleParameters.Pennationangle));
 AnyVar PCSA ??= 1e4*.StrengthScaleFoot*MuscleParameters.MuscleVolumeSIScaled/(Lf0);///< PCSA (cm2) of the individual element is total volumen divided by the sum of muscle element fiber lengths.
 Vol0 ??=  1e-4* PCSA * Lf0; ///< Muscle element volume (m3)
};
#endif


#if (BM_FOOT_MODEL == _FOOT_MODEL_TOE_FLEX_GM_) | (BM_FOOT_MODEL == _FOOT_MODEL_DETAILED_GM_)

AnyMuscleModel QuadratusPlantarLateralis3 =
{
 AnyFolder& MuscleParameters = ...Data.unscaled.ModelParameters.Muscles.Foot.QuadratusPlantarLateralis3;
 AnyIntVar MuscleElemNo = 1; ///< The number of this element of the muscle
 AnyIntVar MuscleElemAmount = MuscleParameters.MuscleElemAmount; ///< The total amount of elements for this muscle
 F0 ??= .DefaultMusPar.PCSAfactor*PCSA; ///< Maximum force output at optimum fiber length
 Lf0 ??= .FiberLengthScaleFoot*(MuscleParameters.OptimalFiberlength
       / cos(pi/180*MuscleParameters.Pennationangle));
 AnyVar PCSA ??= 1e4*.StrengthScaleFoot*MuscleParameters.MuscleVolumeSIScaled/(Lf0);///< PCSA (cm2) of the individual element is total volumen divided by the sum of muscle element fiber lengths.
 Vol0 ??=  1e-4* PCSA * Lf0; ///< Muscle element volume (m3)
};
#endif


#if (BM_FOOT_MODEL == _FOOT_MODEL_TOE_FLEX_GM_) | (BM_FOOT_MODEL == _FOOT_MODEL_DETAILED_GM_)

AnyMuscleModel Lumbrical2 =
{
 AnyFolder& MuscleParameters = ...Data.unscaled.ModelParameters.Muscles.Foot.Lumbrical2;
 AnyIntVar MuscleElemNo = 1; ///< The number of this element of the muscle
 AnyIntVar MuscleElemAmount = MuscleParameters.MuscleElemAmount; ///< The total amount of elements for this muscle
 F0 ??= .DefaultMusPar.PCSAfactor*PCSA; ///< Maximum force output at optimum fiber length
 Lf0 ??= .FiberLengthScaleFoot*(MuscleParameters.OptimalFiberlength
       / cos(pi/180*MuscleParameters.Pennationangle));
 AnyVar PCSA ??= 1e4*.StrengthScaleFoot*MuscleParameters.MuscleVolumeSIScaled/(Lf0);///< PCSA (cm2) of the individual element is total volumen divided by the sum of muscle element fiber lengths.
 Vol0 ??=  1e-4* PCSA * Lf0; ///< Muscle element volume (m3)
};
#endif


#if (BM_FOOT_MODEL == _FOOT_MODEL_TOE_FLEX_GM_) | (BM_FOOT_MODEL == _FOOT_MODEL_DETAILED_GM_)

AnyMuscleModel Lumbrical3 =
{
 AnyFolder& MuscleParameters = ...Data.unscaled.ModelParameters.Muscles.Foot.Lumbrical3;
 AnyIntVar MuscleElemNo = 1; ///< The number of this element of the muscle
 AnyIntVar MuscleElemAmount = MuscleParameters.MuscleElemAmount; ///< The total amount of elements for this muscle
 F0 ??= .DefaultMusPar.PCSAfactor*PCSA; ///< Maximum force output at optimum fiber length
 Lf0 ??= .FiberLengthScaleFoot*(MuscleParameters.OptimalFiberlength
       / cos(pi/180*MuscleParameters.Pennationangle));
 AnyVar PCSA ??= 1e4*.StrengthScaleFoot*MuscleParameters.MuscleVolumeSIScaled/(Lf0);///< PCSA (cm2) of the individual element is total volumen divided by the sum of muscle element fiber lengths.
 Vol0 ??=  1e-4* PCSA * Lf0; ///< Muscle element volume (m3)
};
#endif


#if (BM_FOOT_MODEL == _FOOT_MODEL_TOE_FLEX_GM_) | (BM_FOOT_MODEL == _FOOT_MODEL_DETAILED_GM_)

AnyMuscleModel Lumbrical4 =
{
 AnyFolder& MuscleParameters = ...Data.unscaled.ModelParameters.Muscles.Foot.Lumbrical4;
 AnyIntVar MuscleElemNo = 1; ///< The number of this element of the muscle
 AnyIntVar MuscleElemAmount = MuscleParameters.MuscleElemAmount; ///< The total amount of elements for this muscle
 F0 ??= .DefaultMusPar.PCSAfactor*PCSA; ///< Maximum force output at optimum fiber length
 Lf0 ??= .FiberLengthScaleFoot*(MuscleParameters.OptimalFiberlength
       / cos(pi/180*MuscleParameters.Pennationangle));
 AnyVar PCSA ??= 1e4*.StrengthScaleFoot*MuscleParameters.MuscleVolumeSIScaled/(Lf0);///< PCSA (cm2) of the individual element is total volumen divided by the sum of muscle element fiber lengths.
 Vol0 ??=  1e-4* PCSA * Lf0; ///< Muscle element volume (m3)
};
#endif


#if (BM_FOOT_MODEL == _FOOT_MODEL_TOE_FLEX_GM_) | (BM_FOOT_MODEL == _FOOT_MODEL_DETAILED_GM_)

AnyMuscleModel Lumbrical5 =
{
 AnyFolder& MuscleParameters = ...Data.unscaled.ModelParameters.Muscles.Foot.Lumbrical5;
 AnyIntVar MuscleElemNo = 1; ///< The number of this element of the muscle
 AnyIntVar MuscleElemAmount = MuscleParameters.MuscleElemAmount; ///< The total amount of elements for this muscle
 F0 ??= .DefaultMusPar.PCSAfactor*PCSA; ///< Maximum force output at optimum fiber length
 Lf0 ??= .FiberLengthScaleFoot*(MuscleParameters.OptimalFiberlength
       / cos(pi/180*MuscleParameters.Pennationangle));
 AnyVar PCSA ??= 1e4*.StrengthScaleFoot*MuscleParameters.MuscleVolumeSIScaled/(Lf0);///< PCSA (cm2) of the individual element is total volumen divided by the sum of muscle element fiber lengths.
 Vol0 ??=  1e-4* PCSA * Lf0; ///< Muscle element volume (m3)
};
#endif


#if (BM_FOOT_MODEL == _FOOT_MODEL_TOE_FLEX_GM_) | (BM_FOOT_MODEL == _FOOT_MODEL_DETAILED_GM_)

AnyMuscleModel AbductorDigitiMinimi1 =
{
 AnyFolder& MuscleParameters = ...Data.unscaled.ModelParameters.Muscles.Foot.AbductorDigitiMinimi1;
 AnyIntVar MuscleElemNo = 1; ///< The number of this element of the muscle
 AnyIntVar MuscleElemAmount = MuscleParameters.MuscleElemAmount; ///< The total amount of elements for this muscle
 F0 ??= .DefaultMusPar.PCSAfactor*PCSA; ///< Maximum force output at optimum fiber length
 Lf0 ??= .FiberLengthScaleFoot*(MuscleParameters.OptimalFiberlength
       / cos(pi/180*MuscleParameters.Pennationangle));
 AnyVar PCSA ??= 1e4*.StrengthScaleFoot*MuscleParameters.MuscleVolumeSIScaled/(Lf0);///< PCSA (cm2) of the individual element is total volumen divided by the sum of muscle element fiber lengths.
 Vol0 ??=  1e-4* PCSA * Lf0; ///< Muscle element volume (m3)
};
#endif


#if (BM_FOOT_MODEL == _FOOT_MODEL_TOE_FLEX_GM_) | (BM_FOOT_MODEL == _FOOT_MODEL_DETAILED_GM_)

AnyMuscleModel AbductorDigitiMinimi2 =
{
 AnyFolder& MuscleParameters = ...Data.unscaled.ModelParameters.Muscles.Foot.AbductorDigitiMinimi2;
 AnyIntVar MuscleElemNo = 1; ///< The number of this element of the muscle
 AnyIntVar MuscleElemAmount = MuscleParameters.MuscleElemAmount; ///< The total amount of elements for this muscle
 F0 ??= .DefaultMusPar.PCSAfactor*PCSA; ///< Maximum force output at optimum fiber length
 Lf0 ??= .FiberLengthScaleFoot*(MuscleParameters.OptimalFiberlength
       / cos(pi/180*MuscleParameters.Pennationangle));
 AnyVar PCSA ??= 1e4*.StrengthScaleFoot*MuscleParameters.MuscleVolumeSIScaled/(Lf0);///< PCSA (cm2) of the individual element is total volumen divided by the sum of muscle element fiber lengths.
 Vol0 ??=  1e-4* PCSA * Lf0; ///< Muscle element volume (m3)
};
#endif


#if (BM_FOOT_MODEL == _FOOT_MODEL_TOE_FLEX_GM_) | (BM_FOOT_MODEL == _FOOT_MODEL_DETAILED_GM_)

AnyMuscleModel AbductorDigitiMinimi3 =
{
 AnyFolder& MuscleParameters = ...Data.unscaled.ModelParameters.Muscles.Foot.AbductorDigitiMinimi3;
 AnyIntVar MuscleElemNo = 1; ///< The number of this element of the muscle
 AnyIntVar MuscleElemAmount = MuscleParameters.MuscleElemAmount; ///< The total amount of elements for this muscle
 F0 ??= .DefaultMusPar.PCSAfactor*PCSA; ///< Maximum force output at optimum fiber length
 Lf0 ??= .FiberLengthScaleFoot*(MuscleParameters.OptimalFiberlength
       / cos(pi/180*MuscleParameters.Pennationangle));
 AnyVar PCSA ??= 1e4*.StrengthScaleFoot*MuscleParameters.MuscleVolumeSIScaled/(Lf0);///< PCSA (cm2) of the individual element is total volumen divided by the sum of muscle element fiber lengths.
 Vol0 ??=  1e-4* PCSA * Lf0; ///< Muscle element volume (m3)
};
#endif


#if (BM_FOOT_MODEL == _FOOT_MODEL_TOE_FLEX_GM_) | (BM_FOOT_MODEL == _FOOT_MODEL_DETAILED_GM_)

AnyMuscleModel FlexorDigitiMinimiBrevis =
{
 AnyFolder& MuscleParameters = ...Data.unscaled.ModelParameters.Muscles.Foot.FlexorDigitiMinimiBrevis;
 AnyIntVar MuscleElemNo = 1; ///< The number of this element of the muscle
 AnyIntVar MuscleElemAmount = MuscleParameters.MuscleElemAmount; ///< The total amount of elements for this muscle
 F0 ??= .DefaultMusPar.PCSAfactor*PCSA; ///< Maximum force output at optimum fiber length
 Lf0 ??= .FiberLengthScaleFoot*(MuscleParameters.OptimalFiberlength
       / cos(pi/180*MuscleParameters.Pennationangle));
 AnyVar PCSA ??= 1e4*.StrengthScaleFoot*MuscleParameters.MuscleVolumeSIScaled/(Lf0);///< PCSA (cm2) of the individual element is total volumen divided by the sum of muscle element fiber lengths.
 Vol0 ??=  1e-4* PCSA * Lf0; ///< Muscle element volume (m3)
};
#endif
