AnyVar AnyVar_HipFlexion = ...Interface.Left.HipFlexion.Pos[0]*180/pi;
AnyVar AnyVar_HipAbduction = ...Interface.Left.HipAbduction.Pos[0]*180/pi;
AnyVar AnyVar_HipExternalRotation = ...Interface.Left.HipExternalRotation.Pos[0]*180/pi;

//AnyVar AnyVar_PatellaFlexion = ...Interface.Left.PatellaFlexion.Pos[0]*180/pi;
//AnyVar AnyVar_PatellaRotation = ...Interface.Left.PatellaRotation.Pos[0]*180/pi;

AnyVar AnyVar_KneeFlexion = ...Interface.Left.KneeFlexion.Pos[0]*180/pi;

#if ((BM_FOOT_MODEL == _FOOT_MODEL_LEG_FOOT_) | (BM_FOOT_MODEL == _FOOT_MODEL_RIGID_GM_) | (BM_FOOT_MODEL == _FOOT_MODEL_TOE_FLEX_GM_) | (BM_FOOT_MODEL == _FOOT_MODEL_DETAILED_GM_))
AnyVar AnyVar_AnklePlantarFlexion =...Interface.Left.AnklePlantarFlexion.Pos[0]*180/pi;
//AnyVar AnyVar_AnkleEversion =...Interface.Left.AnkleEversion.Pos[0]*180/pi;

AnyVar AnyVar_SubTalarEversion = ...Interface.Left.SubTalarEversion.Pos[0]*180/pi;
#endif

#if ((BM_FOOT_MODEL == _FOOT_MODEL_TOE_FLEX_GM_) | (BM_FOOT_MODEL == _FOOT_MODEL_DETAILED_GM_))

AnyFolder Foot = {
  #if BM_FOOT_MODEL == _FOOT_MODEL_DETAILED_GM_

  AnyVar AnyVar_CalcaneoCuboidDorsiFlexion = ....Interface.Left.CalcaneoCuboidDorsiFlexion.Pos[0]*180/pi;
  AnyVar AnyVar_CalcaneoCuboidAbduction = ....Interface.Left.CalcaneoCuboidAbduction.Pos[0]*180/pi;
  AnyVar AnyVar_CalcaneoCuboidEversion = ....Interface.Left.CalcaneoCuboidEversion.Pos[0]*180/pi;
  AnyVar AnyVar_TaloNavicularDorsiFlexion = ....Interface.Left.TaloNavicularDorsiFlexion.Pos[0]*180/pi;
  AnyVar AnyVar_TaloNavicularAbduction = ....Interface.Left.TaloNavicularAbduction.Pos[0]*180/pi;
  AnyVar AnyVar_TaloNavicularEversion = ....Interface.Left.TaloNavicularEversion.Pos[0]*180/pi;
  AnyVar AnyVar_NaviculoMedialCuneiformDorsiFlexion = ....Interface.Left.NaviculoMedialCuneiformDorsiFlexion.Pos[0]*180/pi;
  AnyVar AnyVar_NaviculoMedialCuneiformAbduction = ....Interface.Left.NaviculoMedialCuneiformAbduction.Pos[0]*180/pi;
  AnyVar AnyVar_NaviculoIntermediateCuneiformDorsiFlexion = ....Interface.Left.NaviculoIntermediateCuneiformDorsiFlexion.Pos[0]*180/pi;
  AnyVar AnyVar_NaviculoIntermediateCuneiformAbduction = ....Interface.Left.NaviculoIntermediateCuneiformAbduction.Pos[0]*180/pi;
  AnyVar AnyVar_NaviculoLateralCuneiformDorsiFlexion = ....Interface.Left.NaviculoLateralCuneiformDorsiFlexion.Pos[0]*180/pi;
  AnyVar AnyVar_NaviculoLateralCuneiformAbduction = ....Interface.Left.NaviculoLateralCuneiformAbduction.Pos[0]*180/pi;
  AnyVar AnyVar_TarsoMetatarsal1DorsiFlexion = ....Interface.Left.TarsoMetatarsal1DorsiFlexion.Pos[0]*180/pi;
  AnyVar AnyVar_TarsoMetatarsal1Abduction = ....Interface.Left.TarsoMetatarsal1Abduction.Pos[0]*180/pi;
  AnyVar AnyVar_TarsoMetatarsal2DorsiFlexion = ....Interface.Left.TarsoMetatarsal2DorsiFlexion.Pos[0]*180/pi;
  AnyVar AnyVar_TarsoMetatarsal2Abduction = ....Interface.Left.TarsoMetatarsal2Abduction.Pos[0]*180/pi;
  AnyVar AnyVar_TarsoMetatarsal3DorsiFlexion = ....Interface.Left.TarsoMetatarsal3DorsiFlexion.Pos[0]*180/pi;
  AnyVar AnyVar_TarsoMetatarsal3Abduction = ....Interface.Left.TarsoMetatarsal3Abduction.Pos[0]*180/pi;
  AnyVar AnyVar_TarsoMetatarsal4DorsiFlexion = ....Interface.Left.TarsoMetatarsal4DorsiFlexion.Pos[0]*180/pi;
  AnyVar AnyVar_TarsoMetatarsal4Abduction = ....Interface.Left.TarsoMetatarsal4Abduction.Pos[0]*180/pi;
  AnyVar AnyVar_TarsoMetatarsal5SkewDorsiFlexion = ....Interface.Left.TarsoMetatarsal5SkewDorsiFlexion.Pos[0]*180/pi;
  AnyVar AnyVar_TarsoMetatarsal5Abduction = ....Interface.Left.TarsoMetatarsal5Abduction.Pos[0]*180/pi;

  #endif //BM_FOOT_MODEL == _FOOT_MODEL_DETAILED_GM_

  AnyVar AnyVar_MetatarsoPhalangeal1DorsiFlexion = ....Interface.Left.MetatarsoPhalangeal1DorsiFlexion.Pos[0]*180/pi;

  #if BM_FOOT_MODEL == _FOOT_MODEL_DETAILED_GM_
  AnyVar AnyVar_MetatarsoPhalangeal1Abduction = ....Interface.Left.MetatarsoPhalangeal1Abduction.Pos[0]*180/pi;
  #endif

  AnyVar AnyVar_MetatarsoPhalangeal2DorsiFlexion = ....Interface.Left.MetatarsoPhalangeal2DorsiFlexion.Pos[0]*180/pi;

  #if BM_FOOT_MODEL == _FOOT_MODEL_DETAILED_GM_
  AnyVar AnyVar_MetatarsoPhalangeal2Abduction = ....Interface.Left.MetatarsoPhalangeal2Abduction.Pos[0]*180/pi;
  #endif

  AnyVar AnyVar_MetatarsoPhalangeal3DorsiFlexion = ....Interface.Left.MetatarsoPhalangeal3DorsiFlexion.Pos[0]*180/pi;

  #if BM_FOOT_MODEL == _FOOT_MODEL_DETAILED_GM_
  AnyVar AnyVar_MetatarsoPhalangeal3Abduction = ....Interface.Left.MetatarsoPhalangeal3Abduction.Pos[0]*180/pi;
  #endif

  AnyVar AnyVar_MetatarsoPhalangeal4DorsiFlexion = ....Interface.Left.MetatarsoPhalangeal4DorsiFlexion.Pos[0]*180/pi;

  #if BM_FOOT_MODEL == _FOOT_MODEL_DETAILED_GM_
  AnyVar AnyVar_MetatarsoPhalangeal4Abduction = ....Interface.Left.MetatarsoPhalangeal4Abduction.Pos[0]*180/pi;
  #endif

  AnyVar AnyVar_MetatarsoPhalangeal5DorsiFlexion = ....Interface.Left.MetatarsoPhalangeal5DorsiFlexion.Pos[0]*180/pi;

  #if BM_FOOT_MODEL == _FOOT_MODEL_DETAILED_GM_
  AnyVar AnyVar_MetatarsoPhalangeal5Abduction = ....Interface.Left.MetatarsoPhalangeal5Abduction.Pos[0]*180/pi;
  AnyVar AnyVar_ProximoDistalPhalange1DorsiFlexion = ....Interface.Left.ProximoDistalPhalange1DorsiFlexion.Pos[0]*180/pi;
  AnyVar AnyVar_ProximoMedialPhalange2DorsiFlexion = ....Interface.Left.ProximoMedialPhalange2DorsiFlexion.Pos[0]*180/pi;
  AnyVar AnyVar_ProximoMedialPhalange3DorsiFlexion = ....Interface.Left.ProximoMedialPhalange3DorsiFlexion.Pos[0]*180/pi;
  AnyVar AnyVar_ProximoMedialPhalange4DorsiFlexion = ....Interface.Left.ProximoMedialPhalange4DorsiFlexion.Pos[0]*180/pi;
  AnyVar AnyVar_ProximoMedialPhalange5DorsiFlexion = ....Interface.Left.ProximoMedialPhalange5DorsiFlexion.Pos[0]*180/pi;
  AnyVar AnyVar_MedioDistalPhalange2DorsiFlexion = ....Interface.Left.MedioDistalPhalange2DorsiFlexion.Pos[0]*180/pi;
  AnyVar AnyVar_MedioDistalPhalange3DorsiFlexion = ....Interface.Left.MedioDistalPhalange3DorsiFlexion.Pos[0]*180/pi;
  AnyVar AnyVar_MedioDistalPhalange4DorsiFlexion = ....Interface.Left.MedioDistalPhalange4DorsiFlexion.Pos[0]*180/pi;
  AnyVar AnyVar_MedioDistalPhalange5DorsiFlexion = ....Interface.Left.MedioDistalPhalange5DorsiFlexion.Pos[0]*180/pi;

  #endif  // BM_FOOT_MODEL == _FOOT_MODEL_DETAILED_GM_

};
#endif // ((BM_FOOT_MODEL == _FOOT_MODEL_TOE_FLEX_GM_) | (BM_FOOT_MODEL == _FOOT_MODEL_DETAILED_GM_))
