/**
If having problems of balancing the model in the inverse analysis this file will work as
as an artifical hook for this body part it will carry any load. It may be be used
for diagnostic purposes
*/
AnyFolder LegHook ={

  AnyFixedRefFrame GlobalRef ={
    Origin={0,0,0};
  };

  AnyVar Strength=0.01;
  AnyVar RotStrength=0.01;


  AnyFolder ThighHook = {
    AnySeg &SegToBeHold =..Segments.Thigh;
    AnyFixedRefFrame &ForceProvider =.GlobalRef;
    AnyVar Strength =.Strength;
    AnyVar RotStrength =.RotStrength;
    #include "<ANYBODY_PATH_MODELUTILS>/Hook/ArtificialHook.any"
  };


  AnyFolder ShankHook = {
    AnySeg &SegToBeHold =..Segments.Shank;
    AnyFixedRefFrame &ForceProvider =.GlobalRef;
    AnyVar Strength =.Strength;
    AnyVar RotStrength =.RotStrength;
    #include "<ANYBODY_PATH_MODELUTILS>/Hook/ArtificialHook.any"
  };


  AnyFolder FootHook = {
    AnySeg &SegToBeHold =..Segments.Foot;
    AnyFixedRefFrame &ForceProvider =.GlobalRef;
    AnyVar Strength =.Strength;
    AnyVar RotStrength =.RotStrength;
    #include "<ANYBODY_PATH_MODELUTILS>/Hook/ArtificialHook.any"
  };
};
