//This file can be used for making shortcuts to the muscle data
#ifndef LEG_WITH_JOINT_MUSCLES

AnyFolder &mus1  = ..Muscles.SoleusMedialis1;
AnyFolder &mus2  = ..Muscles.SoleusMedialis2;
AnyFolder &mus3  = ..Muscles.SoleusMedialis3;
AnyFolder &mus4  = ..Muscles.SoleusLateralis1;
AnyFolder &mus5  = ..Muscles.SoleusLateralis2;
AnyFolder &mus6  = ..Muscles.SoleusLateralis3;
AnyFolder &mus7  = ..Muscles.GastrocnemiusLateralis1;
AnyFolder &mus8  = ..Muscles.GastrocnemiusMedialis1;
AnyFolder &mus9  = ..Muscles.FlexorDigitorumLongus1;
AnyFolder &mus10  = ..Muscles.FlexorDigitorumLongus2;
AnyFolder &mus11  = ..Muscles.FlexorDigitorumLongus3;
AnyFolder &mus12  = ..Muscles.FlexorHallucisLongus1;
AnyFolder &mus13  = ..Muscles.FlexorHallucisLongus2;
AnyFolder &mus14  = ..Muscles.FlexorHallucisLongus3;
AnyFolder &mus15  = ..Muscles.TibialisPosteriorLateralis1;
AnyFolder &mus16  = ..Muscles.TibialisPosteriorLateralis2;
AnyFolder &mus17  = ..Muscles.TibialisPosteriorLateralis3;
AnyFolder &mus18  = ..Muscles.TibialisPosteriorMedialis1;
AnyFolder &mus19  = ..Muscles.TibialisPosteriorMedialis2;
AnyFolder &mus20  = ..Muscles.TibialisPosteriorMedialis3;
AnyFolder &mus21  = ..Muscles.TibialisAnterior1;
AnyFolder &mus22  = ..Muscles.TibialisAnterior2;
AnyFolder &mus23  = ..Muscles.TibialisAnterior3;
AnyFolder &mus24  = ..Muscles.PeroneusBrevis1;
AnyFolder &mus25  = ..Muscles.PeroneusBrevis2;
AnyFolder &mus26  = ..Muscles.PeroneusBrevis3;
AnyFolder &mus27  = ..Muscles.PeroneusLongus1;
AnyFolder &mus28  = ..Muscles.PeroneusLongus2;
AnyFolder &mus29  = ..Muscles.PeroneusLongus3;


AnyFolder &mus33  = ..Muscles.ExtensorDigitorumLongus1;
AnyFolder &mus34  = ..Muscles.ExtensorDigitorumLongus2;
AnyFolder &mus35  = ..Muscles.ExtensorDigitorumLongus3;
AnyFolder &mus36  = ..Muscles.ExtensorHallucisLongus1;
AnyFolder &mus37  = ..Muscles.ExtensorHallucisLongus2;
AnyFolder &mus38  = ..Muscles.ExtensorHallucisLongus3;
AnyFolder &mus39  = ..Muscles.VastusLateralisInferior1;
AnyFolder &mus40  = ..Muscles.VastusLateralisInferior2;
AnyFolder &mus41  = ..Muscles.VastusLateralisInferior3;
AnyFolder &mus42  = ..Muscles.VastusLateralisInferior4;
AnyFolder &mus43  = ..Muscles.VastusLateralisInferior5;
AnyFolder &mus44  = ..Muscles.VastusLateralisInferior6;
AnyFolder &mus45  = ..Muscles.VastusLateralisSuperior1;
AnyFolder &mus46  = ..Muscles.VastusLateralisSuperior2;
AnyFolder &mus47  = ..Muscles.VastusMedialisInferior1;
AnyFolder &mus48  = ..Muscles.VastusMedialisInferior2;


AnyFolder &mus51  = ..Muscles.VastusMedialisSuperior1;
AnyFolder &mus52  = ..Muscles.VastusMedialisSuperior2;
AnyFolder &mus53  = ..Muscles.VastusMedialisSuperior3;
AnyFolder &mus54  = ..Muscles.VastusMedialisSuperior4;


AnyFolder &mus57  = ..Muscles.VastusIntermedius1;
AnyFolder &mus58  = ..Muscles.VastusIntermedius2;
AnyFolder &mus59  = ..Muscles.VastusIntermedius3;
AnyFolder &mus60  = ..Muscles.VastusIntermedius4;
AnyFolder &mus61  = ..Muscles.VastusIntermedius5;
AnyFolder &mus62  = ..Muscles.VastusIntermedius6;

AnyFolder &mus63  = ..Muscles.RectusFemoris1;
AnyFolder &mus64  = ..Muscles.RectusFemoris2;


AnyFolder &mus65  = ..Muscles.Semitendinosus1;
AnyFolder &mus66  = ..Muscles.Semimembranosus1;
AnyFolder &mus66a  = ..Muscles.Semimembranosus2;
AnyFolder &mus66b  = ..Muscles.Semimembranosus3;
AnyFolder &mus67  = ..Muscles.BicepsFemorisCaputLongum1;
AnyFolder &mus68  = ..Muscles.BicepsFemorisCaputBreve1;
AnyFolder &mus69  = ..Muscles.BicepsFemorisCaputBreve2;
AnyFolder &mus170 = ..Muscles.BicepsFemorisCaputBreve3;


AnyFolder &mus70  = ..Muscles.Sartorius1;

AnyFolder &mus72  = ..Muscles.IliacusLateralis1;
AnyFolder &mus73  = ..Muscles.IliacusLateralis2;

AnyFolder &mus75  = ..Muscles.IliacusMid1;
AnyFolder &mus76  = ..Muscles.IliacusMid2;

AnyFolder &mus78  = ..Muscles.IliacusMedialis1;
AnyFolder &mus79  = ..Muscles.IliacusMedialis2;


AnyFolder &mus81  = ..Muscles.GluteusMinimusAnterior1;
AnyFolder &mus82  = ..Muscles.GluteusMinimusMid1;
AnyFolder &mus83  = ..Muscles.GluteusMinimusPosterior1;
AnyFolder &mus84  = ..Muscles.GluteusMediusAnterior1;
AnyFolder &mus85  = ..Muscles.GluteusMediusAnterior2;
AnyFolder &mus86  = ..Muscles.GluteusMediusAnterior3;
AnyFolder &mus87  = ..Muscles.GluteusMediusAnterior4;
AnyFolder &mus88  = ..Muscles.GluteusMediusAnterior5;
AnyFolder &mus89  = ..Muscles.GluteusMediusAnterior6;


AnyFolder &mus90  = ..Muscles.GluteusMediusPosterior1;
AnyFolder &mus91  = ..Muscles.GluteusMediusPosterior2;
AnyFolder &mus92  = ..Muscles.GluteusMediusPosterior3;
AnyFolder &mus93  = ..Muscles.GluteusMediusPosterior4;
AnyFolder &mus94  = ..Muscles.GluteusMediusPosterior5;
AnyFolder &mus95  = ..Muscles.GluteusMediusPosterior6;

AnyFolder &mus96  = ..Muscles.GluteusMaximusSuperior1;
AnyFolder &mus97  = ..Muscles.GluteusMaximusSuperior2;
AnyFolder &mus98  = ..Muscles.GluteusMaximusSuperior3;


AnyFolder &mus102  = ..Muscles.GluteusMaximusInferior1;
AnyFolder &mus103  = ..Muscles.GluteusMaximusInferior2;
AnyFolder &mus104  = ..Muscles.GluteusMaximusInferior3;


AnyFolder &mus108  = ..Muscles.TensorFasciaeLatae1;
AnyFolder &mus109  = ..Muscles.TensorFasciaeLatae2;
AnyFolder &mus110  = ..Muscles.Piriformis1;
AnyFolder &mus111  = ..Muscles.Gracilis1;
AnyFolder &mus112  = ..Muscles.Gracilis2;
AnyFolder &mus113  = ..Muscles.AdductorLongus1;
AnyFolder &mus114  = ..Muscles.AdductorLongus2;
AnyFolder &mus115  = ..Muscles.AdductorLongus3;
AnyFolder &mus116  = ..Muscles.AdductorLongus4;
AnyFolder &mus117  = ..Muscles.AdductorLongus5;
AnyFolder &mus118  = ..Muscles.AdductorLongus6;
AnyFolder &mus119  = ..Muscles.AdductorMagnusDistal1;
AnyFolder &mus120  = ..Muscles.AdductorMagnusDistal2;
AnyFolder &mus121  = ..Muscles.AdductorMagnusDistal3;
AnyFolder &mus122  = ..Muscles.AdductorMagnusMid1;
AnyFolder &mus123  = ..Muscles.AdductorMagnusMid2;
AnyFolder &mus124  = ..Muscles.AdductorMagnusMid3;
AnyFolder &mus125  = ..Muscles.AdductorMagnusMid4;
AnyFolder &mus126  = ..Muscles.AdductorMagnusMid5;
AnyFolder &mus127  = ..Muscles.AdductorMagnusMid6;
AnyFolder &mus128  = ..Muscles.AdductorMagnusProximal1;
AnyFolder &mus129  = ..Muscles.AdductorMagnusProximal2;
AnyFolder &mus130  = ..Muscles.AdductorMagnusProximal3;
AnyFolder &mus131  = ..Muscles.AdductorMagnusProximal4;
AnyFolder &mus132  = ..Muscles.AdductorBrevisProximal1;
AnyFolder &mus133  = ..Muscles.AdductorBrevisProximal2;
AnyFolder &mus134  = ..Muscles.AdductorBrevisMid1;
AnyFolder &mus135  = ..Muscles.AdductorBrevisMid2;
AnyFolder &mus136  = ..Muscles.AdductorBrevisDistal1;
AnyFolder &mus137  = ..Muscles.AdductorBrevisDistal2;
AnyFolder &mus138  = ..Muscles.GemellusInferior1;
AnyFolder &mus139  = ..Muscles.GemellusSuperior1;
AnyFolder &mus140  = ..Muscles.ObturatorExternusSuperior1;
AnyFolder &mus141  = ..Muscles.ObturatorExternusSuperior2;
AnyFolder &mus142  = ..Muscles.ObturatorExternusSuperior3;
AnyFolder &mus143  = ..Muscles.ObturatorExternusInferior1;
AnyFolder &mus144  = ..Muscles.ObturatorExternusInferior2;
AnyFolder &mus145  = ..Muscles.ObturatorInternus1;


AnyFolder &mus148  = ..Muscles.Pectineus1;
AnyFolder &mus149  = ..Muscles.Pectineus2;
AnyFolder &mus150  = ..Muscles.Pectineus3;
AnyFolder &mus151  = ..Muscles.Pectineus4;
AnyFolder &mus152  = ..Muscles.Plantaris1;
AnyFolder &mus153  = ..Muscles.Popliteus1;
AnyFolder &mus154  = ..Muscles.Popliteus2;
AnyFolder &mus155  = ..Muscles.QuadratusFemoris1;
AnyFolder &mus156  = ..Muscles.QuadratusFemoris2;
AnyFolder &mus157  = ..Muscles.QuadratusFemoris3;
AnyFolder &mus158  = ..Muscles.QuadratusFemoris4;

AnyFolder &mus159= ..TrunkMuscles.PsoasMajor.PsoasMajorT12;
AnyFolder &mus160= ..TrunkMuscles.PsoasMajor.PsoasMajorL1_1;
AnyFolder &mus161= ..TrunkMuscles.PsoasMajor.PsoasMajorL1_2;
AnyFolder &mus162= ..TrunkMuscles.PsoasMajor.PsoasMajorL2_1;
AnyFolder &mus163= ..TrunkMuscles.PsoasMajor.PsoasMajorL2_2;
AnyFolder &mus164= ..TrunkMuscles.PsoasMajor.PsoasMajorL3_1;
AnyFolder &mus165= ..TrunkMuscles.PsoasMajor.PsoasMajorL3_2;
AnyFolder &mus166= ..TrunkMuscles.PsoasMajor.PsoasMajorL4_1;
AnyFolder &mus167= ..TrunkMuscles.PsoasMajor.PsoasMajorL4_2;
AnyFolder &mus168= ..TrunkMuscles.PsoasMajor.PsoasMajorL5_1;
AnyFolder &mus169= ..TrunkMuscles.PsoasMajor.PsoasMajorL5_2;


#else
// List of all joint muscles

AnyFolder &HipFlexionPos = ..JointMuscles.HipJnt.HipFlexion.dof0.Muscle.PosMuscle;
AnyFolder &HipFlexionNeg = ..JointMuscles.HipJnt.HipFlexion.dof0.Muscle.NegMuscle;
AnyFolder &HipAbductionPos = ..JointMuscles.HipJnt.HipAbduction.dof0.Muscle.PosMuscle;
AnyFolder &HipAbductionNeg = ..JointMuscles.HipJnt.HipAbduction.dof0.Muscle.NegMuscle;
AnyFolder &HipExternalRotationPos = ..JointMuscles.HipJnt.HipExternalRotation.dof0.Muscle.PosMuscle;
AnyFolder &HipExternalRotationNeg = ..JointMuscles.HipJnt.HipExternalRotation.dof0.Muscle.NegMuscle;
AnyFolder &KneeFlexionPos = ..JointMuscles.KneeJnt.KneeFlexion.dof0.Muscle.PosMuscle;
AnyFolder &KneeFlexionNeg = ..JointMuscles.KneeJnt.KneeFlexion.dof0.Muscle.NegMuscle;
AnyFolder &AnklePlantarFlexionPos = ..JointMuscles.AnkleJnt.AnklePlantarFlexion.dof0.Muscle.PosMuscle;
AnyFolder &AnklePlantarFlexionNeg = ..JointMuscles.AnkleJnt.AnklePlantarFlexion.dof0.Muscle.NegMuscle;
AnyFolder &SubTalarFlexionPos = ..JointMuscles.AnkleJnt.SubTalarEversion.dof0.Muscle.PosMuscle;
AnyFolder &SubTalarFlexionNeg= ..JointMuscles.AnkleJnt.SubTalarEversion.dof0.Muscle.NegMuscle;

#ifdef LEG_WITH_PSOAS_MUSCLES
// if there is muscles on trunk, then also include the Psoas muscles
// since they have a moment around hip.
AnyFolder &mus159= ..TrunkMuscles.PsoasMajor.PsoasMajorT12;
AnyFolder &mus160= ..TrunkMuscles.PsoasMajor.PsoasMajorL1_1;
AnyFolder &mus161= ..TrunkMuscles.PsoasMajor.PsoasMajorL1_2;
AnyFolder &mus162= ..TrunkMuscles.PsoasMajor.PsoasMajorL2_1;
AnyFolder &mus163= ..TrunkMuscles.PsoasMajor.PsoasMajorL2_2;
AnyFolder &mus164= ..TrunkMuscles.PsoasMajor.PsoasMajorL3_1;
AnyFolder &mus165= ..TrunkMuscles.PsoasMajor.PsoasMajorL3_2;
AnyFolder &mus166= ..TrunkMuscles.PsoasMajor.PsoasMajorL4_1;
AnyFolder &mus167= ..TrunkMuscles.PsoasMajor.PsoasMajorL4_2;
AnyFolder &mus168= ..TrunkMuscles.PsoasMajor.PsoasMajorL5_1;
AnyFolder &mus169= ..TrunkMuscles.PsoasMajor.PsoasMajorL5_2;
#endif


#endif
