//This file can be used for making shortcuts to the muscle data
AnyFolder &mus1 = Muscles.SoleusMedialis1Par;
AnyFolder &mus2 = Muscles.SoleusMedialis2Par ;
AnyFolder &mus3 = Muscles.SoleusMedialis3Par;
AnyFolder &mus4 = Muscles.SoleusLateralis1Par;
AnyFolder &mus5 = Muscles.SoleusLateralis2Par;
AnyFolder &mus6 = Muscles.SoleusLateralis3Par;
AnyFolder &mus7 = Muscles.GastrocnemiusLateralis1Par;
AnyFolder &mus8 = Muscles.GastrocnemiusMedialis1Par;
AnyFolder &mus9 = Muscles.FlexorDigitorumLongus1Par;
AnyFolder &mus10 = Muscles.FlexorDigitorumLongus2Par;
AnyFolder &mus11 = Muscles.FlexorDigitorumLongus3Par;
AnyFolder &mus12 = Muscles.FlexorHallucisLongus1Par;
AnyFolder &mus13 = Muscles.FlexorHallucisLongus2Par;
AnyFolder &mus14 = Muscles.FlexorHallucisLongus3Par;
AnyFolder &mus15 = Muscles.TibialisPosteriorLateralis1Par;
AnyFolder &mus16 = Muscles.TibialisPosteriorLateralis2Par;
AnyFolder &mus17 = Muscles.TibialisPosteriorLateralis3Par;
AnyFolder &mus18 = Muscles.TibialisPosteriorMedialis1Par;
AnyFolder &mus19 = Muscles.TibialisPosteriorMedialis2Par;
AnyFolder &mus20 = Muscles.TibialisPosteriorMedialis3Par;
AnyFolder &mus21 = Muscles.TibialisAnterior1Par;
AnyFolder &mus22 = Muscles.TibialisAnterior2Par;
AnyFolder &mus23 = Muscles.TibialisAnterior3Par;
AnyFolder &mus24 = Muscles.PeroneusBrevis1Par;
AnyFolder &mus25 = Muscles.PeroneusBrevis2Par;
AnyFolder &mus26 = Muscles.PeroneusBrevis3Par;
AnyFolder &mus27 = Muscles.PeroneusLongus1Par;
AnyFolder &mus28 = Muscles.PeroneusLongus2Par;
AnyFolder &mus29 = Muscles.PeroneusLongus3Par;
AnyFolder &mus30 = Muscles.PeroneusTertius1Par;
AnyFolder &mus31 = Muscles.PeroneusTertius2Par;
AnyFolder &mus32 = Muscles.PeroneusTertius3Par;
AnyFolder &mus33 = Muscles.ExtensorDigitorumLongus1Par;
AnyFolder &mus34 = Muscles.ExtensorDigitorumLongus2Par;
AnyFolder &mus35 = Muscles.ExtensorDigitorumLongus3Par;
AnyFolder &mus36 = Muscles.ExtensorHallucisLongus1Par;
AnyFolder &mus37 = Muscles.ExtensorHallucisLongus2Par;
AnyFolder &mus38 = Muscles.ExtensorHallucisLongus3Par;
AnyFolder &mus39 = Muscles.VastusLateralisInferior1Par;
AnyFolder &mus40 = Muscles.VastusLateralisInferior2Par;
AnyFolder &mus41 = Muscles.VastusLateralisInferior3Par;
AnyFolder &mus42 = Muscles.VastusLateralisInferior4Par;
AnyFolder &mus43 = Muscles.VastusLateralisInferior5Par;
AnyFolder &mus44 = Muscles.VastusLateralisInferior6Par;
AnyFolder &mus45 = Muscles.VastusLateralisSuperior1Par;
AnyFolder &mus46 = Muscles.VastusLateralisSuperior2Par;
AnyFolder &mus47 = Muscles.VastusMedialisInferior1Par;
AnyFolder &mus48 = Muscles.VastusMedialisInferior2Par;
AnyFolder &mus49 = Muscles.VastusMedialisMid1Par;
AnyFolder &mus50 = Muscles.VastusMedialisMid2Par;
AnyFolder &mus51 = Muscles.VastusMedialisSuperior1Par;
AnyFolder &mus52 = Muscles.VastusMedialisSuperior2Par;
AnyFolder &mus53 = Muscles.VastusMedialisSuperior3Par;
AnyFolder &mus54 = Muscles.VastusMedialisSuperior4Par;
AnyFolder &mus55 = Muscles.VastusMedialisSuperior5Par;
AnyFolder &mus56 = Muscles.VastusMedialisSuperior6Par;
AnyFolder &mus57 = Muscles.VastusIntermedius1Par;
AnyFolder &mus58 = Muscles.VastusIntermedius2Par;
AnyFolder &mus59 = Muscles.VastusIntermedius3Par;
AnyFolder &mus60 = Muscles.VastusIntermedius4Par;
AnyFolder &mus61 = Muscles.VastusIntermedius5Par;
AnyFolder &mus62 = Muscles.VastusIntermedius6Par;
AnyFolder &mus63 = Muscles.RectusFemoris1Par;
AnyFolder &mus64 = Muscles.RectusFemoris2Par;
AnyFolder &mus65 = Muscles.Semitendinosus1Par;
AnyFolder &mus66 = Muscles.Semimembranosus1Par;
AnyFolder &mus67 = Muscles.BicepsFemorisCaputLongum1Par;
AnyFolder &mus68 = Muscles.BicepsFemorisCaputBreve1Par;
AnyFolder &mus69 = Muscles.BicepsFemorisCaputBreve2Par;
AnyFolder &mus70 = Muscles.SartoriusProximal1Par;
AnyFolder &mus71 = Muscles.SartoriusDistal1Par;
AnyFolder &mus72 = Muscles.IliacusLateralis1Par;
AnyFolder &mus73 = Muscles.IliacusLateralis2Par;
AnyFolder &mus74 = Muscles.IliacusLateralis3Par;
AnyFolder &mus75 = Muscles.IliacusMid1Par;
AnyFolder &mus76 = Muscles.IliacusMid2Par;
AnyFolder &mus77 = Muscles.IliacusMedialis1Par;
AnyFolder &mus78 = Muscles.IliacusMedialis2Par;
AnyFolder &mus79= Muscles.IliacusMedialis3Par;
AnyFolder &mus80 = Muscles.GluteusMinimusAnterior1Par;
AnyFolder &mus81 = Muscles.GluteusMinimusMid1Par;
AnyFolder &mus82 = Muscles.GluteusMinimusPosterior1Par;
AnyFolder &mus83 = Muscles.GluteusMediusAnterior1Par;
AnyFolder &mus84 = Muscles.GluteusMediusAnterior2Par;
AnyFolder &mus85 = Muscles.GluteusMediusAnterior3Par;
AnyFolder &mus86 = Muscles.GluteusMediusAnterior4Par;
AnyFolder &mus87 = Muscles.GluteusMediusAnterior5Par;
AnyFolder &mus88 = Muscles.GluteusMediusAnterior6Par;
AnyFolder &mus89 = Muscles.GluteusMediusPosterior1Par;
AnyFolder &mus90 = Muscles.GluteusMediusPosterior2Par;
AnyFolder &mus91 = Muscles.GluteusMediusPosterior3Par;
AnyFolder &mus92 = Muscles.GluteusMediusPosterior4Par;
AnyFolder &mus93 = Muscles.GluteusMediusPosterior5Par;
AnyFolder &mus94 = Muscles.GluteusMediusPosterior6Par;
AnyFolder &mus95 = Muscles.GluteusMaximusSuperior1Par;
AnyFolder &mus96 = Muscles.GluteusMaximusSuperior2Par;
AnyFolder &mus97 = Muscles.GluteusMaximusSuperior3Par;
AnyFolder &mus98 = Muscles.GluteusMaximusSuperior4Par;
AnyFolder &mus99 = Muscles.GluteusMaximusSuperior5Par;
AnyFolder &mus100 = Muscles.GluteusMaximusSuperior6Par;
AnyFolder &mus101 = Muscles.GluteusMaximusInferior1Par;
AnyFolder &mus102 = Muscles.GluteusMaximusInferior2Par;
AnyFolder &mus103 = Muscles.GluteusMaximusInferior3Par;
AnyFolder &mus104 = Muscles.GluteusMaximusInferior4Par;
AnyFolder &mus105 = Muscles.GluteusMaximusInferior5Par;
AnyFolder &mus106 = Muscles.GluteusMaximusInferior6Par;
AnyFolder &mus107= Muscles.TensorFasciaeLatae1Par;
AnyFolder &mus108 = Muscles.TensorFasciaeLatae2Par;
AnyFolder &mus109 = Muscles.Piriformis1Par;
AnyFolder &mus110 = Muscles.Gracilis1Par;
AnyFolder &mus111 = Muscles.Gracilis2Par;
AnyFolder &mus112 = Muscles.AdductorLongus1Par;
AnyFolder &mus113 = Muscles.AdductorLongus2Par;
AnyFolder &mus114 = Muscles.AdductorLongus3Par;
AnyFolder &mus115 = Muscles.AdductorLongus4Par;
AnyFolder &mus116 = Muscles.AdductorLongus5Par;
AnyFolder &mus117 = Muscles.AdductorLongus6Par;
AnyFolder &mus118 = Muscles.AdductorMagnusDistal1Par;
AnyFolder &mus119 = Muscles.AdductorMagnusDistal2Par;
AnyFolder &mus120 = Muscles.AdductorMagnusDistal3Par;
AnyFolder &mus121 = Muscles.AdductorMagnusMid1Par;
AnyFolder &mus122 = Muscles.AdductorMagnusMid2Par;
AnyFolder &mus123 = Muscles.AdductorMagnusMid3Par;
AnyFolder &mus124 = Muscles.AdductorMagnusMid4Par;
AnyFolder &mus125 = Muscles.AdductorMagnusMid5Par;
AnyFolder &mus126 = Muscles.AdductorMagnusMid6Par;
AnyFolder &mus127 = Muscles.AdductorMagnusProximal1Par;
AnyFolder &mus128 = Muscles.AdductorMagnusProximal2Par;
AnyFolder &mus129 = Muscles.AdductorMagnusProximal3Par;
AnyFolder &mus130 = Muscles.AdductorMagnusProximal4Par;
AnyFolder &mus131 = Muscles.AdductorBrevisProximal1Par;
AnyFolder &mus132 = Muscles.AdductorBrevisProximal2Par;
AnyFolder &mus133 = Muscles.AdductorBrevisMid1Par;
AnyFolder &mus134 = Muscles.AdductorBrevisMid2Par;
AnyFolder &mus135 = Muscles.AdductorBrevisDistal1Par;
AnyFolder &mus136 = Muscles.AdductorBrevisDistal2Par;
AnyFolder &mus137 = Muscles.GemellusInferior1Par;
AnyFolder &mus138 = Muscles.GemellusSuperior1Par;
AnyFolder &mus139 = Muscles.ObturatorExternusSuperior1Par;
AnyFolder &mus140 = Muscles.ObturatorExternusSuperior2Par;
AnyFolder &mus141 = Muscles.ObturatorExternusSuperior3Par;
AnyFolder &mus142 = Muscles.ObturatorExternusInferior1Par;
AnyFolder &mus143 = Muscles.ObturatorExternusInferior2Par;
AnyFolder &mus144 = Muscles.ObturatorInternus1Par;
AnyFolder &mus145 = Muscles.ObturatorInternus2Par;
AnyFolder &mus146 = Muscles.ObturatorInternus3Par;
AnyFolder &mus147 = Muscles.Pectineus1Par;
AnyFolder &mus148 = Muscles.Pectineus2Par;
AnyFolder &mus149 = Muscles.Pectineus3Par;
AnyFolder &mus150 = Muscles.Pectineus4Par;
AnyFolder &mus151 = Muscles.Plantaris1Par;
AnyFolder &mus152 = Muscles.Popliteus1Par;
AnyFolder &mus153 = Muscles.Popliteus2Par;
AnyFolder &mus154 = Muscles.QuadratusFemoris1Par;
AnyFolder &mus155 = Muscles.QuadratusFemoris2Par;
AnyFolder &mus156 = Muscles.QuadratusFemoris3Par;
AnyFolder &mus157 = Muscles.QuadratusFemoris4Par;
