AnyVar AnyVar_HipFlexion = ...Interface.SIDE.HipFlexion.Pos[0]*180/pi;
AnyVar AnyVar_HipAbduction = ...Interface.SIDE.HipAbduction.Pos[0]*180/pi;
AnyVar AnyVar_HipExternalRotation = ...Interface.SIDE.HipExternalRotation.Pos[0]*180/pi;

//AnyVar AnyVar_PatellaFlexion = ...Interface.SIDE.PatellaFlexion.Pos[0]*180/pi;
//AnyVar AnyVar_PatellaRotation = ...Interface.SIDE.PatellaRotation.Pos[0]*180/pi;

AnyVar AnyVar_KneeFlexion = ...Interface.SIDE.KneeFlexion.Pos[0]*180/pi;

#if ((BM_FOOT_MODEL == _FOOT_MODEL_LEG_FOOT_) | (BM_FOOT_MODEL == _FOOT_MODEL_RIGID_GM_) | (BM_FOOT_MODEL == _FOOT_MODEL_TOE_FLEX_GM_) | (BM_FOOT_MODEL == _FOOT_MODEL_DETAILED_GM_))
AnyVar AnyVar_AnklePlantarFlexion =...Interface.SIDE.AnklePlantarFlexion.Pos[0]*180/pi;
//AnyVar AnyVar_AnkleEversion =...Interface.SIDE.AnkleEversion.Pos[0]*180/pi;

AnyVar AnyVar_SubTalarEversion = ...Interface.SIDE.SubTalarEversion.Pos[0]*180/pi;
#endif

#if ((BM_FOOT_MODEL == _FOOT_MODEL_TOE_FLEX_GM_) | (BM_FOOT_MODEL == _FOOT_MODEL_DETAILED_GM_))

AnyFolder Foot = {
  #if BM_FOOT_MODEL == _FOOT_MODEL_DETAILED_GM_

  AnyVar AnyVar_CalcaneoCuboidDorsiFlexion = ....Interface.SIDE.CalcaneoCuboidDorsiFlexion.Pos[0]*180/pi;
  AnyVar AnyVar_CalcaneoCuboidAbduction = ....Interface.SIDE.CalcaneoCuboidAbduction.Pos[0]*180/pi;
  AnyVar AnyVar_CalcaneoCuboidEversion = ....Interface.SIDE.CalcaneoCuboidEversion.Pos[0]*180/pi;
  AnyVar AnyVar_TaloNavicularDorsiFlexion = ....Interface.SIDE.TaloNavicularDorsiFlexion.Pos[0]*180/pi;
  AnyVar AnyVar_TaloNavicularAbduction = ....Interface.SIDE.TaloNavicularAbduction.Pos[0]*180/pi;
  AnyVar AnyVar_TaloNavicularEversion = ....Interface.SIDE.TaloNavicularEversion.Pos[0]*180/pi;
  AnyVar AnyVar_NaviculoMedialCuneiformDorsiFlexion = ....Interface.SIDE.NaviculoMedialCuneiformDorsiFlexion.Pos[0]*180/pi;
  AnyVar AnyVar_NaviculoMedialCuneiformAbduction = ....Interface.SIDE.NaviculoMedialCuneiformAbduction.Pos[0]*180/pi;
  AnyVar AnyVar_NaviculoIntermediateCuneiformDorsiFlexion = ....Interface.SIDE.NaviculoIntermediateCuneiformDorsiFlexion.Pos[0]*180/pi;
  AnyVar AnyVar_NaviculoIntermediateCuneiformAbduction = ....Interface.SIDE.NaviculoIntermediateCuneiformAbduction.Pos[0]*180/pi;
  AnyVar AnyVar_NaviculoLateralCuneiformDorsiFlexion = ....Interface.SIDE.NaviculoLateralCuneiformDorsiFlexion.Pos[0]*180/pi;
  AnyVar AnyVar_NaviculoLateralCuneiformAbduction = ....Interface.SIDE.NaviculoLateralCuneiformAbduction.Pos[0]*180/pi;
  AnyVar AnyVar_TarsoMetatarsal1DorsiFlexion = ....Interface.SIDE.TarsoMetatarsal1DorsiFlexion.Pos[0]*180/pi;
  AnyVar AnyVar_TarsoMetatarsal1Abduction = ....Interface.SIDE.TarsoMetatarsal1Abduction.Pos[0]*180/pi;
  AnyVar AnyVar_TarsoMetatarsal2DorsiFlexion = ....Interface.SIDE.TarsoMetatarsal2DorsiFlexion.Pos[0]*180/pi;
  AnyVar AnyVar_TarsoMetatarsal2Abduction = ....Interface.SIDE.TarsoMetatarsal2Abduction.Pos[0]*180/pi;
  AnyVar AnyVar_TarsoMetatarsal3DorsiFlexion = ....Interface.SIDE.TarsoMetatarsal3DorsiFlexion.Pos[0]*180/pi;
  AnyVar AnyVar_TarsoMetatarsal3Abduction = ....Interface.SIDE.TarsoMetatarsal3Abduction.Pos[0]*180/pi;
  AnyVar AnyVar_TarsoMetatarsal4DorsiFlexion = ....Interface.SIDE.TarsoMetatarsal4DorsiFlexion.Pos[0]*180/pi;
  AnyVar AnyVar_TarsoMetatarsal4Abduction = ....Interface.SIDE.TarsoMetatarsal4Abduction.Pos[0]*180/pi;
  AnyVar AnyVar_TarsoMetatarsal5SkewDorsiFlexion = ....Interface.SIDE.TarsoMetatarsal5SkewDorsiFlexion.Pos[0]*180/pi;
  AnyVar AnyVar_TarsoMetatarsal5Abduction = ....Interface.SIDE.TarsoMetatarsal5Abduction.Pos[0]*180/pi;

  #endif //BM_FOOT_MODEL == _FOOT_MODEL_DETAILED_GM_

  AnyVar AnyVar_MetatarsoPhalangeal1DorsiFlexion = ....Interface.SIDE.MetatarsoPhalangeal1DorsiFlexion.Pos[0]*180/pi;

  #if BM_FOOT_MODEL == _FOOT_MODEL_DETAILED_GM_
  AnyVar AnyVar_MetatarsoPhalangeal1Abduction = ....Interface.SIDE.MetatarsoPhalangeal1Abduction.Pos[0]*180/pi;
  #endif

  AnyVar AnyVar_MetatarsoPhalangeal2DorsiFlexion = ....Interface.SIDE.MetatarsoPhalangeal2DorsiFlexion.Pos[0]*180/pi;

  #if BM_FOOT_MODEL == _FOOT_MODEL_DETAILED_GM_
  AnyVar AnyVar_MetatarsoPhalangeal2Abduction = ....Interface.SIDE.MetatarsoPhalangeal2Abduction.Pos[0]*180/pi;
  #endif

  AnyVar AnyVar_MetatarsoPhalangeal3DorsiFlexion = ....Interface.SIDE.MetatarsoPhalangeal3DorsiFlexion.Pos[0]*180/pi;

  #if BM_FOOT_MODEL == _FOOT_MODEL_DETAILED_GM_
  AnyVar AnyVar_MetatarsoPhalangeal3Abduction = ....Interface.SIDE.MetatarsoPhalangeal3Abduction.Pos[0]*180/pi;
  #endif

  AnyVar AnyVar_MetatarsoPhalangeal4DorsiFlexion = ....Interface.SIDE.MetatarsoPhalangeal4DorsiFlexion.Pos[0]*180/pi;

  #if BM_FOOT_MODEL == _FOOT_MODEL_DETAILED_GM_
  AnyVar AnyVar_MetatarsoPhalangeal4Abduction = ....Interface.SIDE.MetatarsoPhalangeal4Abduction.Pos[0]*180/pi;
  #endif

  AnyVar AnyVar_MetatarsoPhalangeal5DorsiFlexion = ....Interface.SIDE.MetatarsoPhalangeal5DorsiFlexion.Pos[0]*180/pi;

  #if BM_FOOT_MODEL == _FOOT_MODEL_DETAILED_GM_
  AnyVar AnyVar_MetatarsoPhalangeal5Abduction = ....Interface.SIDE.MetatarsoPhalangeal5Abduction.Pos[0]*180/pi;
  AnyVar AnyVar_ProximoDistalPhalange1DorsiFlexion = ....Interface.SIDE.ProximoDistalPhalange1DorsiFlexion.Pos[0]*180/pi;
  AnyVar AnyVar_ProximoMedialPhalange2DorsiFlexion = ....Interface.SIDE.ProximoMedialPhalange2DorsiFlexion.Pos[0]*180/pi;
  AnyVar AnyVar_ProximoMedialPhalange3DorsiFlexion = ....Interface.SIDE.ProximoMedialPhalange3DorsiFlexion.Pos[0]*180/pi;
  AnyVar AnyVar_ProximoMedialPhalange4DorsiFlexion = ....Interface.SIDE.ProximoMedialPhalange4DorsiFlexion.Pos[0]*180/pi;
  AnyVar AnyVar_ProximoMedialPhalange5DorsiFlexion = ....Interface.SIDE.ProximoMedialPhalange5DorsiFlexion.Pos[0]*180/pi;
  AnyVar AnyVar_MedioDistalPhalange2DorsiFlexion = ....Interface.SIDE.MedioDistalPhalange2DorsiFlexion.Pos[0]*180/pi;
  AnyVar AnyVar_MedioDistalPhalange3DorsiFlexion = ....Interface.SIDE.MedioDistalPhalange3DorsiFlexion.Pos[0]*180/pi;
  AnyVar AnyVar_MedioDistalPhalange4DorsiFlexion = ....Interface.SIDE.MedioDistalPhalange4DorsiFlexion.Pos[0]*180/pi;
  AnyVar AnyVar_MedioDistalPhalange5DorsiFlexion = ....Interface.SIDE.MedioDistalPhalange5DorsiFlexion.Pos[0]*180/pi;

  #endif  // BM_FOOT_MODEL == _FOOT_MODEL_DETAILED_GM_

};
#endif // ((BM_FOOT_MODEL == _FOOT_MODEL_TOE_FLEX_GM_) | (BM_FOOT_MODEL == _FOOT_MODEL_DETAILED_GM_))
