/**^This folder implements the muscle models for the TLEM model.
Anatomical muscles from the TLEM data set are in many cases split into
several branches (elements). Strength parameters are split between the branches,
typically by uniform split.

Different morphologies of TLEM model are implemented in this file,
please refer to the file for details.


It also contains all the muscle parameter
data of the intrinsic foot.

The PCSA data comes from:
Quantitative Analysis of the Intrinsic Muscles of the Foot. Kura et al. THE ANATOMICAL RECORD 249:143-151 (1997)

This data set is prefered to the one from Yamaguchi (2007) because Yamaguchi data set is not complete.
In addition kura data set has more statistical value (11 subjects against 4 for Yamaguchi).
However the two data set present a good corelation.

*/


AnyFolder DefaultMusPar = {
    AnyVar SpecificStrength ??= 90; // (N/cm^2)
    //Klein Horsman used a PCSAfactor of 27 N/cm^2 this is now changed to 90 N/cm^2
    AnyVar PCSAfactor ??= SpecificStrength * ......HumanModel.StrengthParameters.StrengthIndexLeg; // = PCSAfactor in N/cm^2 , the PCSA itself is given in cm^2 so F0 is in Newton`s.
};

AnyVar StrengthScaleShank = .StrengthScaling.Shank.StrengthScale;
AnyVar StrengthScaleThigh = .StrengthScaling.Thigh.StrengthScale;
AnyVar StrengthScalePelvis = .Scaling.StrengthScaling.Pelvis.StrengthScale;
AnyVar FiberLengthScaleShank = .FiberLengthScaling.Shank.FiberLengthScale;
AnyVar FiberLengthScaleThigh = .FiberLengthScaling.Thigh.FiberLengthScale;
AnyVar FiberLengthScalePelvis = .Scaling.FiberLengthScaling.Pelvis.FiberLengthScale;

#if BM_FOOT_MODEL
AnyVar StrengthScaleFoot = .StrengthScaling.Foot.StrengthScale;
AnyVar FiberLengthScaleFoot = .FiberLengthScaling.Foot.FiberLengthScale;
// 27 N/cm2   Same value as in legTD (Klein Horsman)
//AnyVar StrengthMusFoot = 27*2*.StrengthScaling.Foot.StrengthScale*.....HumanModel.StrengthParameters.StrengthIndexLeg;
AnyVar StrengthMusFoot =DefaultMusPar.PCSAfactor*.StrengthScaling.Foot.StrengthScale*.....HumanModel.StrengthParameters.StrengthIndexLeg;
#endif


#if BM_LEG_MUSCLES_RIGHT | BM_LEG_MUSCLES_LEFT
/////////////////////////////////////////////////
//     AdductorBrevisProximal (2 elements)     //
/////////////////////////////////////////////////

AnyMuscleModel AdductorBrevisProximal1Par =
{
 AnyFolder& MuscleParameters = ..ModelParameters.Muscles.AdductorBrevisProximal;
 AnyIntVar MuscleElemNo = 1; ///< The number of this element of the muscle
 AnyIntVar MuscleElemAmount = MuscleParameters.MuscleElemAmount; ///< The total amount of elements for this muscle
 F0 = .DefaultMusPar.PCSAfactor*PCSA; ///< Maximum force output at optimum fiber length
 Lf0 =.FiberLengthScalePelvis*(MuscleParameters.OptimalFiberlength
       / cos(pi/180*MuscleParameters.Pennationangle));
 AnyVar PCSA = 1e4*.StrengthScalePelvis*MuscleParameters.MuscleVolumeSIScaled/(.AdductorBrevisProximal1Par.Lf0 +.AdductorBrevisProximal2Par.Lf0 );///< PCSA (cm2) of the individual element is total volumen divided by the sum of muscle element fiber lengths.
 Vol0 =  1e-4* PCSA * Lf0; ///< Muscle element volume (m3)
};

AnyMuscleModel AdductorBrevisProximal2Par =
{
 AnyFolder& MuscleParameters = ..ModelParameters.Muscles.AdductorBrevisProximal;
 AnyIntVar MuscleElemNo = 2; ///< The number of this element of the muscle
 AnyIntVar MuscleElemAmount = MuscleParameters.MuscleElemAmount; ///< The total amount of elements for this muscle
 F0 = .DefaultMusPar.PCSAfactor*PCSA; ///< Maximum force output at optimum fiber length
 Lf0 =.FiberLengthScalePelvis*(MuscleParameters.OptimalFiberlength
       / cos(pi/180*MuscleParameters.Pennationangle));
 AnyVar PCSA = 1e4*.StrengthScalePelvis*MuscleParameters.MuscleVolumeSIScaled/(.AdductorBrevisProximal1Par.Lf0 +.AdductorBrevisProximal2Par.Lf0 );///< PCSA (cm2) of the individual element is total volumen divided by the sum of muscle element fiber lengths.
 Vol0 =  1e-4* PCSA * Lf0; ///< Muscle element volume (m3)
};
#endif


#if BM_LEG_MUSCLES_RIGHT | BM_LEG_MUSCLES_LEFT
////////////////////////////////////////////
//     AdductorBrevisMid (2 elements)     //
////////////////////////////////////////////

AnyMuscleModel AdductorBrevisMid1Par =
{
 AnyFolder& MuscleParameters = ..ModelParameters.Muscles.AdductorBrevisMid;
 AnyIntVar MuscleElemNo = 1; ///< The number of this element of the muscle
 AnyIntVar MuscleElemAmount = MuscleParameters.MuscleElemAmount; ///< The total amount of elements for this muscle
 F0 = .DefaultMusPar.PCSAfactor*PCSA; ///< Maximum force output at optimum fiber length
 Lf0 =.FiberLengthScalePelvis*(MuscleParameters.OptimalFiberlength
       / cos(pi/180*MuscleParameters.Pennationangle));
 AnyVar PCSA = 1e4*.StrengthScalePelvis*MuscleParameters.MuscleVolumeSIScaled/(.AdductorBrevisMid1Par.Lf0 +.AdductorBrevisMid2Par.Lf0 );///< PCSA (cm2) of the individual element is total volumen divided by the sum of muscle element fiber lengths.
 Vol0 =  1e-4* PCSA * Lf0; ///< Muscle element volume (m3)
};

AnyMuscleModel AdductorBrevisMid2Par =
{
 AnyFolder& MuscleParameters = ..ModelParameters.Muscles.AdductorBrevisMid;
 AnyIntVar MuscleElemNo = 2; ///< The number of this element of the muscle
 AnyIntVar MuscleElemAmount = MuscleParameters.MuscleElemAmount; ///< The total amount of elements for this muscle
 F0 = .DefaultMusPar.PCSAfactor*PCSA; ///< Maximum force output at optimum fiber length
 Lf0 =.FiberLengthScalePelvis*(MuscleParameters.OptimalFiberlength
       / cos(pi/180*MuscleParameters.Pennationangle));
 AnyVar PCSA = 1e4*.StrengthScalePelvis*MuscleParameters.MuscleVolumeSIScaled/(.AdductorBrevisMid1Par.Lf0 +.AdductorBrevisMid2Par.Lf0 );///< PCSA (cm2) of the individual element is total volumen divided by the sum of muscle element fiber lengths.
 Vol0 =  1e-4* PCSA * Lf0; ///< Muscle element volume (m3)
};
#endif


#if BM_LEG_MUSCLES_RIGHT | BM_LEG_MUSCLES_LEFT
///////////////////////////////////////////////
//     AdductorBrevisDistal (2 elements)     //
///////////////////////////////////////////////

AnyMuscleModel AdductorBrevisDistal1Par =
{
 AnyFolder& MuscleParameters = ..ModelParameters.Muscles.AdductorBrevisDistal;
 AnyIntVar MuscleElemNo = 1; ///< The number of this element of the muscle
 AnyIntVar MuscleElemAmount = MuscleParameters.MuscleElemAmount; ///< The total amount of elements for this muscle
 F0 = .DefaultMusPar.PCSAfactor*PCSA; ///< Maximum force output at optimum fiber length
 Lf0 =.FiberLengthScalePelvis*(MuscleParameters.OptimalFiberlength
       / cos(pi/180*MuscleParameters.Pennationangle));
 AnyVar PCSA = 1e4*.StrengthScalePelvis*MuscleParameters.MuscleVolumeSIScaled/(.AdductorBrevisDistal1Par.Lf0 +.AdductorBrevisDistal2Par.Lf0 );///< PCSA (cm2) of the individual element is total volumen divided by the sum of muscle element fiber lengths.
 Vol0 =  1e-4* PCSA * Lf0; ///< Muscle element volume (m3)
};

AnyMuscleModel AdductorBrevisDistal2Par =
{
 AnyFolder& MuscleParameters = ..ModelParameters.Muscles.AdductorBrevisDistal;
 AnyIntVar MuscleElemNo = 2; ///< The number of this element of the muscle
 AnyIntVar MuscleElemAmount = MuscleParameters.MuscleElemAmount; ///< The total amount of elements for this muscle
 F0 = .DefaultMusPar.PCSAfactor*PCSA; ///< Maximum force output at optimum fiber length
 Lf0 =.FiberLengthScalePelvis*(MuscleParameters.OptimalFiberlength
       / cos(pi/180*MuscleParameters.Pennationangle));
 AnyVar PCSA = 1e4*.StrengthScalePelvis*MuscleParameters.MuscleVolumeSIScaled/(.AdductorBrevisDistal1Par.Lf0 +.AdductorBrevisDistal2Par.Lf0 );///< PCSA (cm2) of the individual element is total volumen divided by the sum of muscle element fiber lengths.
 Vol0 =  1e-4* PCSA * Lf0; ///< Muscle element volume (m3)
};
#endif


#if BM_LEG_MUSCLES_RIGHT | BM_LEG_MUSCLES_LEFT
/////////////////////////////////////////
//     AdductorLongus (6 elements)     //
/////////////////////////////////////////

AnyMuscleModel AdductorLongus1Par =
{
 AnyFolder& MuscleParameters = ..ModelParameters.Muscles.AdductorLongus;
 AnyIntVar MuscleElemNo = 1; ///< The number of this element of the muscle
 AnyIntVar MuscleElemAmount = MuscleParameters.MuscleElemAmount; ///< The total amount of elements for this muscle
 F0 = .DefaultMusPar.PCSAfactor*PCSA; ///< Maximum force output at optimum fiber length
 Lf0 =.FiberLengthScaleThigh*(MuscleParameters.OptimalFiberlength
       / cos(pi/180*MuscleParameters.Pennationangle));
 AnyVar PCSA = 1e4*.StrengthScaleThigh*MuscleParameters.MuscleVolumeSIScaled/(.AdductorLongus1Par.Lf0 +.AdductorLongus2Par.Lf0 +.AdductorLongus3Par.Lf0 +.AdductorLongus4Par.Lf0 +.AdductorLongus5Par.Lf0 +.AdductorLongus6Par.Lf0 );///< PCSA (cm2) of the individual element is total volumen divided by the sum of muscle element fiber lengths.
 Vol0 =  1e-4* PCSA * Lf0; ///< Muscle element volume (m3)
};

AnyMuscleModel AdductorLongus2Par =
{
 AnyFolder& MuscleParameters = ..ModelParameters.Muscles.AdductorLongus;
 AnyIntVar MuscleElemNo = 2; ///< The number of this element of the muscle
 AnyIntVar MuscleElemAmount = MuscleParameters.MuscleElemAmount; ///< The total amount of elements for this muscle
 F0 = .DefaultMusPar.PCSAfactor*PCSA; ///< Maximum force output at optimum fiber length
 Lf0 =.FiberLengthScaleThigh*(MuscleParameters.OptimalFiberlength
       / cos(pi/180*MuscleParameters.Pennationangle));
 AnyVar PCSA = 1e4*.StrengthScaleThigh*MuscleParameters.MuscleVolumeSIScaled/(.AdductorLongus1Par.Lf0 +.AdductorLongus2Par.Lf0 +.AdductorLongus3Par.Lf0 +.AdductorLongus4Par.Lf0 +.AdductorLongus5Par.Lf0 +.AdductorLongus6Par.Lf0 );///< PCSA (cm2) of the individual element is total volumen divided by the sum of muscle element fiber lengths.
 Vol0 =  1e-4* PCSA * Lf0; ///< Muscle element volume (m3)
};

AnyMuscleModel AdductorLongus3Par =
{
 AnyFolder& MuscleParameters = ..ModelParameters.Muscles.AdductorLongus;
 AnyIntVar MuscleElemNo = 3; ///< The number of this element of the muscle
 AnyIntVar MuscleElemAmount = MuscleParameters.MuscleElemAmount; ///< The total amount of elements for this muscle
 F0 = .DefaultMusPar.PCSAfactor*PCSA; ///< Maximum force output at optimum fiber length
 Lf0 =.FiberLengthScaleThigh*(MuscleParameters.OptimalFiberlength
       / cos(pi/180*MuscleParameters.Pennationangle));
 AnyVar PCSA = 1e4*.StrengthScaleThigh*MuscleParameters.MuscleVolumeSIScaled/(.AdductorLongus1Par.Lf0 +.AdductorLongus2Par.Lf0 +.AdductorLongus3Par.Lf0 +.AdductorLongus4Par.Lf0 +.AdductorLongus5Par.Lf0 +.AdductorLongus6Par.Lf0 );///< PCSA (cm2) of the individual element is total volumen divided by the sum of muscle element fiber lengths.
 Vol0 =  1e-4* PCSA * Lf0; ///< Muscle element volume (m3)
};

AnyMuscleModel AdductorLongus4Par =
{
 AnyFolder& MuscleParameters = ..ModelParameters.Muscles.AdductorLongus;
 AnyIntVar MuscleElemNo = 4; ///< The number of this element of the muscle
 AnyIntVar MuscleElemAmount = MuscleParameters.MuscleElemAmount; ///< The total amount of elements for this muscle
 F0 = .DefaultMusPar.PCSAfactor*PCSA; ///< Maximum force output at optimum fiber length
 Lf0 =.FiberLengthScaleThigh*(MuscleParameters.OptimalFiberlength
       / cos(pi/180*MuscleParameters.Pennationangle));
 AnyVar PCSA = 1e4*.StrengthScaleThigh*MuscleParameters.MuscleVolumeSIScaled/(.AdductorLongus1Par.Lf0 +.AdductorLongus2Par.Lf0 +.AdductorLongus3Par.Lf0 +.AdductorLongus4Par.Lf0 +.AdductorLongus5Par.Lf0 +.AdductorLongus6Par.Lf0 );///< PCSA (cm2) of the individual element is total volumen divided by the sum of muscle element fiber lengths.
 Vol0 =  1e-4* PCSA * Lf0; ///< Muscle element volume (m3)
};

AnyMuscleModel AdductorLongus5Par =
{
 AnyFolder& MuscleParameters = ..ModelParameters.Muscles.AdductorLongus;
 AnyIntVar MuscleElemNo = 5; ///< The number of this element of the muscle
 AnyIntVar MuscleElemAmount = MuscleParameters.MuscleElemAmount; ///< The total amount of elements for this muscle
 F0 = .DefaultMusPar.PCSAfactor*PCSA; ///< Maximum force output at optimum fiber length
 Lf0 =.FiberLengthScaleThigh*(MuscleParameters.OptimalFiberlength
       / cos(pi/180*MuscleParameters.Pennationangle));
 AnyVar PCSA = 1e4*.StrengthScaleThigh*MuscleParameters.MuscleVolumeSIScaled/(.AdductorLongus1Par.Lf0 +.AdductorLongus2Par.Lf0 +.AdductorLongus3Par.Lf0 +.AdductorLongus4Par.Lf0 +.AdductorLongus5Par.Lf0 +.AdductorLongus6Par.Lf0 );///< PCSA (cm2) of the individual element is total volumen divided by the sum of muscle element fiber lengths.
 Vol0 =  1e-4* PCSA * Lf0; ///< Muscle element volume (m3)
};

AnyMuscleModel AdductorLongus6Par =
{
 AnyFolder& MuscleParameters = ..ModelParameters.Muscles.AdductorLongus;
 AnyIntVar MuscleElemNo = 6; ///< The number of this element of the muscle
 AnyIntVar MuscleElemAmount = MuscleParameters.MuscleElemAmount; ///< The total amount of elements for this muscle
 F0 = .DefaultMusPar.PCSAfactor*PCSA; ///< Maximum force output at optimum fiber length
 Lf0 =.FiberLengthScaleThigh*(MuscleParameters.OptimalFiberlength
       / cos(pi/180*MuscleParameters.Pennationangle));
 AnyVar PCSA = 1e4*.StrengthScaleThigh*MuscleParameters.MuscleVolumeSIScaled/(.AdductorLongus1Par.Lf0 +.AdductorLongus2Par.Lf0 +.AdductorLongus3Par.Lf0 +.AdductorLongus4Par.Lf0 +.AdductorLongus5Par.Lf0 +.AdductorLongus6Par.Lf0 );///< PCSA (cm2) of the individual element is total volumen divided by the sum of muscle element fiber lengths.
 Vol0 =  1e-4* PCSA * Lf0; ///< Muscle element volume (m3)
};
#endif


#if BM_LEG_MUSCLES_RIGHT | BM_LEG_MUSCLES_LEFT
///////////////////////////////////////////////
//     AdductorMagnusDistal (3 elements)     //
///////////////////////////////////////////////

AnyMuscleModel AdductorMagnusDistal1Par =
{
 AnyFolder& MuscleParameters = ..ModelParameters.Muscles.AdductorMagnusDistal;
 AnyIntVar MuscleElemNo = 1; ///< The number of this element of the muscle
 AnyIntVar MuscleElemAmount = MuscleParameters.MuscleElemAmount; ///< The total amount of elements for this muscle
 F0 = .DefaultMusPar.PCSAfactor*PCSA; ///< Maximum force output at optimum fiber length
 Lf0 =.FiberLengthScaleThigh*(MuscleParameters.OptimalFiberlength
       / cos(pi/180*MuscleParameters.Pennationangle));
 AnyVar PCSA = 1e4*.StrengthScaleThigh*MuscleParameters.MuscleVolumeSIScaled/(.AdductorMagnusDistal1Par.Lf0 +.AdductorMagnusDistal2Par.Lf0 +.AdductorMagnusDistal3Par.Lf0 );///< PCSA (cm2) of the individual element is total volumen divided by the sum of muscle element fiber lengths.
 Vol0 =  1e-4* PCSA * Lf0; ///< Muscle element volume (m3)
};

AnyMuscleModel AdductorMagnusDistal2Par =
{
 AnyFolder& MuscleParameters = ..ModelParameters.Muscles.AdductorMagnusDistal;
 AnyIntVar MuscleElemNo = 2; ///< The number of this element of the muscle
 AnyIntVar MuscleElemAmount = MuscleParameters.MuscleElemAmount; ///< The total amount of elements for this muscle
 F0 = .DefaultMusPar.PCSAfactor*PCSA; ///< Maximum force output at optimum fiber length
 Lf0 =.FiberLengthScaleThigh*(MuscleParameters.OptimalFiberlength
       / cos(pi/180*MuscleParameters.Pennationangle));
 AnyVar PCSA = 1e4*.StrengthScaleThigh*MuscleParameters.MuscleVolumeSIScaled/(.AdductorMagnusDistal1Par.Lf0 +.AdductorMagnusDistal2Par.Lf0 +.AdductorMagnusDistal3Par.Lf0 );///< PCSA (cm2) of the individual element is total volumen divided by the sum of muscle element fiber lengths.
 Vol0 =  1e-4* PCSA * Lf0; ///< Muscle element volume (m3)
};

AnyMuscleModel AdductorMagnusDistal3Par =
{
 AnyFolder& MuscleParameters = ..ModelParameters.Muscles.AdductorMagnusDistal;
 AnyIntVar MuscleElemNo = 3; ///< The number of this element of the muscle
 AnyIntVar MuscleElemAmount = MuscleParameters.MuscleElemAmount; ///< The total amount of elements for this muscle
 F0 = .DefaultMusPar.PCSAfactor*PCSA; ///< Maximum force output at optimum fiber length
 Lf0 =.FiberLengthScaleThigh*(MuscleParameters.OptimalFiberlength
       / cos(pi/180*MuscleParameters.Pennationangle));
 AnyVar PCSA = 1e4*.StrengthScaleThigh*MuscleParameters.MuscleVolumeSIScaled/(.AdductorMagnusDistal1Par.Lf0 +.AdductorMagnusDistal2Par.Lf0 +.AdductorMagnusDistal3Par.Lf0 );///< PCSA (cm2) of the individual element is total volumen divided by the sum of muscle element fiber lengths.
 Vol0 =  1e-4* PCSA * Lf0; ///< Muscle element volume (m3)
};
#endif


#if BM_LEG_MUSCLES_RIGHT | BM_LEG_MUSCLES_LEFT
////////////////////////////////////////////
//     AdductorMagnusMid (6 elements)     //
////////////////////////////////////////////

AnyMuscleModel AdductorMagnusMid1Par =
{
 AnyFolder& MuscleParameters = ..ModelParameters.Muscles.AdductorMagnusMid;
 AnyIntVar MuscleElemNo = 1; ///< The number of this element of the muscle
 AnyIntVar MuscleElemAmount = MuscleParameters.MuscleElemAmount; ///< The total amount of elements for this muscle
 F0 = .DefaultMusPar.PCSAfactor*PCSA; ///< Maximum force output at optimum fiber length
 Lf0 =.FiberLengthScaleThigh*(MuscleParameters.OptimalFiberlength
       / cos(pi/180*MuscleParameters.Pennationangle));
 AnyVar PCSA = 1e4*.StrengthScaleThigh*MuscleParameters.MuscleVolumeSIScaled/(.AdductorMagnusMid1Par.Lf0 +.AdductorMagnusMid2Par.Lf0 +.AdductorMagnusMid3Par.Lf0 +.AdductorMagnusMid4Par.Lf0 +.AdductorMagnusMid5Par.Lf0 +.AdductorMagnusMid6Par.Lf0 );///< PCSA (cm2) of the individual element is total volumen divided by the sum of muscle element fiber lengths.
 Vol0 =  1e-4* PCSA * Lf0; ///< Muscle element volume (m3)
};

AnyMuscleModel AdductorMagnusMid2Par =
{
 AnyFolder& MuscleParameters = ..ModelParameters.Muscles.AdductorMagnusMid;
 AnyIntVar MuscleElemNo = 2; ///< The number of this element of the muscle
 AnyIntVar MuscleElemAmount = MuscleParameters.MuscleElemAmount; ///< The total amount of elements for this muscle
 F0 = .DefaultMusPar.PCSAfactor*PCSA; ///< Maximum force output at optimum fiber length
 Lf0 =.FiberLengthScaleThigh*(MuscleParameters.OptimalFiberlength
       / cos(pi/180*MuscleParameters.Pennationangle));
 AnyVar PCSA = 1e4*.StrengthScaleThigh*MuscleParameters.MuscleVolumeSIScaled/(.AdductorMagnusMid1Par.Lf0 +.AdductorMagnusMid2Par.Lf0 +.AdductorMagnusMid3Par.Lf0 +.AdductorMagnusMid4Par.Lf0 +.AdductorMagnusMid5Par.Lf0 +.AdductorMagnusMid6Par.Lf0 );///< PCSA (cm2) of the individual element is total volumen divided by the sum of muscle element fiber lengths.
 Vol0 =  1e-4* PCSA * Lf0; ///< Muscle element volume (m3)
};

AnyMuscleModel AdductorMagnusMid3Par =
{
 AnyFolder& MuscleParameters = ..ModelParameters.Muscles.AdductorMagnusMid;
 AnyIntVar MuscleElemNo = 3; ///< The number of this element of the muscle
 AnyIntVar MuscleElemAmount = MuscleParameters.MuscleElemAmount; ///< The total amount of elements for this muscle
 F0 = .DefaultMusPar.PCSAfactor*PCSA; ///< Maximum force output at optimum fiber length
 Lf0 =.FiberLengthScaleThigh*(MuscleParameters.OptimalFiberlength
       / cos(pi/180*MuscleParameters.Pennationangle));
 AnyVar PCSA = 1e4*.StrengthScaleThigh*MuscleParameters.MuscleVolumeSIScaled/(.AdductorMagnusMid1Par.Lf0 +.AdductorMagnusMid2Par.Lf0 +.AdductorMagnusMid3Par.Lf0 +.AdductorMagnusMid4Par.Lf0 +.AdductorMagnusMid5Par.Lf0 +.AdductorMagnusMid6Par.Lf0 );///< PCSA (cm2) of the individual element is total volumen divided by the sum of muscle element fiber lengths.
 Vol0 =  1e-4* PCSA * Lf0; ///< Muscle element volume (m3)
};

AnyMuscleModel AdductorMagnusMid4Par =
{
 AnyFolder& MuscleParameters = ..ModelParameters.Muscles.AdductorMagnusMid;
 AnyIntVar MuscleElemNo = 4; ///< The number of this element of the muscle
 AnyIntVar MuscleElemAmount = MuscleParameters.MuscleElemAmount; ///< The total amount of elements for this muscle
 F0 = .DefaultMusPar.PCSAfactor*PCSA; ///< Maximum force output at optimum fiber length
 Lf0 =.FiberLengthScaleThigh*(MuscleParameters.OptimalFiberlength
       / cos(pi/180*MuscleParameters.Pennationangle));
 AnyVar PCSA = 1e4*.StrengthScaleThigh*MuscleParameters.MuscleVolumeSIScaled/(.AdductorMagnusMid1Par.Lf0 +.AdductorMagnusMid2Par.Lf0 +.AdductorMagnusMid3Par.Lf0 +.AdductorMagnusMid4Par.Lf0 +.AdductorMagnusMid5Par.Lf0 +.AdductorMagnusMid6Par.Lf0 );///< PCSA (cm2) of the individual element is total volumen divided by the sum of muscle element fiber lengths.
 Vol0 =  1e-4* PCSA * Lf0; ///< Muscle element volume (m3)
};

AnyMuscleModel AdductorMagnusMid5Par =
{
 AnyFolder& MuscleParameters = ..ModelParameters.Muscles.AdductorMagnusMid;
 AnyIntVar MuscleElemNo = 5; ///< The number of this element of the muscle
 AnyIntVar MuscleElemAmount = MuscleParameters.MuscleElemAmount; ///< The total amount of elements for this muscle
 F0 = .DefaultMusPar.PCSAfactor*PCSA; ///< Maximum force output at optimum fiber length
 Lf0 =.FiberLengthScaleThigh*(MuscleParameters.OptimalFiberlength
       / cos(pi/180*MuscleParameters.Pennationangle));
 AnyVar PCSA = 1e4*.StrengthScaleThigh*MuscleParameters.MuscleVolumeSIScaled/(.AdductorMagnusMid1Par.Lf0 +.AdductorMagnusMid2Par.Lf0 +.AdductorMagnusMid3Par.Lf0 +.AdductorMagnusMid4Par.Lf0 +.AdductorMagnusMid5Par.Lf0 +.AdductorMagnusMid6Par.Lf0 );///< PCSA (cm2) of the individual element is total volumen divided by the sum of muscle element fiber lengths.
 Vol0 =  1e-4* PCSA * Lf0; ///< Muscle element volume (m3)
};

AnyMuscleModel AdductorMagnusMid6Par =
{
 AnyFolder& MuscleParameters = ..ModelParameters.Muscles.AdductorMagnusMid;
 AnyIntVar MuscleElemNo = 6; ///< The number of this element of the muscle
 AnyIntVar MuscleElemAmount = MuscleParameters.MuscleElemAmount; ///< The total amount of elements for this muscle
 F0 = .DefaultMusPar.PCSAfactor*PCSA; ///< Maximum force output at optimum fiber length
 Lf0 =.FiberLengthScaleThigh*(MuscleParameters.OptimalFiberlength
       / cos(pi/180*MuscleParameters.Pennationangle));
 AnyVar PCSA = 1e4*.StrengthScaleThigh*MuscleParameters.MuscleVolumeSIScaled/(.AdductorMagnusMid1Par.Lf0 +.AdductorMagnusMid2Par.Lf0 +.AdductorMagnusMid3Par.Lf0 +.AdductorMagnusMid4Par.Lf0 +.AdductorMagnusMid5Par.Lf0 +.AdductorMagnusMid6Par.Lf0 );///< PCSA (cm2) of the individual element is total volumen divided by the sum of muscle element fiber lengths.
 Vol0 =  1e-4* PCSA * Lf0; ///< Muscle element volume (m3)
};
#endif


#if BM_LEG_MUSCLES_RIGHT | BM_LEG_MUSCLES_LEFT
/////////////////////////////////////////////////
//     AdductorMagnusProximal (4 elements)     //
/////////////////////////////////////////////////

AnyMuscleModel AdductorMagnusProximal1Par =
{
 AnyFolder& MuscleParameters = ..ModelParameters.Muscles.AdductorMagnusProximal;
 AnyIntVar MuscleElemNo = 1; ///< The number of this element of the muscle
 AnyIntVar MuscleElemAmount = MuscleParameters.MuscleElemAmount; ///< The total amount of elements for this muscle
 F0 = .DefaultMusPar.PCSAfactor*PCSA; ///< Maximum force output at optimum fiber length
 Lf0 =.FiberLengthScaleThigh*(MuscleParameters.OptimalFiberlength
       / cos(pi/180*MuscleParameters.Pennationangle));
 AnyVar PCSA = 1e4*.StrengthScaleThigh*MuscleParameters.MuscleVolumeSIScaled/(.AdductorMagnusProximal1Par.Lf0 +.AdductorMagnusProximal2Par.Lf0 +.AdductorMagnusProximal3Par.Lf0 +.AdductorMagnusProximal4Par.Lf0 );///< PCSA (cm2) of the individual element is total volumen divided by the sum of muscle element fiber lengths.
 Vol0 =  1e-4* PCSA * Lf0; ///< Muscle element volume (m3)
};

AnyMuscleModel AdductorMagnusProximal2Par =
{
 AnyFolder& MuscleParameters = ..ModelParameters.Muscles.AdductorMagnusProximal;
 AnyIntVar MuscleElemNo = 2; ///< The number of this element of the muscle
 AnyIntVar MuscleElemAmount = MuscleParameters.MuscleElemAmount; ///< The total amount of elements for this muscle
 F0 = .DefaultMusPar.PCSAfactor*PCSA; ///< Maximum force output at optimum fiber length
 Lf0 =.FiberLengthScaleThigh*(MuscleParameters.OptimalFiberlength
       / cos(pi/180*MuscleParameters.Pennationangle));
 AnyVar PCSA = 1e4*.StrengthScaleThigh*MuscleParameters.MuscleVolumeSIScaled/(.AdductorMagnusProximal1Par.Lf0 +.AdductorMagnusProximal2Par.Lf0 +.AdductorMagnusProximal3Par.Lf0 +.AdductorMagnusProximal4Par.Lf0 );///< PCSA (cm2) of the individual element is total volumen divided by the sum of muscle element fiber lengths.
 Vol0 =  1e-4* PCSA * Lf0; ///< Muscle element volume (m3)
};

AnyMuscleModel AdductorMagnusProximal3Par =
{
 AnyFolder& MuscleParameters = ..ModelParameters.Muscles.AdductorMagnusProximal;
 AnyIntVar MuscleElemNo = 3; ///< The number of this element of the muscle
 AnyIntVar MuscleElemAmount = MuscleParameters.MuscleElemAmount; ///< The total amount of elements for this muscle
 F0 = .DefaultMusPar.PCSAfactor*PCSA; ///< Maximum force output at optimum fiber length
 Lf0 =.FiberLengthScaleThigh*(MuscleParameters.OptimalFiberlength
       / cos(pi/180*MuscleParameters.Pennationangle));
 AnyVar PCSA = 1e4*.StrengthScaleThigh*MuscleParameters.MuscleVolumeSIScaled/(.AdductorMagnusProximal1Par.Lf0 +.AdductorMagnusProximal2Par.Lf0 +.AdductorMagnusProximal3Par.Lf0 +.AdductorMagnusProximal4Par.Lf0 );///< PCSA (cm2) of the individual element is total volumen divided by the sum of muscle element fiber lengths.
 Vol0 =  1e-4* PCSA * Lf0; ///< Muscle element volume (m3)
};

AnyMuscleModel AdductorMagnusProximal4Par =
{
 AnyFolder& MuscleParameters = ..ModelParameters.Muscles.AdductorMagnusProximal;
 AnyIntVar MuscleElemNo = 4; ///< The number of this element of the muscle
 AnyIntVar MuscleElemAmount = MuscleParameters.MuscleElemAmount; ///< The total amount of elements for this muscle
 F0 = .DefaultMusPar.PCSAfactor*PCSA; ///< Maximum force output at optimum fiber length
 Lf0 =.FiberLengthScaleThigh*(MuscleParameters.OptimalFiberlength
       / cos(pi/180*MuscleParameters.Pennationangle));
 AnyVar PCSA = 1e4*.StrengthScaleThigh*MuscleParameters.MuscleVolumeSIScaled/(.AdductorMagnusProximal1Par.Lf0 +.AdductorMagnusProximal2Par.Lf0 +.AdductorMagnusProximal3Par.Lf0 +.AdductorMagnusProximal4Par.Lf0 );///< PCSA (cm2) of the individual element is total volumen divided by the sum of muscle element fiber lengths.
 Vol0 =  1e-4* PCSA * Lf0; ///< Muscle element volume (m3)
};
#endif


#if BM_LEG_MUSCLES_RIGHT | BM_LEG_MUSCLES_LEFT
///////////////////////////////////////////////////
//     BicepsFemorisCaputLongum (1 element )     //
///////////////////////////////////////////////////

AnyMuscleModel BicepsFemorisCaputLongum1Par =
{
 AnyFolder& MuscleParameters = ..ModelParameters.Muscles.BicepsFemorisCaputLongum;
 AnyIntVar MuscleElemNo = 1; ///< The number of this element of the muscle
 AnyIntVar MuscleElemAmount = MuscleParameters.MuscleElemAmount; ///< The total amount of elements for this muscle
 F0 = .DefaultMusPar.PCSAfactor*PCSA; ///< Maximum force output at optimum fiber length
 Lf0 =.FiberLengthScaleThigh*(MuscleParameters.OptimalFiberlength
       / cos(pi/180*MuscleParameters.Pennationangle));
 AnyVar PCSA = 1e4*.StrengthScaleThigh*MuscleParameters.MuscleVolumeSIScaled/(Lf0);///< PCSA (cm2) of the individual element is total volumen divided by the sum of muscle element fiber lengths.
 Vol0 =  1e-4* PCSA * Lf0; ///< Muscle element volume (m3)
};
#endif


#if BM_LEG_MUSCLES_RIGHT | BM_LEG_MUSCLES_LEFT
//////////////////////////////////////////////////
//     BicepsFemorisCaputBreve (3 elements)     //
//////////////////////////////////////////////////

AnyMuscleModel BicepsFemorisCaputBreve1Par =
{
 AnyFolder& MuscleParameters = ..ModelParameters.Muscles.BicepsFemorisCaputBreve;
 AnyIntVar MuscleElemNo = 1; ///< The number of this element of the muscle
 AnyIntVar MuscleElemAmount = MuscleParameters.MuscleElemAmount; ///< The total amount of elements for this muscle
 F0 = .DefaultMusPar.PCSAfactor*PCSA; ///< Maximum force output at optimum fiber length
 Lf0 =.FiberLengthScaleThigh*(MuscleParameters.OptimalFiberlength
       / cos(pi/180*MuscleParameters.Pennationangle));
 AnyVar PCSA = 1e4*.StrengthScaleThigh*MuscleParameters.MuscleVolumeSIScaled/(.BicepsFemorisCaputBreve1Par.Lf0 +.BicepsFemorisCaputBreve2Par.Lf0 +.BicepsFemorisCaputBreve3Par.Lf0 );///< PCSA (cm2) of the individual element is total volumen divided by the sum of muscle element fiber lengths.
 Vol0 =  1e-4* PCSA * Lf0; ///< Muscle element volume (m3)
};

AnyMuscleModel BicepsFemorisCaputBreve2Par =
{
 AnyFolder& MuscleParameters = ..ModelParameters.Muscles.BicepsFemorisCaputBreve;
 AnyIntVar MuscleElemNo = 2; ///< The number of this element of the muscle
 AnyIntVar MuscleElemAmount = MuscleParameters.MuscleElemAmount; ///< The total amount of elements for this muscle
 F0 = .DefaultMusPar.PCSAfactor*PCSA; ///< Maximum force output at optimum fiber length
 Lf0 =.FiberLengthScaleThigh*(MuscleParameters.OptimalFiberlength
       / cos(pi/180*MuscleParameters.Pennationangle));
 AnyVar PCSA = 1e4*.StrengthScaleThigh*MuscleParameters.MuscleVolumeSIScaled/(.BicepsFemorisCaputBreve1Par.Lf0 +.BicepsFemorisCaputBreve2Par.Lf0 +.BicepsFemorisCaputBreve3Par.Lf0 );///< PCSA (cm2) of the individual element is total volumen divided by the sum of muscle element fiber lengths.
 Vol0 =  1e-4* PCSA * Lf0; ///< Muscle element volume (m3)
};

AnyMuscleModel BicepsFemorisCaputBreve3Par =
{
 AnyFolder& MuscleParameters = ..ModelParameters.Muscles.BicepsFemorisCaputBreve;
 AnyIntVar MuscleElemNo = 3; ///< The number of this element of the muscle
 AnyIntVar MuscleElemAmount = MuscleParameters.MuscleElemAmount; ///< The total amount of elements for this muscle
 F0 = .DefaultMusPar.PCSAfactor*PCSA; ///< Maximum force output at optimum fiber length
 Lf0 =.FiberLengthScaleThigh*(MuscleParameters.OptimalFiberlength
       / cos(pi/180*MuscleParameters.Pennationangle));
 AnyVar PCSA = 1e4*.StrengthScaleThigh*MuscleParameters.MuscleVolumeSIScaled/(.BicepsFemorisCaputBreve1Par.Lf0 +.BicepsFemorisCaputBreve2Par.Lf0 +.BicepsFemorisCaputBreve3Par.Lf0 );///< PCSA (cm2) of the individual element is total volumen divided by the sum of muscle element fiber lengths.
 Vol0 =  1e-4* PCSA * Lf0; ///< Muscle element volume (m3)
};
#endif


#if BM_LEG_MUSCLES_RIGHT | BM_LEG_MUSCLES_LEFT
//////////////////////////////////////////////////
//     ExtensorDigitorumLongus (4 elements)     //
//////////////////////////////////////////////////

AnyMuscleModel ExtensorDigitorumLongus1Par =
{
 AnyFolder& MuscleParameters = ..ModelParameters.Muscles.ExtensorDigitorumLongus;
 AnyIntVar MuscleElemNo = 1; ///< The number of this element of the muscle
 AnyIntVar MuscleElemAmount = MuscleParameters.MuscleElemAmount; ///< The total amount of elements for this muscle
 F0 = .DefaultMusPar.PCSAfactor*PCSA; ///< Maximum force output at optimum fiber length
 Lf0 =.FiberLengthScaleShank*(MuscleParameters.OptimalFiberlength
       / cos(pi/180*MuscleParameters.Pennationangle));
 AnyVar PCSA = 1e4*.StrengthScaleShank*MuscleParameters.MuscleVolumeSIScaled/(.ExtensorDigitorumLongus1Par.Lf0 +.ExtensorDigitorumLongus2Par.Lf0 +.ExtensorDigitorumLongus3Par.Lf0 +.ExtensorDigitorumLongus4Par.Lf0 );///< PCSA (cm2) of the individual element is total volumen divided by the sum of muscle element fiber lengths.
 Vol0 =  1e-4* PCSA * Lf0; ///< Muscle element volume (m3)
};

AnyMuscleModel ExtensorDigitorumLongus2Par =
{
 AnyFolder& MuscleParameters = ..ModelParameters.Muscles.ExtensorDigitorumLongus;
 AnyIntVar MuscleElemNo = 2; ///< The number of this element of the muscle
 AnyIntVar MuscleElemAmount = MuscleParameters.MuscleElemAmount; ///< The total amount of elements for this muscle
 F0 = .DefaultMusPar.PCSAfactor*PCSA; ///< Maximum force output at optimum fiber length
 Lf0 =.FiberLengthScaleShank*(MuscleParameters.OptimalFiberlength
       / cos(pi/180*MuscleParameters.Pennationangle));
 AnyVar PCSA = 1e4*.StrengthScaleShank*MuscleParameters.MuscleVolumeSIScaled/(.ExtensorDigitorumLongus1Par.Lf0 +.ExtensorDigitorumLongus2Par.Lf0 +.ExtensorDigitorumLongus3Par.Lf0 +.ExtensorDigitorumLongus4Par.Lf0 );///< PCSA (cm2) of the individual element is total volumen divided by the sum of muscle element fiber lengths.
 Vol0 =  1e-4* PCSA * Lf0; ///< Muscle element volume (m3)
};

AnyMuscleModel ExtensorDigitorumLongus3Par =
{
 AnyFolder& MuscleParameters = ..ModelParameters.Muscles.ExtensorDigitorumLongus;
 AnyIntVar MuscleElemNo = 3; ///< The number of this element of the muscle
 AnyIntVar MuscleElemAmount = MuscleParameters.MuscleElemAmount; ///< The total amount of elements for this muscle
 F0 = .DefaultMusPar.PCSAfactor*PCSA; ///< Maximum force output at optimum fiber length
 Lf0 =.FiberLengthScaleShank*(MuscleParameters.OptimalFiberlength
       / cos(pi/180*MuscleParameters.Pennationangle));
 AnyVar PCSA = 1e4*.StrengthScaleShank*MuscleParameters.MuscleVolumeSIScaled/(.ExtensorDigitorumLongus1Par.Lf0 +.ExtensorDigitorumLongus2Par.Lf0 +.ExtensorDigitorumLongus3Par.Lf0 +.ExtensorDigitorumLongus4Par.Lf0 );///< PCSA (cm2) of the individual element is total volumen divided by the sum of muscle element fiber lengths.
 Vol0 =  1e-4* PCSA * Lf0; ///< Muscle element volume (m3)
};

AnyMuscleModel ExtensorDigitorumLongus4Par =
{
 AnyFolder& MuscleParameters = ..ModelParameters.Muscles.ExtensorDigitorumLongus;
 AnyIntVar MuscleElemNo = 4; ///< The number of this element of the muscle
 AnyIntVar MuscleElemAmount = MuscleParameters.MuscleElemAmount; ///< The total amount of elements for this muscle
 F0 = .DefaultMusPar.PCSAfactor*PCSA; ///< Maximum force output at optimum fiber length
 Lf0 =.FiberLengthScaleShank*(MuscleParameters.OptimalFiberlength
       / cos(pi/180*MuscleParameters.Pennationangle));
 AnyVar PCSA = 1e4*.StrengthScaleShank*MuscleParameters.MuscleVolumeSIScaled/(.ExtensorDigitorumLongus1Par.Lf0 +.ExtensorDigitorumLongus2Par.Lf0 +.ExtensorDigitorumLongus3Par.Lf0 +.ExtensorDigitorumLongus4Par.Lf0 );///< PCSA (cm2) of the individual element is total volumen divided by the sum of muscle element fiber lengths.
 Vol0 =  1e-4* PCSA * Lf0; ///< Muscle element volume (m3)
};
#endif


#if BM_LEG_MUSCLES_RIGHT | BM_LEG_MUSCLES_LEFT
/////////////////////////////////////////////////
//     ExtensorHallucisLongus (3 elements)     //
/////////////////////////////////////////////////

AnyMuscleModel ExtensorHallucisLongus1Par =
{
 AnyFolder& MuscleParameters = ..ModelParameters.Muscles.ExtensorHallucisLongus;
 AnyIntVar MuscleElemNo = 1; ///< The number of this element of the muscle
 AnyIntVar MuscleElemAmount = MuscleParameters.MuscleElemAmount; ///< The total amount of elements for this muscle
 F0 = .DefaultMusPar.PCSAfactor*PCSA; ///< Maximum force output at optimum fiber length
 Lf0 =.FiberLengthScaleShank*(MuscleParameters.OptimalFiberlength
       / cos(pi/180*MuscleParameters.Pennationangle));
 AnyVar PCSA = 1e4*.StrengthScaleShank*MuscleParameters.MuscleVolumeSIScaled/(.ExtensorHallucisLongus1Par.Lf0 +.ExtensorHallucisLongus2Par.Lf0 +.ExtensorHallucisLongus3Par.Lf0 );///< PCSA (cm2) of the individual element is total volumen divided by the sum of muscle element fiber lengths.
 Vol0 =  1e-4* PCSA * Lf0; ///< Muscle element volume (m3)
};

AnyMuscleModel ExtensorHallucisLongus2Par =
{
 AnyFolder& MuscleParameters = ..ModelParameters.Muscles.ExtensorHallucisLongus;
 AnyIntVar MuscleElemNo = 2; ///< The number of this element of the muscle
 AnyIntVar MuscleElemAmount = MuscleParameters.MuscleElemAmount; ///< The total amount of elements for this muscle
 F0 = .DefaultMusPar.PCSAfactor*PCSA; ///< Maximum force output at optimum fiber length
 Lf0 =.FiberLengthScaleShank*(MuscleParameters.OptimalFiberlength
       / cos(pi/180*MuscleParameters.Pennationangle));
 AnyVar PCSA = 1e4*.StrengthScaleShank*MuscleParameters.MuscleVolumeSIScaled/(.ExtensorHallucisLongus1Par.Lf0 +.ExtensorHallucisLongus2Par.Lf0 +.ExtensorHallucisLongus3Par.Lf0 );///< PCSA (cm2) of the individual element is total volumen divided by the sum of muscle element fiber lengths.
 Vol0 =  1e-4* PCSA * Lf0; ///< Muscle element volume (m3)
};

AnyMuscleModel ExtensorHallucisLongus3Par =
{
 AnyFolder& MuscleParameters = ..ModelParameters.Muscles.ExtensorHallucisLongus;
 AnyIntVar MuscleElemNo = 3; ///< The number of this element of the muscle
 AnyIntVar MuscleElemAmount = MuscleParameters.MuscleElemAmount; ///< The total amount of elements for this muscle
 F0 = .DefaultMusPar.PCSAfactor*PCSA; ///< Maximum force output at optimum fiber length
 Lf0 =.FiberLengthScaleShank*(MuscleParameters.OptimalFiberlength
       / cos(pi/180*MuscleParameters.Pennationangle));
 AnyVar PCSA = 1e4*.StrengthScaleShank*MuscleParameters.MuscleVolumeSIScaled/(.ExtensorHallucisLongus1Par.Lf0 +.ExtensorHallucisLongus2Par.Lf0 +.ExtensorHallucisLongus3Par.Lf0 );///< PCSA (cm2) of the individual element is total volumen divided by the sum of muscle element fiber lengths.
 Vol0 =  1e-4* PCSA * Lf0; ///< Muscle element volume (m3)
};
#endif


#if BM_LEG_MUSCLES_RIGHT | BM_LEG_MUSCLES_LEFT
////////////////////////////////////////////////
//     FlexorDigitorumLongus (4 elements)     //
////////////////////////////////////////////////

AnyMuscleModel FlexorDigitorumLongus1Par =
{
 AnyFolder& MuscleParameters = ..ModelParameters.Muscles.FlexorDigitorumLongus;
 AnyIntVar MuscleElemNo = 1; ///< The number of this element of the muscle
 AnyIntVar MuscleElemAmount = MuscleParameters.MuscleElemAmount; ///< The total amount of elements for this muscle
 F0 = .DefaultMusPar.PCSAfactor*PCSA; ///< Maximum force output at optimum fiber length
 Lf0 =.FiberLengthScaleShank*(MuscleParameters.OptimalFiberlength
       / cos(pi/180*MuscleParameters.Pennationangle));
 AnyVar PCSA = 1e4*.StrengthScaleShank*MuscleParameters.MuscleVolumeSIScaled/(.FlexorDigitorumLongus1Par.Lf0 +.FlexorDigitorumLongus2Par.Lf0 +.FlexorDigitorumLongus3Par.Lf0 +.FlexorDigitorumLongus4Par.Lf0 );///< PCSA (cm2) of the individual element is total volumen divided by the sum of muscle element fiber lengths.
 Vol0 =  1e-4* PCSA * Lf0; ///< Muscle element volume (m3)
};

AnyMuscleModel FlexorDigitorumLongus2Par =
{
 AnyFolder& MuscleParameters = ..ModelParameters.Muscles.FlexorDigitorumLongus;
 AnyIntVar MuscleElemNo = 2; ///< The number of this element of the muscle
 AnyIntVar MuscleElemAmount = MuscleParameters.MuscleElemAmount; ///< The total amount of elements for this muscle
 F0 = .DefaultMusPar.PCSAfactor*PCSA; ///< Maximum force output at optimum fiber length
 Lf0 =.FiberLengthScaleShank*(MuscleParameters.OptimalFiberlength
       / cos(pi/180*MuscleParameters.Pennationangle));
 AnyVar PCSA = 1e4*.StrengthScaleShank*MuscleParameters.MuscleVolumeSIScaled/(.FlexorDigitorumLongus1Par.Lf0 +.FlexorDigitorumLongus2Par.Lf0 +.FlexorDigitorumLongus3Par.Lf0 +.FlexorDigitorumLongus4Par.Lf0 );///< PCSA (cm2) of the individual element is total volumen divided by the sum of muscle element fiber lengths.
 Vol0 =  1e-4* PCSA * Lf0; ///< Muscle element volume (m3)
};

AnyMuscleModel FlexorDigitorumLongus3Par =
{
 AnyFolder& MuscleParameters = ..ModelParameters.Muscles.FlexorDigitorumLongus;
 AnyIntVar MuscleElemNo = 3; ///< The number of this element of the muscle
 AnyIntVar MuscleElemAmount = MuscleParameters.MuscleElemAmount; ///< The total amount of elements for this muscle
 F0 = .DefaultMusPar.PCSAfactor*PCSA; ///< Maximum force output at optimum fiber length
 Lf0 =.FiberLengthScaleShank*(MuscleParameters.OptimalFiberlength
       / cos(pi/180*MuscleParameters.Pennationangle));
 AnyVar PCSA = 1e4*.StrengthScaleShank*MuscleParameters.MuscleVolumeSIScaled/(.FlexorDigitorumLongus1Par.Lf0 +.FlexorDigitorumLongus2Par.Lf0 +.FlexorDigitorumLongus3Par.Lf0 +.FlexorDigitorumLongus4Par.Lf0 );///< PCSA (cm2) of the individual element is total volumen divided by the sum of muscle element fiber lengths.
 Vol0 =  1e-4* PCSA * Lf0; ///< Muscle element volume (m3)
};

AnyMuscleModel FlexorDigitorumLongus4Par =
{
 AnyFolder& MuscleParameters = ..ModelParameters.Muscles.FlexorDigitorumLongus;
 AnyIntVar MuscleElemNo = 4; ///< The number of this element of the muscle
 AnyIntVar MuscleElemAmount = MuscleParameters.MuscleElemAmount; ///< The total amount of elements for this muscle
 F0 = .DefaultMusPar.PCSAfactor*PCSA; ///< Maximum force output at optimum fiber length
 Lf0 =.FiberLengthScaleShank*(MuscleParameters.OptimalFiberlength
       / cos(pi/180*MuscleParameters.Pennationangle));
 AnyVar PCSA = 1e4*.StrengthScaleShank*MuscleParameters.MuscleVolumeSIScaled/(.FlexorDigitorumLongus1Par.Lf0 +.FlexorDigitorumLongus2Par.Lf0 +.FlexorDigitorumLongus3Par.Lf0 +.FlexorDigitorumLongus4Par.Lf0 );///< PCSA (cm2) of the individual element is total volumen divided by the sum of muscle element fiber lengths.
 Vol0 =  1e-4* PCSA * Lf0; ///< Muscle element volume (m3)
};
#endif


#if BM_LEG_MUSCLES_RIGHT | BM_LEG_MUSCLES_LEFT
///////////////////////////////////////////////
//     FlexorHallucisLongus (3 elements)     //
///////////////////////////////////////////////

AnyMuscleModel FlexorHallucisLongus1Par =
{
 AnyFolder& MuscleParameters = ..ModelParameters.Muscles.FlexorHallucisLongus;
 AnyIntVar MuscleElemNo = 1; ///< The number of this element of the muscle
 AnyIntVar MuscleElemAmount = MuscleParameters.MuscleElemAmount; ///< The total amount of elements for this muscle
 F0 = .DefaultMusPar.PCSAfactor*PCSA; ///< Maximum force output at optimum fiber length
 Lf0 =.FiberLengthScaleShank*(MuscleParameters.OptimalFiberlength
       / cos(pi/180*MuscleParameters.Pennationangle));
 AnyVar PCSA = 1e4*.StrengthScaleShank*MuscleParameters.MuscleVolumeSIScaled/(.FlexorHallucisLongus1Par.Lf0 +.FlexorHallucisLongus2Par.Lf0 +.FlexorHallucisLongus3Par.Lf0 );///< PCSA (cm2) of the individual element is total volumen divided by the sum of muscle element fiber lengths.
 Vol0 =  1e-4* PCSA * Lf0; ///< Muscle element volume (m3)
};

AnyMuscleModel FlexorHallucisLongus2Par =
{
 AnyFolder& MuscleParameters = ..ModelParameters.Muscles.FlexorHallucisLongus;
 AnyIntVar MuscleElemNo = 2; ///< The number of this element of the muscle
 AnyIntVar MuscleElemAmount = MuscleParameters.MuscleElemAmount; ///< The total amount of elements for this muscle
 F0 = .DefaultMusPar.PCSAfactor*PCSA; ///< Maximum force output at optimum fiber length
 Lf0 =.FiberLengthScaleShank*(MuscleParameters.OptimalFiberlength
       / cos(pi/180*MuscleParameters.Pennationangle));
 AnyVar PCSA = 1e4*.StrengthScaleShank*MuscleParameters.MuscleVolumeSIScaled/(.FlexorHallucisLongus1Par.Lf0 +.FlexorHallucisLongus2Par.Lf0 +.FlexorHallucisLongus3Par.Lf0 );///< PCSA (cm2) of the individual element is total volumen divided by the sum of muscle element fiber lengths.
 Vol0 =  1e-4* PCSA * Lf0; ///< Muscle element volume (m3)
};

AnyMuscleModel FlexorHallucisLongus3Par =
{
 AnyFolder& MuscleParameters = ..ModelParameters.Muscles.FlexorHallucisLongus;
 AnyIntVar MuscleElemNo = 3; ///< The number of this element of the muscle
 AnyIntVar MuscleElemAmount = MuscleParameters.MuscleElemAmount; ///< The total amount of elements for this muscle
 F0 = .DefaultMusPar.PCSAfactor*PCSA; ///< Maximum force output at optimum fiber length
 Lf0 =.FiberLengthScaleShank*(MuscleParameters.OptimalFiberlength
       / cos(pi/180*MuscleParameters.Pennationangle));
 AnyVar PCSA = 1e4*.StrengthScaleShank*MuscleParameters.MuscleVolumeSIScaled/(.FlexorHallucisLongus1Par.Lf0 +.FlexorHallucisLongus2Par.Lf0 +.FlexorHallucisLongus3Par.Lf0 );///< PCSA (cm2) of the individual element is total volumen divided by the sum of muscle element fiber lengths.
 Vol0 =  1e-4* PCSA * Lf0; ///< Muscle element volume (m3)
};
#endif


#if BM_LEG_MUSCLES_RIGHT | BM_LEG_MUSCLES_LEFT
/////////////////////////////////////////////////
//     GastrocnemiusLateralis (1 element )     //
/////////////////////////////////////////////////

AnyMuscleModel GastrocnemiusLateralis1Par =
{
 AnyFolder& MuscleParameters = ..ModelParameters.Muscles.GastrocnemiusLateralis;
 AnyIntVar MuscleElemNo = 1; ///< The number of this element of the muscle
 AnyIntVar MuscleElemAmount = MuscleParameters.MuscleElemAmount; ///< The total amount of elements for this muscle
 F0 = .DefaultMusPar.PCSAfactor*PCSA; ///< Maximum force output at optimum fiber length
 Lf0 =.FiberLengthScaleShank*(MuscleParameters.OptimalFiberlength
       / cos(pi/180*MuscleParameters.Pennationangle));
 AnyVar PCSA = 1e4*.StrengthScaleShank*MuscleParameters.MuscleVolumeSIScaled/(Lf0);///< PCSA (cm2) of the individual element is total volumen divided by the sum of muscle element fiber lengths.
 Vol0 =  1e-4* PCSA * Lf0; ///< Muscle element volume (m3)
};
#endif


#if BM_LEG_MUSCLES_RIGHT | BM_LEG_MUSCLES_LEFT
////////////////////////////////////////////////
//     GastrocnemiusMedialis (1 element )     //
////////////////////////////////////////////////

AnyMuscleModel GastrocnemiusMedialis1Par =
{
 AnyFolder& MuscleParameters = ..ModelParameters.Muscles.GastrocnemiusMedialis;
 AnyIntVar MuscleElemNo = 1; ///< The number of this element of the muscle
 AnyIntVar MuscleElemAmount = MuscleParameters.MuscleElemAmount; ///< The total amount of elements for this muscle
 F0 = .DefaultMusPar.PCSAfactor*PCSA; ///< Maximum force output at optimum fiber length
 Lf0 =.FiberLengthScaleShank*(MuscleParameters.OptimalFiberlength
       / cos(pi/180*MuscleParameters.Pennationangle));
 AnyVar PCSA = 1e4*.StrengthScaleShank*MuscleParameters.MuscleVolumeSIScaled/(Lf0);///< PCSA (cm2) of the individual element is total volumen divided by the sum of muscle element fiber lengths.
 Vol0 =  1e-4* PCSA * Lf0; ///< Muscle element volume (m3)
};
#endif


#if BM_LEG_MUSCLES_RIGHT | BM_LEG_MUSCLES_LEFT
///////////////////////////////////////////
//     GemellusInferior (1 element )     //
///////////////////////////////////////////

AnyMuscleModel GemellusInferior1Par =
{
 AnyFolder& MuscleParameters = ..ModelParameters.Muscles.GemellusInferior;
 AnyIntVar MuscleElemNo = 1; ///< The number of this element of the muscle
 AnyIntVar MuscleElemAmount = MuscleParameters.MuscleElemAmount; ///< The total amount of elements for this muscle
 F0 = .DefaultMusPar.PCSAfactor*PCSA; ///< Maximum force output at optimum fiber length
 Lf0 =.FiberLengthScalePelvis*(MuscleParameters.OptimalFiberlength
       / cos(pi/180*MuscleParameters.Pennationangle));
 AnyVar PCSA = 1e4*.StrengthScalePelvis*MuscleParameters.MuscleVolumeSIScaled/(Lf0);///< PCSA (cm2) of the individual element is total volumen divided by the sum of muscle element fiber lengths.
 Vol0 =  1e-4* PCSA * Lf0; ///< Muscle element volume (m3)
};
#endif


#if BM_LEG_MUSCLES_RIGHT | BM_LEG_MUSCLES_LEFT
///////////////////////////////////////////
//     GemellusSuperior (1 element )     //
///////////////////////////////////////////

AnyMuscleModel GemellusSuperior1Par =
{
 AnyFolder& MuscleParameters = ..ModelParameters.Muscles.GemellusSuperior;
 AnyIntVar MuscleElemNo = 1; ///< The number of this element of the muscle
 AnyIntVar MuscleElemAmount = MuscleParameters.MuscleElemAmount; ///< The total amount of elements for this muscle
 F0 = .DefaultMusPar.PCSAfactor*PCSA; ///< Maximum force output at optimum fiber length
 Lf0 =.FiberLengthScalePelvis*(MuscleParameters.OptimalFiberlength
       / cos(pi/180*MuscleParameters.Pennationangle));
 AnyVar PCSA = 1e4*.StrengthScalePelvis*MuscleParameters.MuscleVolumeSIScaled/(Lf0);///< PCSA (cm2) of the individual element is total volumen divided by the sum of muscle element fiber lengths.
 Vol0 =  1e-4* PCSA * Lf0; ///< Muscle element volume (m3)
};
#endif


#if BM_LEG_MUSCLES_RIGHT | BM_LEG_MUSCLES_LEFT
/////////////////////////////////////////////////
//     GluteusMaximusSuperior (6 elements)     //
/////////////////////////////////////////////////

AnyMuscleModel GluteusMaximusSuperior1Par =
{
 AnyFolder& MuscleParameters = ..ModelParameters.Muscles.GluteusMaximusSuperior;
 AnyIntVar MuscleElemNo = 1; ///< The number of this element of the muscle
 AnyIntVar MuscleElemAmount = MuscleParameters.MuscleElemAmount; ///< The total amount of elements for this muscle
 F0 = .DefaultMusPar.PCSAfactor*PCSA; ///< Maximum force output at optimum fiber length
 Lf0 =.FiberLengthScaleThigh*(MuscleParameters.OptimalFiberlength
       / cos(pi/180*MuscleParameters.Pennationangle));
 AnyVar PCSA = 1e4*.StrengthScaleThigh*MuscleParameters.MuscleVolumeSIScaled/(.GluteusMaximusSuperior1Par.Lf0 +.GluteusMaximusSuperior2Par.Lf0 +.GluteusMaximusSuperior3Par.Lf0 +.GluteusMaximusSuperior4Par.Lf0 +.GluteusMaximusSuperior5Par.Lf0 +.GluteusMaximusSuperior6Par.Lf0 );///< PCSA (cm2) of the individual element is total volumen divided by the sum of muscle element fiber lengths.
 Vol0 =  1e-4* PCSA * Lf0; ///< Muscle element volume (m3)
};

AnyMuscleModel GluteusMaximusSuperior2Par =
{
 AnyFolder& MuscleParameters = ..ModelParameters.Muscles.GluteusMaximusSuperior;
 AnyIntVar MuscleElemNo = 2; ///< The number of this element of the muscle
 AnyIntVar MuscleElemAmount = MuscleParameters.MuscleElemAmount; ///< The total amount of elements for this muscle
 F0 = .DefaultMusPar.PCSAfactor*PCSA; ///< Maximum force output at optimum fiber length
 Lf0 =.FiberLengthScaleThigh*(MuscleParameters.OptimalFiberlength
       / cos(pi/180*MuscleParameters.Pennationangle));
 AnyVar PCSA = 1e4*.StrengthScaleThigh*MuscleParameters.MuscleVolumeSIScaled/(.GluteusMaximusSuperior1Par.Lf0 +.GluteusMaximusSuperior2Par.Lf0 +.GluteusMaximusSuperior3Par.Lf0 +.GluteusMaximusSuperior4Par.Lf0 +.GluteusMaximusSuperior5Par.Lf0 +.GluteusMaximusSuperior6Par.Lf0 );///< PCSA (cm2) of the individual element is total volumen divided by the sum of muscle element fiber lengths.
 Vol0 =  1e-4* PCSA * Lf0; ///< Muscle element volume (m3)
};

AnyMuscleModel GluteusMaximusSuperior3Par =
{
 AnyFolder& MuscleParameters = ..ModelParameters.Muscles.GluteusMaximusSuperior;
 AnyIntVar MuscleElemNo = 3; ///< The number of this element of the muscle
 AnyIntVar MuscleElemAmount = MuscleParameters.MuscleElemAmount; ///< The total amount of elements for this muscle
 F0 = .DefaultMusPar.PCSAfactor*PCSA; ///< Maximum force output at optimum fiber length
 Lf0 =.FiberLengthScaleThigh*(MuscleParameters.OptimalFiberlength
       / cos(pi/180*MuscleParameters.Pennationangle));
 AnyVar PCSA = 1e4*.StrengthScaleThigh*MuscleParameters.MuscleVolumeSIScaled/(.GluteusMaximusSuperior1Par.Lf0 +.GluteusMaximusSuperior2Par.Lf0 +.GluteusMaximusSuperior3Par.Lf0 +.GluteusMaximusSuperior4Par.Lf0 +.GluteusMaximusSuperior5Par.Lf0 +.GluteusMaximusSuperior6Par.Lf0 );///< PCSA (cm2) of the individual element is total volumen divided by the sum of muscle element fiber lengths.
 Vol0 =  1e-4* PCSA * Lf0; ///< Muscle element volume (m3)
};

AnyMuscleModel GluteusMaximusSuperior4Par =
{
 AnyFolder& MuscleParameters = ..ModelParameters.Muscles.GluteusMaximusSuperior;
 AnyIntVar MuscleElemNo = 4; ///< The number of this element of the muscle
 AnyIntVar MuscleElemAmount = MuscleParameters.MuscleElemAmount; ///< The total amount of elements for this muscle
 F0 = .DefaultMusPar.PCSAfactor*PCSA; ///< Maximum force output at optimum fiber length
 Lf0 =.FiberLengthScaleThigh*(MuscleParameters.OptimalFiberlength
       / cos(pi/180*MuscleParameters.Pennationangle));
 AnyVar PCSA = 1e4*.StrengthScaleThigh*MuscleParameters.MuscleVolumeSIScaled/(.GluteusMaximusSuperior1Par.Lf0 +.GluteusMaximusSuperior2Par.Lf0 +.GluteusMaximusSuperior3Par.Lf0 +.GluteusMaximusSuperior4Par.Lf0 +.GluteusMaximusSuperior5Par.Lf0 +.GluteusMaximusSuperior6Par.Lf0 );///< PCSA (cm2) of the individual element is total volumen divided by the sum of muscle element fiber lengths.
 Vol0 =  1e-4* PCSA * Lf0; ///< Muscle element volume (m3)
};

AnyMuscleModel GluteusMaximusSuperior5Par =
{
 AnyFolder& MuscleParameters = ..ModelParameters.Muscles.GluteusMaximusSuperior;
 AnyIntVar MuscleElemNo = 5; ///< The number of this element of the muscle
 AnyIntVar MuscleElemAmount = MuscleParameters.MuscleElemAmount; ///< The total amount of elements for this muscle
 F0 = .DefaultMusPar.PCSAfactor*PCSA; ///< Maximum force output at optimum fiber length
 Lf0 =.FiberLengthScaleThigh*(MuscleParameters.OptimalFiberlength
       / cos(pi/180*MuscleParameters.Pennationangle));
 AnyVar PCSA = 1e4*.StrengthScaleThigh*MuscleParameters.MuscleVolumeSIScaled/(.GluteusMaximusSuperior1Par.Lf0 +.GluteusMaximusSuperior2Par.Lf0 +.GluteusMaximusSuperior3Par.Lf0 +.GluteusMaximusSuperior4Par.Lf0 +.GluteusMaximusSuperior5Par.Lf0 +.GluteusMaximusSuperior6Par.Lf0 );///< PCSA (cm2) of the individual element is total volumen divided by the sum of muscle element fiber lengths.
 Vol0 =  1e-4* PCSA * Lf0; ///< Muscle element volume (m3)
};

AnyMuscleModel GluteusMaximusSuperior6Par =
{
 AnyFolder& MuscleParameters = ..ModelParameters.Muscles.GluteusMaximusSuperior;
 AnyIntVar MuscleElemNo = 6; ///< The number of this element of the muscle
 AnyIntVar MuscleElemAmount = MuscleParameters.MuscleElemAmount; ///< The total amount of elements for this muscle
 F0 = .DefaultMusPar.PCSAfactor*PCSA; ///< Maximum force output at optimum fiber length
 Lf0 =.FiberLengthScaleThigh*(MuscleParameters.OptimalFiberlength
       / cos(pi/180*MuscleParameters.Pennationangle));
 AnyVar PCSA = 1e4*.StrengthScaleThigh*MuscleParameters.MuscleVolumeSIScaled/(.GluteusMaximusSuperior1Par.Lf0 +.GluteusMaximusSuperior2Par.Lf0 +.GluteusMaximusSuperior3Par.Lf0 +.GluteusMaximusSuperior4Par.Lf0 +.GluteusMaximusSuperior5Par.Lf0 +.GluteusMaximusSuperior6Par.Lf0 );///< PCSA (cm2) of the individual element is total volumen divided by the sum of muscle element fiber lengths.
 Vol0 =  1e-4* PCSA * Lf0; ///< Muscle element volume (m3)
};
#endif


#if BM_LEG_MUSCLES_RIGHT | BM_LEG_MUSCLES_LEFT
/////////////////////////////////////////////////
//     GluteusMaximusInferior (6 elements)     //
/////////////////////////////////////////////////

AnyMuscleModel GluteusMaximusInferior1Par =
{
 AnyFolder& MuscleParameters = ..ModelParameters.Muscles.GluteusMaximusInferior;
 AnyIntVar MuscleElemNo = 1; ///< The number of this element of the muscle
 AnyIntVar MuscleElemAmount = MuscleParameters.MuscleElemAmount; ///< The total amount of elements for this muscle
 F0 = .DefaultMusPar.PCSAfactor*PCSA; ///< Maximum force output at optimum fiber length
 Lf0 =.FiberLengthScaleThigh*(MuscleParameters.OptimalFiberlength
       / cos(pi/180*MuscleParameters.Pennationangle));
 AnyVar PCSA = 1e4*.StrengthScaleThigh*MuscleParameters.MuscleVolumeSIScaled/(.GluteusMaximusInferior1Par.Lf0 +.GluteusMaximusInferior2Par.Lf0 +.GluteusMaximusInferior3Par.Lf0 +.GluteusMaximusInferior4Par.Lf0 +.GluteusMaximusInferior5Par.Lf0 +.GluteusMaximusInferior6Par.Lf0 );///< PCSA (cm2) of the individual element is total volumen divided by the sum of muscle element fiber lengths.
 Vol0 =  1e-4* PCSA * Lf0; ///< Muscle element volume (m3)
};

AnyMuscleModel GluteusMaximusInferior2Par =
{
 AnyFolder& MuscleParameters = ..ModelParameters.Muscles.GluteusMaximusInferior;
 AnyIntVar MuscleElemNo = 2; ///< The number of this element of the muscle
 AnyIntVar MuscleElemAmount = MuscleParameters.MuscleElemAmount; ///< The total amount of elements for this muscle
 F0 = .DefaultMusPar.PCSAfactor*PCSA; ///< Maximum force output at optimum fiber length
 Lf0 =.FiberLengthScaleThigh*(MuscleParameters.OptimalFiberlength
       / cos(pi/180*MuscleParameters.Pennationangle));
 AnyVar PCSA = 1e4*.StrengthScaleThigh*MuscleParameters.MuscleVolumeSIScaled/(.GluteusMaximusInferior1Par.Lf0 +.GluteusMaximusInferior2Par.Lf0 +.GluteusMaximusInferior3Par.Lf0 +.GluteusMaximusInferior4Par.Lf0 +.GluteusMaximusInferior5Par.Lf0 +.GluteusMaximusInferior6Par.Lf0 );///< PCSA (cm2) of the individual element is total volumen divided by the sum of muscle element fiber lengths.
 Vol0 =  1e-4* PCSA * Lf0; ///< Muscle element volume (m3)
};

AnyMuscleModel GluteusMaximusInferior3Par =
{
 AnyFolder& MuscleParameters = ..ModelParameters.Muscles.GluteusMaximusInferior;
 AnyIntVar MuscleElemNo = 3; ///< The number of this element of the muscle
 AnyIntVar MuscleElemAmount = MuscleParameters.MuscleElemAmount; ///< The total amount of elements for this muscle
 F0 = .DefaultMusPar.PCSAfactor*PCSA; ///< Maximum force output at optimum fiber length
 Lf0 =.FiberLengthScaleThigh*(MuscleParameters.OptimalFiberlength
       / cos(pi/180*MuscleParameters.Pennationangle));
 AnyVar PCSA = 1e4*.StrengthScaleThigh*MuscleParameters.MuscleVolumeSIScaled/(.GluteusMaximusInferior1Par.Lf0 +.GluteusMaximusInferior2Par.Lf0 +.GluteusMaximusInferior3Par.Lf0 +.GluteusMaximusInferior4Par.Lf0 +.GluteusMaximusInferior5Par.Lf0 +.GluteusMaximusInferior6Par.Lf0 );///< PCSA (cm2) of the individual element is total volumen divided by the sum of muscle element fiber lengths.
 Vol0 =  1e-4* PCSA * Lf0; ///< Muscle element volume (m3)
};

AnyMuscleModel GluteusMaximusInferior4Par =
{
 AnyFolder& MuscleParameters = ..ModelParameters.Muscles.GluteusMaximusInferior;
 AnyIntVar MuscleElemNo = 4; ///< The number of this element of the muscle
 AnyIntVar MuscleElemAmount = MuscleParameters.MuscleElemAmount; ///< The total amount of elements for this muscle
 F0 = .DefaultMusPar.PCSAfactor*PCSA; ///< Maximum force output at optimum fiber length
 Lf0 =.FiberLengthScaleThigh*(MuscleParameters.OptimalFiberlength
       / cos(pi/180*MuscleParameters.Pennationangle));
 AnyVar PCSA = 1e4*.StrengthScaleThigh*MuscleParameters.MuscleVolumeSIScaled/(.GluteusMaximusInferior1Par.Lf0 +.GluteusMaximusInferior2Par.Lf0 +.GluteusMaximusInferior3Par.Lf0 +.GluteusMaximusInferior4Par.Lf0 +.GluteusMaximusInferior5Par.Lf0 +.GluteusMaximusInferior6Par.Lf0 );///< PCSA (cm2) of the individual element is total volumen divided by the sum of muscle element fiber lengths.
 Vol0 =  1e-4* PCSA * Lf0; ///< Muscle element volume (m3)
};

AnyMuscleModel GluteusMaximusInferior5Par =
{
 AnyFolder& MuscleParameters = ..ModelParameters.Muscles.GluteusMaximusInferior;
 AnyIntVar MuscleElemNo = 5; ///< The number of this element of the muscle
 AnyIntVar MuscleElemAmount = MuscleParameters.MuscleElemAmount; ///< The total amount of elements for this muscle
 F0 = .DefaultMusPar.PCSAfactor*PCSA; ///< Maximum force output at optimum fiber length
 Lf0 =.FiberLengthScaleThigh*(MuscleParameters.OptimalFiberlength
       / cos(pi/180*MuscleParameters.Pennationangle));
 AnyVar PCSA = 1e4*.StrengthScaleThigh*MuscleParameters.MuscleVolumeSIScaled/(.GluteusMaximusInferior1Par.Lf0 +.GluteusMaximusInferior2Par.Lf0 +.GluteusMaximusInferior3Par.Lf0 +.GluteusMaximusInferior4Par.Lf0 +.GluteusMaximusInferior5Par.Lf0 +.GluteusMaximusInferior6Par.Lf0 );///< PCSA (cm2) of the individual element is total volumen divided by the sum of muscle element fiber lengths.
 Vol0 =  1e-4* PCSA * Lf0; ///< Muscle element volume (m3)
};

AnyMuscleModel GluteusMaximusInferior6Par =
{
 AnyFolder& MuscleParameters = ..ModelParameters.Muscles.GluteusMaximusInferior;
 AnyIntVar MuscleElemNo = 6; ///< The number of this element of the muscle
 AnyIntVar MuscleElemAmount = MuscleParameters.MuscleElemAmount; ///< The total amount of elements for this muscle
 F0 = .DefaultMusPar.PCSAfactor*PCSA; ///< Maximum force output at optimum fiber length
 Lf0 =.FiberLengthScaleThigh*(MuscleParameters.OptimalFiberlength
       / cos(pi/180*MuscleParameters.Pennationangle));
 AnyVar PCSA = 1e4*.StrengthScaleThigh*MuscleParameters.MuscleVolumeSIScaled/(.GluteusMaximusInferior1Par.Lf0 +.GluteusMaximusInferior2Par.Lf0 +.GluteusMaximusInferior3Par.Lf0 +.GluteusMaximusInferior4Par.Lf0 +.GluteusMaximusInferior5Par.Lf0 +.GluteusMaximusInferior6Par.Lf0 );///< PCSA (cm2) of the individual element is total volumen divided by the sum of muscle element fiber lengths.
 Vol0 =  1e-4* PCSA * Lf0; ///< Muscle element volume (m3)
};
#endif


#if BM_LEG_MUSCLES_RIGHT | BM_LEG_MUSCLES_LEFT
////////////////////////////////////////////////
//     GluteusMediusAnterior (6 elements)     //
////////////////////////////////////////////////

AnyMuscleModel GluteusMediusAnterior1Par =
{
 AnyFolder& MuscleParameters = ..ModelParameters.Muscles.GluteusMediusAnterior;
 AnyIntVar MuscleElemNo = 1; ///< The number of this element of the muscle
 AnyIntVar MuscleElemAmount = MuscleParameters.MuscleElemAmount; ///< The total amount of elements for this muscle
 F0 = .DefaultMusPar.PCSAfactor*PCSA; ///< Maximum force output at optimum fiber length
 Lf0 =.FiberLengthScalePelvis*(MuscleParameters.OptimalFiberlength
       / cos(pi/180*MuscleParameters.Pennationangle));
 AnyVar PCSA = 1e4*.StrengthScalePelvis*MuscleParameters.MuscleVolumeSIScaled/(.GluteusMediusAnterior1Par.Lf0 +.GluteusMediusAnterior2Par.Lf0 +.GluteusMediusAnterior3Par.Lf0 +.GluteusMediusAnterior4Par.Lf0 +.GluteusMediusAnterior5Par.Lf0 +.GluteusMediusAnterior6Par.Lf0 );///< PCSA (cm2) of the individual element is total volumen divided by the sum of muscle element fiber lengths.
 Vol0 =  1e-4* PCSA * Lf0; ///< Muscle element volume (m3)
};

AnyMuscleModel GluteusMediusAnterior2Par =
{
 AnyFolder& MuscleParameters = ..ModelParameters.Muscles.GluteusMediusAnterior;
 AnyIntVar MuscleElemNo = 2; ///< The number of this element of the muscle
 AnyIntVar MuscleElemAmount = MuscleParameters.MuscleElemAmount; ///< The total amount of elements for this muscle
 F0 = .DefaultMusPar.PCSAfactor*PCSA; ///< Maximum force output at optimum fiber length
 Lf0 =.FiberLengthScalePelvis*(MuscleParameters.OptimalFiberlength
       / cos(pi/180*MuscleParameters.Pennationangle));
 AnyVar PCSA = 1e4*.StrengthScalePelvis*MuscleParameters.MuscleVolumeSIScaled/(.GluteusMediusAnterior1Par.Lf0 +.GluteusMediusAnterior2Par.Lf0 +.GluteusMediusAnterior3Par.Lf0 +.GluteusMediusAnterior4Par.Lf0 +.GluteusMediusAnterior5Par.Lf0 +.GluteusMediusAnterior6Par.Lf0 );///< PCSA (cm2) of the individual element is total volumen divided by the sum of muscle element fiber lengths.
 Vol0 =  1e-4* PCSA * Lf0; ///< Muscle element volume (m3)
};

AnyMuscleModel GluteusMediusAnterior3Par =
{
 AnyFolder& MuscleParameters = ..ModelParameters.Muscles.GluteusMediusAnterior;
 AnyIntVar MuscleElemNo = 3; ///< The number of this element of the muscle
 AnyIntVar MuscleElemAmount = MuscleParameters.MuscleElemAmount; ///< The total amount of elements for this muscle
 F0 = .DefaultMusPar.PCSAfactor*PCSA; ///< Maximum force output at optimum fiber length
 Lf0 =.FiberLengthScalePelvis*(MuscleParameters.OptimalFiberlength
       / cos(pi/180*MuscleParameters.Pennationangle));
 AnyVar PCSA = 1e4*.StrengthScalePelvis*MuscleParameters.MuscleVolumeSIScaled/(.GluteusMediusAnterior1Par.Lf0 +.GluteusMediusAnterior2Par.Lf0 +.GluteusMediusAnterior3Par.Lf0 +.GluteusMediusAnterior4Par.Lf0 +.GluteusMediusAnterior5Par.Lf0 +.GluteusMediusAnterior6Par.Lf0 );///< PCSA (cm2) of the individual element is total volumen divided by the sum of muscle element fiber lengths.
 Vol0 =  1e-4* PCSA * Lf0; ///< Muscle element volume (m3)
};

AnyMuscleModel GluteusMediusAnterior4Par =
{
 AnyFolder& MuscleParameters = ..ModelParameters.Muscles.GluteusMediusAnterior;
 AnyIntVar MuscleElemNo = 4; ///< The number of this element of the muscle
 AnyIntVar MuscleElemAmount = MuscleParameters.MuscleElemAmount; ///< The total amount of elements for this muscle
 F0 = .DefaultMusPar.PCSAfactor*PCSA; ///< Maximum force output at optimum fiber length
 Lf0 =.FiberLengthScalePelvis*(MuscleParameters.OptimalFiberlength
       / cos(pi/180*MuscleParameters.Pennationangle));
 AnyVar PCSA = 1e4*.StrengthScalePelvis*MuscleParameters.MuscleVolumeSIScaled/(.GluteusMediusAnterior1Par.Lf0 +.GluteusMediusAnterior2Par.Lf0 +.GluteusMediusAnterior3Par.Lf0 +.GluteusMediusAnterior4Par.Lf0 +.GluteusMediusAnterior5Par.Lf0 +.GluteusMediusAnterior6Par.Lf0 );///< PCSA (cm2) of the individual element is total volumen divided by the sum of muscle element fiber lengths.
 Vol0 =  1e-4* PCSA * Lf0; ///< Muscle element volume (m3)
};

AnyMuscleModel GluteusMediusAnterior5Par =
{
 AnyFolder& MuscleParameters = ..ModelParameters.Muscles.GluteusMediusAnterior;
 AnyIntVar MuscleElemNo = 5; ///< The number of this element of the muscle
 AnyIntVar MuscleElemAmount = MuscleParameters.MuscleElemAmount; ///< The total amount of elements for this muscle
 F0 = .DefaultMusPar.PCSAfactor*PCSA; ///< Maximum force output at optimum fiber length
 Lf0 =.FiberLengthScalePelvis*(MuscleParameters.OptimalFiberlength
       / cos(pi/180*MuscleParameters.Pennationangle));
 AnyVar PCSA = 1e4*.StrengthScalePelvis*MuscleParameters.MuscleVolumeSIScaled/(.GluteusMediusAnterior1Par.Lf0 +.GluteusMediusAnterior2Par.Lf0 +.GluteusMediusAnterior3Par.Lf0 +.GluteusMediusAnterior4Par.Lf0 +.GluteusMediusAnterior5Par.Lf0 +.GluteusMediusAnterior6Par.Lf0 );///< PCSA (cm2) of the individual element is total volumen divided by the sum of muscle element fiber lengths.
 Vol0 =  1e-4* PCSA * Lf0; ///< Muscle element volume (m3)
};

AnyMuscleModel GluteusMediusAnterior6Par =
{
 AnyFolder& MuscleParameters = ..ModelParameters.Muscles.GluteusMediusAnterior;
 AnyIntVar MuscleElemNo = 6; ///< The number of this element of the muscle
 AnyIntVar MuscleElemAmount = MuscleParameters.MuscleElemAmount; ///< The total amount of elements for this muscle
 F0 = .DefaultMusPar.PCSAfactor*PCSA; ///< Maximum force output at optimum fiber length
 Lf0 =.FiberLengthScalePelvis*(MuscleParameters.OptimalFiberlength
       / cos(pi/180*MuscleParameters.Pennationangle));
 AnyVar PCSA = 1e4*.StrengthScalePelvis*MuscleParameters.MuscleVolumeSIScaled/(.GluteusMediusAnterior1Par.Lf0 +.GluteusMediusAnterior2Par.Lf0 +.GluteusMediusAnterior3Par.Lf0 +.GluteusMediusAnterior4Par.Lf0 +.GluteusMediusAnterior5Par.Lf0 +.GluteusMediusAnterior6Par.Lf0 );///< PCSA (cm2) of the individual element is total volumen divided by the sum of muscle element fiber lengths.
 Vol0 =  1e-4* PCSA * Lf0; ///< Muscle element volume (m3)
};
#endif


#if BM_LEG_MUSCLES_RIGHT | BM_LEG_MUSCLES_LEFT
/////////////////////////////////////////////////
//     GluteusMediusPosterior (6 elements)     //
/////////////////////////////////////////////////

AnyMuscleModel GluteusMediusPosterior1Par =
{
 AnyFolder& MuscleParameters = ..ModelParameters.Muscles.GluteusMediusPosterior;
 AnyIntVar MuscleElemNo = 1; ///< The number of this element of the muscle
 AnyIntVar MuscleElemAmount = MuscleParameters.MuscleElemAmount; ///< The total amount of elements for this muscle
 F0 = .DefaultMusPar.PCSAfactor*PCSA; ///< Maximum force output at optimum fiber length
 Lf0 =.FiberLengthScalePelvis*(MuscleParameters.OptimalFiberlength
       / cos(pi/180*MuscleParameters.Pennationangle));
 AnyVar PCSA = 1e4*.StrengthScalePelvis*MuscleParameters.MuscleVolumeSIScaled/(.GluteusMediusPosterior1Par.Lf0 +.GluteusMediusPosterior2Par.Lf0 +.GluteusMediusPosterior3Par.Lf0 +.GluteusMediusPosterior4Par.Lf0 +.GluteusMediusPosterior5Par.Lf0 +.GluteusMediusPosterior6Par.Lf0 );///< PCSA (cm2) of the individual element is total volumen divided by the sum of muscle element fiber lengths.
 Vol0 =  1e-4* PCSA * Lf0; ///< Muscle element volume (m3)
};

AnyMuscleModel GluteusMediusPosterior2Par =
{
 AnyFolder& MuscleParameters = ..ModelParameters.Muscles.GluteusMediusPosterior;
 AnyIntVar MuscleElemNo = 2; ///< The number of this element of the muscle
 AnyIntVar MuscleElemAmount = MuscleParameters.MuscleElemAmount; ///< The total amount of elements for this muscle
 F0 = .DefaultMusPar.PCSAfactor*PCSA; ///< Maximum force output at optimum fiber length
 Lf0 =.FiberLengthScalePelvis*(MuscleParameters.OptimalFiberlength
       / cos(pi/180*MuscleParameters.Pennationangle));
 AnyVar PCSA = 1e4*.StrengthScalePelvis*MuscleParameters.MuscleVolumeSIScaled/(.GluteusMediusPosterior1Par.Lf0 +.GluteusMediusPosterior2Par.Lf0 +.GluteusMediusPosterior3Par.Lf0 +.GluteusMediusPosterior4Par.Lf0 +.GluteusMediusPosterior5Par.Lf0 +.GluteusMediusPosterior6Par.Lf0 );///< PCSA (cm2) of the individual element is total volumen divided by the sum of muscle element fiber lengths.
 Vol0 =  1e-4* PCSA * Lf0; ///< Muscle element volume (m3)
};

AnyMuscleModel GluteusMediusPosterior3Par =
{
 AnyFolder& MuscleParameters = ..ModelParameters.Muscles.GluteusMediusPosterior;
 AnyIntVar MuscleElemNo = 3; ///< The number of this element of the muscle
 AnyIntVar MuscleElemAmount = MuscleParameters.MuscleElemAmount; ///< The total amount of elements for this muscle
 F0 = .DefaultMusPar.PCSAfactor*PCSA; ///< Maximum force output at optimum fiber length
 Lf0 =.FiberLengthScalePelvis*(MuscleParameters.OptimalFiberlength
       / cos(pi/180*MuscleParameters.Pennationangle));
 AnyVar PCSA = 1e4*.StrengthScalePelvis*MuscleParameters.MuscleVolumeSIScaled/(.GluteusMediusPosterior1Par.Lf0 +.GluteusMediusPosterior2Par.Lf0 +.GluteusMediusPosterior3Par.Lf0 +.GluteusMediusPosterior4Par.Lf0 +.GluteusMediusPosterior5Par.Lf0 +.GluteusMediusPosterior6Par.Lf0 );///< PCSA (cm2) of the individual element is total volumen divided by the sum of muscle element fiber lengths.
 Vol0 =  1e-4* PCSA * Lf0; ///< Muscle element volume (m3)
};

AnyMuscleModel GluteusMediusPosterior4Par =
{
 AnyFolder& MuscleParameters = ..ModelParameters.Muscles.GluteusMediusPosterior;
 AnyIntVar MuscleElemNo = 4; ///< The number of this element of the muscle
 AnyIntVar MuscleElemAmount = MuscleParameters.MuscleElemAmount; ///< The total amount of elements for this muscle
 F0 = .DefaultMusPar.PCSAfactor*PCSA; ///< Maximum force output at optimum fiber length
 Lf0 =.FiberLengthScalePelvis*(MuscleParameters.OptimalFiberlength
       / cos(pi/180*MuscleParameters.Pennationangle));
 AnyVar PCSA = 1e4*.StrengthScalePelvis*MuscleParameters.MuscleVolumeSIScaled/(.GluteusMediusPosterior1Par.Lf0 +.GluteusMediusPosterior2Par.Lf0 +.GluteusMediusPosterior3Par.Lf0 +.GluteusMediusPosterior4Par.Lf0 +.GluteusMediusPosterior5Par.Lf0 +.GluteusMediusPosterior6Par.Lf0 );///< PCSA (cm2) of the individual element is total volumen divided by the sum of muscle element fiber lengths.
 Vol0 =  1e-4* PCSA * Lf0; ///< Muscle element volume (m3)
};

AnyMuscleModel GluteusMediusPosterior5Par =
{
 AnyFolder& MuscleParameters = ..ModelParameters.Muscles.GluteusMediusPosterior;
 AnyIntVar MuscleElemNo = 5; ///< The number of this element of the muscle
 AnyIntVar MuscleElemAmount = MuscleParameters.MuscleElemAmount; ///< The total amount of elements for this muscle
 F0 = .DefaultMusPar.PCSAfactor*PCSA; ///< Maximum force output at optimum fiber length
 Lf0 =.FiberLengthScalePelvis*(MuscleParameters.OptimalFiberlength
       / cos(pi/180*MuscleParameters.Pennationangle));
 AnyVar PCSA = 1e4*.StrengthScalePelvis*MuscleParameters.MuscleVolumeSIScaled/(.GluteusMediusPosterior1Par.Lf0 +.GluteusMediusPosterior2Par.Lf0 +.GluteusMediusPosterior3Par.Lf0 +.GluteusMediusPosterior4Par.Lf0 +.GluteusMediusPosterior5Par.Lf0 +.GluteusMediusPosterior6Par.Lf0 );///< PCSA (cm2) of the individual element is total volumen divided by the sum of muscle element fiber lengths.
 Vol0 =  1e-4* PCSA * Lf0; ///< Muscle element volume (m3)
};

AnyMuscleModel GluteusMediusPosterior6Par =
{
 AnyFolder& MuscleParameters = ..ModelParameters.Muscles.GluteusMediusPosterior;
 AnyIntVar MuscleElemNo = 6; ///< The number of this element of the muscle
 AnyIntVar MuscleElemAmount = MuscleParameters.MuscleElemAmount; ///< The total amount of elements for this muscle
 F0 = .DefaultMusPar.PCSAfactor*PCSA; ///< Maximum force output at optimum fiber length
 Lf0 =.FiberLengthScalePelvis*(MuscleParameters.OptimalFiberlength
       / cos(pi/180*MuscleParameters.Pennationangle));
 AnyVar PCSA = 1e4*.StrengthScalePelvis*MuscleParameters.MuscleVolumeSIScaled/(.GluteusMediusPosterior1Par.Lf0 +.GluteusMediusPosterior2Par.Lf0 +.GluteusMediusPosterior3Par.Lf0 +.GluteusMediusPosterior4Par.Lf0 +.GluteusMediusPosterior5Par.Lf0 +.GluteusMediusPosterior6Par.Lf0 );///< PCSA (cm2) of the individual element is total volumen divided by the sum of muscle element fiber lengths.
 Vol0 =  1e-4* PCSA * Lf0; ///< Muscle element volume (m3)
};
#endif


#if BM_LEG_MUSCLES_RIGHT | BM_LEG_MUSCLES_LEFT
/////////////////////////////////////////////////
//     GluteusMinimusAnterior (1 element )     //
/////////////////////////////////////////////////

AnyMuscleModel GluteusMinimusAnterior1Par =
{
 AnyFolder& MuscleParameters = ..ModelParameters.Muscles.GluteusMinimusAnterior;
 AnyIntVar MuscleElemNo = 1; ///< The number of this element of the muscle
 AnyIntVar MuscleElemAmount = MuscleParameters.MuscleElemAmount; ///< The total amount of elements for this muscle
 F0 = .DefaultMusPar.PCSAfactor*PCSA; ///< Maximum force output at optimum fiber length
 Lf0 =.FiberLengthScalePelvis*(MuscleParameters.OptimalFiberlength
       / cos(pi/180*MuscleParameters.Pennationangle));
 AnyVar PCSA = 1e4*.StrengthScalePelvis*MuscleParameters.MuscleVolumeSIScaled/(Lf0);///< PCSA (cm2) of the individual element is total volumen divided by the sum of muscle element fiber lengths.
 Vol0 =  1e-4* PCSA * Lf0; ///< Muscle element volume (m3)
};
#endif


#if BM_LEG_MUSCLES_RIGHT | BM_LEG_MUSCLES_LEFT
////////////////////////////////////////////
//     GluteusMinimusMid (1 element )     //
////////////////////////////////////////////

AnyMuscleModel GluteusMinimusMid1Par =
{
 AnyFolder& MuscleParameters = ..ModelParameters.Muscles.GluteusMinimusMid;
 AnyIntVar MuscleElemNo = 1; ///< The number of this element of the muscle
 AnyIntVar MuscleElemAmount = MuscleParameters.MuscleElemAmount; ///< The total amount of elements for this muscle
 F0 = .DefaultMusPar.PCSAfactor*PCSA; ///< Maximum force output at optimum fiber length
 Lf0 =.FiberLengthScalePelvis*(MuscleParameters.OptimalFiberlength
       / cos(pi/180*MuscleParameters.Pennationangle));
 AnyVar PCSA = 1e4*.StrengthScalePelvis*MuscleParameters.MuscleVolumeSIScaled/(Lf0);///< PCSA (cm2) of the individual element is total volumen divided by the sum of muscle element fiber lengths.
 Vol0 =  1e-4* PCSA * Lf0; ///< Muscle element volume (m3)
};
#endif


#if BM_LEG_MUSCLES_RIGHT | BM_LEG_MUSCLES_LEFT
//////////////////////////////////////////////////
//     GluteusMinimusPosterior (1 element )     //
//////////////////////////////////////////////////

AnyMuscleModel GluteusMinimusPosterior1Par =
{
 AnyFolder& MuscleParameters = ..ModelParameters.Muscles.GluteusMinimusPosterior;
 AnyIntVar MuscleElemNo = 1; ///< The number of this element of the muscle
 AnyIntVar MuscleElemAmount = MuscleParameters.MuscleElemAmount; ///< The total amount of elements for this muscle
 F0 = .DefaultMusPar.PCSAfactor*PCSA; ///< Maximum force output at optimum fiber length
 Lf0 =.FiberLengthScalePelvis*(MuscleParameters.OptimalFiberlength
       / cos(pi/180*MuscleParameters.Pennationangle));
 AnyVar PCSA = 1e4*.StrengthScalePelvis*MuscleParameters.MuscleVolumeSIScaled/(Lf0);///< PCSA (cm2) of the individual element is total volumen divided by the sum of muscle element fiber lengths.
 Vol0 =  1e-4* PCSA * Lf0; ///< Muscle element volume (m3)
};
#endif


#if BM_LEG_MUSCLES_RIGHT | BM_LEG_MUSCLES_LEFT
///////////////////////////////////
//     Gracilis (2 elements)     //
///////////////////////////////////

AnyMuscleModel Gracilis1Par =
{
 AnyFolder& MuscleParameters = ..ModelParameters.Muscles.Gracilis;
 AnyIntVar MuscleElemNo = 1; ///< The number of this element of the muscle
 AnyIntVar MuscleElemAmount = MuscleParameters.MuscleElemAmount; ///< The total amount of elements for this muscle
 F0 = .DefaultMusPar.PCSAfactor*PCSA; ///< Maximum force output at optimum fiber length
 Lf0 =.FiberLengthScaleThigh*(MuscleParameters.OptimalFiberlength
       / cos(pi/180*MuscleParameters.Pennationangle));
 AnyVar PCSA = 1e4*.StrengthScaleThigh*MuscleParameters.MuscleVolumeSIScaled/(.Gracilis1Par.Lf0 +.Gracilis2Par.Lf0 );///< PCSA (cm2) of the individual element is total volumen divided by the sum of muscle element fiber lengths.
 Vol0 =  1e-4* PCSA * Lf0; ///< Muscle element volume (m3)
};

AnyMuscleModel Gracilis2Par =
{
 AnyFolder& MuscleParameters = ..ModelParameters.Muscles.Gracilis;
 AnyIntVar MuscleElemNo = 2; ///< The number of this element of the muscle
 AnyIntVar MuscleElemAmount = MuscleParameters.MuscleElemAmount; ///< The total amount of elements for this muscle
 F0 = .DefaultMusPar.PCSAfactor*PCSA; ///< Maximum force output at optimum fiber length
 Lf0 =.FiberLengthScaleThigh*(MuscleParameters.OptimalFiberlength
       / cos(pi/180*MuscleParameters.Pennationangle));
 AnyVar PCSA = 1e4*.StrengthScaleThigh*MuscleParameters.MuscleVolumeSIScaled/(.Gracilis1Par.Lf0 +.Gracilis2Par.Lf0 );///< PCSA (cm2) of the individual element is total volumen divided by the sum of muscle element fiber lengths.
 Vol0 =  1e-4* PCSA * Lf0; ///< Muscle element volume (m3)
};
#endif


#if BM_LEG_MUSCLES_RIGHT | BM_LEG_MUSCLES_LEFT
///////////////////////////////////////////
//     IliacusLateralis (2 elements)     //
///////////////////////////////////////////

AnyMuscleModel IliacusLateralis1Par =
{
 AnyFolder& MuscleParameters = ..ModelParameters.Muscles.IliacusLateralis;
 AnyIntVar MuscleElemNo = 1; ///< The number of this element of the muscle
 AnyIntVar MuscleElemAmount = MuscleParameters.MuscleElemAmount; ///< The total amount of elements for this muscle
 F0 = .DefaultMusPar.PCSAfactor*PCSA; ///< Maximum force output at optimum fiber length
 Lf0 =.FiberLengthScalePelvis*(MuscleParameters.OptimalFiberlength
       / cos(pi/180*MuscleParameters.Pennationangle));
 AnyVar PCSA = 1e4*.StrengthScalePelvis*MuscleParameters.MuscleVolumeSIScaled/(.IliacusLateralis1Par.Lf0 +.IliacusLateralis2Par.Lf0 );///< PCSA (cm2) of the individual element is total volumen divided by the sum of muscle element fiber lengths.
 Vol0 =  1e-4* PCSA * Lf0; ///< Muscle element volume (m3)
};

AnyMuscleModel IliacusLateralis2Par =
{
 AnyFolder& MuscleParameters = ..ModelParameters.Muscles.IliacusLateralis;
 AnyIntVar MuscleElemNo = 2; ///< The number of this element of the muscle
 AnyIntVar MuscleElemAmount = MuscleParameters.MuscleElemAmount; ///< The total amount of elements for this muscle
 F0 = .DefaultMusPar.PCSAfactor*PCSA; ///< Maximum force output at optimum fiber length
 Lf0 =.FiberLengthScalePelvis*(MuscleParameters.OptimalFiberlength
       / cos(pi/180*MuscleParameters.Pennationangle));
 AnyVar PCSA = 1e4*.StrengthScalePelvis*MuscleParameters.MuscleVolumeSIScaled/(.IliacusLateralis1Par.Lf0 +.IliacusLateralis2Par.Lf0 );///< PCSA (cm2) of the individual element is total volumen divided by the sum of muscle element fiber lengths.
 Vol0 =  1e-4* PCSA * Lf0; ///< Muscle element volume (m3)
};
#endif


#if BM_LEG_MUSCLES_RIGHT | BM_LEG_MUSCLES_LEFT
/////////////////////////////////////
//     IliacusMid (2 elements)     //
/////////////////////////////////////

AnyMuscleModel IliacusMid1Par =
{
 AnyFolder& MuscleParameters = ..ModelParameters.Muscles.IliacusMid;
 AnyIntVar MuscleElemNo = 1; ///< The number of this element of the muscle
 AnyIntVar MuscleElemAmount = MuscleParameters.MuscleElemAmount; ///< The total amount of elements for this muscle
 F0 = .DefaultMusPar.PCSAfactor*PCSA; ///< Maximum force output at optimum fiber length
 Lf0 =.FiberLengthScalePelvis*(MuscleParameters.OptimalFiberlength
       / cos(pi/180*MuscleParameters.Pennationangle));
 AnyVar PCSA = 1e4*.StrengthScalePelvis*MuscleParameters.MuscleVolumeSIScaled/(.IliacusMid1Par.Lf0 +.IliacusMid2Par.Lf0 );///< PCSA (cm2) of the individual element is total volumen divided by the sum of muscle element fiber lengths.
 Vol0 =  1e-4* PCSA * Lf0; ///< Muscle element volume (m3)
};

AnyMuscleModel IliacusMid2Par =
{
 AnyFolder& MuscleParameters = ..ModelParameters.Muscles.IliacusMid;
 AnyIntVar MuscleElemNo = 2; ///< The number of this element of the muscle
 AnyIntVar MuscleElemAmount = MuscleParameters.MuscleElemAmount; ///< The total amount of elements for this muscle
 F0 = .DefaultMusPar.PCSAfactor*PCSA; ///< Maximum force output at optimum fiber length
 Lf0 =.FiberLengthScalePelvis*(MuscleParameters.OptimalFiberlength
       / cos(pi/180*MuscleParameters.Pennationangle));
 AnyVar PCSA = 1e4*.StrengthScalePelvis*MuscleParameters.MuscleVolumeSIScaled/(.IliacusMid1Par.Lf0 +.IliacusMid2Par.Lf0 );///< PCSA (cm2) of the individual element is total volumen divided by the sum of muscle element fiber lengths.
 Vol0 =  1e-4* PCSA * Lf0; ///< Muscle element volume (m3)
};
#endif


#if BM_LEG_MUSCLES_RIGHT | BM_LEG_MUSCLES_LEFT
//////////////////////////////////////////
//     IliacusMedialis (2 elements)     //
//////////////////////////////////////////

AnyMuscleModel IliacusMedialis1Par =
{
 AnyFolder& MuscleParameters = ..ModelParameters.Muscles.IliacusMedialis;
 AnyIntVar MuscleElemNo = 1; ///< The number of this element of the muscle
 AnyIntVar MuscleElemAmount = MuscleParameters.MuscleElemAmount; ///< The total amount of elements for this muscle
 F0 = .DefaultMusPar.PCSAfactor*PCSA; ///< Maximum force output at optimum fiber length
 Lf0 =.FiberLengthScalePelvis*(MuscleParameters.OptimalFiberlength
       / cos(pi/180*MuscleParameters.Pennationangle));
 AnyVar PCSA = 1e4*.StrengthScalePelvis*MuscleParameters.MuscleVolumeSIScaled/(.IliacusMedialis1Par.Lf0 +.IliacusMedialis2Par.Lf0 );///< PCSA (cm2) of the individual element is total volumen divided by the sum of muscle element fiber lengths.
 Vol0 =  1e-4* PCSA * Lf0; ///< Muscle element volume (m3)
};

AnyMuscleModel IliacusMedialis2Par =
{
 AnyFolder& MuscleParameters = ..ModelParameters.Muscles.IliacusMedialis;
 AnyIntVar MuscleElemNo = 2; ///< The number of this element of the muscle
 AnyIntVar MuscleElemAmount = MuscleParameters.MuscleElemAmount; ///< The total amount of elements for this muscle
 F0 = .DefaultMusPar.PCSAfactor*PCSA; ///< Maximum force output at optimum fiber length
 Lf0 =.FiberLengthScalePelvis*(MuscleParameters.OptimalFiberlength
       / cos(pi/180*MuscleParameters.Pennationangle));
 AnyVar PCSA = 1e4*.StrengthScalePelvis*MuscleParameters.MuscleVolumeSIScaled/(.IliacusMedialis1Par.Lf0 +.IliacusMedialis2Par.Lf0 );///< PCSA (cm2) of the individual element is total volumen divided by the sum of muscle element fiber lengths.
 Vol0 =  1e-4* PCSA * Lf0; ///< Muscle element volume (m3)
};
#endif


#if BM_LEG_MUSCLES_RIGHT | BM_LEG_MUSCLES_LEFT
////////////////////////////////////////////////////
//     ObturatorExternusInferior (2 elements)     //
////////////////////////////////////////////////////

AnyMuscleModel ObturatorExternusInferior1Par =
{
 AnyFolder& MuscleParameters = ..ModelParameters.Muscles.ObturatorExternusInferior;
 AnyIntVar MuscleElemNo = 1; ///< The number of this element of the muscle
 AnyIntVar MuscleElemAmount = MuscleParameters.MuscleElemAmount; ///< The total amount of elements for this muscle
 F0 = .DefaultMusPar.PCSAfactor*PCSA; ///< Maximum force output at optimum fiber length
 Lf0 =.FiberLengthScalePelvis*(MuscleParameters.OptimalFiberlength
       / cos(pi/180*MuscleParameters.Pennationangle));
 AnyVar PCSA = 1e4*.StrengthScalePelvis*MuscleParameters.MuscleVolumeSIScaled/(.ObturatorExternusInferior1Par.Lf0 +.ObturatorExternusInferior2Par.Lf0 );///< PCSA (cm2) of the individual element is total volumen divided by the sum of muscle element fiber lengths.
 Vol0 =  1e-4* PCSA * Lf0; ///< Muscle element volume (m3)
};

AnyMuscleModel ObturatorExternusInferior2Par =
{
 AnyFolder& MuscleParameters = ..ModelParameters.Muscles.ObturatorExternusInferior;
 AnyIntVar MuscleElemNo = 2; ///< The number of this element of the muscle
 AnyIntVar MuscleElemAmount = MuscleParameters.MuscleElemAmount; ///< The total amount of elements for this muscle
 F0 = .DefaultMusPar.PCSAfactor*PCSA; ///< Maximum force output at optimum fiber length
 Lf0 =.FiberLengthScalePelvis*(MuscleParameters.OptimalFiberlength
       / cos(pi/180*MuscleParameters.Pennationangle));
 AnyVar PCSA = 1e4*.StrengthScalePelvis*MuscleParameters.MuscleVolumeSIScaled/(.ObturatorExternusInferior1Par.Lf0 +.ObturatorExternusInferior2Par.Lf0 );///< PCSA (cm2) of the individual element is total volumen divided by the sum of muscle element fiber lengths.
 Vol0 =  1e-4* PCSA * Lf0; ///< Muscle element volume (m3)
};
#endif


#if BM_LEG_MUSCLES_RIGHT | BM_LEG_MUSCLES_LEFT
////////////////////////////////////////////////////
//     ObturatorExternusSuperior (3 elements)     //
////////////////////////////////////////////////////

AnyMuscleModel ObturatorExternusSuperior1Par =
{
 AnyFolder& MuscleParameters = ..ModelParameters.Muscles.ObturatorExternusSuperior;
 AnyIntVar MuscleElemNo = 1; ///< The number of this element of the muscle
 AnyIntVar MuscleElemAmount = MuscleParameters.MuscleElemAmount; ///< The total amount of elements for this muscle
 F0 = .DefaultMusPar.PCSAfactor*PCSA; ///< Maximum force output at optimum fiber length
 Lf0 =.FiberLengthScalePelvis*(MuscleParameters.OptimalFiberlength
       / cos(pi/180*MuscleParameters.Pennationangle));
 AnyVar PCSA = 1e4*.StrengthScalePelvis*MuscleParameters.MuscleVolumeSIScaled/(.ObturatorExternusSuperior1Par.Lf0 +.ObturatorExternusSuperior2Par.Lf0 +.ObturatorExternusSuperior3Par.Lf0 );///< PCSA (cm2) of the individual element is total volumen divided by the sum of muscle element fiber lengths.
 Vol0 =  1e-4* PCSA * Lf0; ///< Muscle element volume (m3)
};

AnyMuscleModel ObturatorExternusSuperior2Par =
{
 AnyFolder& MuscleParameters = ..ModelParameters.Muscles.ObturatorExternusSuperior;
 AnyIntVar MuscleElemNo = 2; ///< The number of this element of the muscle
 AnyIntVar MuscleElemAmount = MuscleParameters.MuscleElemAmount; ///< The total amount of elements for this muscle
 F0 = .DefaultMusPar.PCSAfactor*PCSA; ///< Maximum force output at optimum fiber length
 Lf0 =.FiberLengthScalePelvis*(MuscleParameters.OptimalFiberlength
       / cos(pi/180*MuscleParameters.Pennationangle));
 AnyVar PCSA = 1e4*.StrengthScalePelvis*MuscleParameters.MuscleVolumeSIScaled/(.ObturatorExternusSuperior1Par.Lf0 +.ObturatorExternusSuperior2Par.Lf0 +.ObturatorExternusSuperior3Par.Lf0 );///< PCSA (cm2) of the individual element is total volumen divided by the sum of muscle element fiber lengths.
 Vol0 =  1e-4* PCSA * Lf0; ///< Muscle element volume (m3)
};

AnyMuscleModel ObturatorExternusSuperior3Par =
{
 AnyFolder& MuscleParameters = ..ModelParameters.Muscles.ObturatorExternusSuperior;
 AnyIntVar MuscleElemNo = 3; ///< The number of this element of the muscle
 AnyIntVar MuscleElemAmount = MuscleParameters.MuscleElemAmount; ///< The total amount of elements for this muscle
 F0 = .DefaultMusPar.PCSAfactor*PCSA; ///< Maximum force output at optimum fiber length
 Lf0 =.FiberLengthScalePelvis*(MuscleParameters.OptimalFiberlength
       / cos(pi/180*MuscleParameters.Pennationangle));
 AnyVar PCSA = 1e4*.StrengthScalePelvis*MuscleParameters.MuscleVolumeSIScaled/(.ObturatorExternusSuperior1Par.Lf0 +.ObturatorExternusSuperior2Par.Lf0 +.ObturatorExternusSuperior3Par.Lf0 );///< PCSA (cm2) of the individual element is total volumen divided by the sum of muscle element fiber lengths.
 Vol0 =  1e-4* PCSA * Lf0; ///< Muscle element volume (m3)
};
#endif


#if BM_LEG_MUSCLES_RIGHT | BM_LEG_MUSCLES_LEFT
////////////////////////////////////////////
//     ObturatorInternus (6 elements)     //
////////////////////////////////////////////

AnyMuscleModel ObturatorInternus1Par =
{
 AnyFolder& MuscleParameters = ..ModelParameters.Muscles.ObturatorInternus;
 AnyIntVar MuscleElemNo = 1; ///< The number of this element of the muscle
 AnyIntVar MuscleElemAmount = MuscleParameters.MuscleElemAmount; ///< The total amount of elements for this muscle
 F0 = .DefaultMusPar.PCSAfactor*PCSA; ///< Maximum force output at optimum fiber length
 Lf0 =.FiberLengthScalePelvis*(MuscleParameters.OptimalFiberlength
       / cos(pi/180*MuscleParameters.Pennationangle));
 AnyVar PCSA = 1e4*.StrengthScalePelvis*MuscleParameters.MuscleVolumeSIScaled/(.ObturatorInternus1Par.Lf0 +.ObturatorInternus2Par.Lf0 +.ObturatorInternus3Par.Lf0 +.ObturatorInternus4Par.Lf0 +.ObturatorInternus5Par.Lf0 +.ObturatorInternus6Par.Lf0 );///< PCSA (cm2) of the individual element is total volumen divided by the sum of muscle element fiber lengths.
 Vol0 =  1e-4* PCSA * Lf0; ///< Muscle element volume (m3)
};

AnyMuscleModel ObturatorInternus2Par =
{
 AnyFolder& MuscleParameters = ..ModelParameters.Muscles.ObturatorInternus;
 AnyIntVar MuscleElemNo = 2; ///< The number of this element of the muscle
 AnyIntVar MuscleElemAmount = MuscleParameters.MuscleElemAmount; ///< The total amount of elements for this muscle
 F0 = .DefaultMusPar.PCSAfactor*PCSA; ///< Maximum force output at optimum fiber length
 Lf0 =.FiberLengthScalePelvis*(MuscleParameters.OptimalFiberlength
       / cos(pi/180*MuscleParameters.Pennationangle));
 AnyVar PCSA = 1e4*.StrengthScalePelvis*MuscleParameters.MuscleVolumeSIScaled/(.ObturatorInternus1Par.Lf0 +.ObturatorInternus2Par.Lf0 +.ObturatorInternus3Par.Lf0 +.ObturatorInternus4Par.Lf0 +.ObturatorInternus5Par.Lf0 +.ObturatorInternus6Par.Lf0 );///< PCSA (cm2) of the individual element is total volumen divided by the sum of muscle element fiber lengths.
 Vol0 =  1e-4* PCSA * Lf0; ///< Muscle element volume (m3)
};

AnyMuscleModel ObturatorInternus3Par =
{
 AnyFolder& MuscleParameters = ..ModelParameters.Muscles.ObturatorInternus;
 AnyIntVar MuscleElemNo = 3; ///< The number of this element of the muscle
 AnyIntVar MuscleElemAmount = MuscleParameters.MuscleElemAmount; ///< The total amount of elements for this muscle
 F0 = .DefaultMusPar.PCSAfactor*PCSA; ///< Maximum force output at optimum fiber length
 Lf0 =.FiberLengthScalePelvis*(MuscleParameters.OptimalFiberlength
       / cos(pi/180*MuscleParameters.Pennationangle));
 AnyVar PCSA = 1e4*.StrengthScalePelvis*MuscleParameters.MuscleVolumeSIScaled/(.ObturatorInternus1Par.Lf0 +.ObturatorInternus2Par.Lf0 +.ObturatorInternus3Par.Lf0 +.ObturatorInternus4Par.Lf0 +.ObturatorInternus5Par.Lf0 +.ObturatorInternus6Par.Lf0 );///< PCSA (cm2) of the individual element is total volumen divided by the sum of muscle element fiber lengths.
 Vol0 =  1e-4* PCSA * Lf0; ///< Muscle element volume (m3)
};

AnyMuscleModel ObturatorInternus4Par =
{
 AnyFolder& MuscleParameters = ..ModelParameters.Muscles.ObturatorInternus;
 AnyIntVar MuscleElemNo = 4; ///< The number of this element of the muscle
 AnyIntVar MuscleElemAmount = MuscleParameters.MuscleElemAmount; ///< The total amount of elements for this muscle
 F0 = .DefaultMusPar.PCSAfactor*PCSA; ///< Maximum force output at optimum fiber length
 Lf0 =.FiberLengthScalePelvis*(MuscleParameters.OptimalFiberlength
       / cos(pi/180*MuscleParameters.Pennationangle));
 AnyVar PCSA = 1e4*.StrengthScalePelvis*MuscleParameters.MuscleVolumeSIScaled/(.ObturatorInternus1Par.Lf0 +.ObturatorInternus2Par.Lf0 +.ObturatorInternus3Par.Lf0 +.ObturatorInternus4Par.Lf0 +.ObturatorInternus5Par.Lf0 +.ObturatorInternus6Par.Lf0 );///< PCSA (cm2) of the individual element is total volumen divided by the sum of muscle element fiber lengths.
 Vol0 =  1e-4* PCSA * Lf0; ///< Muscle element volume (m3)
};

AnyMuscleModel ObturatorInternus5Par =
{
 AnyFolder& MuscleParameters = ..ModelParameters.Muscles.ObturatorInternus;
 AnyIntVar MuscleElemNo = 5; ///< The number of this element of the muscle
 AnyIntVar MuscleElemAmount = MuscleParameters.MuscleElemAmount; ///< The total amount of elements for this muscle
 F0 = .DefaultMusPar.PCSAfactor*PCSA; ///< Maximum force output at optimum fiber length
 Lf0 =.FiberLengthScalePelvis*(MuscleParameters.OptimalFiberlength
       / cos(pi/180*MuscleParameters.Pennationangle));
 AnyVar PCSA = 1e4*.StrengthScalePelvis*MuscleParameters.MuscleVolumeSIScaled/(.ObturatorInternus1Par.Lf0 +.ObturatorInternus2Par.Lf0 +.ObturatorInternus3Par.Lf0 +.ObturatorInternus4Par.Lf0 +.ObturatorInternus5Par.Lf0 +.ObturatorInternus6Par.Lf0 );///< PCSA (cm2) of the individual element is total volumen divided by the sum of muscle element fiber lengths.
 Vol0 =  1e-4* PCSA * Lf0; ///< Muscle element volume (m3)
};

AnyMuscleModel ObturatorInternus6Par =
{
 AnyFolder& MuscleParameters = ..ModelParameters.Muscles.ObturatorInternus;
 AnyIntVar MuscleElemNo = 6; ///< The number of this element of the muscle
 AnyIntVar MuscleElemAmount = MuscleParameters.MuscleElemAmount; ///< The total amount of elements for this muscle
 F0 = .DefaultMusPar.PCSAfactor*PCSA; ///< Maximum force output at optimum fiber length
 Lf0 =.FiberLengthScalePelvis*(MuscleParameters.OptimalFiberlength
       / cos(pi/180*MuscleParameters.Pennationangle));
 AnyVar PCSA = 1e4*.StrengthScalePelvis*MuscleParameters.MuscleVolumeSIScaled/(.ObturatorInternus1Par.Lf0 +.ObturatorInternus2Par.Lf0 +.ObturatorInternus3Par.Lf0 +.ObturatorInternus4Par.Lf0 +.ObturatorInternus5Par.Lf0 +.ObturatorInternus6Par.Lf0 );///< PCSA (cm2) of the individual element is total volumen divided by the sum of muscle element fiber lengths.
 Vol0 =  1e-4* PCSA * Lf0; ///< Muscle element volume (m3)
};
#endif


#if BM_LEG_MUSCLES_RIGHT | BM_LEG_MUSCLES_LEFT
////////////////////////////////////
//     Pectineus (4 elements)     //
////////////////////////////////////

AnyMuscleModel Pectineus1Par =
{
 AnyFolder& MuscleParameters = ..ModelParameters.Muscles.Pectineus;
 AnyIntVar MuscleElemNo = 1; ///< The number of this element of the muscle
 AnyIntVar MuscleElemAmount = MuscleParameters.MuscleElemAmount; ///< The total amount of elements for this muscle
 F0 = .DefaultMusPar.PCSAfactor*PCSA; ///< Maximum force output at optimum fiber length
 Lf0 =.FiberLengthScaleThigh*(MuscleParameters.OptimalFiberlength
       / cos(pi/180*MuscleParameters.Pennationangle));
 AnyVar PCSA = 1e4*.StrengthScaleThigh*MuscleParameters.MuscleVolumeSIScaled/(.Pectineus1Par.Lf0 +.Pectineus2Par.Lf0 +.Pectineus3Par.Lf0 +.Pectineus4Par.Lf0 );///< PCSA (cm2) of the individual element is total volumen divided by the sum of muscle element fiber lengths.
 Vol0 =  1e-4* PCSA * Lf0; ///< Muscle element volume (m3)
};

AnyMuscleModel Pectineus2Par =
{
 AnyFolder& MuscleParameters = ..ModelParameters.Muscles.Pectineus;
 AnyIntVar MuscleElemNo = 2; ///< The number of this element of the muscle
 AnyIntVar MuscleElemAmount = MuscleParameters.MuscleElemAmount; ///< The total amount of elements for this muscle
 F0 = .DefaultMusPar.PCSAfactor*PCSA; ///< Maximum force output at optimum fiber length
 Lf0 =.FiberLengthScaleThigh*(MuscleParameters.OptimalFiberlength
       / cos(pi/180*MuscleParameters.Pennationangle));
 AnyVar PCSA = 1e4*.StrengthScaleThigh*MuscleParameters.MuscleVolumeSIScaled/(.Pectineus1Par.Lf0 +.Pectineus2Par.Lf0 +.Pectineus3Par.Lf0 +.Pectineus4Par.Lf0 );///< PCSA (cm2) of the individual element is total volumen divided by the sum of muscle element fiber lengths.
 Vol0 =  1e-4* PCSA * Lf0; ///< Muscle element volume (m3)
};

AnyMuscleModel Pectineus3Par =
{
 AnyFolder& MuscleParameters = ..ModelParameters.Muscles.Pectineus;
 AnyIntVar MuscleElemNo = 3; ///< The number of this element of the muscle
 AnyIntVar MuscleElemAmount = MuscleParameters.MuscleElemAmount; ///< The total amount of elements for this muscle
 F0 = .DefaultMusPar.PCSAfactor*PCSA; ///< Maximum force output at optimum fiber length
 Lf0 =.FiberLengthScaleThigh*(MuscleParameters.OptimalFiberlength
       / cos(pi/180*MuscleParameters.Pennationangle));
 AnyVar PCSA = 1e4*.StrengthScaleThigh*MuscleParameters.MuscleVolumeSIScaled/(.Pectineus1Par.Lf0 +.Pectineus2Par.Lf0 +.Pectineus3Par.Lf0 +.Pectineus4Par.Lf0 );///< PCSA (cm2) of the individual element is total volumen divided by the sum of muscle element fiber lengths.
 Vol0 =  1e-4* PCSA * Lf0; ///< Muscle element volume (m3)
};

AnyMuscleModel Pectineus4Par =
{
 AnyFolder& MuscleParameters = ..ModelParameters.Muscles.Pectineus;
 AnyIntVar MuscleElemNo = 4; ///< The number of this element of the muscle
 AnyIntVar MuscleElemAmount = MuscleParameters.MuscleElemAmount; ///< The total amount of elements for this muscle
 F0 = .DefaultMusPar.PCSAfactor*PCSA; ///< Maximum force output at optimum fiber length
 Lf0 =.FiberLengthScaleThigh*(MuscleParameters.OptimalFiberlength
       / cos(pi/180*MuscleParameters.Pennationangle));
 AnyVar PCSA = 1e4*.StrengthScaleThigh*MuscleParameters.MuscleVolumeSIScaled/(.Pectineus1Par.Lf0 +.Pectineus2Par.Lf0 +.Pectineus3Par.Lf0 +.Pectineus4Par.Lf0 );///< PCSA (cm2) of the individual element is total volumen divided by the sum of muscle element fiber lengths.
 Vol0 =  1e-4* PCSA * Lf0; ///< Muscle element volume (m3)
};
#endif


#if BM_LEG_MUSCLES_RIGHT | BM_LEG_MUSCLES_LEFT
/////////////////////////////////////////
//     PeroneusBrevis (3 elements)     //
/////////////////////////////////////////

AnyMuscleModel PeroneusBrevis1Par =
{
 AnyFolder& MuscleParameters = ..ModelParameters.Muscles.PeroneusBrevis;
 AnyIntVar MuscleElemNo = 1; ///< The number of this element of the muscle
 AnyIntVar MuscleElemAmount = MuscleParameters.MuscleElemAmount; ///< The total amount of elements for this muscle
 F0 = .DefaultMusPar.PCSAfactor*PCSA; ///< Maximum force output at optimum fiber length
 Lf0 =.FiberLengthScaleShank*(MuscleParameters.OptimalFiberlength
       / cos(pi/180*MuscleParameters.Pennationangle));
 AnyVar PCSA = 1e4*.StrengthScaleShank*MuscleParameters.MuscleVolumeSIScaled/(.PeroneusBrevis1Par.Lf0 +.PeroneusBrevis2Par.Lf0 +.PeroneusBrevis3Par.Lf0 );///< PCSA (cm2) of the individual element is total volumen divided by the sum of muscle element fiber lengths.
 Vol0 =  1e-4* PCSA * Lf0; ///< Muscle element volume (m3)
};

AnyMuscleModel PeroneusBrevis2Par =
{
 AnyFolder& MuscleParameters = ..ModelParameters.Muscles.PeroneusBrevis;
 AnyIntVar MuscleElemNo = 2; ///< The number of this element of the muscle
 AnyIntVar MuscleElemAmount = MuscleParameters.MuscleElemAmount; ///< The total amount of elements for this muscle
 F0 = .DefaultMusPar.PCSAfactor*PCSA; ///< Maximum force output at optimum fiber length
 Lf0 =.FiberLengthScaleShank*(MuscleParameters.OptimalFiberlength
       / cos(pi/180*MuscleParameters.Pennationangle));
 AnyVar PCSA = 1e4*.StrengthScaleShank*MuscleParameters.MuscleVolumeSIScaled/(.PeroneusBrevis1Par.Lf0 +.PeroneusBrevis2Par.Lf0 +.PeroneusBrevis3Par.Lf0 );///< PCSA (cm2) of the individual element is total volumen divided by the sum of muscle element fiber lengths.
 Vol0 =  1e-4* PCSA * Lf0; ///< Muscle element volume (m3)
};

AnyMuscleModel PeroneusBrevis3Par =
{
 AnyFolder& MuscleParameters = ..ModelParameters.Muscles.PeroneusBrevis;
 AnyIntVar MuscleElemNo = 3; ///< The number of this element of the muscle
 AnyIntVar MuscleElemAmount = MuscleParameters.MuscleElemAmount; ///< The total amount of elements for this muscle
 F0 = .DefaultMusPar.PCSAfactor*PCSA; ///< Maximum force output at optimum fiber length
 Lf0 =.FiberLengthScaleShank*(MuscleParameters.OptimalFiberlength
       / cos(pi/180*MuscleParameters.Pennationangle));
 AnyVar PCSA = 1e4*.StrengthScaleShank*MuscleParameters.MuscleVolumeSIScaled/(.PeroneusBrevis1Par.Lf0 +.PeroneusBrevis2Par.Lf0 +.PeroneusBrevis3Par.Lf0 );///< PCSA (cm2) of the individual element is total volumen divided by the sum of muscle element fiber lengths.
 Vol0 =  1e-4* PCSA * Lf0; ///< Muscle element volume (m3)
};
#endif


#if BM_LEG_MUSCLES_RIGHT | BM_LEG_MUSCLES_LEFT
/////////////////////////////////////////
//     PeroneusLongus (3 elements)     //
/////////////////////////////////////////

AnyMuscleModel PeroneusLongus1Par =
{
 AnyFolder& MuscleParameters = ..ModelParameters.Muscles.PeroneusLongus;
 AnyIntVar MuscleElemNo = 1; ///< The number of this element of the muscle
 AnyIntVar MuscleElemAmount = MuscleParameters.MuscleElemAmount; ///< The total amount of elements for this muscle
 F0 = .DefaultMusPar.PCSAfactor*PCSA; ///< Maximum force output at optimum fiber length
 Lf0 =.FiberLengthScaleShank*(MuscleParameters.OptimalFiberlength
       / cos(pi/180*MuscleParameters.Pennationangle));
 AnyVar PCSA = 1e4*.StrengthScaleShank*MuscleParameters.MuscleVolumeSIScaled/(.PeroneusLongus1Par.Lf0 +.PeroneusLongus2Par.Lf0 +.PeroneusLongus3Par.Lf0 );///< PCSA (cm2) of the individual element is total volumen divided by the sum of muscle element fiber lengths.
 Vol0 =  1e-4* PCSA * Lf0; ///< Muscle element volume (m3)
};

AnyMuscleModel PeroneusLongus2Par =
{
 AnyFolder& MuscleParameters = ..ModelParameters.Muscles.PeroneusLongus;
 AnyIntVar MuscleElemNo = 2; ///< The number of this element of the muscle
 AnyIntVar MuscleElemAmount = MuscleParameters.MuscleElemAmount; ///< The total amount of elements for this muscle
 F0 = .DefaultMusPar.PCSAfactor*PCSA; ///< Maximum force output at optimum fiber length
 Lf0 =.FiberLengthScaleShank*(MuscleParameters.OptimalFiberlength
       / cos(pi/180*MuscleParameters.Pennationangle));
 AnyVar PCSA = 1e4*.StrengthScaleShank*MuscleParameters.MuscleVolumeSIScaled/(.PeroneusLongus1Par.Lf0 +.PeroneusLongus2Par.Lf0 +.PeroneusLongus3Par.Lf0 );///< PCSA (cm2) of the individual element is total volumen divided by the sum of muscle element fiber lengths.
 Vol0 =  1e-4* PCSA * Lf0; ///< Muscle element volume (m3)
};
AnyMuscleModel PeroneusLongus3Par =
{
 AnyFolder& MuscleParameters = ..ModelParameters.Muscles.PeroneusLongus;
 AnyIntVar MuscleElemNo = 3; ///< The number of this element of the muscle
 AnyIntVar MuscleElemAmount = MuscleParameters.MuscleElemAmount; ///< The total amount of elements for this muscle
 F0 = .DefaultMusPar.PCSAfactor*PCSA; ///< Maximum force output at optimum fiber length
 Lf0 =.FiberLengthScaleShank*(MuscleParameters.OptimalFiberlength
       / cos(pi/180*MuscleParameters.Pennationangle));
 AnyVar PCSA = 1e4*.StrengthScaleShank*MuscleParameters.MuscleVolumeSIScaled/(.PeroneusLongus1Par.Lf0 +.PeroneusLongus2Par.Lf0 +.PeroneusLongus3Par.Lf0 );///< PCSA (cm2) of the individual element is total volumen divided by the sum of muscle element fiber lengths.
 Vol0 =  1e-4* PCSA * Lf0; ///< Muscle element volume (m3)
};
#endif


#if BM_LEG_MUSCLES_RIGHT | BM_LEG_MUSCLES_LEFT
//////////////////////////////////////////
//     PeroneusTertius (3 elements)     //
//////////////////////////////////////////

AnyMuscleModel PeroneusTertius1Par =
{
 AnyFolder& MuscleParameters = ..ModelParameters.Muscles.PeroneusTertius;
 AnyIntVar MuscleElemNo = 1; ///< The number of this element of the muscle
 AnyIntVar MuscleElemAmount = MuscleParameters.MuscleElemAmount; ///< The total amount of elements for this muscle
 F0 = .DefaultMusPar.PCSAfactor*PCSA; ///< Maximum force output at optimum fiber length
 Lf0 =.FiberLengthScaleShank*(MuscleParameters.OptimalFiberlength
       / cos(pi/180*MuscleParameters.Pennationangle));
 AnyVar PCSA = 1e4*.StrengthScaleShank*MuscleParameters.MuscleVolumeSIScaled/(.PeroneusTertius1Par.Lf0 +.PeroneusTertius2Par.Lf0 +.PeroneusTertius3Par.Lf0 );///< PCSA (cm2) of the individual element is total volumen divided by the sum of muscle element fiber lengths.
 Vol0 =  1e-4* PCSA * Lf0; ///< Muscle element volume (m3)
};

AnyMuscleModel PeroneusTertius2Par =
{
 AnyFolder& MuscleParameters = ..ModelParameters.Muscles.PeroneusTertius;
 AnyIntVar MuscleElemNo = 2; ///< The number of this element of the muscle
 AnyIntVar MuscleElemAmount = MuscleParameters.MuscleElemAmount; ///< The total amount of elements for this muscle
 F0 = .DefaultMusPar.PCSAfactor*PCSA; ///< Maximum force output at optimum fiber length
 Lf0 =.FiberLengthScaleShank*(MuscleParameters.OptimalFiberlength
       / cos(pi/180*MuscleParameters.Pennationangle));
 AnyVar PCSA = 1e4*.StrengthScaleShank*MuscleParameters.MuscleVolumeSIScaled/(.PeroneusTertius1Par.Lf0 +.PeroneusTertius2Par.Lf0 +.PeroneusTertius3Par.Lf0 );///< PCSA (cm2) of the individual element is total volumen divided by the sum of muscle element fiber lengths.
 Vol0 =  1e-4* PCSA * Lf0; ///< Muscle element volume (m3)
};

AnyMuscleModel PeroneusTertius3Par =
{
 AnyFolder& MuscleParameters = ..ModelParameters.Muscles.PeroneusTertius;
 AnyIntVar MuscleElemNo = 3; ///< The number of this element of the muscle
 AnyIntVar MuscleElemAmount = MuscleParameters.MuscleElemAmount; ///< The total amount of elements for this muscle
 F0 = .DefaultMusPar.PCSAfactor*PCSA; ///< Maximum force output at optimum fiber length
 Lf0 =.FiberLengthScaleShank*(MuscleParameters.OptimalFiberlength
       / cos(pi/180*MuscleParameters.Pennationangle));
 AnyVar PCSA = 1e4*.StrengthScaleShank*MuscleParameters.MuscleVolumeSIScaled/(.PeroneusTertius1Par.Lf0 +.PeroneusTertius2Par.Lf0 +.PeroneusTertius3Par.Lf0 );///< PCSA (cm2) of the individual element is total volumen divided by the sum of muscle element fiber lengths.
 Vol0 =  1e-4* PCSA * Lf0; ///< Muscle element volume (m3)
};
#endif


#if BM_LEG_MUSCLES_RIGHT | BM_LEG_MUSCLES_LEFT
/////////////////////////////////////
//     Piriformis (1 element )     //
/////////////////////////////////////

AnyMuscleModel Piriformis1Par =
{
 AnyFolder& MuscleParameters = ..ModelParameters.Muscles.Piriformis;
 AnyIntVar MuscleElemNo = 1; ///< The number of this element of the muscle
 AnyIntVar MuscleElemAmount = MuscleParameters.MuscleElemAmount; ///< The total amount of elements for this muscle
 F0 = .DefaultMusPar.PCSAfactor*PCSA; ///< Maximum force output at optimum fiber length
 Lf0 =.FiberLengthScalePelvis*(MuscleParameters.OptimalFiberlength
       / cos(pi/180*MuscleParameters.Pennationangle));
 AnyVar PCSA = 1e4*.StrengthScalePelvis*MuscleParameters.MuscleVolumeSIScaled/(Lf0);///< PCSA (cm2) of the individual element is total volumen divided by the sum of muscle element fiber lengths.
 Vol0 =  1e-4* PCSA * Lf0; ///< Muscle element volume (m3)
};
#endif


#if BM_LEG_MUSCLES_RIGHT | BM_LEG_MUSCLES_LEFT
////////////////////////////////////
//     Plantaris (1 element )     //
////////////////////////////////////

AnyMuscleModel Plantaris1Par =
{
 AnyFolder& MuscleParameters = ..ModelParameters.Muscles.Plantaris;
 AnyIntVar MuscleElemNo = 1; ///< The number of this element of the muscle
 AnyIntVar MuscleElemAmount = MuscleParameters.MuscleElemAmount; ///< The total amount of elements for this muscle
 F0 = .DefaultMusPar.PCSAfactor*PCSA; ///< Maximum force output at optimum fiber length
 Lf0 =.FiberLengthScaleShank*(MuscleParameters.OptimalFiberlength
       / cos(pi/180*MuscleParameters.Pennationangle));
 AnyVar PCSA = 1e4*.StrengthScaleShank*MuscleParameters.MuscleVolumeSIScaled/(Lf0);///< PCSA (cm2) of the individual element is total volumen divided by the sum of muscle element fiber lengths.
 Vol0 =  1e-4* PCSA * Lf0; ///< Muscle element volume (m3)
};
#endif


#if BM_LEG_MUSCLES_RIGHT | BM_LEG_MUSCLES_LEFT
////////////////////////////////////
//     Popliteus (3 elements)     //
////////////////////////////////////

AnyMuscleModel Popliteus1Par =
{
 AnyFolder& MuscleParameters = ..ModelParameters.Muscles.Popliteus;
 AnyIntVar MuscleElemNo = 1; ///< The number of this element of the muscle
 AnyIntVar MuscleElemAmount = MuscleParameters.MuscleElemAmount; ///< The total amount of elements for this muscle
 F0 = .DefaultMusPar.PCSAfactor*PCSA; ///< Maximum force output at optimum fiber length
 Lf0 =.FiberLengthScaleShank*(MuscleParameters.OptimalFiberlength
       / cos(pi/180*MuscleParameters.Pennationangle));
 AnyVar PCSA = 1e4*.StrengthScaleShank*MuscleParameters.MuscleVolumeSIScaled/(.Popliteus1Par.Lf0 +.Popliteus2Par.Lf0 +.Popliteus3Par.Lf0 );///< PCSA (cm2) of the individual element is total volumen divided by the sum of muscle element fiber lengths.
 Vol0 =  1e-4* PCSA * Lf0; ///< Muscle element volume (m3)
};

AnyMuscleModel Popliteus2Par =
{
 AnyFolder& MuscleParameters = ..ModelParameters.Muscles.Popliteus;
 AnyIntVar MuscleElemNo = 2; ///< The number of this element of the muscle
 AnyIntVar MuscleElemAmount = MuscleParameters.MuscleElemAmount; ///< The total amount of elements for this muscle
 F0 = .DefaultMusPar.PCSAfactor*PCSA; ///< Maximum force output at optimum fiber length
 Lf0 =.FiberLengthScaleShank*(MuscleParameters.OptimalFiberlength
       / cos(pi/180*MuscleParameters.Pennationangle));
 AnyVar PCSA = 1e4*.StrengthScaleShank*MuscleParameters.MuscleVolumeSIScaled/(.Popliteus1Par.Lf0 +.Popliteus2Par.Lf0 +.Popliteus3Par.Lf0 );///< PCSA (cm2) of the individual element is total volumen divided by the sum of muscle element fiber lengths.
 Vol0 =  1e-4* PCSA * Lf0; ///< Muscle element volume (m3)
};

AnyMuscleModel Popliteus3Par =
{
 AnyFolder& MuscleParameters = ..ModelParameters.Muscles.Popliteus;
 AnyIntVar MuscleElemNo = 3; ///< The number of this element of the muscle
 AnyIntVar MuscleElemAmount = MuscleParameters.MuscleElemAmount; ///< The total amount of elements for this muscle
 F0 = .DefaultMusPar.PCSAfactor*PCSA; ///< Maximum force output at optimum fiber length
 Lf0 =.FiberLengthScaleShank*(MuscleParameters.OptimalFiberlength
       / cos(pi/180*MuscleParameters.Pennationangle));
 AnyVar PCSA = 1e4*.StrengthScaleShank*MuscleParameters.MuscleVolumeSIScaled/(.Popliteus1Par.Lf0 +.Popliteus2Par.Lf0 +.Popliteus3Par.Lf0 );///< PCSA (cm2) of the individual element is total volumen divided by the sum of muscle element fiber lengths.
 Vol0 =  1e-4* PCSA * Lf0; ///< Muscle element volume (m3)
};
#endif


#if BM_LEG_MUSCLES_RIGHT | BM_LEG_MUSCLES_LEFT
/////////////////////////////////////
//     PsoasMinor (1 element )     //
/////////////////////////////////////

AnyMuscleModel PsoasMinor1Par =
{
 AnyFolder& MuscleParameters = ..ModelParameters.Muscles.PsoasMinor;
 AnyIntVar MuscleElemNo = 1; ///< The number of this element of the muscle
 AnyIntVar MuscleElemAmount = MuscleParameters.MuscleElemAmount; ///< The total amount of elements for this muscle
 F0 = .DefaultMusPar.PCSAfactor*PCSA; ///< Maximum force output at optimum fiber length
 Lf0 =.FiberLengthScalePelvis*(MuscleParameters.OptimalFiberlength
       / cos(pi/180*MuscleParameters.Pennationangle));
 AnyVar PCSA = 1e4*.StrengthScalePelvis*MuscleParameters.MuscleVolumeSIScaled/(Lf0);///< PCSA (cm2) of the individual element is total volumen divided by the sum of muscle element fiber lengths.
 Vol0 =  1e-4* PCSA * Lf0; ///< Muscle element volume (m3)
};
#endif


#if BM_LEG_MUSCLES_RIGHT | BM_LEG_MUSCLES_LEFT
/////////////////////////////////////
//     PsoasMajor (11 elements)     //
/////////////////////////////////////

AnyMuscleModel PsoasMajor1Par =
{
 AnyFolder& MuscleParameters = ..ModelParameters.Muscles.PsoasMajor;
 AnyIntVar MuscleElemNo = 1; ///< The number of this element of the muscle
 AnyIntVar MuscleElemAmount = MuscleParameters.MuscleElemAmount; ///< The total amount of elements for this muscle
 F0 = .DefaultMusPar.PCSAfactor*PCSA; ///< Maximum force output at optimum fiber length
 Lf0 =.FiberLengthScalePelvis*(MuscleParameters.OptimalFiberlength
       / cos(pi/180*MuscleParameters.Pennationangle));
 AnyVar PCSA = 1e4*.StrengthScalePelvis*MuscleParameters.MuscleVolumeSIScaled/(.PsoasMajor1Par.Lf0 +.PsoasMajor2Par.Lf0 +.PsoasMajor3Par.Lf0 +.PsoasMajor4Par.Lf0 +.PsoasMajor5Par.Lf0 +.PsoasMajor6Par.Lf0 +.PsoasMajor7Par.Lf0 +.PsoasMajor8Par.Lf0 +.PsoasMajor9Par.Lf0 +.PsoasMajor10Par.Lf0 +.PsoasMajor11Par.Lf0 );///< PCSA (cm2) of the individual element is total volumen divided by the sum of muscle element fiber lengths.
 Vol0 =  1e-4* PCSA * Lf0; ///< Muscle element volume (m3)
};

AnyMuscleModel PsoasMajor2Par =
{
 AnyFolder& MuscleParameters = ..ModelParameters.Muscles.PsoasMajor;
 AnyIntVar MuscleElemNo = 2; ///< The number of this element of the muscle
 AnyIntVar MuscleElemAmount = MuscleParameters.MuscleElemAmount; ///< The total amount of elements for this muscle
 F0 = .DefaultMusPar.PCSAfactor*PCSA; ///< Maximum force output at optimum fiber length
 Lf0 =.FiberLengthScalePelvis*(MuscleParameters.OptimalFiberlength
       / cos(pi/180*MuscleParameters.Pennationangle));
 AnyVar PCSA = 1e4*.StrengthScalePelvis*MuscleParameters.MuscleVolumeSIScaled/(.PsoasMajor1Par.Lf0 +.PsoasMajor2Par.Lf0 +.PsoasMajor3Par.Lf0 +.PsoasMajor4Par.Lf0 +.PsoasMajor5Par.Lf0 +.PsoasMajor6Par.Lf0 +.PsoasMajor7Par.Lf0 +.PsoasMajor8Par.Lf0 +.PsoasMajor9Par.Lf0 +.PsoasMajor10Par.Lf0 +.PsoasMajor11Par.Lf0 );///< PCSA (cm2) of the individual element is total volumen divided by the sum of muscle element fiber lengths.
 Vol0 =  1e-4* PCSA * Lf0; ///< Muscle element volume (m3)
};

AnyMuscleModel PsoasMajor3Par =
{
 AnyFolder& MuscleParameters = ..ModelParameters.Muscles.PsoasMajor;
 AnyIntVar MuscleElemNo = 3; ///< The number of this element of the muscle
 AnyIntVar MuscleElemAmount = MuscleParameters.MuscleElemAmount; ///< The total amount of elements for this muscle
 F0 = .DefaultMusPar.PCSAfactor*PCSA; ///< Maximum force output at optimum fiber length
 Lf0 =.FiberLengthScalePelvis*(MuscleParameters.OptimalFiberlength
       / cos(pi/180*MuscleParameters.Pennationangle));
 AnyVar PCSA = 1e4*.StrengthScalePelvis*MuscleParameters.MuscleVolumeSIScaled/(.PsoasMajor1Par.Lf0 +.PsoasMajor2Par.Lf0 +.PsoasMajor3Par.Lf0 +.PsoasMajor4Par.Lf0 +.PsoasMajor5Par.Lf0 +.PsoasMajor6Par.Lf0 +.PsoasMajor7Par.Lf0 +.PsoasMajor8Par.Lf0 +.PsoasMajor9Par.Lf0 +.PsoasMajor10Par.Lf0 +.PsoasMajor11Par.Lf0 );///< PCSA (cm2) of the individual element is total volumen divided by the sum of muscle element fiber lengths.
 Vol0 =  1e-4* PCSA * Lf0; ///< Muscle element volume (m3)
};

AnyMuscleModel PsoasMajor4Par =
{
 AnyFolder& MuscleParameters = ..ModelParameters.Muscles.PsoasMajor;
 AnyIntVar MuscleElemNo = 4; ///< The number of this element of the muscle
 AnyIntVar MuscleElemAmount = MuscleParameters.MuscleElemAmount; ///< The total amount of elements for this muscle
 F0 = .DefaultMusPar.PCSAfactor*PCSA; ///< Maximum force output at optimum fiber length
 Lf0 =.FiberLengthScalePelvis*(MuscleParameters.OptimalFiberlength
       / cos(pi/180*MuscleParameters.Pennationangle));
 AnyVar PCSA = 1e4*.StrengthScalePelvis*MuscleParameters.MuscleVolumeSIScaled/(.PsoasMajor1Par.Lf0 +.PsoasMajor2Par.Lf0 +.PsoasMajor3Par.Lf0 +.PsoasMajor4Par.Lf0 +.PsoasMajor5Par.Lf0 +.PsoasMajor6Par.Lf0 +.PsoasMajor7Par.Lf0 +.PsoasMajor8Par.Lf0 +.PsoasMajor9Par.Lf0 +.PsoasMajor10Par.Lf0 +.PsoasMajor11Par.Lf0 );///< PCSA (cm2) of the individual element is total volumen divided by the sum of muscle element fiber lengths.
 Vol0 =  1e-4* PCSA * Lf0; ///< Muscle element volume (m3)
};

AnyMuscleModel PsoasMajor5Par =
{
 AnyFolder& MuscleParameters = ..ModelParameters.Muscles.PsoasMajor;
 AnyIntVar MuscleElemNo = 5; ///< The number of this element of the muscle
 AnyIntVar MuscleElemAmount = MuscleParameters.MuscleElemAmount; ///< The total amount of elements for this muscle
 F0 = .DefaultMusPar.PCSAfactor*PCSA; ///< Maximum force output at optimum fiber length
 Lf0 =.FiberLengthScalePelvis*(MuscleParameters.OptimalFiberlength
       / cos(pi/180*MuscleParameters.Pennationangle));
 AnyVar PCSA = 1e4*.StrengthScalePelvis*MuscleParameters.MuscleVolumeSIScaled/(.PsoasMajor1Par.Lf0 +.PsoasMajor2Par.Lf0 +.PsoasMajor3Par.Lf0 +.PsoasMajor4Par.Lf0 +.PsoasMajor5Par.Lf0 +.PsoasMajor6Par.Lf0 +.PsoasMajor7Par.Lf0 +.PsoasMajor8Par.Lf0 +.PsoasMajor9Par.Lf0 +.PsoasMajor10Par.Lf0 +.PsoasMajor11Par.Lf0 );///< PCSA (cm2) of the individual element is total volumen divided by the sum of muscle element fiber lengths.
 Vol0 =  1e-4* PCSA * Lf0; ///< Muscle element volume (m3)
};

AnyMuscleModel PsoasMajor6Par =
{
 AnyFolder& MuscleParameters = ..ModelParameters.Muscles.PsoasMajor;
 AnyIntVar MuscleElemNo = 6; ///< The number of this element of the muscle
 AnyIntVar MuscleElemAmount = MuscleParameters.MuscleElemAmount; ///< The total amount of elements for this muscle
 F0 = .DefaultMusPar.PCSAfactor*PCSA; ///< Maximum force output at optimum fiber length
 Lf0 =.FiberLengthScalePelvis*(MuscleParameters.OptimalFiberlength
       / cos(pi/180*MuscleParameters.Pennationangle));
 AnyVar PCSA = 1e4*.StrengthScalePelvis*MuscleParameters.MuscleVolumeSIScaled/(.PsoasMajor1Par.Lf0 +.PsoasMajor2Par.Lf0 +.PsoasMajor3Par.Lf0 +.PsoasMajor4Par.Lf0 +.PsoasMajor5Par.Lf0 +.PsoasMajor6Par.Lf0 +.PsoasMajor7Par.Lf0 +.PsoasMajor8Par.Lf0 +.PsoasMajor9Par.Lf0 +.PsoasMajor10Par.Lf0 +.PsoasMajor11Par.Lf0 );///< PCSA (cm2) of the individual element is total volumen divided by the sum of muscle element fiber lengths.
 Vol0 =  1e-4* PCSA * Lf0; ///< Muscle element volume (m3)
};

AnyMuscleModel PsoasMajor7Par =
{
 AnyFolder& MuscleParameters = ..ModelParameters.Muscles.PsoasMajor;
 AnyIntVar MuscleElemNo = 7; ///< The number of this element of the muscle
 AnyIntVar MuscleElemAmount = MuscleParameters.MuscleElemAmount; ///< The total amount of elements for this muscle
 F0 = .DefaultMusPar.PCSAfactor*PCSA; ///< Maximum force output at optimum fiber length
 Lf0 =.FiberLengthScalePelvis*(MuscleParameters.OptimalFiberlength
       / cos(pi/180*MuscleParameters.Pennationangle));
 AnyVar PCSA = 1e4*.StrengthScalePelvis*MuscleParameters.MuscleVolumeSIScaled/(.PsoasMajor1Par.Lf0 +.PsoasMajor2Par.Lf0 +.PsoasMajor3Par.Lf0 +.PsoasMajor4Par.Lf0 +.PsoasMajor5Par.Lf0 +.PsoasMajor6Par.Lf0 +.PsoasMajor7Par.Lf0 +.PsoasMajor8Par.Lf0 +.PsoasMajor9Par.Lf0 +.PsoasMajor10Par.Lf0 +.PsoasMajor11Par.Lf0 );///< PCSA (cm2) of the individual element is total volumen divided by the sum of muscle element fiber lengths.
 Vol0 =  1e-4* PCSA * Lf0; ///< Muscle element volume (m3)
};

AnyMuscleModel PsoasMajor8Par =
{
 AnyFolder& MuscleParameters = ..ModelParameters.Muscles.PsoasMajor;
 AnyIntVar MuscleElemNo = 8; ///< The number of this element of the muscle
 AnyIntVar MuscleElemAmount = MuscleParameters.MuscleElemAmount; ///< The total amount of elements for this muscle
 F0 = .DefaultMusPar.PCSAfactor*PCSA; ///< Maximum force output at optimum fiber length
 Lf0 =.FiberLengthScalePelvis*(MuscleParameters.OptimalFiberlength
       / cos(pi/180*MuscleParameters.Pennationangle));
 AnyVar PCSA = 1e4*.StrengthScalePelvis*MuscleParameters.MuscleVolumeSIScaled/(.PsoasMajor1Par.Lf0 +.PsoasMajor2Par.Lf0 +.PsoasMajor3Par.Lf0 +.PsoasMajor4Par.Lf0 +.PsoasMajor5Par.Lf0 +.PsoasMajor6Par.Lf0 +.PsoasMajor7Par.Lf0 +.PsoasMajor8Par.Lf0 +.PsoasMajor9Par.Lf0 +.PsoasMajor10Par.Lf0 +.PsoasMajor11Par.Lf0 );///< PCSA (cm2) of the individual element is total volumen divided by the sum of muscle element fiber lengths.
 Vol0 =  1e-4* PCSA * Lf0; ///< Muscle element volume (m3)
};

AnyMuscleModel PsoasMajor9Par =
{
 AnyFolder& MuscleParameters = ..ModelParameters.Muscles.PsoasMajor;
 AnyIntVar MuscleElemNo = 9; ///< The number of this element of the muscle
 AnyIntVar MuscleElemAmount = MuscleParameters.MuscleElemAmount; ///< The total amount of elements for this muscle
 F0 = .DefaultMusPar.PCSAfactor*PCSA; ///< Maximum force output at optimum fiber length
 Lf0 =.FiberLengthScalePelvis*(MuscleParameters.OptimalFiberlength
       / cos(pi/180*MuscleParameters.Pennationangle));
 AnyVar PCSA = 1e4*.StrengthScalePelvis*MuscleParameters.MuscleVolumeSIScaled/(.PsoasMajor1Par.Lf0 +.PsoasMajor2Par.Lf0 +.PsoasMajor3Par.Lf0 +.PsoasMajor4Par.Lf0 +.PsoasMajor5Par.Lf0 +.PsoasMajor6Par.Lf0 +.PsoasMajor7Par.Lf0 +.PsoasMajor8Par.Lf0 +.PsoasMajor9Par.Lf0 +.PsoasMajor10Par.Lf0 +.PsoasMajor11Par.Lf0 );///< PCSA (cm2) of the individual element is total volumen divided by the sum of muscle element fiber lengths.
 Vol0 =  1e-4* PCSA * Lf0; ///< Muscle element volume (m3)
};

AnyMuscleModel PsoasMajor10Par =
{
 AnyFolder& MuscleParameters = ..ModelParameters.Muscles.PsoasMajor;
 AnyIntVar MuscleElemNo = 10; ///< The number of this element of the muscle
 AnyIntVar MuscleElemAmount = MuscleParameters.MuscleElemAmount; ///< The total amount of elements for this muscle
 F0 = .DefaultMusPar.PCSAfactor*PCSA; ///< Maximum force output at optimum fiber length
 Lf0 =.FiberLengthScalePelvis*(MuscleParameters.OptimalFiberlength
       / cos(pi/180*MuscleParameters.Pennationangle));
 AnyVar PCSA = 1e4*.StrengthScalePelvis*MuscleParameters.MuscleVolumeSIScaled/(.PsoasMajor1Par.Lf0 +.PsoasMajor2Par.Lf0 +.PsoasMajor3Par.Lf0 +.PsoasMajor4Par.Lf0 +.PsoasMajor5Par.Lf0 +.PsoasMajor6Par.Lf0 +.PsoasMajor7Par.Lf0 +.PsoasMajor8Par.Lf0 +.PsoasMajor9Par.Lf0 +.PsoasMajor10Par.Lf0 +.PsoasMajor11Par.Lf0 );///< PCSA (cm2) of the individual element is total volumen divided by the sum of muscle element fiber lengths.
 Vol0 =  1e-4* PCSA * Lf0; ///< Muscle element volume (m3)
};

AnyMuscleModel PsoasMajor11Par =
{
 AnyFolder& MuscleParameters = ..ModelParameters.Muscles.PsoasMajor;
 AnyIntVar MuscleElemNo = 11; ///< The number of this element of the muscle
 AnyIntVar MuscleElemAmount = MuscleParameters.MuscleElemAmount; ///< The total amount of elements for this muscle
 F0 = .DefaultMusPar.PCSAfactor*PCSA; ///< Maximum force output at optimum fiber length
 Lf0 =.FiberLengthScalePelvis*(MuscleParameters.OptimalFiberlength
       / cos(pi/180*MuscleParameters.Pennationangle));
 AnyVar PCSA = 1e4*.StrengthScalePelvis*MuscleParameters.MuscleVolumeSIScaled/(.PsoasMajor1Par.Lf0 +.PsoasMajor2Par.Lf0 +.PsoasMajor3Par.Lf0 +.PsoasMajor4Par.Lf0 +.PsoasMajor5Par.Lf0 +.PsoasMajor6Par.Lf0 +.PsoasMajor7Par.Lf0 +.PsoasMajor8Par.Lf0 +.PsoasMajor9Par.Lf0 +.PsoasMajor10Par.Lf0 +.PsoasMajor11Par.Lf0 );///< PCSA (cm2) of the individual element is total volumen divided by the sum of muscle element fiber lengths.
 Vol0 =  1e-4* PCSA * Lf0; ///< Muscle element volume (m3)
};
#endif


#if BM_LEG_MUSCLES_RIGHT | BM_LEG_MUSCLES_LEFT
///////////////////////////////////////////
//     QuadratusFemoris (4 elements)     //
///////////////////////////////////////////

AnyMuscleModel QuadratusFemoris1Par =
{
 AnyFolder& MuscleParameters = ..ModelParameters.Muscles.QuadratusFemoris;
 AnyIntVar MuscleElemNo = 1; ///< The number of this element of the muscle
 AnyIntVar MuscleElemAmount = MuscleParameters.MuscleElemAmount; ///< The total amount of elements for this muscle
 F0 = .DefaultMusPar.PCSAfactor*PCSA; ///< Maximum force output at optimum fiber length
 Lf0 =.FiberLengthScalePelvis*(MuscleParameters.OptimalFiberlength
       / cos(pi/180*MuscleParameters.Pennationangle));
 AnyVar PCSA = 1e4*.StrengthScalePelvis*MuscleParameters.MuscleVolumeSIScaled/(.QuadratusFemoris1Par.Lf0 +.QuadratusFemoris2Par.Lf0 +.QuadratusFemoris3Par.Lf0 +.QuadratusFemoris4Par.Lf0 );///< PCSA (cm2) of the individual element is total volumen divided by the sum of muscle element fiber lengths.
 Vol0 =  1e-4* PCSA * Lf0; ///< Muscle element volume (m3)
};

AnyMuscleModel QuadratusFemoris2Par =
{
 AnyFolder& MuscleParameters = ..ModelParameters.Muscles.QuadratusFemoris;
 AnyIntVar MuscleElemNo = 2; ///< The number of this element of the muscle
 AnyIntVar MuscleElemAmount = MuscleParameters.MuscleElemAmount; ///< The total amount of elements for this muscle
 F0 = .DefaultMusPar.PCSAfactor*PCSA; ///< Maximum force output at optimum fiber length
 Lf0 =.FiberLengthScalePelvis*(MuscleParameters.OptimalFiberlength
       / cos(pi/180*MuscleParameters.Pennationangle));
 AnyVar PCSA = 1e4*.StrengthScalePelvis*MuscleParameters.MuscleVolumeSIScaled/(.QuadratusFemoris1Par.Lf0 +.QuadratusFemoris2Par.Lf0 +.QuadratusFemoris3Par.Lf0 +.QuadratusFemoris4Par.Lf0 );///< PCSA (cm2) of the individual element is total volumen divided by the sum of muscle element fiber lengths.
 Vol0 =  1e-4* PCSA * Lf0; ///< Muscle element volume (m3)
};

AnyMuscleModel QuadratusFemoris3Par =
{
 AnyFolder& MuscleParameters = ..ModelParameters.Muscles.QuadratusFemoris;
 AnyIntVar MuscleElemNo = 3; ///< The number of this element of the muscle
 AnyIntVar MuscleElemAmount = MuscleParameters.MuscleElemAmount; ///< The total amount of elements for this muscle
 F0 = .DefaultMusPar.PCSAfactor*PCSA; ///< Maximum force output at optimum fiber length
 Lf0 =.FiberLengthScalePelvis*(MuscleParameters.OptimalFiberlength
       / cos(pi/180*MuscleParameters.Pennationangle));
 AnyVar PCSA = 1e4*.StrengthScalePelvis*MuscleParameters.MuscleVolumeSIScaled/(.QuadratusFemoris1Par.Lf0 +.QuadratusFemoris2Par.Lf0 +.QuadratusFemoris3Par.Lf0 +.QuadratusFemoris4Par.Lf0 );///< PCSA (cm2) of the individual element is total volumen divided by the sum of muscle element fiber lengths.
 Vol0 =  1e-4* PCSA * Lf0; ///< Muscle element volume (m3)
};

AnyMuscleModel QuadratusFemoris4Par =
{
 AnyFolder& MuscleParameters = ..ModelParameters.Muscles.QuadratusFemoris;
 AnyIntVar MuscleElemNo = 4; ///< The number of this element of the muscle
 AnyIntVar MuscleElemAmount = MuscleParameters.MuscleElemAmount; ///< The total amount of elements for this muscle
 F0 = .DefaultMusPar.PCSAfactor*PCSA; ///< Maximum force output at optimum fiber length
 Lf0 =.FiberLengthScalePelvis*(MuscleParameters.OptimalFiberlength
       / cos(pi/180*MuscleParameters.Pennationangle));
 AnyVar PCSA = 1e4*.StrengthScalePelvis*MuscleParameters.MuscleVolumeSIScaled/(.QuadratusFemoris1Par.Lf0 +.QuadratusFemoris2Par.Lf0 +.QuadratusFemoris3Par.Lf0 +.QuadratusFemoris4Par.Lf0 );///< PCSA (cm2) of the individual element is total volumen divided by the sum of muscle element fiber lengths.
 Vol0 =  1e-4* PCSA * Lf0; ///< Muscle element volume (m3)
};
#endif


#if BM_LEG_MUSCLES_RIGHT | BM_LEG_MUSCLES_LEFT
////////////////////////////////////////
//     RectusFemoris (2 elements)     //
////////////////////////////////////////

AnyMuscleModel RectusFemoris1Par =
{
 AnyFolder& MuscleParameters = ..ModelParameters.Muscles.RectusFemoris;
 AnyIntVar MuscleElemNo = 1; ///< The number of this element of the muscle
 AnyIntVar MuscleElemAmount = MuscleParameters.MuscleElemAmount; ///< The total amount of elements for this muscle
 F0 = .DefaultMusPar.PCSAfactor*PCSA; ///< Maximum force output at optimum fiber length
 Lf0 =.FiberLengthScaleThigh*(MuscleParameters.OptimalFiberlength
       / cos(pi/180*MuscleParameters.Pennationangle));
 AnyVar PCSA = 1e4*.StrengthScaleThigh*MuscleParameters.MuscleVolumeSIScaled/(.RectusFemoris1Par.Lf0 +.RectusFemoris2Par.Lf0 );///< PCSA (cm2) of the individual element is total volumen divided by the sum of muscle element fiber lengths.
 Vol0 =  1e-4* PCSA * Lf0; ///< Muscle element volume (m3)
};

AnyMuscleModel RectusFemoris2Par =
{
 AnyFolder& MuscleParameters = ..ModelParameters.Muscles.RectusFemoris;
 AnyIntVar MuscleElemNo = 2; ///< The number of this element of the muscle
 AnyIntVar MuscleElemAmount = MuscleParameters.MuscleElemAmount; ///< The total amount of elements for this muscle
 F0 = .DefaultMusPar.PCSAfactor*PCSA; ///< Maximum force output at optimum fiber length
 Lf0 =.FiberLengthScaleThigh*(MuscleParameters.OptimalFiberlength
       / cos(pi/180*MuscleParameters.Pennationangle));
 AnyVar PCSA = 1e4*.StrengthScaleThigh*MuscleParameters.MuscleVolumeSIScaled/(.RectusFemoris1Par.Lf0 +.RectusFemoris2Par.Lf0 );///< PCSA (cm2) of the individual element is total volumen divided by the sum of muscle element fiber lengths.
 Vol0 =  1e-4* PCSA * Lf0; ///< Muscle element volume (m3)
};
#endif


#if BM_LEG_MUSCLES_RIGHT | BM_LEG_MUSCLES_LEFT
////////////////////////////////////
//     Sartorius (1 element )     //
////////////////////////////////////

AnyMuscleModel Sartorius1Par =
{
 AnyFolder& MuscleParameters = ..ModelParameters.Muscles.Sartorius;
 AnyIntVar MuscleElemNo = 1; ///< The number of this element of the muscle
 AnyIntVar MuscleElemAmount = MuscleParameters.MuscleElemAmount; ///< The total amount of elements for this muscle
 F0 = .DefaultMusPar.PCSAfactor*PCSA; ///< Maximum force output at optimum fiber length
 Lf0 =.FiberLengthScaleThigh*(MuscleParameters.OptimalFiberlength
       / cos(pi/180*MuscleParameters.Pennationangle));
 AnyVar PCSA = 1e4*.StrengthScaleThigh*MuscleParameters.MuscleVolumeSIScaled/(Lf0);///< PCSA (cm2) of the individual element is total volumen divided by the sum of muscle element fiber lengths.
 Vol0 =  1e-4* PCSA * Lf0; ///< Muscle element volume (m3)
};
#endif


#if BM_LEG_MUSCLES_RIGHT | BM_LEG_MUSCLES_LEFT
//////////////////////////////////////////
//     Semimembranosus (3 elements)     //
//////////////////////////////////////////

AnyMuscleModel Semimembranosus1Par =
{
 AnyFolder& MuscleParameters = ..ModelParameters.Muscles.Semimembranosus;
 AnyIntVar MuscleElemNo = 1; ///< The number of this element of the muscle
 AnyIntVar MuscleElemAmount = MuscleParameters.MuscleElemAmount; ///< The total amount of elements for this muscle
 F0 = .DefaultMusPar.PCSAfactor*PCSA; ///< Maximum force output at optimum fiber length
 Lf0 =.FiberLengthScaleThigh*(MuscleParameters.OptimalFiberlength
       / cos(pi/180*MuscleParameters.Pennationangle));
 AnyVar PCSA = 1e4*.StrengthScaleThigh*MuscleParameters.MuscleVolumeSIScaled/(.Semimembranosus1Par.Lf0 +.Semimembranosus2Par.Lf0 +.Semimembranosus3Par.Lf0 );///< PCSA (cm2) of the individual element is total volumen divided by the sum of muscle element fiber lengths.
 Vol0 =  1e-4* PCSA * Lf0; ///< Muscle element volume (m3)
};

AnyMuscleModel Semimembranosus2Par =
{
 AnyFolder& MuscleParameters = ..ModelParameters.Muscles.Semimembranosus;
 AnyIntVar MuscleElemNo = 2; ///< The number of this element of the muscle
 AnyIntVar MuscleElemAmount = MuscleParameters.MuscleElemAmount; ///< The total amount of elements for this muscle
 F0 = .DefaultMusPar.PCSAfactor*PCSA; ///< Maximum force output at optimum fiber length
 Lf0 =.FiberLengthScaleThigh*(MuscleParameters.OptimalFiberlength
       / cos(pi/180*MuscleParameters.Pennationangle));
 AnyVar PCSA = 1e4*.StrengthScaleThigh*MuscleParameters.MuscleVolumeSIScaled/(.Semimembranosus1Par.Lf0 +.Semimembranosus2Par.Lf0 +.Semimembranosus3Par.Lf0 );///< PCSA (cm2) of the individual element is total volumen divided by the sum of muscle element fiber lengths.
 Vol0 =  1e-4* PCSA * Lf0; ///< Muscle element volume (m3)
};

AnyMuscleModel Semimembranosus3Par =
{
 AnyFolder& MuscleParameters = ..ModelParameters.Muscles.Semimembranosus;
 AnyIntVar MuscleElemNo = 3; ///< The number of this element of the muscle
 AnyIntVar MuscleElemAmount = MuscleParameters.MuscleElemAmount; ///< The total amount of elements for this muscle
 F0 = .DefaultMusPar.PCSAfactor*PCSA; ///< Maximum force output at optimum fiber length
 Lf0 =.FiberLengthScaleThigh*(MuscleParameters.OptimalFiberlength
       / cos(pi/180*MuscleParameters.Pennationangle));
 AnyVar PCSA = 1e4*.StrengthScaleThigh*MuscleParameters.MuscleVolumeSIScaled/(.Semimembranosus1Par.Lf0 +.Semimembranosus2Par.Lf0 +.Semimembranosus3Par.Lf0 );///< PCSA (cm2) of the individual element is total volumen divided by the sum of muscle element fiber lengths.
 Vol0 =  1e-4* PCSA * Lf0; ///< Muscle element volume (m3)
};
#endif


#if BM_LEG_MUSCLES_RIGHT | BM_LEG_MUSCLES_LEFT
/////////////////////////////////////////
//     Semitendinosus (1 element )     //
/////////////////////////////////////////

AnyMuscleModel Semitendinosus1Par =
{
 AnyFolder& MuscleParameters = ..ModelParameters.Muscles.Semitendinosus;
 AnyIntVar MuscleElemNo = 1; ///< The number of this element of the muscle
 AnyIntVar MuscleElemAmount = MuscleParameters.MuscleElemAmount; ///< The total amount of elements for this muscle
 F0 = .DefaultMusPar.PCSAfactor*PCSA; ///< Maximum force output at optimum fiber length
 Lf0 =.FiberLengthScaleThigh*(MuscleParameters.OptimalFiberlength
       / cos(pi/180*MuscleParameters.Pennationangle));
 AnyVar PCSA = 1e4*.StrengthScaleThigh*MuscleParameters.MuscleVolumeSIScaled/(Lf0);///< PCSA (cm2) of the individual element is total volumen divided by the sum of muscle element fiber lengths.
 Vol0 =  1e-4* PCSA * Lf0; ///< Muscle element volume (m3)
};
#endif


#if BM_LEG_MUSCLES_RIGHT | BM_LEG_MUSCLES_LEFT
/////////////////////////////////////////
//     SoleusMedialis (3 elements)     //
/////////////////////////////////////////

AnyMuscleModel SoleusMedialis1Par =
{
 AnyFolder& MuscleParameters = ..ModelParameters.Muscles.SoleusMedialis;
 AnyIntVar MuscleElemNo = 1; ///< The number of this element of the muscle
 AnyIntVar MuscleElemAmount = MuscleParameters.MuscleElemAmount; ///< The total amount of elements for this muscle
 F0 = .DefaultMusPar.PCSAfactor*PCSA; ///< Maximum force output at optimum fiber length
 Lf0 =.FiberLengthScaleShank*(MuscleParameters.OptimalFiberlength
       / cos(pi/180*MuscleParameters.Pennationangle));
 AnyVar PCSA = 1e4*.StrengthScaleShank*MuscleParameters.MuscleVolumeSIScaled/(.SoleusMedialis1Par.Lf0 +.SoleusMedialis2Par.Lf0 +.SoleusMedialis3Par.Lf0 );///< PCSA (cm2) of the individual element is total volumen divided by the sum of muscle element fiber lengths.
 Vol0 =  1e-4* PCSA * Lf0; ///< Muscle element volume (m3)
};

AnyMuscleModel SoleusMedialis2Par =
{
 AnyFolder& MuscleParameters = ..ModelParameters.Muscles.SoleusMedialis;
 AnyIntVar MuscleElemNo = 2; ///< The number of this element of the muscle
 AnyIntVar MuscleElemAmount = MuscleParameters.MuscleElemAmount; ///< The total amount of elements for this muscle
 F0 = .DefaultMusPar.PCSAfactor*PCSA; ///< Maximum force output at optimum fiber length
 Lf0 =.FiberLengthScaleShank*(MuscleParameters.OptimalFiberlength
       / cos(pi/180*MuscleParameters.Pennationangle));
 AnyVar PCSA = 1e4*.StrengthScaleShank*MuscleParameters.MuscleVolumeSIScaled/(.SoleusMedialis1Par.Lf0 +.SoleusMedialis2Par.Lf0 +.SoleusMedialis3Par.Lf0 );///< PCSA (cm2) of the individual element is total volumen divided by the sum of muscle element fiber lengths.
 Vol0 =  1e-4* PCSA * Lf0; ///< Muscle element volume (m3)
};

AnyMuscleModel SoleusMedialis3Par =
{
 AnyFolder& MuscleParameters = ..ModelParameters.Muscles.SoleusMedialis;
 AnyIntVar MuscleElemNo = 3; ///< The number of this element of the muscle
 AnyIntVar MuscleElemAmount = MuscleParameters.MuscleElemAmount; ///< The total amount of elements for this muscle
 F0 = .DefaultMusPar.PCSAfactor*PCSA; ///< Maximum force output at optimum fiber length
 Lf0 =.FiberLengthScaleShank*(MuscleParameters.OptimalFiberlength
       / cos(pi/180*MuscleParameters.Pennationangle));
 AnyVar PCSA = 1e4*.StrengthScaleShank*MuscleParameters.MuscleVolumeSIScaled/(.SoleusMedialis1Par.Lf0 +.SoleusMedialis2Par.Lf0 +.SoleusMedialis3Par.Lf0 );///< PCSA (cm2) of the individual element is total volumen divided by the sum of muscle element fiber lengths.
 Vol0 =  1e-4* PCSA * Lf0; ///< Muscle element volume (m3)
};
#endif


#if BM_LEG_MUSCLES_RIGHT | BM_LEG_MUSCLES_LEFT
//////////////////////////////////////////
//     SoleusLateralis (3 elements)     //
//////////////////////////////////////////

AnyMuscleModel SoleusLateralis1Par =
{
 AnyFolder& MuscleParameters = ..ModelParameters.Muscles.SoleusLateralis;
 AnyIntVar MuscleElemNo = 1; ///< The number of this element of the muscle
 AnyIntVar MuscleElemAmount = MuscleParameters.MuscleElemAmount; ///< The total amount of elements for this muscle
 F0 = .DefaultMusPar.PCSAfactor*PCSA; ///< Maximum force output at optimum fiber length
 Lf0 =.FiberLengthScaleShank*(MuscleParameters.OptimalFiberlength
       / cos(pi/180*MuscleParameters.Pennationangle));
 AnyVar PCSA = 1e4*.StrengthScaleShank*MuscleParameters.MuscleVolumeSIScaled/(.SoleusLateralis1Par.Lf0 +.SoleusLateralis2Par.Lf0 +.SoleusLateralis3Par.Lf0 );///< PCSA (cm2) of the individual element is total volumen divided by the sum of muscle element fiber lengths.
 Vol0 =  1e-4* PCSA * Lf0; ///< Muscle element volume (m3)
};

AnyMuscleModel SoleusLateralis2Par =
{
 AnyFolder& MuscleParameters = ..ModelParameters.Muscles.SoleusLateralis;
 AnyIntVar MuscleElemNo = 2; ///< The number of this element of the muscle
 AnyIntVar MuscleElemAmount = MuscleParameters.MuscleElemAmount; ///< The total amount of elements for this muscle
 F0 = .DefaultMusPar.PCSAfactor*PCSA; ///< Maximum force output at optimum fiber length
 Lf0 =.FiberLengthScaleShank*(MuscleParameters.OptimalFiberlength
       / cos(pi/180*MuscleParameters.Pennationangle));
 AnyVar PCSA = 1e4*.StrengthScaleShank*MuscleParameters.MuscleVolumeSIScaled/(.SoleusLateralis1Par.Lf0 +.SoleusLateralis2Par.Lf0 +.SoleusLateralis3Par.Lf0 );///< PCSA (cm2) of the individual element is total volumen divided by the sum of muscle element fiber lengths.
 Vol0 =  1e-4* PCSA * Lf0; ///< Muscle element volume (m3)
};

AnyMuscleModel SoleusLateralis3Par =
{
 AnyFolder& MuscleParameters = ..ModelParameters.Muscles.SoleusLateralis;
 AnyIntVar MuscleElemNo = 3; ///< The number of this element of the muscle
 AnyIntVar MuscleElemAmount = MuscleParameters.MuscleElemAmount; ///< The total amount of elements for this muscle
 F0 = .DefaultMusPar.PCSAfactor*PCSA; ///< Maximum force output at optimum fiber length
 Lf0 =.FiberLengthScaleShank*(MuscleParameters.OptimalFiberlength
       / cos(pi/180*MuscleParameters.Pennationangle));
 AnyVar PCSA = 1e4*.StrengthScaleShank*MuscleParameters.MuscleVolumeSIScaled/(.SoleusLateralis1Par.Lf0 +.SoleusLateralis2Par.Lf0 +.SoleusLateralis3Par.Lf0 );///< PCSA (cm2) of the individual element is total volumen divided by the sum of muscle element fiber lengths.
 Vol0 =  1e-4* PCSA * Lf0; ///< Muscle element volume (m3)
};
#endif


#if BM_LEG_MUSCLES_RIGHT | BM_LEG_MUSCLES_LEFT
/////////////////////////////////////////////
//     TensorFasciaeLatae (2 elements)     //
/////////////////////////////////////////////

AnyMuscleModel TensorFasciaeLatae1Par =
{
 AnyFolder& MuscleParameters = ..ModelParameters.Muscles.TensorFasciaeLatae;
 AnyIntVar MuscleElemNo = 1; ///< The number of this element of the muscle
 AnyIntVar MuscleElemAmount = MuscleParameters.MuscleElemAmount; ///< The total amount of elements for this muscle
 F0 = .DefaultMusPar.PCSAfactor*PCSA; ///< Maximum force output at optimum fiber length
 Lf0 =.FiberLengthScaleThigh*(MuscleParameters.OptimalFiberlength
       / cos(pi/180*MuscleParameters.Pennationangle));
 AnyVar PCSA = 1e4*.StrengthScaleThigh*MuscleParameters.MuscleVolumeSIScaled/(.TensorFasciaeLatae1Par.Lf0 +.TensorFasciaeLatae2Par.Lf0 );///< PCSA (cm2) of the individual element is total volumen divided by the sum of muscle element fiber lengths.
 Vol0 =  1e-4* PCSA * Lf0; ///< Muscle element volume (m3)
};

AnyMuscleModel TensorFasciaeLatae2Par =
{
 AnyFolder& MuscleParameters = ..ModelParameters.Muscles.TensorFasciaeLatae;
 AnyIntVar MuscleElemNo = 2; ///< The number of this element of the muscle
 AnyIntVar MuscleElemAmount = MuscleParameters.MuscleElemAmount; ///< The total amount of elements for this muscle
 F0 = .DefaultMusPar.PCSAfactor*PCSA; ///< Maximum force output at optimum fiber length
 Lf0 =.FiberLengthScaleThigh*(MuscleParameters.OptimalFiberlength
       / cos(pi/180*MuscleParameters.Pennationangle));
 AnyVar PCSA = 1e4*.StrengthScaleThigh*MuscleParameters.MuscleVolumeSIScaled/(.TensorFasciaeLatae1Par.Lf0 +.TensorFasciaeLatae2Par.Lf0 );///< PCSA (cm2) of the individual element is total volumen divided by the sum of muscle element fiber lengths.
 Vol0 =  1e-4* PCSA * Lf0; ///< Muscle element volume (m3)
};
#endif


#if BM_LEG_MUSCLES_RIGHT | BM_LEG_MUSCLES_LEFT
///////////////////////////////////////////
//     TibialisAnterior (3 elements)     //
///////////////////////////////////////////

AnyMuscleModel TibialisAnterior1Par =
{
 AnyFolder& MuscleParameters = ..ModelParameters.Muscles.TibialisAnterior;
 AnyIntVar MuscleElemNo = 1; ///< The number of this element of the muscle
 AnyIntVar MuscleElemAmount = MuscleParameters.MuscleElemAmount; ///< The total amount of elements for this muscle
 F0 = .DefaultMusPar.PCSAfactor*PCSA; ///< Maximum force output at optimum fiber length
 Lf0 =.FiberLengthScaleShank*(MuscleParameters.OptimalFiberlength
       / cos(pi/180*MuscleParameters.Pennationangle));
 AnyVar PCSA = 1e4*.StrengthScaleShank*MuscleParameters.MuscleVolumeSIScaled/(.TibialisAnterior1Par.Lf0 +.TibialisAnterior2Par.Lf0 +.TibialisAnterior3Par.Lf0 );///< PCSA (cm2) of the individual element is total volumen divided by the sum of muscle element fiber lengths.
 Vol0 =  1e-4* PCSA * Lf0; ///< Muscle element volume (m3)
};

AnyMuscleModel TibialisAnterior2Par =
{
 AnyFolder& MuscleParameters = ..ModelParameters.Muscles.TibialisAnterior;
 AnyIntVar MuscleElemNo = 2; ///< The number of this element of the muscle
 AnyIntVar MuscleElemAmount = MuscleParameters.MuscleElemAmount; ///< The total amount of elements for this muscle
 F0 = .DefaultMusPar.PCSAfactor*PCSA; ///< Maximum force output at optimum fiber length
 Lf0 =.FiberLengthScaleShank*(MuscleParameters.OptimalFiberlength
       / cos(pi/180*MuscleParameters.Pennationangle));
 AnyVar PCSA = 1e4*.StrengthScaleShank*MuscleParameters.MuscleVolumeSIScaled/(.TibialisAnterior1Par.Lf0 +.TibialisAnterior2Par.Lf0 +.TibialisAnterior3Par.Lf0 );///< PCSA (cm2) of the individual element is total volumen divided by the sum of muscle element fiber lengths.
 Vol0 =  1e-4* PCSA * Lf0; ///< Muscle element volume (m3)
};

AnyMuscleModel TibialisAnterior3Par =
{
 AnyFolder& MuscleParameters = ..ModelParameters.Muscles.TibialisAnterior;
 AnyIntVar MuscleElemNo = 3; ///< The number of this element of the muscle
 AnyIntVar MuscleElemAmount = MuscleParameters.MuscleElemAmount; ///< The total amount of elements for this muscle
 F0 = .DefaultMusPar.PCSAfactor*PCSA; ///< Maximum force output at optimum fiber length
 Lf0 =.FiberLengthScaleShank*(MuscleParameters.OptimalFiberlength
       / cos(pi/180*MuscleParameters.Pennationangle));
 AnyVar PCSA = 1e4*.StrengthScaleShank*MuscleParameters.MuscleVolumeSIScaled/(.TibialisAnterior1Par.Lf0 +.TibialisAnterior2Par.Lf0 +.TibialisAnterior3Par.Lf0 );///< PCSA (cm2) of the individual element is total volumen divided by the sum of muscle element fiber lengths.
 Vol0 =  1e-4* PCSA * Lf0; ///< Muscle element volume (m3)
};
#endif


#if BM_LEG_MUSCLES_RIGHT | BM_LEG_MUSCLES_LEFT
////////////////////////////////////////////////////
//     TibialisPosteriorMedialis (3 elements)     //
////////////////////////////////////////////////////

AnyMuscleModel TibialisPosteriorMedialis1Par =
{
 AnyFolder& MuscleParameters = ..ModelParameters.Muscles.TibialisPosteriorMedialis;
 AnyIntVar MuscleElemNo = 1; ///< The number of this element of the muscle
 AnyIntVar MuscleElemAmount = MuscleParameters.MuscleElemAmount; ///< The total amount of elements for this muscle
 F0 = .DefaultMusPar.PCSAfactor*PCSA; ///< Maximum force output at optimum fiber length
 Lf0 =.FiberLengthScaleShank*(MuscleParameters.OptimalFiberlength
       / cos(pi/180*MuscleParameters.Pennationangle));
 AnyVar PCSA = 1e4*.StrengthScaleShank*MuscleParameters.MuscleVolumeSIScaled/(.TibialisPosteriorMedialis1Par.Lf0 +.TibialisPosteriorMedialis2Par.Lf0 +.TibialisPosteriorMedialis3Par.Lf0 );///< PCSA (cm2) of the individual element is total volumen divided by the sum of muscle element fiber lengths.
 Vol0 =  1e-4* PCSA * Lf0; ///< Muscle element volume (m3)
};

AnyMuscleModel TibialisPosteriorMedialis2Par =
{
 AnyFolder& MuscleParameters = ..ModelParameters.Muscles.TibialisPosteriorMedialis;
 AnyIntVar MuscleElemNo = 2; ///< The number of this element of the muscle
 AnyIntVar MuscleElemAmount = MuscleParameters.MuscleElemAmount; ///< The total amount of elements for this muscle
 F0 = .DefaultMusPar.PCSAfactor*PCSA; ///< Maximum force output at optimum fiber length
 Lf0 =.FiberLengthScaleShank*(MuscleParameters.OptimalFiberlength
       / cos(pi/180*MuscleParameters.Pennationangle));
 AnyVar PCSA = 1e4*.StrengthScaleShank*MuscleParameters.MuscleVolumeSIScaled/(.TibialisPosteriorMedialis1Par.Lf0 +.TibialisPosteriorMedialis2Par.Lf0 +.TibialisPosteriorMedialis3Par.Lf0 );///< PCSA (cm2) of the individual element is total volumen divided by the sum of muscle element fiber lengths.
 Vol0 =  1e-4* PCSA * Lf0; ///< Muscle element volume (m3)
};

AnyMuscleModel TibialisPosteriorMedialis3Par =
{
 AnyFolder& MuscleParameters = ..ModelParameters.Muscles.TibialisPosteriorMedialis;
 AnyIntVar MuscleElemNo = 3; ///< The number of this element of the muscle
 AnyIntVar MuscleElemAmount = MuscleParameters.MuscleElemAmount; ///< The total amount of elements for this muscle
 F0 = .DefaultMusPar.PCSAfactor*PCSA; ///< Maximum force output at optimum fiber length
 Lf0 =.FiberLengthScaleShank*(MuscleParameters.OptimalFiberlength
       / cos(pi/180*MuscleParameters.Pennationangle));
 AnyVar PCSA = 1e4*.StrengthScaleShank*MuscleParameters.MuscleVolumeSIScaled/(.TibialisPosteriorMedialis1Par.Lf0 +.TibialisPosteriorMedialis2Par.Lf0 +.TibialisPosteriorMedialis3Par.Lf0 );///< PCSA (cm2) of the individual element is total volumen divided by the sum of muscle element fiber lengths.
 Vol0 =  1e-4* PCSA * Lf0; ///< Muscle element volume (m3)
};
#endif


#if BM_LEG_MUSCLES_RIGHT | BM_LEG_MUSCLES_LEFT
/////////////////////////////////////////////////////
//     TibialisPosteriorLateralis (3 elements)     //
/////////////////////////////////////////////////////

AnyMuscleModel TibialisPosteriorLateralis1Par =
{
 AnyFolder& MuscleParameters = ..ModelParameters.Muscles.TibialisPosteriorLateralis;
 AnyIntVar MuscleElemNo = 1; ///< The number of this element of the muscle
 AnyIntVar MuscleElemAmount = MuscleParameters.MuscleElemAmount; ///< The total amount of elements for this muscle
 F0 = .DefaultMusPar.PCSAfactor*PCSA; ///< Maximum force output at optimum fiber length
 Lf0 =.FiberLengthScaleShank*(MuscleParameters.OptimalFiberlength
       / cos(pi/180*MuscleParameters.Pennationangle));
 AnyVar PCSA = 1e4*.StrengthScaleShank*MuscleParameters.MuscleVolumeSIScaled/(.TibialisPosteriorLateralis1Par.Lf0 +.TibialisPosteriorLateralis2Par.Lf0 +.TibialisPosteriorLateralis3Par.Lf0 );///< PCSA (cm2) of the individual element is total volumen divided by the sum of muscle element fiber lengths.
 Vol0 =  1e-4* PCSA * Lf0; ///< Muscle element volume (m3)
};

AnyMuscleModel TibialisPosteriorLateralis2Par =
{
 AnyFolder& MuscleParameters = ..ModelParameters.Muscles.TibialisPosteriorLateralis;
 AnyIntVar MuscleElemNo = 2; ///< The number of this element of the muscle
 AnyIntVar MuscleElemAmount = MuscleParameters.MuscleElemAmount; ///< The total amount of elements for this muscle
 F0 = .DefaultMusPar.PCSAfactor*PCSA; ///< Maximum force output at optimum fiber length
 Lf0 =.FiberLengthScaleShank*(MuscleParameters.OptimalFiberlength
       / cos(pi/180*MuscleParameters.Pennationangle));
 AnyVar PCSA = 1e4*.StrengthScaleShank*MuscleParameters.MuscleVolumeSIScaled/(.TibialisPosteriorLateralis1Par.Lf0 +.TibialisPosteriorLateralis2Par.Lf0 +.TibialisPosteriorLateralis3Par.Lf0 );///< PCSA (cm2) of the individual element is total volumen divided by the sum of muscle element fiber lengths.
 Vol0 =  1e-4* PCSA * Lf0; ///< Muscle element volume (m3)
};

AnyMuscleModel TibialisPosteriorLateralis3Par =
{
 AnyFolder& MuscleParameters = ..ModelParameters.Muscles.TibialisPosteriorLateralis;
 AnyIntVar MuscleElemNo = 3; ///< The number of this element of the muscle
 AnyIntVar MuscleElemAmount = MuscleParameters.MuscleElemAmount; ///< The total amount of elements for this muscle
 F0 = .DefaultMusPar.PCSAfactor*PCSA; ///< Maximum force output at optimum fiber length
 Lf0 =.FiberLengthScaleShank*(MuscleParameters.OptimalFiberlength
       / cos(pi/180*MuscleParameters.Pennationangle));
 AnyVar PCSA = 1e4*.StrengthScaleShank*MuscleParameters.MuscleVolumeSIScaled/(.TibialisPosteriorLateralis1Par.Lf0 +.TibialisPosteriorLateralis2Par.Lf0 +.TibialisPosteriorLateralis3Par.Lf0 );///< PCSA (cm2) of the individual element is total volumen divided by the sum of muscle element fiber lengths.
 Vol0 =  1e-4* PCSA * Lf0; ///< Muscle element volume (m3)
};
#endif


#if BM_LEG_MUSCLES_RIGHT | BM_LEG_MUSCLES_LEFT
////////////////////////////////////////////
//     VastusIntermedius (6 elements)     //
////////////////////////////////////////////

AnyMuscleModel VastusIntermedius1Par =
{
 AnyFolder& MuscleParameters = ..ModelParameters.Muscles.VastusIntermedius;
 AnyIntVar MuscleElemNo = 1; ///< The number of this element of the muscle
 AnyIntVar MuscleElemAmount = MuscleParameters.MuscleElemAmount; ///< The total amount of elements for this muscle
 F0 = .DefaultMusPar.PCSAfactor*PCSA; ///< Maximum force output at optimum fiber length
 Lf0 =.FiberLengthScaleThigh*(MuscleParameters.OptimalFiberlength
       / cos(pi/180*MuscleParameters.Pennationangle));
 AnyVar PCSA = 1e4*.StrengthScaleThigh*MuscleParameters.MuscleVolumeSIScaled/(.VastusIntermedius1Par.Lf0 +.VastusIntermedius2Par.Lf0 +.VastusIntermedius3Par.Lf0 +.VastusIntermedius4Par.Lf0 +.VastusIntermedius5Par.Lf0 +.VastusIntermedius6Par.Lf0 );///< PCSA (cm2) of the individual element is total volumen divided by the sum of muscle element fiber lengths.
 Vol0 =  1e-4* PCSA * Lf0; ///< Muscle element volume (m3)
};

AnyMuscleModel VastusIntermedius2Par =
{
 AnyFolder& MuscleParameters = ..ModelParameters.Muscles.VastusIntermedius;
 AnyIntVar MuscleElemNo = 2; ///< The number of this element of the muscle
 AnyIntVar MuscleElemAmount = MuscleParameters.MuscleElemAmount; ///< The total amount of elements for this muscle
 F0 = .DefaultMusPar.PCSAfactor*PCSA; ///< Maximum force output at optimum fiber length
 Lf0 =.FiberLengthScaleThigh*(MuscleParameters.OptimalFiberlength
       / cos(pi/180*MuscleParameters.Pennationangle));
 AnyVar PCSA = 1e4*.StrengthScaleThigh*MuscleParameters.MuscleVolumeSIScaled/(.VastusIntermedius1Par.Lf0 +.VastusIntermedius2Par.Lf0 +.VastusIntermedius3Par.Lf0 +.VastusIntermedius4Par.Lf0 +.VastusIntermedius5Par.Lf0 +.VastusIntermedius6Par.Lf0 );///< PCSA (cm2) of the individual element is total volumen divided by the sum of muscle element fiber lengths.
 Vol0 =  1e-4* PCSA * Lf0; ///< Muscle element volume (m3)
};

AnyMuscleModel VastusIntermedius3Par =
{
 AnyFolder& MuscleParameters = ..ModelParameters.Muscles.VastusIntermedius;
 AnyIntVar MuscleElemNo = 3; ///< The number of this element of the muscle
 AnyIntVar MuscleElemAmount = MuscleParameters.MuscleElemAmount; ///< The total amount of elements for this muscle
 F0 = .DefaultMusPar.PCSAfactor*PCSA; ///< Maximum force output at optimum fiber length
 Lf0 =.FiberLengthScaleThigh*(MuscleParameters.OptimalFiberlength
       / cos(pi/180*MuscleParameters.Pennationangle));
 AnyVar PCSA = 1e4*.StrengthScaleThigh*MuscleParameters.MuscleVolumeSIScaled/(.VastusIntermedius1Par.Lf0 +.VastusIntermedius2Par.Lf0 +.VastusIntermedius3Par.Lf0 +.VastusIntermedius4Par.Lf0 +.VastusIntermedius5Par.Lf0 +.VastusIntermedius6Par.Lf0 );///< PCSA (cm2) of the individual element is total volumen divided by the sum of muscle element fiber lengths.
 Vol0 =  1e-4* PCSA * Lf0; ///< Muscle element volume (m3)
};

AnyMuscleModel VastusIntermedius4Par =
{
 AnyFolder& MuscleParameters = ..ModelParameters.Muscles.VastusIntermedius;
 AnyIntVar MuscleElemNo = 4; ///< The number of this element of the muscle
 AnyIntVar MuscleElemAmount = MuscleParameters.MuscleElemAmount; ///< The total amount of elements for this muscle
 F0 = .DefaultMusPar.PCSAfactor*PCSA; ///< Maximum force output at optimum fiber length
 Lf0 =.FiberLengthScaleThigh*(MuscleParameters.OptimalFiberlength
       / cos(pi/180*MuscleParameters.Pennationangle));
 AnyVar PCSA = 1e4*.StrengthScaleThigh*MuscleParameters.MuscleVolumeSIScaled/(.VastusIntermedius1Par.Lf0 +.VastusIntermedius2Par.Lf0 +.VastusIntermedius3Par.Lf0 +.VastusIntermedius4Par.Lf0 +.VastusIntermedius5Par.Lf0 +.VastusIntermedius6Par.Lf0 );///< PCSA (cm2) of the individual element is total volumen divided by the sum of muscle element fiber lengths.
 Vol0 =  1e-4* PCSA * Lf0; ///< Muscle element volume (m3)
};

AnyMuscleModel VastusIntermedius5Par =
{
 AnyFolder& MuscleParameters = ..ModelParameters.Muscles.VastusIntermedius;
 AnyIntVar MuscleElemNo = 5; ///< The number of this element of the muscle
 AnyIntVar MuscleElemAmount = MuscleParameters.MuscleElemAmount; ///< The total amount of elements for this muscle
 F0 = .DefaultMusPar.PCSAfactor*PCSA; ///< Maximum force output at optimum fiber length
 Lf0 =.FiberLengthScaleThigh*(MuscleParameters.OptimalFiberlength
       / cos(pi/180*MuscleParameters.Pennationangle));
 AnyVar PCSA = 1e4*.StrengthScaleThigh*MuscleParameters.MuscleVolumeSIScaled/(.VastusIntermedius1Par.Lf0 +.VastusIntermedius2Par.Lf0 +.VastusIntermedius3Par.Lf0 +.VastusIntermedius4Par.Lf0 +.VastusIntermedius5Par.Lf0 +.VastusIntermedius6Par.Lf0 );///< PCSA (cm2) of the individual element is total volumen divided by the sum of muscle element fiber lengths.
 Vol0 =  1e-4* PCSA * Lf0; ///< Muscle element volume (m3)
};

AnyMuscleModel VastusIntermedius6Par =
{
 AnyFolder& MuscleParameters = ..ModelParameters.Muscles.VastusIntermedius;
 AnyIntVar MuscleElemNo = 6; ///< The number of this element of the muscle
 AnyIntVar MuscleElemAmount = MuscleParameters.MuscleElemAmount; ///< The total amount of elements for this muscle
 F0 = .DefaultMusPar.PCSAfactor*PCSA; ///< Maximum force output at optimum fiber length
 Lf0 =.FiberLengthScaleThigh*(MuscleParameters.OptimalFiberlength
       / cos(pi/180*MuscleParameters.Pennationangle));
 AnyVar PCSA = 1e4*.StrengthScaleThigh*MuscleParameters.MuscleVolumeSIScaled/(.VastusIntermedius1Par.Lf0 +.VastusIntermedius2Par.Lf0 +.VastusIntermedius3Par.Lf0 +.VastusIntermedius4Par.Lf0 +.VastusIntermedius5Par.Lf0 +.VastusIntermedius6Par.Lf0 );///< PCSA (cm2) of the individual element is total volumen divided by the sum of muscle element fiber lengths.
 Vol0 =  1e-4* PCSA * Lf0; ///< Muscle element volume (m3)
};
#endif


#if BM_LEG_MUSCLES_RIGHT | BM_LEG_MUSCLES_LEFT
//////////////////////////////////////////////////
//     VastusLateralisInferior (6 elements)     //
//////////////////////////////////////////////////

AnyMuscleModel VastusLateralisInferior1Par =
{
 AnyFolder& MuscleParameters = ..ModelParameters.Muscles.VastusLateralisInferior;
 AnyIntVar MuscleElemNo = 1; ///< The number of this element of the muscle
 AnyIntVar MuscleElemAmount = MuscleParameters.MuscleElemAmount; ///< The total amount of elements for this muscle
 F0 = .DefaultMusPar.PCSAfactor*PCSA; ///< Maximum force output at optimum fiber length
 Lf0 =.FiberLengthScaleThigh*(MuscleParameters.OptimalFiberlength
       / cos(pi/180*MuscleParameters.Pennationangle));
 AnyVar PCSA = 1e4*.StrengthScaleThigh*MuscleParameters.MuscleVolumeSIScaled/(.VastusLateralisInferior1Par.Lf0 +.VastusLateralisInferior2Par.Lf0 +.VastusLateralisInferior3Par.Lf0 +.VastusLateralisInferior4Par.Lf0 +.VastusLateralisInferior5Par.Lf0 +.VastusLateralisInferior6Par.Lf0 );///< PCSA (cm2) of the individual element is total volumen divided by the sum of muscle element fiber lengths.
 Vol0 =  1e-4* PCSA * Lf0; ///< Muscle element volume (m3)
};

AnyMuscleModel VastusLateralisInferior2Par =
{
 AnyFolder& MuscleParameters = ..ModelParameters.Muscles.VastusLateralisInferior;
 AnyIntVar MuscleElemNo = 2; ///< The number of this element of the muscle
 AnyIntVar MuscleElemAmount = MuscleParameters.MuscleElemAmount; ///< The total amount of elements for this muscle
 F0 = .DefaultMusPar.PCSAfactor*PCSA; ///< Maximum force output at optimum fiber length
 Lf0 =.FiberLengthScaleThigh*(MuscleParameters.OptimalFiberlength
       / cos(pi/180*MuscleParameters.Pennationangle));
 AnyVar PCSA = 1e4*.StrengthScaleThigh*MuscleParameters.MuscleVolumeSIScaled/(.VastusLateralisInferior1Par.Lf0 +.VastusLateralisInferior2Par.Lf0 +.VastusLateralisInferior3Par.Lf0 +.VastusLateralisInferior4Par.Lf0 +.VastusLateralisInferior5Par.Lf0 +.VastusLateralisInferior6Par.Lf0 );///< PCSA (cm2) of the individual element is total volumen divided by the sum of muscle element fiber lengths.
 Vol0 =  1e-4* PCSA * Lf0; ///< Muscle element volume (m3)
};

AnyMuscleModel VastusLateralisInferior3Par =
{
 AnyFolder& MuscleParameters = ..ModelParameters.Muscles.VastusLateralisInferior;
 AnyIntVar MuscleElemNo = 3; ///< The number of this element of the muscle
 AnyIntVar MuscleElemAmount = MuscleParameters.MuscleElemAmount; ///< The total amount of elements for this muscle
 F0 = .DefaultMusPar.PCSAfactor*PCSA; ///< Maximum force output at optimum fiber length
 Lf0 =.FiberLengthScaleThigh*(MuscleParameters.OptimalFiberlength
       / cos(pi/180*MuscleParameters.Pennationangle));
 AnyVar PCSA = 1e4*.StrengthScaleThigh*MuscleParameters.MuscleVolumeSIScaled/(.VastusLateralisInferior1Par.Lf0 +.VastusLateralisInferior2Par.Lf0 +.VastusLateralisInferior3Par.Lf0 +.VastusLateralisInferior4Par.Lf0 +.VastusLateralisInferior5Par.Lf0 +.VastusLateralisInferior6Par.Lf0 );///< PCSA (cm2) of the individual element is total volumen divided by the sum of muscle element fiber lengths.
 Vol0 =  1e-4* PCSA * Lf0; ///< Muscle element volume (m3)
};

AnyMuscleModel VastusLateralisInferior4Par =
{
 AnyFolder& MuscleParameters = ..ModelParameters.Muscles.VastusLateralisInferior;
 AnyIntVar MuscleElemNo = 4; ///< The number of this element of the muscle
 AnyIntVar MuscleElemAmount = MuscleParameters.MuscleElemAmount; ///< The total amount of elements for this muscle
 F0 = .DefaultMusPar.PCSAfactor*PCSA; ///< Maximum force output at optimum fiber length
 Lf0 =.FiberLengthScaleThigh*(MuscleParameters.OptimalFiberlength
       / cos(pi/180*MuscleParameters.Pennationangle));
 AnyVar PCSA = 1e4*.StrengthScaleThigh*MuscleParameters.MuscleVolumeSIScaled/(.VastusLateralisInferior1Par.Lf0 +.VastusLateralisInferior2Par.Lf0 +.VastusLateralisInferior3Par.Lf0 +.VastusLateralisInferior4Par.Lf0 +.VastusLateralisInferior5Par.Lf0 +.VastusLateralisInferior6Par.Lf0 );///< PCSA (cm2) of the individual element is total volumen divided by the sum of muscle element fiber lengths.
 Vol0 =  1e-4* PCSA * Lf0; ///< Muscle element volume (m3)
};

AnyMuscleModel VastusLateralisInferior5Par =
{
 AnyFolder& MuscleParameters = ..ModelParameters.Muscles.VastusLateralisInferior;
 AnyIntVar MuscleElemNo = 5; ///< The number of this element of the muscle
 AnyIntVar MuscleElemAmount = MuscleParameters.MuscleElemAmount; ///< The total amount of elements for this muscle
 F0 = .DefaultMusPar.PCSAfactor*PCSA; ///< Maximum force output at optimum fiber length
 Lf0 =.FiberLengthScaleThigh*(MuscleParameters.OptimalFiberlength
       / cos(pi/180*MuscleParameters.Pennationangle));
 AnyVar PCSA = 1e4*.StrengthScaleThigh*MuscleParameters.MuscleVolumeSIScaled/(.VastusLateralisInferior1Par.Lf0 +.VastusLateralisInferior2Par.Lf0 +.VastusLateralisInferior3Par.Lf0 +.VastusLateralisInferior4Par.Lf0 +.VastusLateralisInferior5Par.Lf0 +.VastusLateralisInferior6Par.Lf0 );///< PCSA (cm2) of the individual element is total volumen divided by the sum of muscle element fiber lengths.
 Vol0 =  1e-4* PCSA * Lf0; ///< Muscle element volume (m3)
};

AnyMuscleModel VastusLateralisInferior6Par =
{
 AnyFolder& MuscleParameters = ..ModelParameters.Muscles.VastusLateralisInferior;
 AnyIntVar MuscleElemNo = 6; ///< The number of this element of the muscle
 AnyIntVar MuscleElemAmount = MuscleParameters.MuscleElemAmount; ///< The total amount of elements for this muscle
 F0 = .DefaultMusPar.PCSAfactor*PCSA; ///< Maximum force output at optimum fiber length
 Lf0 =.FiberLengthScaleThigh*(MuscleParameters.OptimalFiberlength
       / cos(pi/180*MuscleParameters.Pennationangle));
 AnyVar PCSA = 1e4*.StrengthScaleThigh*MuscleParameters.MuscleVolumeSIScaled/(.VastusLateralisInferior1Par.Lf0 +.VastusLateralisInferior2Par.Lf0 +.VastusLateralisInferior3Par.Lf0 +.VastusLateralisInferior4Par.Lf0 +.VastusLateralisInferior5Par.Lf0 +.VastusLateralisInferior6Par.Lf0 );///< PCSA (cm2) of the individual element is total volumen divided by the sum of muscle element fiber lengths.
 Vol0 =  1e-4* PCSA * Lf0; ///< Muscle element volume (m3)
};
#endif


#if BM_LEG_MUSCLES_RIGHT | BM_LEG_MUSCLES_LEFT
//////////////////////////////////////////////////
//     VastusLateralisSuperior (2 elements)     //
//////////////////////////////////////////////////

AnyMuscleModel VastusLateralisSuperior1Par =
{
 AnyFolder& MuscleParameters = ..ModelParameters.Muscles.VastusLateralisSuperior;
 AnyIntVar MuscleElemNo = 1; ///< The number of this element of the muscle
 AnyIntVar MuscleElemAmount = MuscleParameters.MuscleElemAmount; ///< The total amount of elements for this muscle
 F0 = .DefaultMusPar.PCSAfactor*PCSA; ///< Maximum force output at optimum fiber length
 Lf0 =.FiberLengthScaleThigh*(MuscleParameters.OptimalFiberlength
       / cos(pi/180*MuscleParameters.Pennationangle));
 AnyVar PCSA = 1e4*.StrengthScaleThigh*MuscleParameters.MuscleVolumeSIScaled/(.VastusLateralisSuperior1Par.Lf0 +.VastusLateralisSuperior2Par.Lf0 );///< PCSA (cm2) of the individual element is total volumen divided by the sum of muscle element fiber lengths.
 Vol0 =  1e-4* PCSA * Lf0; ///< Muscle element volume (m3)
};

AnyMuscleModel VastusLateralisSuperior2Par =
{
 AnyFolder& MuscleParameters = ..ModelParameters.Muscles.VastusLateralisSuperior;
 AnyIntVar MuscleElemNo = 2; ///< The number of this element of the muscle
 AnyIntVar MuscleElemAmount = MuscleParameters.MuscleElemAmount; ///< The total amount of elements for this muscle
 F0 = .DefaultMusPar.PCSAfactor*PCSA; ///< Maximum force output at optimum fiber length
 Lf0 =.FiberLengthScaleThigh*(MuscleParameters.OptimalFiberlength
       / cos(pi/180*MuscleParameters.Pennationangle));
 AnyVar PCSA = 1e4*.StrengthScaleThigh*MuscleParameters.MuscleVolumeSIScaled/(.VastusLateralisSuperior1Par.Lf0 +.VastusLateralisSuperior2Par.Lf0 );///< PCSA (cm2) of the individual element is total volumen divided by the sum of muscle element fiber lengths.
 Vol0 =  1e-4* PCSA * Lf0; ///< Muscle element volume (m3)
};
#endif


#if BM_LEG_MUSCLES_RIGHT | BM_LEG_MUSCLES_LEFT
/////////////////////////////////////////////////
//     VastusMedialisInferior (2 elements)     //
/////////////////////////////////////////////////

AnyMuscleModel VastusMedialisInferior1Par =
{
 AnyFolder& MuscleParameters = ..ModelParameters.Muscles.VastusMedialisInferior;
 AnyIntVar MuscleElemNo = 1; ///< The number of this element of the muscle
 AnyIntVar MuscleElemAmount = MuscleParameters.MuscleElemAmount; ///< The total amount of elements for this muscle
 F0 = .DefaultMusPar.PCSAfactor*PCSA; ///< Maximum force output at optimum fiber length
 Lf0 =.FiberLengthScaleThigh*(MuscleParameters.OptimalFiberlength
       / cos(pi/180*MuscleParameters.Pennationangle));
 AnyVar PCSA = 1e4*.StrengthScaleThigh*MuscleParameters.MuscleVolumeSIScaled/(.VastusMedialisInferior1Par.Lf0 +.VastusMedialisInferior2Par.Lf0 );///< PCSA (cm2) of the individual element is total volumen divided by the sum of muscle element fiber lengths.
 Vol0 =  1e-4* PCSA * Lf0; ///< Muscle element volume (m3)
};

AnyMuscleModel VastusMedialisInferior2Par =
{
 AnyFolder& MuscleParameters = ..ModelParameters.Muscles.VastusMedialisInferior;
 AnyIntVar MuscleElemNo = 2; ///< The number of this element of the muscle
 AnyIntVar MuscleElemAmount = MuscleParameters.MuscleElemAmount; ///< The total amount of elements for this muscle
 F0 = .DefaultMusPar.PCSAfactor*PCSA; ///< Maximum force output at optimum fiber length
 Lf0 =.FiberLengthScaleThigh*(MuscleParameters.OptimalFiberlength
       / cos(pi/180*MuscleParameters.Pennationangle));
 AnyVar PCSA = 1e4*.StrengthScaleThigh*MuscleParameters.MuscleVolumeSIScaled/(.VastusMedialisInferior1Par.Lf0 +.VastusMedialisInferior2Par.Lf0 );///< PCSA (cm2) of the individual element is total volumen divided by the sum of muscle element fiber lengths.
 Vol0 =  1e-4* PCSA * Lf0; ///< Muscle element volume (m3)
};
#endif


#if BM_LEG_MUSCLES_RIGHT | BM_LEG_MUSCLES_LEFT
////////////////////////////////////////////
//     VastusMedialisMid (2 elements)     //
////////////////////////////////////////////

AnyMuscleModel VastusMedialisMid1Par =
{
 AnyFolder& MuscleParameters = ..ModelParameters.Muscles.VastusMedialisMid;
 AnyIntVar MuscleElemNo = 1; ///< The number of this element of the muscle
 AnyIntVar MuscleElemAmount = MuscleParameters.MuscleElemAmount; ///< The total amount of elements for this muscle
 F0 = .DefaultMusPar.PCSAfactor*PCSA; ///< Maximum force output at optimum fiber length
 Lf0 =.FiberLengthScaleThigh*(MuscleParameters.OptimalFiberlength
       / cos(pi/180*MuscleParameters.Pennationangle));
 AnyVar PCSA = 1e4*.StrengthScaleThigh*MuscleParameters.MuscleVolumeSIScaled/(.VastusMedialisMid1Par.Lf0 +.VastusMedialisMid2Par.Lf0 );///< PCSA (cm2) of the individual element is total volumen divided by the sum of muscle element fiber lengths.
 Vol0 =  1e-4* PCSA * Lf0; ///< Muscle element volume (m3)
};

AnyMuscleModel VastusMedialisMid2Par =
{
 AnyFolder& MuscleParameters = ..ModelParameters.Muscles.VastusMedialisMid;
 AnyIntVar MuscleElemNo = 2; ///< The number of this element of the muscle
 AnyIntVar MuscleElemAmount = MuscleParameters.MuscleElemAmount; ///< The total amount of elements for this muscle
 F0 = .DefaultMusPar.PCSAfactor*PCSA; ///< Maximum force output at optimum fiber length
 Lf0 =.FiberLengthScaleThigh*(MuscleParameters.OptimalFiberlength
       / cos(pi/180*MuscleParameters.Pennationangle));
 AnyVar PCSA = 1e4*.StrengthScaleThigh*MuscleParameters.MuscleVolumeSIScaled/(.VastusMedialisMid1Par.Lf0 +.VastusMedialisMid2Par.Lf0 );///< PCSA (cm2) of the individual element is total volumen divided by the sum of muscle element fiber lengths.
 Vol0 =  1e-4* PCSA * Lf0; ///< Muscle element volume (m3)
};
#endif


#if BM_LEG_MUSCLES_RIGHT | BM_LEG_MUSCLES_LEFT
/////////////////////////////////////////////////
//     VastusMedialisSuperior (4 elements)     //
/////////////////////////////////////////////////

AnyMuscleModel VastusMedialisSuperior1Par =
{
 AnyFolder& MuscleParameters = ..ModelParameters.Muscles.VastusMedialisSuperior;
 AnyIntVar MuscleElemNo = 1; ///< The number of this element of the muscle
 AnyIntVar MuscleElemAmount = MuscleParameters.MuscleElemAmount; ///< The total amount of elements for this muscle
 F0 = .DefaultMusPar.PCSAfactor*PCSA; ///< Maximum force output at optimum fiber length
 Lf0 =.FiberLengthScaleThigh*(MuscleParameters.OptimalFiberlength
       / cos(pi/180*MuscleParameters.Pennationangle));
 AnyVar PCSA = 1e4*.StrengthScaleThigh*MuscleParameters.MuscleVolumeSIScaled/(.VastusMedialisSuperior1Par.Lf0 +.VastusMedialisSuperior2Par.Lf0 +.VastusMedialisSuperior3Par.Lf0 +.VastusMedialisSuperior4Par.Lf0 );///< PCSA (cm2) of the individual element is total volumen divided by the sum of muscle element fiber lengths.
 Vol0 =  1e-4* PCSA * Lf0; ///< Muscle element volume (m3)
};

AnyMuscleModel VastusMedialisSuperior2Par =
{
 AnyFolder& MuscleParameters = ..ModelParameters.Muscles.VastusMedialisSuperior;
 AnyIntVar MuscleElemNo = 2; ///< The number of this element of the muscle
 AnyIntVar MuscleElemAmount = MuscleParameters.MuscleElemAmount; ///< The total amount of elements for this muscle
 F0 = .DefaultMusPar.PCSAfactor*PCSA; ///< Maximum force output at optimum fiber length
 Lf0 =.FiberLengthScaleThigh*(MuscleParameters.OptimalFiberlength
       / cos(pi/180*MuscleParameters.Pennationangle));
 AnyVar PCSA = 1e4*.StrengthScaleThigh*MuscleParameters.MuscleVolumeSIScaled/(.VastusMedialisSuperior1Par.Lf0 +.VastusMedialisSuperior2Par.Lf0 +.VastusMedialisSuperior3Par.Lf0 +.VastusMedialisSuperior4Par.Lf0 );///< PCSA (cm2) of the individual element is total volumen divided by the sum of muscle element fiber lengths.
 Vol0 =  1e-4* PCSA * Lf0; ///< Muscle element volume (m3)
};

AnyMuscleModel VastusMedialisSuperior3Par =
{
 AnyFolder& MuscleParameters = ..ModelParameters.Muscles.VastusMedialisSuperior;
 AnyIntVar MuscleElemNo = 3; ///< The number of this element of the muscle
 AnyIntVar MuscleElemAmount = MuscleParameters.MuscleElemAmount; ///< The total amount of elements for this muscle
 F0 = .DefaultMusPar.PCSAfactor*PCSA; ///< Maximum force output at optimum fiber length
 Lf0 =.FiberLengthScaleThigh*(MuscleParameters.OptimalFiberlength
       / cos(pi/180*MuscleParameters.Pennationangle));
 AnyVar PCSA = 1e4*.StrengthScaleThigh*MuscleParameters.MuscleVolumeSIScaled/(.VastusMedialisSuperior1Par.Lf0 +.VastusMedialisSuperior2Par.Lf0 +.VastusMedialisSuperior3Par.Lf0 +.VastusMedialisSuperior4Par.Lf0 );///< PCSA (cm2) of the individual element is total volumen divided by the sum of muscle element fiber lengths.
 Vol0 =  1e-4* PCSA * Lf0; ///< Muscle element volume (m3)
};

AnyMuscleModel VastusMedialisSuperior4Par =
{
 AnyFolder& MuscleParameters = ..ModelParameters.Muscles.VastusMedialisSuperior;
 AnyIntVar MuscleElemNo = 4; ///< The number of this element of the muscle
 AnyIntVar MuscleElemAmount = MuscleParameters.MuscleElemAmount; ///< The total amount of elements for this muscle
 F0 = .DefaultMusPar.PCSAfactor*PCSA; ///< Maximum force output at optimum fiber length
 Lf0 =.FiberLengthScaleThigh*(MuscleParameters.OptimalFiberlength
       / cos(pi/180*MuscleParameters.Pennationangle));
 AnyVar PCSA = 1e4*.StrengthScaleThigh*MuscleParameters.MuscleVolumeSIScaled/(.VastusMedialisSuperior1Par.Lf0 +.VastusMedialisSuperior2Par.Lf0 +.VastusMedialisSuperior3Par.Lf0 +.VastusMedialisSuperior4Par.Lf0 );///< PCSA (cm2) of the individual element is total volumen divided by the sum of muscle element fiber lengths.
 Vol0 =  1e-4* PCSA * Lf0; ///< Muscle element volume (m3)
};
#endif


#if BM_FOOT_MODEL == _FOOT_MODEL_TOE_FLEX_GM_

AnyMuscleModel AbductorHallucis =
{
 AnyFolder& MuscleParameters = ..ModelParameters.Muscles.AbductorHallucis;
 AnyIntVar MuscleElemNo = 1; ///< The number of this element of the muscle
 AnyIntVar MuscleElemAmount = MuscleParameters.MuscleElemAmount; ///< The total amount of elements for this muscle
 F0 = .DefaultMusPar.PCSAfactor*PCSA; ///< Maximum force output at optimum fiber length
 Lf0 =.FiberLengthScaleFoot*(MuscleParameters.OptimalFiberlength
       / cos(pi/180*MuscleParameters.Pennationangle));
 AnyVar PCSA = 1e4*.StrengthScaleFoot*MuscleParameters.MuscleVolumeSIScaled/(Lf0);///< PCSA (cm2) of the individual element is total volumen divided by the sum of muscle element fiber lengths.
 Vol0 =  1e-4* PCSA * Lf0; ///< Muscle element volume (m3)
};
#endif


#if BM_FOOT_MODEL == _FOOT_MODEL_TOE_FLEX_GM_

AnyMuscleModel FlexorHallucisBrevisLateralis_1 =
{
 AnyFolder& MuscleParameters = ..ModelParameters.Muscles.FlexorHallucisBrevisLateralis_1;
 AnyIntVar MuscleElemNo = 1; ///< The number of this element of the muscle
 AnyIntVar MuscleElemAmount = MuscleParameters.MuscleElemAmount; ///< The total amount of elements for this muscle
 F0 = .DefaultMusPar.PCSAfactor*PCSA; ///< Maximum force output at optimum fiber length
 Lf0 =.FiberLengthScaleFoot*(MuscleParameters.OptimalFiberlength
       / cos(pi/180*MuscleParameters.Pennationangle));
 AnyVar PCSA = 1e4*.StrengthScaleFoot*MuscleParameters.MuscleVolumeSIScaled/(Lf0);///< PCSA (cm2) of the individual element is total volumen divided by the sum of muscle element fiber lengths.
 Vol0 =  1e-4* PCSA * Lf0; ///< Muscle element volume (m3)
};
#endif


#if BM_FOOT_MODEL == _FOOT_MODEL_TOE_FLEX_GM_

AnyMuscleModel FlexorHallucisBrevisLateralis_2 =
{
 AnyFolder& MuscleParameters = ..ModelParameters.Muscles.FlexorHallucisBrevisLateralis_2;
 AnyIntVar MuscleElemNo = 1; ///< The number of this element of the muscle
 AnyIntVar MuscleElemAmount = MuscleParameters.MuscleElemAmount; ///< The total amount of elements for this muscle
 F0 = .DefaultMusPar.PCSAfactor*PCSA; ///< Maximum force output at optimum fiber length
 Lf0 =.FiberLengthScaleFoot*(MuscleParameters.OptimalFiberlength
       / cos(pi/180*MuscleParameters.Pennationangle));
 AnyVar PCSA = 1e4*.StrengthScaleFoot*MuscleParameters.MuscleVolumeSIScaled/(Lf0);///< PCSA (cm2) of the individual element is total volumen divided by the sum of muscle element fiber lengths.
 Vol0 =  1e-4* PCSA * Lf0; ///< Muscle element volume (m3)
};
#endif


#if BM_FOOT_MODEL == _FOOT_MODEL_TOE_FLEX_GM_

AnyMuscleModel FlexorHallucisBrevisMedialis =
{
 AnyFolder& MuscleParameters = ..ModelParameters.Muscles.FlexorHallucisBrevisMedialis;
 AnyIntVar MuscleElemNo = 1; ///< The number of this element of the muscle
 AnyIntVar MuscleElemAmount = MuscleParameters.MuscleElemAmount; ///< The total amount of elements for this muscle
 F0 = .DefaultMusPar.PCSAfactor*PCSA; ///< Maximum force output at optimum fiber length
 Lf0 =.FiberLengthScaleFoot*(MuscleParameters.OptimalFiberlength
       / cos(pi/180*MuscleParameters.Pennationangle));
 AnyVar PCSA = 1e4*.StrengthScaleFoot*MuscleParameters.MuscleVolumeSIScaled/(Lf0);///< PCSA (cm2) of the individual element is total volumen divided by the sum of muscle element fiber lengths.
 Vol0 =  1e-4* PCSA * Lf0; ///< Muscle element volume (m3)
};
#endif


#if BM_FOOT_MODEL == _FOOT_MODEL_TOE_FLEX_GM_

AnyMuscleModel AdductorHallucisOblique1 =
{
 AnyFolder& MuscleParameters = ..ModelParameters.Muscles.AdductorHallucisOblique1;
 AnyIntVar MuscleElemNo = 1; ///< The number of this element of the muscle
 AnyIntVar MuscleElemAmount = MuscleParameters.MuscleElemAmount; ///< The total amount of elements for this muscle
 F0 = .DefaultMusPar.PCSAfactor*PCSA; ///< Maximum force output at optimum fiber length
 Lf0 =.FiberLengthScaleFoot*(MuscleParameters.OptimalFiberlength
       / cos(pi/180*MuscleParameters.Pennationangle));
 AnyVar PCSA = 1e4*.StrengthScaleFoot*MuscleParameters.MuscleVolumeSIScaled/(Lf0);///< PCSA (cm2) of the individual element is total volumen divided by the sum of muscle element fiber lengths.
 Vol0 =  1e-4* PCSA * Lf0; ///< Muscle element volume (m3)
};
#endif


#if BM_FOOT_MODEL == _FOOT_MODEL_TOE_FLEX_GM_

AnyMuscleModel AdductorHallucisOblique2 =
{
 AnyFolder& MuscleParameters = ..ModelParameters.Muscles.AdductorHallucisOblique2;
 AnyIntVar MuscleElemNo = 1; ///< The number of this element of the muscle
 AnyIntVar MuscleElemAmount = MuscleParameters.MuscleElemAmount; ///< The total amount of elements for this muscle
 F0 = .DefaultMusPar.PCSAfactor*PCSA; ///< Maximum force output at optimum fiber length
 Lf0 =.FiberLengthScaleFoot*(MuscleParameters.OptimalFiberlength
       / cos(pi/180*MuscleParameters.Pennationangle));
 AnyVar PCSA = 1e4*.StrengthScaleFoot*MuscleParameters.MuscleVolumeSIScaled/(Lf0);///< PCSA (cm2) of the individual element is total volumen divided by the sum of muscle element fiber lengths.
 Vol0 =  1e-4* PCSA * Lf0; ///< Muscle element volume (m3)
};
#endif


#if BM_FOOT_MODEL == _FOOT_MODEL_TOE_FLEX_GM_

AnyMuscleModel AdductorHallucisOblique3 =
{
 AnyFolder& MuscleParameters = ..ModelParameters.Muscles.AdductorHallucisOblique3;
 AnyIntVar MuscleElemNo = 1; ///< The number of this element of the muscle
 AnyIntVar MuscleElemAmount = MuscleParameters.MuscleElemAmount; ///< The total amount of elements for this muscle
 F0 = .DefaultMusPar.PCSAfactor*PCSA; ///< Maximum force output at optimum fiber length
 Lf0 =.FiberLengthScaleFoot*(MuscleParameters.OptimalFiberlength
       / cos(pi/180*MuscleParameters.Pennationangle));
 AnyVar PCSA = 1e4*.StrengthScaleFoot*MuscleParameters.MuscleVolumeSIScaled/(Lf0);///< PCSA (cm2) of the individual element is total volumen divided by the sum of muscle element fiber lengths.
 Vol0 =  1e-4* PCSA * Lf0; ///< Muscle element volume (m3)
};
#endif


#if BM_FOOT_MODEL == _FOOT_MODEL_TOE_FLEX_GM_

AnyMuscleModel AdductorHallucisOblique4 =
{
 AnyFolder& MuscleParameters = ..ModelParameters.Muscles.AdductorHallucisOblique4;
 AnyIntVar MuscleElemNo = 1; ///< The number of this element of the muscle
 AnyIntVar MuscleElemAmount = MuscleParameters.MuscleElemAmount; ///< The total amount of elements for this muscle
 F0 = .DefaultMusPar.PCSAfactor*PCSA; ///< Maximum force output at optimum fiber length
 Lf0 =.FiberLengthScaleFoot*(MuscleParameters.OptimalFiberlength
       / cos(pi/180*MuscleParameters.Pennationangle));
 AnyVar PCSA = 1e4*.StrengthScaleFoot*MuscleParameters.MuscleVolumeSIScaled/(Lf0);///< PCSA (cm2) of the individual element is total volumen divided by the sum of muscle element fiber lengths.
 Vol0 =  1e-4* PCSA * Lf0; ///< Muscle element volume (m3)
};
#endif


#if BM_FOOT_MODEL == _FOOT_MODEL_TOE_FLEX_GM_

AnyMuscleModel AdductorHallucisOblique5 =
{
 AnyFolder& MuscleParameters = ..ModelParameters.Muscles.AdductorHallucisOblique5;
 AnyIntVar MuscleElemNo = 1; ///< The number of this element of the muscle
 AnyIntVar MuscleElemAmount = MuscleParameters.MuscleElemAmount; ///< The total amount of elements for this muscle
 F0 = .DefaultMusPar.PCSAfactor*PCSA; ///< Maximum force output at optimum fiber length
 Lf0 =.FiberLengthScaleFoot*(MuscleParameters.OptimalFiberlength
       / cos(pi/180*MuscleParameters.Pennationangle));
 AnyVar PCSA = 1e4*.StrengthScaleFoot*MuscleParameters.MuscleVolumeSIScaled/(Lf0);///< PCSA (cm2) of the individual element is total volumen divided by the sum of muscle element fiber lengths.
 Vol0 =  1e-4* PCSA * Lf0; ///< Muscle element volume (m3)
};
#endif


#if BM_FOOT_MODEL == _FOOT_MODEL_TOE_FLEX_GM_

AnyMuscleModel AdductorHallucisTransverse1 =
{
 AnyFolder& MuscleParameters = ..ModelParameters.Muscles.AdductorHallucisTransverse1;
 AnyIntVar MuscleElemNo = 1; ///< The number of this element of the muscle
 AnyIntVar MuscleElemAmount = MuscleParameters.MuscleElemAmount; ///< The total amount of elements for this muscle
 F0 = .DefaultMusPar.PCSAfactor*PCSA; ///< Maximum force output at optimum fiber length
 Lf0 =.FiberLengthScaleFoot*(MuscleParameters.OptimalFiberlength
       / cos(pi/180*MuscleParameters.Pennationangle));
 AnyVar PCSA = 1e4*.StrengthScaleFoot*MuscleParameters.MuscleVolumeSIScaled/(Lf0);///< PCSA (cm2) of the individual element is total volumen divided by the sum of muscle element fiber lengths.
 Vol0 =  1e-4* PCSA * Lf0; ///< Muscle element volume (m3)
};
#endif


#if BM_FOOT_MODEL == _FOOT_MODEL_TOE_FLEX_GM_

AnyMuscleModel AdductorHallucisTransverse2 =
{
 AnyFolder& MuscleParameters = ..ModelParameters.Muscles.AdductorHallucisTransverse2;
 AnyIntVar MuscleElemNo = 1; ///< The number of this element of the muscle
 AnyIntVar MuscleElemAmount = MuscleParameters.MuscleElemAmount; ///< The total amount of elements for this muscle
 F0 = .DefaultMusPar.PCSAfactor*PCSA; ///< Maximum force output at optimum fiber length
 Lf0 =.FiberLengthScaleFoot*(MuscleParameters.OptimalFiberlength
       / cos(pi/180*MuscleParameters.Pennationangle));
 AnyVar PCSA = 1e4*.StrengthScaleFoot*MuscleParameters.MuscleVolumeSIScaled/(Lf0);///< PCSA (cm2) of the individual element is total volumen divided by the sum of muscle element fiber lengths.
 Vol0 =  1e-4* PCSA * Lf0; ///< Muscle element volume (m3)
};
#endif


#if BM_FOOT_MODEL == _FOOT_MODEL_TOE_FLEX_GM_

AnyMuscleModel AdductorHallucisTransverse3 =
{
 AnyFolder& MuscleParameters = ..ModelParameters.Muscles.AdductorHallucisTransverse3;
 AnyIntVar MuscleElemNo = 1; ///< The number of this element of the muscle
 AnyIntVar MuscleElemAmount = MuscleParameters.MuscleElemAmount; ///< The total amount of elements for this muscle
 F0 = .DefaultMusPar.PCSAfactor*PCSA; ///< Maximum force output at optimum fiber length
 Lf0 =.FiberLengthScaleFoot*(MuscleParameters.OptimalFiberlength
       / cos(pi/180*MuscleParameters.Pennationangle));
 AnyVar PCSA = 1e4*.StrengthScaleFoot*MuscleParameters.MuscleVolumeSIScaled/(Lf0);///< PCSA (cm2) of the individual element is total volumen divided by the sum of muscle element fiber lengths.
 Vol0 =  1e-4* PCSA * Lf0; ///< Muscle element volume (m3)
};
#endif


#if BM_FOOT_MODEL == _FOOT_MODEL_TOE_FLEX_GM_

AnyMuscleModel ExtensorHallucisBrevis =
{
 AnyFolder& MuscleParameters = ..ModelParameters.Muscles.ExtensorHallucisBrevis;
 AnyIntVar MuscleElemNo = 1; ///< The number of this element of the muscle
 AnyIntVar MuscleElemAmount = MuscleParameters.MuscleElemAmount; ///< The total amount of elements for this muscle
 F0 = .DefaultMusPar.PCSAfactor*PCSA; ///< Maximum force output at optimum fiber length
 Lf0 =.FiberLengthScaleFoot*(MuscleParameters.OptimalFiberlength
       / cos(pi/180*MuscleParameters.Pennationangle));
 AnyVar PCSA = 1e4*.StrengthScaleFoot*MuscleParameters.MuscleVolumeSIScaled/(Lf0);///< PCSA (cm2) of the individual element is total volumen divided by the sum of muscle element fiber lengths.
 Vol0 =  1e-4* PCSA * Lf0; ///< Muscle element volume (m3)
};
#endif


#if BM_FOOT_MODEL == _FOOT_MODEL_TOE_FLEX_GM_

AnyMuscleModel DorsalInterosseous1Part1 =
{
 AnyFolder& MuscleParameters = ..ModelParameters.Muscles.DorsalInterosseous1Part1;
 AnyIntVar MuscleElemNo = 1; ///< The number of this element of the muscle
 AnyIntVar MuscleElemAmount = MuscleParameters.MuscleElemAmount; ///< The total amount of elements for this muscle
 F0 = .DefaultMusPar.PCSAfactor*PCSA; ///< Maximum force output at optimum fiber length
 Lf0 =.FiberLengthScaleFoot*(MuscleParameters.OptimalFiberlength
       / cos(pi/180*MuscleParameters.Pennationangle));
 AnyVar PCSA = 1e4*.StrengthScaleFoot*MuscleParameters.MuscleVolumeSIScaled/(Lf0);///< PCSA (cm2) of the individual element is total volumen divided by the sum of muscle element fiber lengths.
 Vol0 =  1e-4* PCSA * Lf0; ///< Muscle element volume (m3)
};
#endif


#if BM_FOOT_MODEL == _FOOT_MODEL_TOE_FLEX_GM_

AnyMuscleModel DorsalInterosseous1Part2 =
{
 AnyFolder& MuscleParameters = ..ModelParameters.Muscles.DorsalInterosseous1Part2;
 AnyIntVar MuscleElemNo = 1; ///< The number of this element of the muscle
 AnyIntVar MuscleElemAmount = MuscleParameters.MuscleElemAmount; ///< The total amount of elements for this muscle
 F0 = .DefaultMusPar.PCSAfactor*PCSA; ///< Maximum force output at optimum fiber length
 Lf0 =.FiberLengthScaleFoot*(MuscleParameters.OptimalFiberlength
       / cos(pi/180*MuscleParameters.Pennationangle));
 AnyVar PCSA = 1e4*.StrengthScaleFoot*MuscleParameters.MuscleVolumeSIScaled/(Lf0);///< PCSA (cm2) of the individual element is total volumen divided by the sum of muscle element fiber lengths.
 Vol0 =  1e-4* PCSA * Lf0; ///< Muscle element volume (m3)
};
#endif


#if BM_FOOT_MODEL == _FOOT_MODEL_TOE_FLEX_GM_

AnyMuscleModel DorsalInterosseous2Part1 =
{
 AnyFolder& MuscleParameters = ..ModelParameters.Muscles.DorsalInterosseous2Part1;
 AnyIntVar MuscleElemNo = 1; ///< The number of this element of the muscle
 AnyIntVar MuscleElemAmount = MuscleParameters.MuscleElemAmount; ///< The total amount of elements for this muscle
 F0 = .DefaultMusPar.PCSAfactor*PCSA; ///< Maximum force output at optimum fiber length
 Lf0 =.FiberLengthScaleFoot*(MuscleParameters.OptimalFiberlength
       / cos(pi/180*MuscleParameters.Pennationangle));
 AnyVar PCSA = 1e4*.StrengthScaleFoot*MuscleParameters.MuscleVolumeSIScaled/(Lf0);///< PCSA (cm2) of the individual element is total volumen divided by the sum of muscle element fiber lengths.
 Vol0 =  1e-4* PCSA * Lf0; ///< Muscle element volume (m3)
};
#endif


#if BM_FOOT_MODEL == _FOOT_MODEL_TOE_FLEX_GM_

AnyMuscleModel DorsalInterosseous2Part2 =
{
 AnyFolder& MuscleParameters = ..ModelParameters.Muscles.DorsalInterosseous2Part2;
 AnyIntVar MuscleElemNo = 1; ///< The number of this element of the muscle
 AnyIntVar MuscleElemAmount = MuscleParameters.MuscleElemAmount; ///< The total amount of elements for this muscle
 F0 = .DefaultMusPar.PCSAfactor*PCSA; ///< Maximum force output at optimum fiber length
 Lf0 =.FiberLengthScaleFoot*(MuscleParameters.OptimalFiberlength
       / cos(pi/180*MuscleParameters.Pennationangle));
 AnyVar PCSA = 1e4*.StrengthScaleFoot*MuscleParameters.MuscleVolumeSIScaled/(Lf0);///< PCSA (cm2) of the individual element is total volumen divided by the sum of muscle element fiber lengths.
 Vol0 =  1e-4* PCSA * Lf0; ///< Muscle element volume (m3)
};
#endif


#if BM_FOOT_MODEL == _FOOT_MODEL_TOE_FLEX_GM_

AnyMuscleModel DorsalInterosseous3Part1 =
{
 AnyFolder& MuscleParameters = ..ModelParameters.Muscles.DorsalInterosseous3Part1;
 AnyIntVar MuscleElemNo = 1; ///< The number of this element of the muscle
 AnyIntVar MuscleElemAmount = MuscleParameters.MuscleElemAmount; ///< The total amount of elements for this muscle
 F0 = .DefaultMusPar.PCSAfactor*PCSA; ///< Maximum force output at optimum fiber length
 Lf0 =.FiberLengthScaleFoot*(MuscleParameters.OptimalFiberlength
       / cos(pi/180*MuscleParameters.Pennationangle));
 AnyVar PCSA = 1e4*.StrengthScaleFoot*MuscleParameters.MuscleVolumeSIScaled/(Lf0);///< PCSA (cm2) of the individual element is total volumen divided by the sum of muscle element fiber lengths.
 Vol0 =  1e-4* PCSA * Lf0; ///< Muscle element volume (m3)
};
#endif


#if BM_FOOT_MODEL == _FOOT_MODEL_TOE_FLEX_GM_

AnyMuscleModel DorsalInterosseous3Part2 =
{
 AnyFolder& MuscleParameters = ..ModelParameters.Muscles.DorsalInterosseous3Part2;
 AnyIntVar MuscleElemNo = 1; ///< The number of this element of the muscle
 AnyIntVar MuscleElemAmount = MuscleParameters.MuscleElemAmount; ///< The total amount of elements for this muscle
 F0 = .DefaultMusPar.PCSAfactor*PCSA; ///< Maximum force output at optimum fiber length
 Lf0 =.FiberLengthScaleFoot*(MuscleParameters.OptimalFiberlength
       / cos(pi/180*MuscleParameters.Pennationangle));
 AnyVar PCSA = 1e4*.StrengthScaleFoot*MuscleParameters.MuscleVolumeSIScaled/(Lf0);///< PCSA (cm2) of the individual element is total volumen divided by the sum of muscle element fiber lengths.
 Vol0 =  1e-4* PCSA * Lf0; ///< Muscle element volume (m3)
};
#endif


#if BM_FOOT_MODEL == _FOOT_MODEL_TOE_FLEX_GM_

AnyMuscleModel DorsalInterosseous4Part1 =
{
 AnyFolder& MuscleParameters = ..ModelParameters.Muscles.DorsalInterosseous4Part1;
 AnyIntVar MuscleElemNo = 1; ///< The number of this element of the muscle
 AnyIntVar MuscleElemAmount = MuscleParameters.MuscleElemAmount; ///< The total amount of elements for this muscle
 F0 = .DefaultMusPar.PCSAfactor*PCSA; ///< Maximum force output at optimum fiber length
 Lf0 =.FiberLengthScaleFoot*(MuscleParameters.OptimalFiberlength
       / cos(pi/180*MuscleParameters.Pennationangle));
 AnyVar PCSA = 1e4*.StrengthScaleFoot*MuscleParameters.MuscleVolumeSIScaled/(Lf0);///< PCSA (cm2) of the individual element is total volumen divided by the sum of muscle element fiber lengths.
 Vol0 =  1e-4* PCSA * Lf0; ///< Muscle element volume (m3)
};
#endif


#if BM_FOOT_MODEL == _FOOT_MODEL_TOE_FLEX_GM_

AnyMuscleModel DorsalInterosseous4Part2 =
{
 AnyFolder& MuscleParameters = ..ModelParameters.Muscles.DorsalInterosseous4Part2;
 AnyIntVar MuscleElemNo = 1; ///< The number of this element of the muscle
 AnyIntVar MuscleElemAmount = MuscleParameters.MuscleElemAmount; ///< The total amount of elements for this muscle
 F0 = .DefaultMusPar.PCSAfactor*PCSA; ///< Maximum force output at optimum fiber length
 Lf0 =.FiberLengthScaleFoot*(MuscleParameters.OptimalFiberlength
       / cos(pi/180*MuscleParameters.Pennationangle));
 AnyVar PCSA = 1e4*.StrengthScaleFoot*MuscleParameters.MuscleVolumeSIScaled/(Lf0);///< PCSA (cm2) of the individual element is total volumen divided by the sum of muscle element fiber lengths.
 Vol0 =  1e-4* PCSA * Lf0; ///< Muscle element volume (m3)
};
#endif


#if BM_FOOT_MODEL == _FOOT_MODEL_TOE_FLEX_GM_

AnyMuscleModel ExtensorDigitoriumBrevis2 =
{
 AnyFolder& MuscleParameters = ..ModelParameters.Muscles.ExtensorDigitoriumBrevis2;
 AnyIntVar MuscleElemNo = 1; ///< The number of this element of the muscle
 AnyIntVar MuscleElemAmount = MuscleParameters.MuscleElemAmount; ///< The total amount of elements for this muscle
 F0 = .DefaultMusPar.PCSAfactor*PCSA; ///< Maximum force output at optimum fiber length
 Lf0 =.FiberLengthScaleFoot*(MuscleParameters.OptimalFiberlength
       / cos(pi/180*MuscleParameters.Pennationangle));
 AnyVar PCSA = 1e4*.StrengthScaleFoot*MuscleParameters.MuscleVolumeSIScaled/(Lf0);///< PCSA (cm2) of the individual element is total volumen divided by the sum of muscle element fiber lengths.
 Vol0 =  1e-4* PCSA * Lf0; ///< Muscle element volume (m3)
};
#endif


#if BM_FOOT_MODEL == _FOOT_MODEL_TOE_FLEX_GM_

AnyMuscleModel ExtensorDigitoriumBrevis3 =
{
 AnyFolder& MuscleParameters = ..ModelParameters.Muscles.ExtensorDigitoriumBrevis3;
 AnyIntVar MuscleElemNo = 1; ///< The number of this element of the muscle
 AnyIntVar MuscleElemAmount = MuscleParameters.MuscleElemAmount; ///< The total amount of elements for this muscle
 F0 = .DefaultMusPar.PCSAfactor*PCSA; ///< Maximum force output at optimum fiber length
 Lf0 =.FiberLengthScaleFoot*(MuscleParameters.OptimalFiberlength
       / cos(pi/180*MuscleParameters.Pennationangle));
 AnyVar PCSA = 1e4*.StrengthScaleFoot*MuscleParameters.MuscleVolumeSIScaled/(Lf0);///< PCSA (cm2) of the individual element is total volumen divided by the sum of muscle element fiber lengths.
 Vol0 =  1e-4* PCSA * Lf0; ///< Muscle element volume (m3)
};
#endif


#if BM_FOOT_MODEL == _FOOT_MODEL_TOE_FLEX_GM_

AnyMuscleModel ExtensorDigitoriumBrevis4 =
{
 AnyFolder& MuscleParameters = ..ModelParameters.Muscles.ExtensorDigitoriumBrevis4;
 AnyIntVar MuscleElemNo = 1; ///< The number of this element of the muscle
 AnyIntVar MuscleElemAmount = MuscleParameters.MuscleElemAmount; ///< The total amount of elements for this muscle
 F0 = .DefaultMusPar.PCSAfactor*PCSA; ///< Maximum force output at optimum fiber length
 Lf0 =.FiberLengthScaleFoot*(MuscleParameters.OptimalFiberlength
       / cos(pi/180*MuscleParameters.Pennationangle));
 AnyVar PCSA = 1e4*.StrengthScaleFoot*MuscleParameters.MuscleVolumeSIScaled/(Lf0);///< PCSA (cm2) of the individual element is total volumen divided by the sum of muscle element fiber lengths.
 Vol0 =  1e-4* PCSA * Lf0; ///< Muscle element volume (m3)
};
#endif


#if BM_FOOT_MODEL == _FOOT_MODEL_TOE_FLEX_GM_

AnyMuscleModel PlantarInterosseous1 =
{
 AnyFolder& MuscleParameters = ..ModelParameters.Muscles.PlantarInterosseous1;
 AnyIntVar MuscleElemNo = 1; ///< The number of this element of the muscle
 AnyIntVar MuscleElemAmount = MuscleParameters.MuscleElemAmount; ///< The total amount of elements for this muscle
 F0 = .DefaultMusPar.PCSAfactor*PCSA; ///< Maximum force output at optimum fiber length
 Lf0 =.FiberLengthScaleFoot*(MuscleParameters.OptimalFiberlength
       / cos(pi/180*MuscleParameters.Pennationangle));
 AnyVar PCSA = 1e4*.StrengthScaleFoot*MuscleParameters.MuscleVolumeSIScaled/(Lf0);///< PCSA (cm2) of the individual element is total volumen divided by the sum of muscle element fiber lengths.
 Vol0 =  1e-4* PCSA * Lf0; ///< Muscle element volume (m3)
};
#endif


#if BM_FOOT_MODEL == _FOOT_MODEL_TOE_FLEX_GM_

AnyMuscleModel PlantarInterosseous2Part1 =
{
 AnyFolder& MuscleParameters = ..ModelParameters.Muscles.PlantarInterosseous2Part1;
 AnyIntVar MuscleElemNo = 1; ///< The number of this element of the muscle
 AnyIntVar MuscleElemAmount = MuscleParameters.MuscleElemAmount; ///< The total amount of elements for this muscle
 F0 = .DefaultMusPar.PCSAfactor*PCSA; ///< Maximum force output at optimum fiber length
 Lf0 =.FiberLengthScaleFoot*(MuscleParameters.OptimalFiberlength
       / cos(pi/180*MuscleParameters.Pennationangle));
 AnyVar PCSA = 1e4*.StrengthScaleFoot*MuscleParameters.MuscleVolumeSIScaled/(Lf0);///< PCSA (cm2) of the individual element is total volumen divided by the sum of muscle element fiber lengths.
 Vol0 =  1e-4* PCSA * Lf0; ///< Muscle element volume (m3)
};
#endif


#if BM_FOOT_MODEL == _FOOT_MODEL_TOE_FLEX_GM_

AnyMuscleModel PlantarInterosseous2Part2 =
{
 AnyFolder& MuscleParameters = ..ModelParameters.Muscles.PlantarInterosseous2Part2;
 AnyIntVar MuscleElemNo = 1; ///< The number of this element of the muscle
 AnyIntVar MuscleElemAmount = MuscleParameters.MuscleElemAmount; ///< The total amount of elements for this muscle
 F0 = .DefaultMusPar.PCSAfactor*PCSA; ///< Maximum force output at optimum fiber length
 Lf0 =.FiberLengthScaleFoot*(MuscleParameters.OptimalFiberlength
       / cos(pi/180*MuscleParameters.Pennationangle));
 AnyVar PCSA = 1e4*.StrengthScaleFoot*MuscleParameters.MuscleVolumeSIScaled/(Lf0);///< PCSA (cm2) of the individual element is total volumen divided by the sum of muscle element fiber lengths.
 Vol0 =  1e-4* PCSA * Lf0; ///< Muscle element volume (m3)
};
#endif


#if BM_FOOT_MODEL == _FOOT_MODEL_TOE_FLEX_GM_

AnyMuscleModel PlantarInterosseous2Part3 =
{
 AnyFolder& MuscleParameters = ..ModelParameters.Muscles.PlantarInterosseous2Part3;
 AnyIntVar MuscleElemNo = 1; ///< The number of this element of the muscle
 AnyIntVar MuscleElemAmount = MuscleParameters.MuscleElemAmount; ///< The total amount of elements for this muscle
 F0 = .DefaultMusPar.PCSAfactor*PCSA; ///< Maximum force output at optimum fiber length
 Lf0 =.FiberLengthScaleFoot*(MuscleParameters.OptimalFiberlength
       / cos(pi/180*MuscleParameters.Pennationangle));
 AnyVar PCSA = 1e4*.StrengthScaleFoot*MuscleParameters.MuscleVolumeSIScaled/(Lf0);///< PCSA (cm2) of the individual element is total volumen divided by the sum of muscle element fiber lengths.
 Vol0 =  1e-4* PCSA * Lf0; ///< Muscle element volume (m3)
};
#endif


#if BM_FOOT_MODEL == _FOOT_MODEL_TOE_FLEX_GM_

AnyMuscleModel PlantarInterosseous3Part1 =
{
 AnyFolder& MuscleParameters = ..ModelParameters.Muscles.PlantarInterosseous3Part1;
 AnyIntVar MuscleElemNo = 1; ///< The number of this element of the muscle
 AnyIntVar MuscleElemAmount = MuscleParameters.MuscleElemAmount; ///< The total amount of elements for this muscle
 F0 = .DefaultMusPar.PCSAfactor*PCSA; ///< Maximum force output at optimum fiber length
 Lf0 =.FiberLengthScaleFoot*(MuscleParameters.OptimalFiberlength
       / cos(pi/180*MuscleParameters.Pennationangle));
 AnyVar PCSA = 1e4*.StrengthScaleFoot*MuscleParameters.MuscleVolumeSIScaled/(Lf0);///< PCSA (cm2) of the individual element is total volumen divided by the sum of muscle element fiber lengths.
 Vol0 =  1e-4* PCSA * Lf0; ///< Muscle element volume (m3)
};
#endif


#if BM_FOOT_MODEL == _FOOT_MODEL_TOE_FLEX_GM_

AnyMuscleModel PlantarInterosseous3Part2 =
{
 AnyFolder& MuscleParameters = ..ModelParameters.Muscles.PlantarInterosseous3Part2;
 AnyIntVar MuscleElemNo = 1; ///< The number of this element of the muscle
 AnyIntVar MuscleElemAmount = MuscleParameters.MuscleElemAmount; ///< The total amount of elements for this muscle
 F0 = .DefaultMusPar.PCSAfactor*PCSA; ///< Maximum force output at optimum fiber length
 Lf0 =.FiberLengthScaleFoot*(MuscleParameters.OptimalFiberlength
       / cos(pi/180*MuscleParameters.Pennationangle));
 AnyVar PCSA = 1e4*.StrengthScaleFoot*MuscleParameters.MuscleVolumeSIScaled/(Lf0);///< PCSA (cm2) of the individual element is total volumen divided by the sum of muscle element fiber lengths.
 Vol0 =  1e-4* PCSA * Lf0; ///< Muscle element volume (m3)
};
#endif


#if BM_FOOT_MODEL == _FOOT_MODEL_TOE_FLEX_GM_

AnyMuscleModel PlantarInterosseous3Part3 =
{
 AnyFolder& MuscleParameters = ..ModelParameters.Muscles.PlantarInterosseous3Part3;
 AnyIntVar MuscleElemNo = 1; ///< The number of this element of the muscle
 AnyIntVar MuscleElemAmount = MuscleParameters.MuscleElemAmount; ///< The total amount of elements for this muscle
 F0 = .DefaultMusPar.PCSAfactor*PCSA; ///< Maximum force output at optimum fiber length
 Lf0 =.FiberLengthScaleFoot*(MuscleParameters.OptimalFiberlength
       / cos(pi/180*MuscleParameters.Pennationangle));
 AnyVar PCSA = 1e4*.StrengthScaleFoot*MuscleParameters.MuscleVolumeSIScaled/(Lf0);///< PCSA (cm2) of the individual element is total volumen divided by the sum of muscle element fiber lengths.
 Vol0 =  1e-4* PCSA * Lf0; ///< Muscle element volume (m3)
};
#endif


#if BM_FOOT_MODEL == _FOOT_MODEL_TOE_FLEX_GM_

AnyMuscleModel FlexorDigitorumBrevis2 =
{
 AnyFolder& MuscleParameters = ..ModelParameters.Muscles.FlexorDigitorumBrevis2;
 AnyIntVar MuscleElemNo = 1; ///< The number of this element of the muscle
 AnyIntVar MuscleElemAmount = MuscleParameters.MuscleElemAmount; ///< The total amount of elements for this muscle
 F0 = .DefaultMusPar.PCSAfactor*PCSA; ///< Maximum force output at optimum fiber length
 Lf0 =.FiberLengthScaleFoot*(MuscleParameters.OptimalFiberlength
       / cos(pi/180*MuscleParameters.Pennationangle));
 AnyVar PCSA = 1e4*.StrengthScaleFoot*MuscleParameters.MuscleVolumeSIScaled/(Lf0);///< PCSA (cm2) of the individual element is total volumen divided by the sum of muscle element fiber lengths.
 Vol0 =  1e-4* PCSA * Lf0; ///< Muscle element volume (m3)
};
#endif


#if BM_FOOT_MODEL == _FOOT_MODEL_TOE_FLEX_GM_

AnyMuscleModel FlexorDigitorumBrevis3 =
{
 AnyFolder& MuscleParameters = ..ModelParameters.Muscles.FlexorDigitorumBrevis3;
 AnyIntVar MuscleElemNo = 1; ///< The number of this element of the muscle
 AnyIntVar MuscleElemAmount = MuscleParameters.MuscleElemAmount; ///< The total amount of elements for this muscle
 F0 = .DefaultMusPar.PCSAfactor*PCSA; ///< Maximum force output at optimum fiber length
 Lf0 =.FiberLengthScaleFoot*(MuscleParameters.OptimalFiberlength
       / cos(pi/180*MuscleParameters.Pennationangle));
 AnyVar PCSA = 1e4*.StrengthScaleFoot*MuscleParameters.MuscleVolumeSIScaled/(Lf0);///< PCSA (cm2) of the individual element is total volumen divided by the sum of muscle element fiber lengths.
 Vol0 =  1e-4* PCSA * Lf0; ///< Muscle element volume (m3)
};
#endif


#if BM_FOOT_MODEL == _FOOT_MODEL_TOE_FLEX_GM_

AnyMuscleModel FlexorDigitorumBrevis4 =
{
 AnyFolder& MuscleParameters = ..ModelParameters.Muscles.FlexorDigitorumBrevis4;
 AnyIntVar MuscleElemNo = 1; ///< The number of this element of the muscle
 AnyIntVar MuscleElemAmount = MuscleParameters.MuscleElemAmount; ///< The total amount of elements for this muscle
 F0 = .DefaultMusPar.PCSAfactor*PCSA; ///< Maximum force output at optimum fiber length
 Lf0 =.FiberLengthScaleFoot*(MuscleParameters.OptimalFiberlength
       / cos(pi/180*MuscleParameters.Pennationangle));
 AnyVar PCSA = 1e4*.StrengthScaleFoot*MuscleParameters.MuscleVolumeSIScaled/(Lf0);///< PCSA (cm2) of the individual element is total volumen divided by the sum of muscle element fiber lengths.
 Vol0 =  1e-4* PCSA * Lf0; ///< Muscle element volume (m3)
};
#endif


#if BM_FOOT_MODEL == _FOOT_MODEL_TOE_FLEX_GM_

AnyMuscleModel FlexorDigitorumBrevis5 =
{
 AnyFolder& MuscleParameters = ..ModelParameters.Muscles.FlexorDigitorumBrevis5;
 AnyIntVar MuscleElemNo = 1; ///< The number of this element of the muscle
 AnyIntVar MuscleElemAmount = MuscleParameters.MuscleElemAmount; ///< The total amount of elements for this muscle
 F0 = .DefaultMusPar.PCSAfactor*PCSA; ///< Maximum force output at optimum fiber length
 Lf0 =.FiberLengthScaleFoot*(MuscleParameters.OptimalFiberlength
       / cos(pi/180*MuscleParameters.Pennationangle));
 AnyVar PCSA = 1e4*.StrengthScaleFoot*MuscleParameters.MuscleVolumeSIScaled/(Lf0);///< PCSA (cm2) of the individual element is total volumen divided by the sum of muscle element fiber lengths.
 Vol0 =  1e-4* PCSA * Lf0; ///< Muscle element volume (m3)
};
#endif


#if BM_FOOT_MODEL == _FOOT_MODEL_TOE_FLEX_GM_

AnyMuscleModel QuadratusPlantarMedialis1 =
{
 AnyFolder& MuscleParameters = ..ModelParameters.Muscles.QuadratusPlantarMedialis1;
 AnyIntVar MuscleElemNo = 1; ///< The number of this element of the muscle
 AnyIntVar MuscleElemAmount = MuscleParameters.MuscleElemAmount; ///< The total amount of elements for this muscle
 F0 = .DefaultMusPar.PCSAfactor*PCSA; ///< Maximum force output at optimum fiber length
 Lf0 =.FiberLengthScaleFoot*(MuscleParameters.OptimalFiberlength
       / cos(pi/180*MuscleParameters.Pennationangle));
 AnyVar PCSA = 1e4*.StrengthScaleFoot*MuscleParameters.MuscleVolumeSIScaled/(Lf0);///< PCSA (cm2) of the individual element is total volumen divided by the sum of muscle element fiber lengths.
 Vol0 =  1e-4* PCSA * Lf0; ///< Muscle element volume (m3)
};
#endif


#if BM_FOOT_MODEL == _FOOT_MODEL_TOE_FLEX_GM_

AnyMuscleModel QuadratusPlantarMedialis2 =
{
 AnyFolder& MuscleParameters = ..ModelParameters.Muscles.QuadratusPlantarMedialis2;
 AnyIntVar MuscleElemNo = 1; ///< The number of this element of the muscle
 AnyIntVar MuscleElemAmount = MuscleParameters.MuscleElemAmount; ///< The total amount of elements for this muscle
 F0 = .DefaultMusPar.PCSAfactor*PCSA; ///< Maximum force output at optimum fiber length
 Lf0 =.FiberLengthScaleFoot*(MuscleParameters.OptimalFiberlength
       / cos(pi/180*MuscleParameters.Pennationangle));
 AnyVar PCSA = 1e4*.StrengthScaleFoot*MuscleParameters.MuscleVolumeSIScaled/(Lf0);///< PCSA (cm2) of the individual element is total volumen divided by the sum of muscle element fiber lengths.
 Vol0 =  1e-4* PCSA * Lf0; ///< Muscle element volume (m3)
};
#endif


#if BM_FOOT_MODEL == _FOOT_MODEL_TOE_FLEX_GM_

AnyMuscleModel QuadratusPlantarMedialis3 =
{
 AnyFolder& MuscleParameters = ..ModelParameters.Muscles.QuadratusPlantarMedialis3;
 AnyIntVar MuscleElemNo = 1; ///< The number of this element of the muscle
 AnyIntVar MuscleElemAmount = MuscleParameters.MuscleElemAmount; ///< The total amount of elements for this muscle
 F0 = .DefaultMusPar.PCSAfactor*PCSA; ///< Maximum force output at optimum fiber length
 Lf0 =.FiberLengthScaleFoot*(MuscleParameters.OptimalFiberlength
       / cos(pi/180*MuscleParameters.Pennationangle));
 AnyVar PCSA = 1e4*.StrengthScaleFoot*MuscleParameters.MuscleVolumeSIScaled/(Lf0);///< PCSA (cm2) of the individual element is total volumen divided by the sum of muscle element fiber lengths.
 Vol0 =  1e-4* PCSA * Lf0; ///< Muscle element volume (m3)
};
#endif


#if BM_FOOT_MODEL == _FOOT_MODEL_TOE_FLEX_GM_

AnyMuscleModel QuadratusPlantarLateralis1 =
{
 AnyFolder& MuscleParameters = ..ModelParameters.Muscles.QuadratusPlantarLateralis1;
 AnyIntVar MuscleElemNo = 1; ///< The number of this element of the muscle
 AnyIntVar MuscleElemAmount = MuscleParameters.MuscleElemAmount; ///< The total amount of elements for this muscle
 F0 = .DefaultMusPar.PCSAfactor*PCSA; ///< Maximum force output at optimum fiber length
 Lf0 =.FiberLengthScaleFoot*(MuscleParameters.OptimalFiberlength
       / cos(pi/180*MuscleParameters.Pennationangle));
 AnyVar PCSA = 1e4*.StrengthScaleFoot*MuscleParameters.MuscleVolumeSIScaled/(Lf0);///< PCSA (cm2) of the individual element is total volumen divided by the sum of muscle element fiber lengths.
 Vol0 =  1e-4* PCSA * Lf0; ///< Muscle element volume (m3)
};
#endif
#if BM_FOOT_MODEL == _FOOT_MODEL_TOE_FLEX_GM_

AnyMuscleModel QuadratusPlantarLateralis2 =
{
 AnyFolder& MuscleParameters = ..ModelParameters.Muscles.QuadratusPlantarLateralis2;
 AnyIntVar MuscleElemNo = 1; ///< The number of this element of the muscle
 AnyIntVar MuscleElemAmount = MuscleParameters.MuscleElemAmount; ///< The total amount of elements for this muscle
 F0 = .DefaultMusPar.PCSAfactor*PCSA; ///< Maximum force output at optimum fiber length
 Lf0 =.FiberLengthScaleFoot*(MuscleParameters.OptimalFiberlength
       / cos(pi/180*MuscleParameters.Pennationangle));
 AnyVar PCSA = 1e4*.StrengthScaleFoot*MuscleParameters.MuscleVolumeSIScaled/(Lf0);///< PCSA (cm2) of the individual element is total volumen divided by the sum of muscle element fiber lengths.
 Vol0 =  1e-4* PCSA * Lf0; ///< Muscle element volume (m3)
};
#endif


#if BM_FOOT_MODEL == _FOOT_MODEL_TOE_FLEX_GM_

AnyMuscleModel QuadratusPlantarLateralis3 =
{
 AnyFolder& MuscleParameters = ..ModelParameters.Muscles.QuadratusPlantarLateralis3;
 AnyIntVar MuscleElemNo = 1; ///< The number of this element of the muscle
 AnyIntVar MuscleElemAmount = MuscleParameters.MuscleElemAmount; ///< The total amount of elements for this muscle
 F0 = .DefaultMusPar.PCSAfactor*PCSA; ///< Maximum force output at optimum fiber length
 Lf0 =.FiberLengthScaleFoot*(MuscleParameters.OptimalFiberlength
       / cos(pi/180*MuscleParameters.Pennationangle));
 AnyVar PCSA = 1e4*.StrengthScaleFoot*MuscleParameters.MuscleVolumeSIScaled/(Lf0);///< PCSA (cm2) of the individual element is total volumen divided by the sum of muscle element fiber lengths.
 Vol0 =  1e-4* PCSA * Lf0; ///< Muscle element volume (m3)
};
#endif


#if BM_FOOT_MODEL == _FOOT_MODEL_TOE_FLEX_GM_

AnyMuscleModel Lumbrical2 =
{
 AnyFolder& MuscleParameters = ..ModelParameters.Muscles.Lumbrical2;
 AnyIntVar MuscleElemNo = 1; ///< The number of this element of the muscle
 AnyIntVar MuscleElemAmount = MuscleParameters.MuscleElemAmount; ///< The total amount of elements for this muscle
 F0 = .DefaultMusPar.PCSAfactor*PCSA; ///< Maximum force output at optimum fiber length
 Lf0 =.FiberLengthScaleFoot*(MuscleParameters.OptimalFiberlength
       / cos(pi/180*MuscleParameters.Pennationangle));
 AnyVar PCSA = 1e4*.StrengthScaleFoot*MuscleParameters.MuscleVolumeSIScaled/(Lf0);///< PCSA (cm2) of the individual element is total volumen divided by the sum of muscle element fiber lengths.
 Vol0 =  1e-4* PCSA * Lf0; ///< Muscle element volume (m3)
};
#endif


#if BM_FOOT_MODEL == _FOOT_MODEL_TOE_FLEX_GM_

AnyMuscleModel Lumbrical3 =
{
 AnyFolder& MuscleParameters = ..ModelParameters.Muscles.Lumbrical3;
 AnyIntVar MuscleElemNo = 1; ///< The number of this element of the muscle
 AnyIntVar MuscleElemAmount = MuscleParameters.MuscleElemAmount; ///< The total amount of elements for this muscle
 F0 = .DefaultMusPar.PCSAfactor*PCSA; ///< Maximum force output at optimum fiber length
 Lf0 =.FiberLengthScaleFoot*(MuscleParameters.OptimalFiberlength
       / cos(pi/180*MuscleParameters.Pennationangle));
 AnyVar PCSA = 1e4*.StrengthScaleFoot*MuscleParameters.MuscleVolumeSIScaled/(Lf0);///< PCSA (cm2) of the individual element is total volumen divided by the sum of muscle element fiber lengths.
 Vol0 =  1e-4* PCSA * Lf0; ///< Muscle element volume (m3)
};
#endif


#if BM_FOOT_MODEL == _FOOT_MODEL_TOE_FLEX_GM_

AnyMuscleModel Lumbrical4 =
{
 AnyFolder& MuscleParameters = ..ModelParameters.Muscles.Lumbrical4;
 AnyIntVar MuscleElemNo = 1; ///< The number of this element of the muscle
 AnyIntVar MuscleElemAmount = MuscleParameters.MuscleElemAmount; ///< The total amount of elements for this muscle
 F0 = .DefaultMusPar.PCSAfactor*PCSA; ///< Maximum force output at optimum fiber length
 Lf0 =.FiberLengthScaleFoot*(MuscleParameters.OptimalFiberlength
       / cos(pi/180*MuscleParameters.Pennationangle));
 AnyVar PCSA = 1e4*.StrengthScaleFoot*MuscleParameters.MuscleVolumeSIScaled/(Lf0);///< PCSA (cm2) of the individual element is total volumen divided by the sum of muscle element fiber lengths.
 Vol0 =  1e-4* PCSA * Lf0; ///< Muscle element volume (m3)
};
#endif


#if BM_FOOT_MODEL == _FOOT_MODEL_TOE_FLEX_GM_

AnyMuscleModel Lumbrical5 =
{
 AnyFolder& MuscleParameters = ..ModelParameters.Muscles.Lumbrical5;
 AnyIntVar MuscleElemNo = 1; ///< The number of this element of the muscle
 AnyIntVar MuscleElemAmount = MuscleParameters.MuscleElemAmount; ///< The total amount of elements for this muscle
 F0 = .DefaultMusPar.PCSAfactor*PCSA; ///< Maximum force output at optimum fiber length
 Lf0 =.FiberLengthScaleFoot*(MuscleParameters.OptimalFiberlength
       / cos(pi/180*MuscleParameters.Pennationangle));
 AnyVar PCSA = 1e4*.StrengthScaleFoot*MuscleParameters.MuscleVolumeSIScaled/(Lf0);///< PCSA (cm2) of the individual element is total volumen divided by the sum of muscle element fiber lengths.
 Vol0 =  1e-4* PCSA * Lf0; ///< Muscle element volume (m3)
};
#endif


#if BM_FOOT_MODEL == _FOOT_MODEL_TOE_FLEX_GM_

AnyMuscleModel AbductorDigitiMinimi1 =
{
 AnyFolder& MuscleParameters = ..ModelParameters.Muscles.AbductorDigitiMinimi1;
 AnyIntVar MuscleElemNo = 1; ///< The number of this element of the muscle
 AnyIntVar MuscleElemAmount = MuscleParameters.MuscleElemAmount; ///< The total amount of elements for this muscle
 F0 = .DefaultMusPar.PCSAfactor*PCSA; ///< Maximum force output at optimum fiber length
 Lf0 =.FiberLengthScaleFoot*(MuscleParameters.OptimalFiberlength
       / cos(pi/180*MuscleParameters.Pennationangle));
 AnyVar PCSA = 1e4*.StrengthScaleFoot*MuscleParameters.MuscleVolumeSIScaled/(Lf0);///< PCSA (cm2) of the individual element is total volumen divided by the sum of muscle element fiber lengths.
 Vol0 =  1e-4* PCSA * Lf0; ///< Muscle element volume (m3)
};
#endif


#if BM_FOOT_MODEL == _FOOT_MODEL_TOE_FLEX_GM_

AnyMuscleModel AbductorDigitiMinimi2 =
{
 AnyFolder& MuscleParameters = ..ModelParameters.Muscles.AbductorDigitiMinimi2;
 AnyIntVar MuscleElemNo = 1; ///< The number of this element of the muscle
 AnyIntVar MuscleElemAmount = MuscleParameters.MuscleElemAmount; ///< The total amount of elements for this muscle
 F0 = .DefaultMusPar.PCSAfactor*PCSA; ///< Maximum force output at optimum fiber length
 Lf0 =.FiberLengthScaleFoot*(MuscleParameters.OptimalFiberlength
       / cos(pi/180*MuscleParameters.Pennationangle));
 AnyVar PCSA = 1e4*.StrengthScaleFoot*MuscleParameters.MuscleVolumeSIScaled/(Lf0);///< PCSA (cm2) of the individual element is total volumen divided by the sum of muscle element fiber lengths.
 Vol0 =  1e-4* PCSA * Lf0; ///< Muscle element volume (m3)
};
#endif


#if BM_FOOT_MODEL == _FOOT_MODEL_TOE_FLEX_GM_

AnyMuscleModel AbductorDigitiMinimi3 =
{
 AnyFolder& MuscleParameters = ..ModelParameters.Muscles.AbductorDigitiMinimi3;
 AnyIntVar MuscleElemNo = 1; ///< The number of this element of the muscle
 AnyIntVar MuscleElemAmount = MuscleParameters.MuscleElemAmount; ///< The total amount of elements for this muscle
 F0 = .DefaultMusPar.PCSAfactor*PCSA; ///< Maximum force output at optimum fiber length
 Lf0 =.FiberLengthScaleFoot*(MuscleParameters.OptimalFiberlength
       / cos(pi/180*MuscleParameters.Pennationangle));
 AnyVar PCSA = 1e4*.StrengthScaleFoot*MuscleParameters.MuscleVolumeSIScaled/(Lf0);///< PCSA (cm2) of the individual element is total volumen divided by the sum of muscle element fiber lengths.
 Vol0 =  1e-4* PCSA * Lf0; ///< Muscle element volume (m3)
};
#endif


#if BM_FOOT_MODEL == _FOOT_MODEL_TOE_FLEX_GM_

AnyMuscleModel FlexorDigitiMinimiBrevis =
{
 AnyFolder& MuscleParameters = ..ModelParameters.Muscles.FlexorDigitiMinimiBrevis;
 AnyIntVar MuscleElemNo = 1; ///< The number of this element of the muscle
 AnyIntVar MuscleElemAmount = MuscleParameters.MuscleElemAmount; ///< The total amount of elements for this muscle
 F0 = .DefaultMusPar.PCSAfactor*PCSA; ///< Maximum force output at optimum fiber length
 Lf0 =.FiberLengthScaleFoot*(MuscleParameters.OptimalFiberlength
       / cos(pi/180*MuscleParameters.Pennationangle));
 AnyVar PCSA = 1e4*.StrengthScaleFoot*MuscleParameters.MuscleVolumeSIScaled/(Lf0);///< PCSA (cm2) of the individual element is total volumen divided by the sum of muscle element fiber lengths.
 Vol0 =  1e-4* PCSA * Lf0; ///< Muscle element volume (m3)
};
#endif


#if BM_FOOT_MODEL == _FOOT_MODEL_TOE_FLEX_GM_

AnyMuscleModel FlexorDigitorumLongusToe2Tendon =
{
 AnyFolder& MuscleParameters = ..ModelParameters.Muscles.FlexorDigitorumLongusToe2Tendon;
 AnyIntVar MuscleElemNo = 1; ///< The number of this element of the muscle
 AnyIntVar MuscleElemAmount = MuscleParameters.MuscleElemAmount; ///< The total amount of elements for this muscle
 F0 = .DefaultMusPar.PCSAfactor*PCSA; ///< Maximum force output at optimum fiber length
 Lf0 =.FiberLengthScaleFoot*(MuscleParameters.OptimalFiberlength
       / cos(pi/180*MuscleParameters.Pennationangle));
 AnyVar PCSA = 1e4*.StrengthScaleFoot*MuscleParameters.MuscleVolumeSIScaled/(Lf0);///< PCSA (cm2) of the individual element is total volumen divided by the sum of muscle element fiber lengths.
 Vol0 =  1e-4* PCSA * Lf0; ///< Muscle element volume (m3)
};
#endif


#if BM_FOOT_MODEL == _FOOT_MODEL_TOE_FLEX_GM_

AnyMuscleModel FlexorDigitorumLongusToe3Tendon =
{
 AnyFolder& MuscleParameters = ..ModelParameters.Muscles.FlexorDigitorumLongusToe3Tendon;
 AnyIntVar MuscleElemNo = 1; ///< The number of this element of the muscle
 AnyIntVar MuscleElemAmount = MuscleParameters.MuscleElemAmount; ///< The total amount of elements for this muscle
 F0 = .DefaultMusPar.PCSAfactor*PCSA; ///< Maximum force output at optimum fiber length
 Lf0 =.FiberLengthScaleFoot*(MuscleParameters.OptimalFiberlength
       / cos(pi/180*MuscleParameters.Pennationangle));
 AnyVar PCSA = 1e4*.StrengthScaleFoot*MuscleParameters.MuscleVolumeSIScaled/(Lf0);///< PCSA (cm2) of the individual element is total volumen divided by the sum of muscle element fiber lengths.
 Vol0 =  1e-4* PCSA * Lf0; ///< Muscle element volume (m3)
};
#endif


#if BM_FOOT_MODEL == _FOOT_MODEL_TOE_FLEX_GM_

AnyMuscleModel FlexorDigitorumLongusToe4Tendon =
{
 AnyFolder& MuscleParameters = ..ModelParameters.Muscles.FlexorDigitorumLongusToe4Tendon;
 AnyIntVar MuscleElemNo = 1; ///< The number of this element of the muscle
 AnyIntVar MuscleElemAmount = MuscleParameters.MuscleElemAmount; ///< The total amount of elements for this muscle
 F0 = .DefaultMusPar.PCSAfactor*PCSA; ///< Maximum force output at optimum fiber length
 Lf0 =.FiberLengthScaleFoot*(MuscleParameters.OptimalFiberlength
       / cos(pi/180*MuscleParameters.Pennationangle));
 AnyVar PCSA = 1e4*.StrengthScaleFoot*MuscleParameters.MuscleVolumeSIScaled/(Lf0);///< PCSA (cm2) of the individual element is total volumen divided by the sum of muscle element fiber lengths.
 Vol0 =  1e-4* PCSA * Lf0; ///< Muscle element volume (m3)
};
#endif


#if BM_FOOT_MODEL == _FOOT_MODEL_TOE_FLEX_GM_

AnyMuscleModel FlexorDigitorumLongusToe5Tendon =
{
 AnyFolder& MuscleParameters = ..ModelParameters.Muscles.FlexorDigitorumLongusToe5Tendon;
 AnyIntVar MuscleElemNo = 1; ///< The number of this element of the muscle
 AnyIntVar MuscleElemAmount = MuscleParameters.MuscleElemAmount; ///< The total amount of elements for this muscle
 F0 = .DefaultMusPar.PCSAfactor*PCSA; ///< Maximum force output at optimum fiber length
 Lf0 =.FiberLengthScaleFoot*(MuscleParameters.OptimalFiberlength
       / cos(pi/180*MuscleParameters.Pennationangle));
 AnyVar PCSA = 1e4*.StrengthScaleFoot*MuscleParameters.MuscleVolumeSIScaled/(Lf0);///< PCSA (cm2) of the individual element is total volumen divided by the sum of muscle element fiber lengths.
 Vol0 =  1e-4* PCSA * Lf0; ///< Muscle element volume (m3)
};
#endif


#if BM_FOOT_MODEL == _FOOT_MODEL_TOE_FLEX_GM_

AnyMuscleModel ExtensorDigitorumLongusToe2TendonPart1 =
{
 AnyFolder& MuscleParameters = ..ModelParameters.Muscles.ExtensorDigitorumLongusToe2TendonPart1;
 AnyIntVar MuscleElemNo = 1; ///< The number of this element of the muscle
 AnyIntVar MuscleElemAmount = MuscleParameters.MuscleElemAmount; ///< The total amount of elements for this muscle
 F0 = .DefaultMusPar.PCSAfactor*PCSA; ///< Maximum force output at optimum fiber length
 Lf0 =.FiberLengthScaleFoot*(MuscleParameters.OptimalFiberlength
       / cos(pi/180*MuscleParameters.Pennationangle));
 AnyVar PCSA = 1e4*.StrengthScaleFoot*MuscleParameters.MuscleVolumeSIScaled/(Lf0);///< PCSA (cm2) of the individual element is total volumen divided by the sum of muscle element fiber lengths.
 Vol0 =  1e-4* PCSA * Lf0; ///< Muscle element volume (m3)
};
#endif


#if BM_FOOT_MODEL == _FOOT_MODEL_TOE_FLEX_GM_

AnyMuscleModel ExtensorDigitorumLongusToe2TendonPart2 =
{
 AnyFolder& MuscleParameters = ..ModelParameters.Muscles.ExtensorDigitorumLongusToe2TendonPart2;
 AnyIntVar MuscleElemNo = 1; ///< The number of this element of the muscle
 AnyIntVar MuscleElemAmount = MuscleParameters.MuscleElemAmount; ///< The total amount of elements for this muscle
 F0 = .DefaultMusPar.PCSAfactor*PCSA; ///< Maximum force output at optimum fiber length
 Lf0 =.FiberLengthScaleFoot*(MuscleParameters.OptimalFiberlength
       / cos(pi/180*MuscleParameters.Pennationangle));
 AnyVar PCSA = 1e4*.StrengthScaleFoot*MuscleParameters.MuscleVolumeSIScaled/(Lf0);///< PCSA (cm2) of the individual element is total volumen divided by the sum of muscle element fiber lengths.
 Vol0 =  1e-4* PCSA * Lf0; ///< Muscle element volume (m3)
};
#endif


#if BM_FOOT_MODEL == _FOOT_MODEL_TOE_FLEX_GM_

AnyMuscleModel ExtensorDigitorumLongusToe2TendonPart3 =
{
 AnyFolder& MuscleParameters = ..ModelParameters.Muscles.ExtensorDigitorumLongusToe2TendonPart3;
 AnyIntVar MuscleElemNo = 1; ///< The number of this element of the muscle
 AnyIntVar MuscleElemAmount = MuscleParameters.MuscleElemAmount; ///< The total amount of elements for this muscle
 F0 = .DefaultMusPar.PCSAfactor*PCSA; ///< Maximum force output at optimum fiber length
 Lf0 =.FiberLengthScaleFoot*(MuscleParameters.OptimalFiberlength
       / cos(pi/180*MuscleParameters.Pennationangle));
 AnyVar PCSA = 1e4*.StrengthScaleFoot*MuscleParameters.MuscleVolumeSIScaled/(Lf0);///< PCSA (cm2) of the individual element is total volumen divided by the sum of muscle element fiber lengths.
 Vol0 =  1e-4* PCSA * Lf0; ///< Muscle element volume (m3)
};
#endif


#if BM_FOOT_MODEL == _FOOT_MODEL_TOE_FLEX_GM_

AnyMuscleModel ExtensorDigitorumLongusToe2TendonPart4 =
{
 AnyFolder& MuscleParameters = ..ModelParameters.Muscles.ExtensorDigitorumLongusToe2TendonPart4;
 AnyIntVar MuscleElemNo = 1; ///< The number of this element of the muscle
 AnyIntVar MuscleElemAmount = MuscleParameters.MuscleElemAmount; ///< The total amount of elements for this muscle
 F0 = .DefaultMusPar.PCSAfactor*PCSA; ///< Maximum force output at optimum fiber length
 Lf0 =.FiberLengthScaleFoot*(MuscleParameters.OptimalFiberlength
       / cos(pi/180*MuscleParameters.Pennationangle));
 AnyVar PCSA = 1e4*.StrengthScaleFoot*MuscleParameters.MuscleVolumeSIScaled/(Lf0);///< PCSA (cm2) of the individual element is total volumen divided by the sum of muscle element fiber lengths.
 Vol0 =  1e-4* PCSA * Lf0; ///< Muscle element volume (m3)
};
#endif


#if BM_FOOT_MODEL == _FOOT_MODEL_TOE_FLEX_GM_

AnyMuscleModel ExtensorDigitorumLongusToe3TendonPart1 =
{
 AnyFolder& MuscleParameters = ..ModelParameters.Muscles.ExtensorDigitorumLongusToe3TendonPart1;
 AnyIntVar MuscleElemNo = 1; ///< The number of this element of the muscle
 AnyIntVar MuscleElemAmount = MuscleParameters.MuscleElemAmount; ///< The total amount of elements for this muscle
 F0 = .DefaultMusPar.PCSAfactor*PCSA; ///< Maximum force output at optimum fiber length
 Lf0 =.FiberLengthScaleFoot*(MuscleParameters.OptimalFiberlength
       / cos(pi/180*MuscleParameters.Pennationangle));
 AnyVar PCSA = 1e4*.StrengthScaleFoot*MuscleParameters.MuscleVolumeSIScaled/(Lf0);///< PCSA (cm2) of the individual element is total volumen divided by the sum of muscle element fiber lengths.
 Vol0 =  1e-4* PCSA * Lf0; ///< Muscle element volume (m3)
};
#endif


#if BM_FOOT_MODEL == _FOOT_MODEL_TOE_FLEX_GM_

AnyMuscleModel ExtensorDigitorumLongusToe3TendonPart2 =
{
 AnyFolder& MuscleParameters = ..ModelParameters.Muscles.ExtensorDigitorumLongusToe3TendonPart2;
 AnyIntVar MuscleElemNo = 1; ///< The number of this element of the muscle
 AnyIntVar MuscleElemAmount = MuscleParameters.MuscleElemAmount; ///< The total amount of elements for this muscle
 F0 = .DefaultMusPar.PCSAfactor*PCSA; ///< Maximum force output at optimum fiber length
 Lf0 =.FiberLengthScaleFoot*(MuscleParameters.OptimalFiberlength
       / cos(pi/180*MuscleParameters.Pennationangle));
 AnyVar PCSA = 1e4*.StrengthScaleFoot*MuscleParameters.MuscleVolumeSIScaled/(Lf0);///< PCSA (cm2) of the individual element is total volumen divided by the sum of muscle element fiber lengths.
 Vol0 =  1e-4* PCSA * Lf0; ///< Muscle element volume (m3)
};
#endif


#if BM_FOOT_MODEL == _FOOT_MODEL_TOE_FLEX_GM_

AnyMuscleModel ExtensorDigitorumLongusToe3TendonPart3 =
{
 AnyFolder& MuscleParameters = ..ModelParameters.Muscles.ExtensorDigitorumLongusToe3TendonPart3;
 AnyIntVar MuscleElemNo = 1; ///< The number of this element of the muscle
 AnyIntVar MuscleElemAmount = MuscleParameters.MuscleElemAmount; ///< The total amount of elements for this muscle
 F0 = .DefaultMusPar.PCSAfactor*PCSA; ///< Maximum force output at optimum fiber length
 Lf0 =.FiberLengthScaleFoot*(MuscleParameters.OptimalFiberlength
       / cos(pi/180*MuscleParameters.Pennationangle));
 AnyVar PCSA = 1e4*.StrengthScaleFoot*MuscleParameters.MuscleVolumeSIScaled/(Lf0);///< PCSA (cm2) of the individual element is total volumen divided by the sum of muscle element fiber lengths.
 Vol0 =  1e-4* PCSA * Lf0; ///< Muscle element volume (m3)
};
#endif


#if BM_FOOT_MODEL == _FOOT_MODEL_TOE_FLEX_GM_

AnyMuscleModel ExtensorDigitorumLongusToe3TendonPart4 =
{
 AnyFolder& MuscleParameters = ..ModelParameters.Muscles.ExtensorDigitorumLongusToe3TendonPart4;
 AnyIntVar MuscleElemNo = 1; ///< The number of this element of the muscle
 AnyIntVar MuscleElemAmount = MuscleParameters.MuscleElemAmount; ///< The total amount of elements for this muscle
 F0 = .DefaultMusPar.PCSAfactor*PCSA; ///< Maximum force output at optimum fiber length
 Lf0 =.FiberLengthScaleFoot*(MuscleParameters.OptimalFiberlength
       / cos(pi/180*MuscleParameters.Pennationangle));
 AnyVar PCSA = 1e4*.StrengthScaleFoot*MuscleParameters.MuscleVolumeSIScaled/(Lf0);///< PCSA (cm2) of the individual element is total volumen divided by the sum of muscle element fiber lengths.
 Vol0 =  1e-4* PCSA * Lf0; ///< Muscle element volume (m3)
};
#endif


#if BM_FOOT_MODEL == _FOOT_MODEL_TOE_FLEX_GM_

AnyMuscleModel ExtensorDigitorumLongusToe4TendonPart1 =
{
 AnyFolder& MuscleParameters = ..ModelParameters.Muscles.ExtensorDigitorumLongusToe4TendonPart1;
 AnyIntVar MuscleElemNo = 1; ///< The number of this element of the muscle
 AnyIntVar MuscleElemAmount = MuscleParameters.MuscleElemAmount; ///< The total amount of elements for this muscle
 F0 = .DefaultMusPar.PCSAfactor*PCSA; ///< Maximum force output at optimum fiber length
 Lf0 =.FiberLengthScaleFoot*(MuscleParameters.OptimalFiberlength
       / cos(pi/180*MuscleParameters.Pennationangle));
 AnyVar PCSA = 1e4*.StrengthScaleFoot*MuscleParameters.MuscleVolumeSIScaled/(Lf0);///< PCSA (cm2) of the individual element is total volumen divided by the sum of muscle element fiber lengths.
 Vol0 =  1e-4* PCSA * Lf0; ///< Muscle element volume (m3)
};
#endif


#if BM_FOOT_MODEL == _FOOT_MODEL_TOE_FLEX_GM_

AnyMuscleModel ExtensorDigitorumLongusToe4TendonPart2 =
{
 AnyFolder& MuscleParameters = ..ModelParameters.Muscles.ExtensorDigitorumLongusToe4TendonPart2;
 AnyIntVar MuscleElemNo = 1; ///< The number of this element of the muscle
 AnyIntVar MuscleElemAmount = MuscleParameters.MuscleElemAmount; ///< The total amount of elements for this muscle
 F0 = .DefaultMusPar.PCSAfactor*PCSA; ///< Maximum force output at optimum fiber length
 Lf0 =.FiberLengthScaleFoot*(MuscleParameters.OptimalFiberlength
       / cos(pi/180*MuscleParameters.Pennationangle));
 AnyVar PCSA = 1e4*.StrengthScaleFoot*MuscleParameters.MuscleVolumeSIScaled/(Lf0);///< PCSA (cm2) of the individual element is total volumen divided by the sum of muscle element fiber lengths.
 Vol0 =  1e-4* PCSA * Lf0; ///< Muscle element volume (m3)
};
#endif


#if BM_FOOT_MODEL == _FOOT_MODEL_TOE_FLEX_GM_

AnyMuscleModel ExtensorDigitorumLongusToe4TendonPart3 =
{
 AnyFolder& MuscleParameters = ..ModelParameters.Muscles.ExtensorDigitorumLongusToe4TendonPart3;
 AnyIntVar MuscleElemNo = 1; ///< The number of this element of the muscle
 AnyIntVar MuscleElemAmount = MuscleParameters.MuscleElemAmount; ///< The total amount of elements for this muscle
 F0 = .DefaultMusPar.PCSAfactor*PCSA; ///< Maximum force output at optimum fiber length
 Lf0 =.FiberLengthScaleFoot*(MuscleParameters.OptimalFiberlength
       / cos(pi/180*MuscleParameters.Pennationangle));
 AnyVar PCSA = 1e4*.StrengthScaleFoot*MuscleParameters.MuscleVolumeSIScaled/(Lf0);///< PCSA (cm2) of the individual element is total volumen divided by the sum of muscle element fiber lengths.
 Vol0 =  1e-4* PCSA * Lf0; ///< Muscle element volume (m3)
};
#endif


#if BM_FOOT_MODEL == _FOOT_MODEL_TOE_FLEX_GM_

AnyMuscleModel ExtensorDigitorumLongusToe4TendonPart4 =
{
 AnyFolder& MuscleParameters = ..ModelParameters.Muscles.ExtensorDigitorumLongusToe4TendonPart4;
 AnyIntVar MuscleElemNo = 1; ///< The number of this element of the muscle
 AnyIntVar MuscleElemAmount = MuscleParameters.MuscleElemAmount; ///< The total amount of elements for this muscle
 F0 = .DefaultMusPar.PCSAfactor*PCSA; ///< Maximum force output at optimum fiber length
 Lf0 =.FiberLengthScaleFoot*(MuscleParameters.OptimalFiberlength
       / cos(pi/180*MuscleParameters.Pennationangle));
 AnyVar PCSA = 1e4*.StrengthScaleFoot*MuscleParameters.MuscleVolumeSIScaled/(Lf0);///< PCSA (cm2) of the individual element is total volumen divided by the sum of muscle element fiber lengths.
 Vol0 =  1e-4* PCSA * Lf0; ///< Muscle element volume (m3)
};
#endif


#if BM_FOOT_MODEL == _FOOT_MODEL_TOE_FLEX_GM_

AnyMuscleModel ExtensorDigitorumLongusToe5TendonPart1 =
{
 AnyFolder& MuscleParameters = ..ModelParameters.Muscles.ExtensorDigitorumLongusToe5TendonPart1;
 AnyIntVar MuscleElemNo = 1; ///< The number of this element of the muscle
 AnyIntVar MuscleElemAmount = MuscleParameters.MuscleElemAmount; ///< The total amount of elements for this muscle
 F0 = .DefaultMusPar.PCSAfactor*PCSA; ///< Maximum force output at optimum fiber length
 Lf0 =.FiberLengthScaleFoot*(MuscleParameters.OptimalFiberlength
       / cos(pi/180*MuscleParameters.Pennationangle));
 AnyVar PCSA = 1e4*.StrengthScaleFoot*MuscleParameters.MuscleVolumeSIScaled/(Lf0);///< PCSA (cm2) of the individual element is total volumen divided by the sum of muscle element fiber lengths.
 Vol0 =  1e-4* PCSA * Lf0; ///< Muscle element volume (m3)
};
#endif


#if BM_FOOT_MODEL == _FOOT_MODEL_TOE_FLEX_GM_

AnyMuscleModel ExtensorDigitorumLongusToe5TendonPart2 =
{
 AnyFolder& MuscleParameters = ..ModelParameters.Muscles.ExtensorDigitorumLongusToe5TendonPart2;
 AnyIntVar MuscleElemNo = 1; ///< The number of this element of the muscle
 AnyIntVar MuscleElemAmount = MuscleParameters.MuscleElemAmount; ///< The total amount of elements for this muscle
 F0 = .DefaultMusPar.PCSAfactor*PCSA; ///< Maximum force output at optimum fiber length
 Lf0 =.FiberLengthScaleFoot*(MuscleParameters.OptimalFiberlength
       / cos(pi/180*MuscleParameters.Pennationangle));
 AnyVar PCSA = 1e4*.StrengthScaleFoot*MuscleParameters.MuscleVolumeSIScaled/(Lf0);///< PCSA (cm2) of the individual element is total volumen divided by the sum of muscle element fiber lengths.
 Vol0 =  1e-4* PCSA * Lf0; ///< Muscle element volume (m3)
};
#endif


#if BM_FOOT_MODEL == _FOOT_MODEL_TOE_FLEX_GM_

AnyMuscleModel ExtensorDigitorumLongusToe5TendonPart3 =
{
 AnyFolder& MuscleParameters = ..ModelParameters.Muscles.ExtensorDigitorumLongusToe5TendonPart3;
 AnyIntVar MuscleElemNo = 1; ///< The number of this element of the muscle
 AnyIntVar MuscleElemAmount = MuscleParameters.MuscleElemAmount; ///< The total amount of elements for this muscle
 F0 = .DefaultMusPar.PCSAfactor*PCSA; ///< Maximum force output at optimum fiber length
 Lf0 =.FiberLengthScaleFoot*(MuscleParameters.OptimalFiberlength
       / cos(pi/180*MuscleParameters.Pennationangle));
 AnyVar PCSA = 1e4*.StrengthScaleFoot*MuscleParameters.MuscleVolumeSIScaled/(Lf0);///< PCSA (cm2) of the individual element is total volumen divided by the sum of muscle element fiber lengths.
 Vol0 =  1e-4* PCSA * Lf0; ///< Muscle element volume (m3)
};
#endif


#if BM_FOOT_MODEL == _FOOT_MODEL_TOE_FLEX_GM_

AnyMuscleModel ExtensorDigitorumLongusToe5TendonPart4 =
{
 AnyFolder& MuscleParameters = ..ModelParameters.Muscles.ExtensorDigitorumLongusToe5TendonPart4;
 AnyIntVar MuscleElemNo = 1; ///< The number of this element of the muscle
 AnyIntVar MuscleElemAmount = MuscleParameters.MuscleElemAmount; ///< The total amount of elements for this muscle
 F0 = .DefaultMusPar.PCSAfactor*PCSA; ///< Maximum force output at optimum fiber length
 Lf0 =.FiberLengthScaleFoot*(MuscleParameters.OptimalFiberlength
       / cos(pi/180*MuscleParameters.Pennationangle));
 AnyVar PCSA = 1e4*.StrengthScaleFoot*MuscleParameters.MuscleVolumeSIScaled/(Lf0);///< PCSA (cm2) of the individual element is total volumen divided by the sum of muscle element fiber lengths.
 Vol0 =  1e-4* PCSA * Lf0; ///< Muscle element volume (m3)
};
#endif


#if BM_FOOT_MODEL == _FOOT_MODEL_TOE_FLEX_GM_

AnyMuscleModel ExtensorHallucisLongusTendonPart1 =
{
 AnyFolder& MuscleParameters = ..ModelParameters.Muscles.ExtensorHallucisLongusTendonPart1;
 AnyIntVar MuscleElemNo = 1; ///< The number of this element of the muscle
 AnyIntVar MuscleElemAmount = MuscleParameters.MuscleElemAmount; ///< The total amount of elements for this muscle
 F0 = .DefaultMusPar.PCSAfactor*PCSA; ///< Maximum force output at optimum fiber length
 Lf0 =.FiberLengthScaleFoot*(MuscleParameters.OptimalFiberlength
       / cos(pi/180*MuscleParameters.Pennationangle));
 AnyVar PCSA = 1e4*.StrengthScaleFoot*MuscleParameters.MuscleVolumeSIScaled/(Lf0);///< PCSA (cm2) of the individual element is total volumen divided by the sum of muscle element fiber lengths.
 Vol0 =  1e-4* PCSA * Lf0; ///< Muscle element volume (m3)
};
#endif


#if BM_FOOT_MODEL == _FOOT_MODEL_TOE_FLEX_GM_

AnyMuscleModel ExtensorHallucisLongusTendonPart2 =
{
 AnyFolder& MuscleParameters = ..ModelParameters.Muscles.ExtensorHallucisLongusTendonPart2;
 AnyIntVar MuscleElemNo = 1; ///< The number of this element of the muscle
 AnyIntVar MuscleElemAmount = MuscleParameters.MuscleElemAmount; ///< The total amount of elements for this muscle
 F0 = .DefaultMusPar.PCSAfactor*PCSA; ///< Maximum force output at optimum fiber length
 Lf0 =.FiberLengthScaleFoot*(MuscleParameters.OptimalFiberlength
       / cos(pi/180*MuscleParameters.Pennationangle));
 AnyVar PCSA = 1e4*.StrengthScaleFoot*MuscleParameters.MuscleVolumeSIScaled/(Lf0);///< PCSA (cm2) of the individual element is total volumen divided by the sum of muscle element fiber lengths.
 Vol0 =  1e-4* PCSA * Lf0; ///< Muscle element volume (m3)
};
#endif


#if BM_FOOT_MODEL == _FOOT_MODEL_TOE_FLEX_GM_

AnyMuscleModel ExtensorHallucisLongusTendonPart3 =
{
 AnyFolder& MuscleParameters = ..ModelParameters.Muscles.ExtensorHallucisLongusTendonPart3;
 AnyIntVar MuscleElemNo = 1; ///< The number of this element of the muscle
 AnyIntVar MuscleElemAmount = MuscleParameters.MuscleElemAmount; ///< The total amount of elements for this muscle
 F0 = .DefaultMusPar.PCSAfactor*PCSA; ///< Maximum force output at optimum fiber length
 Lf0 =.FiberLengthScaleFoot*(MuscleParameters.OptimalFiberlength
       / cos(pi/180*MuscleParameters.Pennationangle));
 AnyVar PCSA = 1e4*.StrengthScaleFoot*MuscleParameters.MuscleVolumeSIScaled/(Lf0);///< PCSA (cm2) of the individual element is total volumen divided by the sum of muscle element fiber lengths.
 Vol0 =  1e-4* PCSA * Lf0; ///< Muscle element volume (m3)
};
#endif
