#if 1

#include "RightLegSelectedOutput.any"

#else

SelectedOutput.Right = {

  AnyFolder Leg = {


    SelectedOutputGroup JointReactionForce = {


      /// Lateral positive
      AnyVar Hip_MediolateralForce = ....Right.Leg.Joints.Hip.Constraints.Reaction.Fout[2];
      /// Proximal positive
      AnyVar Hip_ProximoDistalForce = ....Right.Leg.Joints.Hip.Constraints.Reaction.Fout[1];
      /// Anterior positive
      AnyVar Hip_AnteroPosteriorForce = ....Right.Leg.Joints.Hip.Constraints.Reaction.Fout[0];
      // Thigh.HipJoint ref

      /// Lateral positive
      AnyVar Knee_MedioLateralForce = ....Right.Leg.Joints.Knee.Constraints.Reaction.Fout[2];
      /// Proximal positive
      AnyVar Knee_ProximoDistalForce = ....Right.Leg.Joints.Knee.Constraints.Reaction.Fout[1];
      /// Anterior positive
      AnyVar Knee_AnteroPosteriorForce = ....Right.Leg.Joints.Knee.Constraints.Reaction.Fout[0];
      /// Internal positive
      AnyVar Knee_AxialMoment = ....Right.Leg.MomentMeasure.KneeJointReactionMoments.Mlocal[1];
      /// Internal positive
      AnyVar Knee_LateralMoment = ....Right.Leg.MomentMeasure.KneeJointReactionMoments.Mlocal[0];
      // Thigh.KneeJoint ref

      /// Lateral positive
      AnyVar Ankle_MedioLateralForce = ....Right.Leg.Joints.Ankle.Constraints.Reaction.Fout[2];
      /// Proximal positive
      AnyVar Ankle_ProximoDistalForce = ....Right.Leg.Joints.Ankle.Constraints.Reaction.Fout[1];
      /// Anterior positive
      AnyVar Ankle_AnteroPosteriorForce = ....Right.Leg.Joints.Ankle.Constraints.Reaction.Fout[0];
      /// Internal positive
      AnyVar Ankle_AxialMoment = ....Right.Leg.MomentMeasure.AnkleJointReactionMoments.Mlocal[1];
      // Shank.AnkleJoint ref


      //****************************************************


    }; //End JointReactionForce


    SelectedOutputGroup JointMomentMeasure = {


      AnyVar HipAbduction = ....Right.Leg.MomentMeasure.HipNetMomentMuscle.MHipAbduction;

      AnyVar HipFlexion = ....Right.Leg.MomentMeasure.HipNetMomentMuscle.MHipFlexion;

      AnyVar HipExternalRotation = ....Right.Leg.MomentMeasure.HipNetMomentMuscle.MHipExternalRotation;
      // HipNodeRef.RotNode ref

      AnyVar KneeFlexion = -....Right.Leg.MomentMeasure.KneeNetMomentMuscle.MKneeFlexion;
      // Shank.KneeJoint.RotNode ref

      AnyVar AnklePlantarFlexion = ....Right.Leg.MomentMeasure.AnklePlantarFlexionNetMomentMuscle.MPlantarFlexion;
      // Shank.AnkleJoint ref

      AnyVar SubTalarEversion = ....Right.Leg.MomentMeasure.SubTalarEversionNetMomentMuscle.MSubTalarEversion;
      // Talus.SubTalarJoint ref


    }; //End JointMomentMeasure


    AnyFolder Muscles = {


      AnySearchFun MuscleList = {
        Search = ".....Right.Leg.Muscles.*.Activity";
      };

      AnyVar Envelope = max(MuscleList());


    }; //End Muscles


  }; //End Leg


}; //End Right

#endif
