//This is the standard parameters for the leg for the unscaled model
// Standard parameter for the foot
//These numbers has to be hardcoded because sometimes they are used for scaling without the leg being present in the model.

#if (BM_LEG_RIGHT == OFF)
  #define LEG_MODEL_PARAMETERS ....BodyModel.Left.Leg.Data.unscaled.ModelParameters
#else
  #define LEG_MODEL_PARAMETERS ....BodyModel.Right.Leg.Data.unscaled.ModelParameters
#endif

AnyFolder Talus = {
  // Standard mass depends on foot model. It comes either from GM
  // or TLEM foot model parameters
  #if (BM_FOOT_MODEL == _FOOT_MODEL_RIGID_GM_) | (BM_FOOT_MODEL == _FOOT_MODEL_TOE_FLEX_GM_) | (BM_FOOT_MODEL == _FOOT_MODEL_DETAILED_GM_)
  AnyVar Mass = LEG_MODEL_PARAMETERS.FootGM.Talus.MassStandard;
  #else
  AnyVar Mass = LEG_MODEL_PARAMETERS.Talus.MassStandard;
  #endif
  // Geometric parameters are always from TLEM as the GM foot
  // is interface morphed to TLEM foot dimensions.
  AnyVar Length =  LEG_MODEL_PARAMETERS.Talus.LengthStandard;
  AnyVar Density = LEG_MODEL_PARAMETERS.Talus.Density;
};

AnyFolder Foot = {
  // Standard mass depends on foot model. It comes either from GM
  // or TLEM foot model parameters
  #if (BM_FOOT_MODEL == _FOOT_MODEL_RIGID_GM_) | (BM_FOOT_MODEL == _FOOT_MODEL_TOE_FLEX_GM_) | (BM_FOOT_MODEL == _FOOT_MODEL_DETAILED_GM_)
  /// Standard mass of GM foot EXCLUDING talus. This is done to be
  /// consistent with the TLEM implementation, where foot mass doesn't
  /// include talus mass. GM foot standard mass includes talus mass.
  AnyVar Mass = LEG_MODEL_PARAMETERS.FootGM.MassStandard - LEG_MODEL_PARAMETERS.FootGM.Talus.MassStandard;
  #else
  AnyVar Mass = LEG_MODEL_PARAMETERS.Foot.MassStandard;
  #endif
  // Geometric parameters are always from TLEM as the GM foot
  // is interface morphed to TLEM foot dimensions.
  AnyVar Length =  LEG_MODEL_PARAMETERS.Foot.LengthStandard;
  AnyVar Height =  LEG_MODEL_PARAMETERS.Foot.HeightStandard;
  AnyVar Width =  LEG_MODEL_PARAMETERS.Foot.WidthStandard;
  AnyVar Density = LEG_MODEL_PARAMETERS.Foot.Density;
};


AnyFolder Shank = {
  AnyVar Mass = LEG_MODEL_PARAMETERS.Shank.MassStandard;
  AnyVar Length =  LEG_MODEL_PARAMETERS.Shank.LengthStandard;
  AnyVar Density = LEG_MODEL_PARAMETERS.Shank.Density;
};


AnyFolder Thigh = {
  AnyVar Mass = LEG_MODEL_PARAMETERS.Thigh.MassStandard;
  AnyVar Length =  LEG_MODEL_PARAMETERS.Thigh.LengthStandard;
  AnyVar Density = LEG_MODEL_PARAMETERS.Thigh.Density;
};

AnyFolder Patella = {
  AnyVar Mass = LEG_MODEL_PARAMETERS.Patella.MassStandard;
  AnyVar Length =  LEG_MODEL_PARAMETERS.Patella.LengthStandard;
  AnyVar Density = LEG_MODEL_PARAMETERS.Patella.Density;
};
#undef LEG_MODEL_PARAMETERS

AnyVar TotalMassLeg=Talus.Mass+Foot.Mass+Shank.Mass+Thigh.Mass+Patella.Mass;
AnyVar LengthLeg = Shank.Length+Thigh.Length;
