/*
  This dataset is part of The TLEMsafe Project Dataset. The dataset was
  created during the TLEMsafe project (www.tlemsafe.eu) funded by the
  European Commission under Grant Agreement (no. 247860) and under the
  TLEMsafe Consortium Agreement.

  Use the following paper when citing:
    Carbone, V., Fluit, R., Pellikaan, P., van der Krogt, M.M., Janssen, D.,
    Damsgaard, M., Vigneron, L., Feilkas, T., Koopman, H.F.J.M., Verdonschot, N., 2015.
    TLEM 2.0 - a comprehensive musculoskeletal geometry dataset for
    subject-specific modeling of lower extremity.
    J. Biomech. 48, 734-741. doi:10.1016/j.jbiomech.2014.12.034


  The TLEMsafe project did not involve measurement of muscle paramters. The parameters of this
  model are therefore taken from the original TLEM model:

  This dataset is based on the PhD thesis by Martijn D. Klein Horsman titled
  "The Twente Lower Extremity Model (TLEM): Consistent Dynamic Simulation of the
  Human Locomotor Apparatus"

  The TLEM muscle parameters are essentially a mixture of parematers which could be obtained by
  Klein Horsman himself as well as data obtained by Scott L. Delp.
  (see http://isbweb.org/data/delp)


  It also contains all the muscle parameter
  data of the intrinsic foot.
  Please note that it is necessary to calibrate the model. Foot data is not calibrated!

  The data for the PCSA, Lfbar and LM (used to calculate Lt0) comes from:
  Quantitative Analysis of the Intrinsic Muscles of the Foot. Kura et al. THE ANATOMICAL RECORD 249:143-151 (1997)

  This data set is prefered to the one from Yamaguchi (2007) because Yamaguchi data set is not complete.
  In addition kura data set has more statistical value (11 subjects against 4 for Yamaguchi).
  However the two data set present a good corelation.

  The data for the pennation angle comes from:
  Musculotendon Parameters and Musculoskeletal Pathways Within the Human Foot. Yamaguchi et al. Journal of Applied Biomechanics, 2007; 23:20-41. (2007)

*/

// This logic ensures that TotalTendonLength and OpatinalFiberLength are not
// created as DesignVars when they are also calibrated.
#if BM_CALIBRATION_TYPE == _CALIBRATION_TYPE_1PAR_
 #define _TENDON_LENGTH_DESIGNVAR(x) (x)
 #define _FIBER_LENGTH_DESIGNVAR(x) DesignVar(x)
#endif
#if BM_CALIBRATION_TYPE == _CALIBRATION_TYPE_2PAR_ | BM_CALIBRATION_TYPE == _EXPERIMENTAL_CALIBRATION_TYPE_2PAR_
 #define _TENDON_LENGTH_DESIGNVAR(x) (x)
 #define _FIBER_LENGTH_DESIGNVAR(x) (x)
#endif
#if BM_CALIBRATION_TYPE == _CALIBRATION_TYPE_CUSTOM_
 #define _TENDON_LENGTH_DESIGNVAR(x) DesignVar(x)
 #define _FIBER_LENGTH_DESIGNVAR(x) DesignVar(x)
#endif


AnyFolder Muscles =
{
  AnyVar VolumeUnitFactor ??= 1e-6; ///< Unit conversion factor for volume (1e-6 > volume in cm^3)
  #if BM_LEG_MUSCLES_RIGHT | BM_LEG_MUSCLES_LEFT

  AnyFolder AdductorBrevisProximal =
  {
    AnyString Muscle = "Add. brev. (prox.)"; ///< Descriptive name for the muscle, e.g. for plotting
    AnyIntVar MuscleElemAmount = 2; ///< The total amount of elements for this muscle
    AnyFloat Pennationangle ??= DesignVar(0.0); ///< Pennation angle of the muscle fibers (degres)
    AnyFloat VolumeScaleFactor ??= DesignVar(1.0); ///< Factor for scaling the muscle volume
    AnyFloat MuscleVolume ??= DesignVar(36.30); ///< Volume of the muscle  (ml)
    AnyFloat MuscleVolumeSIScaled ??= .VolumeUnitFactor*VolumeScaleFactor*MuscleVolume; ///< Scaled Volume of the muscle in SI base unit (m^3)
    AnyFloat OptimalFiberlength ??= _FIBER_LENGTH_DESIGNVAR(9.53/100); ///< Optimal working length of the muscle fiber (m)
    AnyFloat TotalTendonLength ??= _TENDON_LENGTH_DESIGNVAR(0.00/100);///< The total tendon length (m)
    AnyFloat K1 ??= DesignVar(10.00); ///< K1 constant in the muscle model.  Factor for determining shortening speed at optimum length
    AnyFloat K2 ??= DesignVar(0.00); ///< K2 constant in the muscle model.  Factor for determining shortening speed at optimum length
    AnyFloat Epsilon0 ??= DesignVar(0.0530); ///< Epsilon bar in the muscle model. Represents tendon strain at F0
    AnyFloat Fcfast ??= DesignVar(0.4); ///< Factor for determining shortening speed at optimum length
  };
  #endif


  #if BM_LEG_MUSCLES_RIGHT | BM_LEG_MUSCLES_LEFT

  AnyFolder AdductorBrevisMid =
  {
    AnyString Muscle = "Add. brev. (mid.)"; ///< Descriptive name for the muscle, e.g. for plotting
    AnyIntVar MuscleElemAmount = 2; ///< The total amount of elements for this muscle
    AnyFloat Pennationangle ??= DesignVar(0.0); ///< Pennation angle of the muscle fibers (degres)
    AnyFloat VolumeScaleFactor ??= DesignVar(1.0); ///< Factor for scaling the muscle volume
    AnyFloat MuscleVolume ??= DesignVar(36.30); ///< Volume of the muscle  (ml)
    AnyFloat MuscleVolumeSIScaled ??= .VolumeUnitFactor*VolumeScaleFactor*MuscleVolume; ///< Scaled Volume of the muscle in SI base unit (m^3)
    AnyFloat OptimalFiberlength ??= _FIBER_LENGTH_DESIGNVAR(10.38/100); ///< Optimal working length of the muscle fiber (m)
    AnyFloat TotalTendonLength ??= _TENDON_LENGTH_DESIGNVAR(0.00/100);///< The total tendon length (m)
    AnyFloat K1 ??= DesignVar(10.00); ///< K1 constant in the muscle model.  Factor for determining shortening speed at optimum length
    AnyFloat K2 ??= DesignVar(0.00); ///< K2 constant in the muscle model.  Factor for determining shortening speed at optimum length
    AnyFloat Epsilon0 ??= DesignVar(0.0530); ///< Epsilon bar in the muscle model. Represents tendon strain at F0
    AnyFloat Fcfast ??= DesignVar(0.4); ///< Factor for determining shortening speed at optimum length
  };
  #endif


  #if BM_LEG_MUSCLES_RIGHT | BM_LEG_MUSCLES_LEFT

  AnyFolder AdductorBrevisDistal =
  {
    AnyString Muscle = "Add. brev. (dist.)"; ///< Descriptive name for the muscle, e.g. for plotting
    AnyIntVar MuscleElemAmount = 2; ///< The total amount of elements for this muscle
    AnyFloat Pennationangle ??= DesignVar(0.0); ///< Pennation angle of the muscle fibers (degres)
    AnyFloat VolumeScaleFactor ??= DesignVar(1.0); ///< Factor for scaling the muscle volume
    AnyFloat MuscleVolume ??= DesignVar(36.30); ///< Volume of the muscle  (ml)
    AnyFloat MuscleVolumeSIScaled ??= .VolumeUnitFactor*VolumeScaleFactor*MuscleVolume; ///< Scaled Volume of the muscle in SI base unit (m^3)
    AnyFloat OptimalFiberlength ??= _FIBER_LENGTH_DESIGNVAR(11.22/100); ///< Optimal working length of the muscle fiber (m)
    AnyFloat TotalTendonLength ??= _TENDON_LENGTH_DESIGNVAR(0.00/100);///< The total tendon length (m)
    AnyFloat K1 ??= DesignVar(10.00); ///< K1 constant in the muscle model.  Factor for determining shortening speed at optimum length
    AnyFloat K2 ??= DesignVar(0.00); ///< K2 constant in the muscle model.  Factor for determining shortening speed at optimum length
    AnyFloat Epsilon0 ??= DesignVar(0.0530); ///< Epsilon bar in the muscle model. Represents tendon strain at F0
    AnyFloat Fcfast ??= DesignVar(0.4); ///< Factor for determining shortening speed at optimum length
  };
  #endif


  #if BM_LEG_MUSCLES_RIGHT | BM_LEG_MUSCLES_LEFT

  AnyFolder AdductorLongus =
  {
    AnyString Muscle = "Add. long."; ///< Descriptive name for the muscle, e.g. for plotting
    AnyIntVar MuscleElemAmount = 6; ///< The total amount of elements for this muscle
    AnyFloat Pennationangle ??= DesignVar(0.0); ///< Pennation angle of the muscle fibers (degres)
    AnyFloat VolumeScaleFactor ??= DesignVar(1.0); ///< Factor for scaling the muscle volume
    AnyFloat MuscleVolume ??= DesignVar(159.56); ///< Volume of the muscle  (ml)
    AnyFloat MuscleVolumeSIScaled ??= .VolumeUnitFactor*VolumeScaleFactor*MuscleVolume; ///< Scaled Volume of the muscle in SI base unit (m^3)
    AnyFloat OptimalFiberlength ??= _FIBER_LENGTH_DESIGNVAR(10.57/100); ///< Optimal working length of the muscle fiber (m)
    AnyFloat TotalTendonLength ??= _TENDON_LENGTH_DESIGNVAR(0.00/100);///< The total tendon length (m)
    AnyFloat K1 ??= DesignVar(10.00); ///< K1 constant in the muscle model.  Factor for determining shortening speed at optimum length
    AnyFloat K2 ??= DesignVar(0.00); ///< K2 constant in the muscle model.  Factor for determining shortening speed at optimum length
    AnyFloat Epsilon0 ??= DesignVar(0.0530); ///< Epsilon bar in the muscle model. Represents tendon strain at F0
    AnyFloat Fcfast ??= DesignVar(0.4); ///< Factor for determining shortening speed at optimum length
  };
  #endif


  #if BM_LEG_MUSCLES_RIGHT | BM_LEG_MUSCLES_LEFT

  AnyFolder AdductorMagnusDistal =
  {
    AnyString Muscle = "Add. magn. (dist.)"; ///< Descriptive name for the muscle, e.g. for plotting
    AnyIntVar MuscleElemAmount = 3; ///< The total amount of elements for this muscle
    AnyFloat Pennationangle ??= DesignVar(0.0); ///< Pennation angle of the muscle fibers (degres)
    AnyFloat VolumeScaleFactor ??= DesignVar(1.0); ///< Factor for scaling the muscle volume
    AnyFloat MuscleVolume ??= DesignVar(285.98); ///< Volume of the muscle  (ml)
    AnyFloat MuscleVolumeSIScaled ??= .VolumeUnitFactor*VolumeScaleFactor*MuscleVolume; ///< Scaled Volume of the muscle in SI base unit (m^3)
    AnyFloat OptimalFiberlength ??= _FIBER_LENGTH_DESIGNVAR(10.78/100); ///< Optimal working length of the muscle fiber (m)
    AnyFloat TotalTendonLength ??= _TENDON_LENGTH_DESIGNVAR(4.20/100);///< The total tendon length (m)
    AnyFloat K1 ??= DesignVar(10.00); ///< K1 constant in the muscle model.  Factor for determining shortening speed at optimum length
    AnyFloat K2 ??= DesignVar(0.00); ///< K2 constant in the muscle model.  Factor for determining shortening speed at optimum length
    AnyFloat Epsilon0 ??= DesignVar(0.0530); ///< Epsilon bar in the muscle model. Represents tendon strain at F0
    AnyFloat Fcfast ??= DesignVar(0.4); ///< Factor for determining shortening speed at optimum length
  };
  #endif


  #if BM_LEG_MUSCLES_RIGHT | BM_LEG_MUSCLES_LEFT

  AnyFolder AdductorMagnusMid =
  {
    AnyString Muscle = "Add. magn. (mid.) "; ///< Descriptive name for the muscle, e.g. for plotting
    AnyIntVar MuscleElemAmount = 6; ///< The total amount of elements for this muscle
    AnyFloat Pennationangle ??= DesignVar(0.0); ///< Pennation angle of the muscle fibers (degres)
    AnyFloat VolumeScaleFactor ??= DesignVar(1.0); ///< Factor for scaling the muscle volume
    AnyFloat MuscleVolume ??= DesignVar(230.11); ///< Volume of the muscle  (ml)
    AnyFloat MuscleVolumeSIScaled ??= .VolumeUnitFactor*VolumeScaleFactor*MuscleVolume; ///< Scaled Volume of the muscle in SI base unit (m^3)
    AnyFloat OptimalFiberlength ??= _FIBER_LENGTH_DESIGNVAR(10.43/100); ///< Optimal working length of the muscle fiber (m)
    AnyFloat TotalTendonLength ??= _TENDON_LENGTH_DESIGNVAR(0.00/100);///< The total tendon length (m)
    AnyFloat K1 ??= DesignVar(10.00); ///< K1 constant in the muscle model.  Factor for determining shortening speed at optimum length
    AnyFloat K2 ??= DesignVar(0.00); ///< K2 constant in the muscle model.  Factor for determining shortening speed at optimum length
    AnyFloat Epsilon0 ??= DesignVar(0.0530); ///< Epsilon bar in the muscle model. Represents tendon strain at F0
    AnyFloat Fcfast ??= DesignVar(0.4); ///< Factor for determining shortening speed at optimum length
  };
  #endif


  #if BM_LEG_MUSCLES_RIGHT | BM_LEG_MUSCLES_LEFT
/// The fiber length of this muscle was changed (keeping the PCSA constant) since it was too long compared muscle length unscaled. In AMMR1.4 this change was only applied to two of the four elements.
  AnyFolder AdductorMagnusProximal =
  {
    AnyString Muscle = "Add. magn. (prox.)"; ///< Descriptive name for the muscle, e.g. for plotting
    AnyIntVar MuscleElemAmount = 4; ///< The total amount of elements for this muscle
    AnyFloat Pennationangle ??= DesignVar(0.0); ///< Pennation angle of the muscle fibers (degres)
    AnyFloat VolumeScaleFactor ??= DesignVar(1.0); ///< Factor for scaling the muscle volume
    AnyFloat MuscleVolume ??= DesignVar(43.16); ///< Volume of the muscle  (ml)
    AnyFloat MuscleVolumeSIScaled ??= .VolumeUnitFactor*VolumeScaleFactor*MuscleVolume; ///< Scaled Volume of the muscle in SI base unit (m^3)
    AnyFloat OptimalFiberlength ??= _FIBER_LENGTH_DESIGNVAR(8.70/100); ///< Optimal working length of the muscle fiber (m)
    AnyFloat TotalTendonLength ??= _TENDON_LENGTH_DESIGNVAR(0.00/100);///< The total tendon length (m)
    AnyFloat K1 ??= DesignVar(10.00); ///< K1 constant in the muscle model.  Factor for determining shortening speed at optimum length
    AnyFloat K2 ??= DesignVar(0.00); ///< K2 constant in the muscle model.  Factor for determining shortening speed at optimum length
    AnyFloat Epsilon0 ??= DesignVar(0.0530); ///< Epsilon bar in the muscle model. Represents tendon strain at F0
    AnyFloat Fcfast ??= DesignVar(0.4); ///< Factor for determining shortening speed at optimum length
  };
  #endif


  #if BM_LEG_MUSCLES_RIGHT | BM_LEG_MUSCLES_LEFT

  AnyFolder BicepsFemorisCaputLongum =
  {
    AnyString Muscle = "Bic. fem. CL"; ///< Descriptive name for the muscle, e.g. for plotting
    AnyIntVar MuscleElemAmount = 1; ///< The total amount of elements for this muscle
    AnyFloat Pennationangle ??= DesignVar(29.9); ///< Pennation angle of the muscle fibers (degres)
    AnyFloat VolumeScaleFactor ??= DesignVar(1.0); ///< Factor for scaling the muscle volume
    AnyFloat MuscleVolume ??= DesignVar(232.01); ///< Volume of the muscle  (ml)
    AnyFloat MuscleVolumeSIScaled ??= .VolumeUnitFactor*VolumeScaleFactor*MuscleVolume; ///< Scaled Volume of the muscle in SI base unit (m^3)
    AnyFloat OptimalFiberlength ??= _FIBER_LENGTH_DESIGNVAR(8.54/100); ///< Optimal working length of the muscle fiber (m)
    AnyFloat TotalTendonLength ??= _TENDON_LENGTH_DESIGNVAR(13.00/100);///< The total tendon length (m)
    AnyFloat K1 ??= DesignVar(10.00); ///< K1 constant in the muscle model.  Factor for determining shortening speed at optimum length
    AnyFloat K2 ??= DesignVar(0.00); ///< K2 constant in the muscle model.  Factor for determining shortening speed at optimum length
    AnyFloat Epsilon0 ??= DesignVar(0.0530); ///< Epsilon bar in the muscle model. Represents tendon strain at F0
    AnyFloat Fcfast ??= DesignVar(0.4); ///< Factor for determining shortening speed at optimum length
  };
  #endif


  #if BM_LEG_MUSCLES_RIGHT | BM_LEG_MUSCLES_LEFT

  AnyFolder BicepsFemorisCaputBreve =
  {
    AnyString Muscle = "Bic. fem. CB"; ///< Descriptive name for the muscle, e.g. for plotting
    AnyIntVar MuscleElemAmount = 3; ///< The total amount of elements for this muscle
    AnyFloat Pennationangle ??= DesignVar(0.0); ///< Pennation angle of the muscle fibers (degres)
    AnyFloat VolumeScaleFactor ??= DesignVar(1.0); ///< Factor for scaling the muscle volume
    AnyFloat MuscleVolume ??= DesignVar(107.95); ///< Volume of the muscle  (ml)
    AnyFloat MuscleVolumeSIScaled ??= .VolumeUnitFactor*VolumeScaleFactor*MuscleVolume; ///< Scaled Volume of the muscle in SI base unit (m^3)
    AnyFloat OptimalFiberlength ??= _FIBER_LENGTH_DESIGNVAR(9.14/100); ///< Optimal working length of the muscle fiber (m)
    AnyFloat TotalTendonLength ??= _TENDON_LENGTH_DESIGNVAR(3.10/100);///< The total tendon length (m)
    AnyFloat K1 ??= DesignVar(10.00); ///< K1 constant in the muscle model.  Factor for determining shortening speed at optimum length
    AnyFloat K2 ??= DesignVar(0.00); ///< K2 constant in the muscle model.  Factor for determining shortening speed at optimum length
    AnyFloat Epsilon0 ??= DesignVar(0.0530); ///< Epsilon bar in the muscle model. Represents tendon strain at F0
    AnyFloat Fcfast ??= DesignVar(0.4); ///< Factor for determining shortening speed at optimum length
  };
  #endif


  #if BM_LEG_MUSCLES_RIGHT | BM_LEG_MUSCLES_LEFT

  AnyFolder ExtensorDigitorumLongus =
  {
    AnyString Muscle = "Ext. dig. long."; ///< Descriptive name for the muscle, e.g. for plotting
    AnyIntVar MuscleElemAmount = 4; ///< The total amount of elements for this muscle
    AnyFloat Pennationangle ??= DesignVar(8.3); ///< Pennation angle of the muscle fibers (degres)
    AnyFloat VolumeScaleFactor ??= DesignVar(1.0); ///< Factor for scaling the muscle volume
    AnyFloat MuscleVolume ??= DesignVar(32.29); ///< Volume of the muscle  (ml)
    AnyFloat MuscleVolumeSIScaled ??= .VolumeUnitFactor*VolumeScaleFactor*MuscleVolume; ///< Scaled Volume of the muscle in SI base unit (m^3)
    AnyFloat OptimalFiberlength ??= _FIBER_LENGTH_DESIGNVAR(5.99/100); ///< Optimal working length of the muscle fiber (m)
    AnyFloat TotalTendonLength ??= _TENDON_LENGTH_DESIGNVAR(30.10/100);///< The total tendon length (m)
    AnyFloat K1 ??= DesignVar(10.00); ///< K1 constant in the muscle model.  Factor for determining shortening speed at optimum length
    AnyFloat K2 ??= DesignVar(0.00); ///< K2 constant in the muscle model.  Factor for determining shortening speed at optimum length
    AnyFloat Epsilon0 ??= DesignVar(0.0530); ///< Epsilon bar in the muscle model. Represents tendon strain at F0
    AnyFloat Fcfast ??= DesignVar(0.4); ///< Factor for determining shortening speed at optimum length
  };
  #endif


  #if BM_LEG_MUSCLES_RIGHT | BM_LEG_MUSCLES_LEFT

  AnyFolder ExtensorHallucisLongus =
  {
    AnyString Muscle = "Ext. hal. long."; ///< Descriptive name for the muscle, e.g. for plotting
    AnyIntVar MuscleElemAmount = 3; ///< The total amount of elements for this muscle
    AnyFloat Pennationangle ??= DesignVar(14.4); ///< Pennation angle of the muscle fibers (degres)
    AnyFloat VolumeScaleFactor ??= DesignVar(1.0); ///< Factor for scaling the muscle volume
    AnyFloat MuscleVolume ??= DesignVar(36.27); ///< Volume of the muscle  (ml)
    AnyFloat MuscleVolumeSIScaled ??= .VolumeUnitFactor*VolumeScaleFactor*MuscleVolume; ///< Scaled Volume of the muscle in SI base unit (m^3)
    AnyFloat OptimalFiberlength ??= _FIBER_LENGTH_DESIGNVAR(5.98/100); ///< Optimal working length of the muscle fiber (m)
    AnyFloat TotalTendonLength ??= _TENDON_LENGTH_DESIGNVAR(17.80/100);///< The total tendon length (m)
    AnyFloat K1 ??= DesignVar(10.00); ///< K1 constant in the muscle model.  Factor for determining shortening speed at optimum length
    AnyFloat K2 ??= DesignVar(0.00); ///< K2 constant in the muscle model.  Factor for determining shortening speed at optimum length
    AnyFloat Epsilon0 ??= DesignVar(0.0530); ///< Epsilon bar in the muscle model. Represents tendon strain at F0
    AnyFloat Fcfast ??= DesignVar(0.4); ///< Factor for determining shortening speed at optimum length
  };
  #endif


  #if BM_LEG_MUSCLES_RIGHT | BM_LEG_MUSCLES_LEFT

  AnyFolder FlexorDigitorumLongus =
  {
    AnyString Muscle = "Flex. dig. long."; ///< Descriptive name for the muscle, e.g. for plotting
    AnyIntVar MuscleElemAmount = 4; ///< The total amount of elements for this muscle
    AnyFloat Pennationangle ??= DesignVar(28.4); ///< Pennation angle of the muscle fibers (degres)
    AnyFloat VolumeScaleFactor ??= DesignVar(1.0); ///< Factor for scaling the muscle volume
    AnyFloat MuscleVolume ??= DesignVar(25.28); ///< Volume of the muscle  (ml)
    AnyFloat MuscleVolumeSIScaled ??= .VolumeUnitFactor*VolumeScaleFactor*MuscleVolume; ///< Scaled Volume of the muscle in SI base unit (m^3)
    AnyFloat OptimalFiberlength ??= _FIBER_LENGTH_DESIGNVAR(3.84/100); ///< Optimal working length of the muscle fiber (m)
    AnyFloat TotalTendonLength ??= _TENDON_LENGTH_DESIGNVAR(16.60/100);///< The total tendon length (m)
    AnyFloat K1 ??= DesignVar(10.00); ///< K1 constant in the muscle model.  Factor for determining shortening speed at optimum length
    AnyFloat K2 ??= DesignVar(0.00); ///< K2 constant in the muscle model.  Factor for determining shortening speed at optimum length
    AnyFloat Epsilon0 ??= DesignVar(0.0530); ///< Epsilon bar in the muscle model. Represents tendon strain at F0
    AnyFloat Fcfast ??= DesignVar(0.4); ///< Factor for determining shortening speed at optimum length
  };
  #endif


  #if BM_LEG_MUSCLES_RIGHT | BM_LEG_MUSCLES_LEFT
///  The fiber length value have been corrected compared to the original data set. (Optimum fiber length Ward et al 2009
  AnyFolder FlexorHallucisLongus =
  {
    AnyString Muscle = "Flex. hal. long."; ///< Descriptive name for the muscle, e.g. for plotting
    AnyIntVar MuscleElemAmount = 3; ///< The total amount of elements for this muscle
    AnyFloat Pennationangle ??= DesignVar(30.1); ///< Pennation angle of the muscle fibers (degres)
    AnyFloat VolumeScaleFactor ??= DesignVar(1.0); ///< Factor for scaling the muscle volume
    AnyFloat MuscleVolume ??= DesignVar(161.50); ///< Volume of the muscle  (ml)
    AnyFloat MuscleVolumeSIScaled ??= .VolumeUnitFactor*VolumeScaleFactor*MuscleVolume; ///< Scaled Volume of the muscle in SI base unit (m^3)
    AnyFloat OptimalFiberlength ??= _FIBER_LENGTH_DESIGNVAR(5.20/100); ///< Optimal working length of the muscle fiber (m)
    AnyFloat TotalTendonLength ??= _TENDON_LENGTH_DESIGNVAR(23.40/100);///< The total tendon length (m)
    AnyFloat K1 ??= DesignVar(10.00); ///< K1 constant in the muscle model.  Factor for determining shortening speed at optimum length
    AnyFloat K2 ??= DesignVar(0.00); ///< K2 constant in the muscle model.  Factor for determining shortening speed at optimum length
    AnyFloat Epsilon0 ??= DesignVar(0.0530); ///< Epsilon bar in the muscle model. Represents tendon strain at F0
    AnyFloat Fcfast ??= DesignVar(0.4); ///< Factor for determining shortening speed at optimum length
  };
  #endif


  #if BM_LEG_MUSCLES_RIGHT | BM_LEG_MUSCLES_LEFT

  AnyFolder GastrocnemiusLateralis =
  {
    AnyString Muscle = "Gastrocn. (lat.)"; ///< Descriptive name for the muscle, e.g. for plotting
    AnyIntVar MuscleElemAmount = 1; ///< The total amount of elements for this muscle
    AnyFloat Pennationangle ??= DesignVar(25.4); ///< Pennation angle of the muscle fibers (degres)
    AnyFloat VolumeScaleFactor ??= DesignVar(1.0); ///< Factor for scaling the muscle volume
    AnyFloat MuscleVolume ??= DesignVar(136.36); ///< Volume of the muscle  (ml)
    AnyFloat MuscleVolumeSIScaled ??= .VolumeUnitFactor*VolumeScaleFactor*MuscleVolume; ///< Scaled Volume of the muscle in SI base unit (m^3)
    AnyFloat OptimalFiberlength ??= _FIBER_LENGTH_DESIGNVAR(5.69/100); ///< Optimal working length of the muscle fiber (m)
    AnyFloat TotalTendonLength ??= _TENDON_LENGTH_DESIGNVAR(23.40/100);///< The total tendon length (m)
    AnyFloat K1 ??= DesignVar(10.00); ///< K1 constant in the muscle model.  Factor for determining shortening speed at optimum length
    AnyFloat K2 ??= DesignVar(0.00); ///< K2 constant in the muscle model.  Factor for determining shortening speed at optimum length
    AnyFloat Epsilon0 ??= DesignVar(0.0530); ///< Epsilon bar in the muscle model. Represents tendon strain at F0
    AnyFloat Fcfast ??= DesignVar(0.4); ///< Factor for determining shortening speed at optimum length
  };
  #endif


  #if BM_LEG_MUSCLES_RIGHT | BM_LEG_MUSCLES_LEFT

  AnyFolder GastrocnemiusMedialis =
  {
    AnyString Muscle = "Gastrocn. (med.)"; ///< Descriptive name for the muscle, e.g. for plotting
    AnyIntVar MuscleElemAmount = 1; ///< The total amount of elements for this muscle
    AnyFloat Pennationangle ??= DesignVar(10.8); ///< Pennation angle of the muscle fibers (degres)
    AnyFloat VolumeScaleFactor ??= DesignVar(1.0); ///< Factor for scaling the muscle volume
    AnyFloat MuscleVolume ??= DesignVar(263.26); ///< Volume of the muscle  (ml)
    AnyFloat MuscleVolumeSIScaled ??= .VolumeUnitFactor*VolumeScaleFactor*MuscleVolume; ///< Scaled Volume of the muscle in SI base unit (m^3)
    AnyFloat OptimalFiberlength ??= _FIBER_LENGTH_DESIGNVAR(6.01/100); ///< Optimal working length of the muscle fiber (m)
    AnyFloat TotalTendonLength ??= _TENDON_LENGTH_DESIGNVAR(21.20/100);///< The total tendon length (m)
    AnyFloat K1 ??= DesignVar(10.00); ///< K1 constant in the muscle model.  Factor for determining shortening speed at optimum length
    AnyFloat K2 ??= DesignVar(0.00); ///< K2 constant in the muscle model.  Factor for determining shortening speed at optimum length
    AnyFloat Epsilon0 ??= DesignVar(0.0530); ///< Epsilon bar in the muscle model. Represents tendon strain at F0
    AnyFloat Fcfast ??= DesignVar(0.4); ///< Factor for determining shortening speed at optimum length
  };
  #endif


  #if BM_LEG_MUSCLES_RIGHT | BM_LEG_MUSCLES_LEFT

  AnyFolder GemellusInferior =
  {
    AnyString Muscle = "Gemellus (inf.)"; ///< Descriptive name for the muscle, e.g. for plotting
    AnyIntVar MuscleElemAmount = 1; ///< The total amount of elements for this muscle
    AnyFloat Pennationangle ??= DesignVar(0.0); ///< Pennation angle of the muscle fibers (degres)
    AnyFloat VolumeScaleFactor ??= DesignVar(1.0); ///< Factor for scaling the muscle volume
    AnyFloat MuscleVolume ??= DesignVar(14.20); ///< Volume of the muscle  (ml)
    AnyFloat MuscleVolumeSIScaled ??= .VolumeUnitFactor*VolumeScaleFactor*MuscleVolume; ///< Scaled Volume of the muscle in SI base unit (m^3)
    AnyFloat OptimalFiberlength ??= _FIBER_LENGTH_DESIGNVAR(3.43/100); ///< Optimal working length of the muscle fiber (m)
    AnyFloat TotalTendonLength ??= _TENDON_LENGTH_DESIGNVAR(0.00/100);///< The total tendon length (m)
    AnyFloat K1 ??= DesignVar(10.00); ///< K1 constant in the muscle model.  Factor for determining shortening speed at optimum length
    AnyFloat K2 ??= DesignVar(0.00); ///< K2 constant in the muscle model.  Factor for determining shortening speed at optimum length
    AnyFloat Epsilon0 ??= DesignVar(0.0530); ///< Epsilon bar in the muscle model. Represents tendon strain at F0
    AnyFloat Fcfast ??= DesignVar(0.4); ///< Factor for determining shortening speed at optimum length
  };
  #endif


  #if BM_LEG_MUSCLES_RIGHT | BM_LEG_MUSCLES_LEFT

  AnyFolder GemellusSuperior =
  {
    AnyString Muscle = "Gemellus (sup.)"; ///< Descriptive name for the muscle, e.g. for plotting
    AnyIntVar MuscleElemAmount = 1; ///< The total amount of elements for this muscle
    AnyFloat Pennationangle ??= DesignVar(0.0); ///< Pennation angle of the muscle fibers (degres)
    AnyFloat VolumeScaleFactor ??= DesignVar(1.0); ///< Factor for scaling the muscle volume
    AnyFloat MuscleVolume ??= DesignVar(14.20); ///< Volume of the muscle  (ml)
    AnyFloat MuscleVolumeSIScaled ??= .VolumeUnitFactor*VolumeScaleFactor*MuscleVolume; ///< Scaled Volume of the muscle in SI base unit (m^3)
    AnyFloat OptimalFiberlength ??= _FIBER_LENGTH_DESIGNVAR(3.43/100); ///< Optimal working length of the muscle fiber (m)
    AnyFloat TotalTendonLength ??= _TENDON_LENGTH_DESIGNVAR(0.00/100);///< The total tendon length (m)
    AnyFloat K1 ??= DesignVar(10.00); ///< K1 constant in the muscle model.  Factor for determining shortening speed at optimum length
    AnyFloat K2 ??= DesignVar(0.00); ///< K2 constant in the muscle model.  Factor for determining shortening speed at optimum length
    AnyFloat Epsilon0 ??= DesignVar(0.0530); ///< Epsilon bar in the muscle model. Represents tendon strain at F0
    AnyFloat Fcfast ??= DesignVar(0.4); ///< Factor for determining shortening speed at optimum length
  };
  #endif


  #if BM_LEG_MUSCLES_RIGHT | BM_LEG_MUSCLES_LEFT
/// The volume ratio between Glut.Max. inferior/superior been corrected based on the MRI scan of the cadaver 3 from TLEMsafe project
  AnyFolder GluteusMaximusSuperior =
  {
    AnyString Muscle = "Glut. max. (sup.)"; ///< Descriptive name for the muscle, e.g. for plotting
    AnyIntVar MuscleElemAmount = 6; ///< The total amount of elements for this muscle
    AnyFloat Pennationangle ??= DesignVar(0.0); ///< Pennation angle of the muscle fibers (degres)
    AnyFloat VolumeScaleFactor ??= DesignVar(1.0); ///< Factor for scaling the muscle volume
    AnyFloat MuscleVolume ??= DesignVar(258.52); ///< Volume of the muscle  (ml)
    AnyFloat MuscleVolumeSIScaled ??= .VolumeUnitFactor*VolumeScaleFactor*MuscleVolume; ///< Scaled Volume of the muscle in SI base unit (m^3)
    AnyFloat OptimalFiberlength ??= _FIBER_LENGTH_DESIGNVAR(12.00/100); ///< Optimal working length of the muscle fiber (m)
    AnyFloat TotalTendonLength ??= _TENDON_LENGTH_DESIGNVAR(0.00/100);///< The total tendon length (m)
    AnyFloat K1 ??= DesignVar(10.00); ///< K1 constant in the muscle model.  Factor for determining shortening speed at optimum length
    AnyFloat K2 ??= DesignVar(0.00); ///< K2 constant in the muscle model.  Factor for determining shortening speed at optimum length
    AnyFloat Epsilon0 ??= DesignVar(0.0530); ///< Epsilon bar in the muscle model. Represents tendon strain at F0
    AnyFloat Fcfast ??= DesignVar(0.4); ///< Factor for determining shortening speed at optimum length
  };
  #endif


  #if BM_LEG_MUSCLES_RIGHT | BM_LEG_MUSCLES_LEFT
/// The volume ratio between Glut.Max. inferior/superior been corrected based on the MRI scan of the cadaver 3 from TLEMsafe project
  AnyFolder GluteusMaximusInferior =
  {
    AnyString Muscle = "Glut. max. (inf.)"; ///< Descriptive name for the muscle, e.g. for plotting
    AnyIntVar MuscleElemAmount = 6; ///< The total amount of elements for this muscle
    AnyFloat Pennationangle ??= DesignVar(0.0); ///< Pennation angle of the muscle fibers (degres)
    AnyFloat VolumeScaleFactor ??= DesignVar(1.0); ///< Factor for scaling the muscle volume
    AnyFloat MuscleVolume ??= DesignVar(678.03); ///< Volume of the muscle  (ml)
    AnyFloat MuscleVolumeSIScaled ??= .VolumeUnitFactor*VolumeScaleFactor*MuscleVolume; ///< Scaled Volume of the muscle in SI base unit (m^3)
    AnyFloat OptimalFiberlength ??= _FIBER_LENGTH_DESIGNVAR(15.14/100); ///< Optimal working length of the muscle fiber (m)
    AnyFloat TotalTendonLength ??= _TENDON_LENGTH_DESIGNVAR(0.00/100);///< The total tendon length (m)
    AnyFloat K1 ??= DesignVar(10.00); ///< K1 constant in the muscle model.  Factor for determining shortening speed at optimum length
    AnyFloat K2 ??= DesignVar(0.00); ///< K2 constant in the muscle model.  Factor for determining shortening speed at optimum length
    AnyFloat Epsilon0 ??= DesignVar(0.0530); ///< Epsilon bar in the muscle model. Represents tendon strain at F0
    AnyFloat Fcfast ??= DesignVar(0.4); ///< Factor for determining shortening speed at optimum length
  };
  #endif


  #if BM_LEG_MUSCLES_RIGHT | BM_LEG_MUSCLES_LEFT

  AnyFolder GluteusMediusAnterior =
  {
    AnyString Muscle = "Glut. med. (ant.)"; ///< Descriptive name for the muscle, e.g. for plotting
    AnyIntVar MuscleElemAmount = 6; ///< The total amount of elements for this muscle
    AnyFloat Pennationangle ??= DesignVar(0.0); ///< Pennation angle of the muscle fibers (degres)
    AnyFloat VolumeScaleFactor ??= DesignVar(1.0); ///< Factor for scaling the muscle volume
    AnyFloat MuscleVolume ??= DesignVar(144.41); ///< Volume of the muscle  (ml)
    AnyFloat MuscleVolumeSIScaled ??= .VolumeUnitFactor*VolumeScaleFactor*MuscleVolume; ///< Scaled Volume of the muscle in SI base unit (m^3)
    AnyFloat OptimalFiberlength ??= _FIBER_LENGTH_DESIGNVAR(3.81/100); ///< Optimal working length of the muscle fiber (m)
    AnyFloat TotalTendonLength ??= _TENDON_LENGTH_DESIGNVAR(0.00/100);///< The total tendon length (m)
    AnyFloat K1 ??= DesignVar(10.00); ///< K1 constant in the muscle model.  Factor for determining shortening speed at optimum length
    AnyFloat K2 ??= DesignVar(0.00); ///< K2 constant in the muscle model.  Factor for determining shortening speed at optimum length
    AnyFloat Epsilon0 ??= DesignVar(0.0530); ///< Epsilon bar in the muscle model. Represents tendon strain at F0
    AnyFloat Fcfast ??= DesignVar(0.4); ///< Factor for determining shortening speed at optimum length
  };
  #endif


  #if BM_LEG_MUSCLES_RIGHT | BM_LEG_MUSCLES_LEFT

  AnyFolder GluteusMediusPosterior =
  {
    AnyString Muscle = "Glut. med. (post.)"; ///< Descriptive name for the muscle, e.g. for plotting
    AnyIntVar MuscleElemAmount = 6; ///< The total amount of elements for this muscle
    AnyFloat Pennationangle ??= DesignVar(15.9); ///< Pennation angle of the muscle fibers (degres)
    AnyFloat VolumeScaleFactor ??= DesignVar(1.0); ///< Factor for scaling the muscle volume
    AnyFloat MuscleVolume ??= DesignVar(271.78); ///< Volume of the muscle  (ml)
    AnyFloat MuscleVolumeSIScaled ??= .VolumeUnitFactor*VolumeScaleFactor*MuscleVolume; ///< Scaled Volume of the muscle in SI base unit (m^3)
    AnyFloat OptimalFiberlength ??= _FIBER_LENGTH_DESIGNVAR(4.47/100); ///< Optimal working length of the muscle fiber (m)
    AnyFloat TotalTendonLength ??= _TENDON_LENGTH_DESIGNVAR(3.00/100);///< The total tendon length (m)
    AnyFloat K1 ??= DesignVar(10.00); ///< K1 constant in the muscle model.  Factor for determining shortening speed at optimum length
    AnyFloat K2 ??= DesignVar(0.00); ///< K2 constant in the muscle model.  Factor for determining shortening speed at optimum length
    AnyFloat Epsilon0 ??= DesignVar(0.0530); ///< Epsilon bar in the muscle model. Represents tendon strain at F0
    AnyFloat Fcfast ??= DesignVar(0.4); ///< Factor for determining shortening speed at optimum length
  };
  #endif


  #if BM_LEG_MUSCLES_RIGHT | BM_LEG_MUSCLES_LEFT

  AnyFolder GluteusMinimusAnterior =
  {
    AnyString Muscle = "Glut. min. (ant.)"; ///< Descriptive name for the muscle, e.g. for plotting
    AnyIntVar MuscleElemAmount = 1; ///< The total amount of elements for this muscle
    AnyFloat Pennationangle ??= DesignVar(0.0); ///< Pennation angle of the muscle fibers (degres)
    AnyFloat VolumeScaleFactor ??= DesignVar(1.0); ///< Factor for scaling the muscle volume
    AnyFloat MuscleVolume ??= DesignVar(27.53); ///< Volume of the muscle  (ml)
    AnyFloat MuscleVolumeSIScaled ??= .VolumeUnitFactor*VolumeScaleFactor*MuscleVolume; ///< Scaled Volume of the muscle in SI base unit (m^3)
    AnyFloat OptimalFiberlength ??= _FIBER_LENGTH_DESIGNVAR(2.76/100); ///< Optimal working length of the muscle fiber (m)
    AnyFloat TotalTendonLength ??= _TENDON_LENGTH_DESIGNVAR(7.28/100);///< The total tendon length (m)
    AnyFloat K1 ??= DesignVar(10.00); ///< K1 constant in the muscle model.  Factor for determining shortening speed at optimum length
    AnyFloat K2 ??= DesignVar(0.00); ///< K2 constant in the muscle model.  Factor for determining shortening speed at optimum length
    AnyFloat Epsilon0 ??= DesignVar(0.0530); ///< Epsilon bar in the muscle model. Represents tendon strain at F0
    AnyFloat Fcfast ??= DesignVar(0.4); ///< Factor for determining shortening speed at optimum length
  };
  #endif


  #if BM_LEG_MUSCLES_RIGHT | BM_LEG_MUSCLES_LEFT

  AnyFolder GluteusMinimusMid =
  {
    AnyString Muscle = "Glut. min. (mid.)"; ///< Descriptive name for the muscle, e.g. for plotting
    AnyIntVar MuscleElemAmount = 1; ///< The total amount of elements for this muscle
    AnyFloat Pennationangle ??= DesignVar(0.0); ///< Pennation angle of the muscle fibers (degres)
    AnyFloat VolumeScaleFactor ??= DesignVar(1.0); ///< Factor for scaling the muscle volume
    AnyFloat MuscleVolume ??= DesignVar(27.53); ///< Volume of the muscle  (ml)
    AnyFloat MuscleVolumeSIScaled ??= .VolumeUnitFactor*VolumeScaleFactor*MuscleVolume; ///< Scaled Volume of the muscle in SI base unit (m^3)
    AnyFloat OptimalFiberlength ??= _FIBER_LENGTH_DESIGNVAR(3.38/100); ///< Optimal working length of the muscle fiber (m)
    AnyFloat TotalTendonLength ??= _TENDON_LENGTH_DESIGNVAR(7.28/100);///< The total tendon length (m)
    AnyFloat K1 ??= DesignVar(10.00); ///< K1 constant in the muscle model.  Factor for determining shortening speed at optimum length
    AnyFloat K2 ??= DesignVar(0.00); ///< K2 constant in the muscle model.  Factor for determining shortening speed at optimum length
    AnyFloat Epsilon0 ??= DesignVar(0.0530); ///< Epsilon bar in the muscle model. Represents tendon strain at F0
    AnyFloat Fcfast ??= DesignVar(0.4); ///< Factor for determining shortening speed at optimum length
  };
  #endif


  #if BM_LEG_MUSCLES_RIGHT | BM_LEG_MUSCLES_LEFT

  AnyFolder GluteusMinimusPosterior =
  {
    AnyString Muscle = "Glut. min. (post.)"; ///< Descriptive name for the muscle, e.g. for plotting
    AnyIntVar MuscleElemAmount = 1; ///< The total amount of elements for this muscle
    AnyFloat Pennationangle ??= DesignVar(0.0); ///< Pennation angle of the muscle fibers (degres)
    AnyFloat VolumeScaleFactor ??= DesignVar(1.0); ///< Factor for scaling the muscle volume
    AnyFloat MuscleVolume ??= DesignVar(27.53); ///< Volume of the muscle  (ml)
    AnyFloat MuscleVolumeSIScaled ??= .VolumeUnitFactor*VolumeScaleFactor*MuscleVolume; ///< Scaled Volume of the muscle in SI base unit (m^3)
    AnyFloat OptimalFiberlength ??= _FIBER_LENGTH_DESIGNVAR(3.70/100); ///< Optimal working length of the muscle fiber (m)
    AnyFloat TotalTendonLength ??= _TENDON_LENGTH_DESIGNVAR(7.28/100);///< The total tendon length (m)
    AnyFloat K1 ??= DesignVar(10.00); ///< K1 constant in the muscle model.  Factor for determining shortening speed at optimum length
    AnyFloat K2 ??= DesignVar(0.00); ///< K2 constant in the muscle model.  Factor for determining shortening speed at optimum length
    AnyFloat Epsilon0 ??= DesignVar(0.0530); ///< Epsilon bar in the muscle model. Represents tendon strain at F0
    AnyFloat Fcfast ??= DesignVar(0.4); ///< Factor for determining shortening speed at optimum length
  };
  #endif


  #if BM_LEG_MUSCLES_RIGHT | BM_LEG_MUSCLES_LEFT

  AnyFolder Gracilis =
  {
    AnyString Muscle = "Gracilis"; ///< Descriptive name for the muscle, e.g. for plotting
    AnyIntVar MuscleElemAmount = 2; ///< The total amount of elements for this muscle
    AnyFloat Pennationangle ??= DesignVar(0.0); ///< Pennation angle of the muscle fibers (degres)
    AnyFloat VolumeScaleFactor ??= DesignVar(1.0); ///< Factor for scaling the muscle volume
    AnyFloat MuscleVolume ??= DesignVar(87.97); ///< Volume of the muscle  (ml)
    AnyFloat MuscleVolumeSIScaled ??= .VolumeUnitFactor*VolumeScaleFactor*MuscleVolume; ///< Scaled Volume of the muscle in SI base unit (m^3)
    AnyFloat OptimalFiberlength ??= _FIBER_LENGTH_DESIGNVAR(18.11/100); ///< Optimal working length of the muscle fiber (m)
    AnyFloat TotalTendonLength ??= _TENDON_LENGTH_DESIGNVAR(14.00/100);///< The total tendon length (m)
    AnyFloat K1 ??= DesignVar(10.00); ///< K1 constant in the muscle model.  Factor for determining shortening speed at optimum length
    AnyFloat K2 ??= DesignVar(0.00); ///< K2 constant in the muscle model.  Factor for determining shortening speed at optimum length
    AnyFloat Epsilon0 ??= DesignVar(0.0530); ///< Epsilon bar in the muscle model. Represents tendon strain at F0
    AnyFloat Fcfast ??= DesignVar(0.4); ///< Factor for determining shortening speed at optimum length
  };
  #endif


  #if BM_LEG_MUSCLES_RIGHT | BM_LEG_MUSCLES_LEFT

  AnyFolder IliacusLateralis =
  {
    AnyString Muscle = "Iliacus (lat.) "; ///< Descriptive name for the muscle, e.g. for plotting
    AnyIntVar MuscleElemAmount = 2; ///< The total amount of elements for this muscle
    AnyFloat Pennationangle ??= DesignVar(26.5); ///< Pennation angle of the muscle fibers (degres)
    AnyFloat VolumeScaleFactor ??= DesignVar(1.0); ///< Factor for scaling the muscle volume
    AnyFloat MuscleVolume ??= DesignVar(67.71); ///< Volume of the muscle  (ml)
    AnyFloat MuscleVolumeSIScaled ??= .VolumeUnitFactor*VolumeScaleFactor*MuscleVolume; ///< Scaled Volume of the muscle in SI base unit (m^3)
    AnyFloat OptimalFiberlength ??= _FIBER_LENGTH_DESIGNVAR(10.31/100); ///< Optimal working length of the muscle fiber (m)
    AnyFloat TotalTendonLength ??= _TENDON_LENGTH_DESIGNVAR(11.30/100);///< The total tendon length (m)
    AnyFloat K1 ??= DesignVar(10.00); ///< K1 constant in the muscle model.  Factor for determining shortening speed at optimum length
    AnyFloat K2 ??= DesignVar(0.00); ///< K2 constant in the muscle model.  Factor for determining shortening speed at optimum length
    AnyFloat Epsilon0 ??= DesignVar(0.0530); ///< Epsilon bar in the muscle model. Represents tendon strain at F0
    AnyFloat Fcfast ??= DesignVar(0.4); ///< Factor for determining shortening speed at optimum length
  };
  #endif


  #if BM_LEG_MUSCLES_RIGHT | BM_LEG_MUSCLES_LEFT

  AnyFolder IliacusMid =
  {
    AnyString Muscle = "Iliacus (mid.)"; ///< Descriptive name for the muscle, e.g. for plotting
    AnyIntVar MuscleElemAmount = 2; ///< The total amount of elements for this muscle
    AnyFloat Pennationangle ??= DesignVar(0.0); ///< Pennation angle of the muscle fibers (degres)
    AnyFloat VolumeScaleFactor ??= DesignVar(1.0); ///< Factor for scaling the muscle volume
    AnyFloat MuscleVolume ??= DesignVar(67.71); ///< Volume of the muscle  (ml)
    AnyFloat MuscleVolumeSIScaled ??= .VolumeUnitFactor*VolumeScaleFactor*MuscleVolume; ///< Scaled Volume of the muscle in SI base unit (m^3)
    AnyFloat OptimalFiberlength ??= _FIBER_LENGTH_DESIGNVAR(5.23/100); ///< Optimal working length of the muscle fiber (m)
    AnyFloat TotalTendonLength ??= _TENDON_LENGTH_DESIGNVAR(11.30/100);///< The total tendon length (m)
    AnyFloat K1 ??= DesignVar(10.00); ///< K1 constant in the muscle model.  Factor for determining shortening speed at optimum length
    AnyFloat K2 ??= DesignVar(0.00); ///< K2 constant in the muscle model.  Factor for determining shortening speed at optimum length
    AnyFloat Epsilon0 ??= DesignVar(0.0530); ///< Epsilon bar in the muscle model. Represents tendon strain at F0
    AnyFloat Fcfast ??= DesignVar(0.4); ///< Factor for determining shortening speed at optimum length
  };
  #endif


  #if BM_LEG_MUSCLES_RIGHT | BM_LEG_MUSCLES_LEFT

  AnyFolder IliacusMedialis =
  {
    AnyString Muscle = "Iliacus (med.)"; ///< Descriptive name for the muscle, e.g. for plotting
    AnyIntVar MuscleElemAmount = 2; ///< The total amount of elements for this muscle
    AnyFloat Pennationangle ??= DesignVar(0.0); ///< Pennation angle of the muscle fibers (degres)
    AnyFloat VolumeScaleFactor ??= DesignVar(1.0); ///< Factor for scaling the muscle volume
    AnyFloat MuscleVolume ??= DesignVar(67.71); ///< Volume of the muscle  (ml)
    AnyFloat MuscleVolumeSIScaled ??= .VolumeUnitFactor*VolumeScaleFactor*MuscleVolume; ///< Scaled Volume of the muscle in SI base unit (m^3)
    AnyFloat OptimalFiberlength ??= _FIBER_LENGTH_DESIGNVAR(8.93/100); ///< Optimal working length of the muscle fiber (m)
    AnyFloat TotalTendonLength ??= _TENDON_LENGTH_DESIGNVAR(15.50/100);///< The total tendon length (m)
    AnyFloat K1 ??= DesignVar(10.00); ///< K1 constant in the muscle model.  Factor for determining shortening speed at optimum length
    AnyFloat K2 ??= DesignVar(0.00); ///< K2 constant in the muscle model.  Factor for determining shortening speed at optimum length
    AnyFloat Epsilon0 ??= DesignVar(0.0530); ///< Epsilon bar in the muscle model. Represents tendon strain at F0
    AnyFloat Fcfast ??= DesignVar(0.4); ///< Factor for determining shortening speed at optimum length
  };
  #endif


  #if BM_LEG_MUSCLES_RIGHT | BM_LEG_MUSCLES_LEFT

  AnyFolder ObturatorExternusInferior =
  {
    AnyString Muscle = "Obt. ext. (inf.)"; ///< Descriptive name for the muscle, e.g. for plotting
    AnyIntVar MuscleElemAmount = 2; ///< The total amount of elements for this muscle
    AnyFloat Pennationangle ??= DesignVar(0.0); ///< Pennation angle of the muscle fibers (degres)
    AnyFloat VolumeScaleFactor ??= DesignVar(1.0); ///< Factor for scaling the muscle volume
    AnyFloat MuscleVolume ??= DesignVar(37.88); ///< Volume of the muscle  (ml)
    AnyFloat MuscleVolumeSIScaled ??= .VolumeUnitFactor*VolumeScaleFactor*MuscleVolume; ///< Scaled Volume of the muscle in SI base unit (m^3)
    AnyFloat OptimalFiberlength ??= _FIBER_LENGTH_DESIGNVAR(6.88/100); ///< Optimal working length of the muscle fiber (m)
    AnyFloat TotalTendonLength ??= _TENDON_LENGTH_DESIGNVAR(3.50/100);///< The total tendon length (m)
    AnyFloat K1 ??= DesignVar(10.00); ///< K1 constant in the muscle model.  Factor for determining shortening speed at optimum length
    AnyFloat K2 ??= DesignVar(0.00); ///< K2 constant in the muscle model.  Factor for determining shortening speed at optimum length
    AnyFloat Epsilon0 ??= DesignVar(0.0530); ///< Epsilon bar in the muscle model. Represents tendon strain at F0
    AnyFloat Fcfast ??= DesignVar(0.4); ///< Factor for determining shortening speed at optimum length
  };
  #endif


  #if BM_LEG_MUSCLES_RIGHT | BM_LEG_MUSCLES_LEFT

  AnyFolder ObturatorExternusSuperior =
  {
    AnyString Muscle = "Obt. ext. (sup.)"; ///< Descriptive name for the muscle, e.g. for plotting
    AnyIntVar MuscleElemAmount = 3; ///< The total amount of elements for this muscle
    AnyFloat Pennationangle ??= DesignVar(0.0); ///< Pennation angle of the muscle fibers (degres)
    AnyFloat VolumeScaleFactor ??= DesignVar(1.0); ///< Factor for scaling the muscle volume
    AnyFloat MuscleVolume ??= DesignVar(68.18); ///< Volume of the muscle  (ml)
    AnyFloat MuscleVolumeSIScaled ??= .VolumeUnitFactor*VolumeScaleFactor*MuscleVolume; ///< Scaled Volume of the muscle in SI base unit (m^3)
    AnyFloat OptimalFiberlength ??= _FIBER_LENGTH_DESIGNVAR(2.77/100); ///< Optimal working length of the muscle fiber (m)
    AnyFloat TotalTendonLength ??= _TENDON_LENGTH_DESIGNVAR(3.00/100);///< The total tendon length (m)
    AnyFloat K1 ??= DesignVar(10.00); ///< K1 constant in the muscle model.  Factor for determining shortening speed at optimum length
    AnyFloat K2 ??= DesignVar(0.00); ///< K2 constant in the muscle model.  Factor for determining shortening speed at optimum length
    AnyFloat Epsilon0 ??= DesignVar(0.0530); ///< Epsilon bar in the muscle model. Represents tendon strain at F0
    AnyFloat Fcfast ??= DesignVar(0.4); ///< Factor for determining shortening speed at optimum length
  };
  #endif


  #if BM_LEG_MUSCLES_RIGHT | BM_LEG_MUSCLES_LEFT

  AnyFolder ObturatorInternus =
  {
    AnyString Muscle = "Obturator int."; ///< Descriptive name for the muscle, e.g. for plotting
    AnyIntVar MuscleElemAmount = 6; ///< The total amount of elements for this muscle
    AnyFloat Pennationangle ??= DesignVar(0.0); ///< Pennation angle of the muscle fibers (degres)
    AnyFloat VolumeScaleFactor ??= DesignVar(1.0); ///< Factor for scaling the muscle volume
    AnyFloat MuscleVolume ??= DesignVar(52.08); ///< Volume of the muscle  (ml)
    AnyFloat MuscleVolumeSIScaled ??= .VolumeUnitFactor*VolumeScaleFactor*MuscleVolume; ///< Scaled Volume of the muscle in SI base unit (m^3)
    AnyFloat OptimalFiberlength ??= _FIBER_LENGTH_DESIGNVAR(2.05/100); ///< Optimal working length of the muscle fiber (m)
    AnyFloat TotalTendonLength ??= _TENDON_LENGTH_DESIGNVAR(8.20/100);///< The total tendon length (m)
    AnyFloat K1 ??= DesignVar(10.00); ///< K1 constant in the muscle model.  Factor for determining shortening speed at optimum length
    AnyFloat K2 ??= DesignVar(0.00); ///< K2 constant in the muscle model.  Factor for determining shortening speed at optimum length
    AnyFloat Epsilon0 ??= DesignVar(0.0530); ///< Epsilon bar in the muscle model. Represents tendon strain at F0
    AnyFloat Fcfast ??= DesignVar(0.4); ///< Factor for determining shortening speed at optimum length
  };
  #endif


  #if BM_LEG_MUSCLES_RIGHT | BM_LEG_MUSCLES_LEFT
/// The fiber length have been corrected (keeping PCSA constant). This value was reduced because too long compared to the unscaled muscle length. To keep the same PCSA, the muscle mass have also been changed.
  AnyFolder Pectineus =
  {
    AnyString Muscle = "Pectineus"; ///< Descriptive name for the muscle, e.g. for plotting
    AnyIntVar MuscleElemAmount = 4; ///< The total amount of elements for this muscle
    AnyFloat Pennationangle ??= DesignVar(0.0); ///< Pennation angle of the muscle fibers (degres)
    AnyFloat VolumeScaleFactor ??= DesignVar(1.0); ///< Factor for scaling the muscle volume
    AnyFloat MuscleVolume ??= DesignVar(64.58); ///< Volume of the muscle  (ml)
    AnyFloat MuscleVolumeSIScaled ??= .VolumeUnitFactor*VolumeScaleFactor*MuscleVolume; ///< Scaled Volume of the muscle in SI base unit (m^3)
    AnyFloat OptimalFiberlength ??= _FIBER_LENGTH_DESIGNVAR(9.50/100); ///< Optimal working length of the muscle fiber (m)
    AnyFloat TotalTendonLength ??= _TENDON_LENGTH_DESIGNVAR(0.00/100);///< The total tendon length (m)
    AnyFloat K1 ??= DesignVar(10.00); ///< K1 constant in the muscle model.  Factor for determining shortening speed at optimum length
    AnyFloat K2 ??= DesignVar(0.00); ///< K2 constant in the muscle model.  Factor for determining shortening speed at optimum length
    AnyFloat Epsilon0 ??= DesignVar(0.0530); ///< Epsilon bar in the muscle model. Represents tendon strain at F0
    AnyFloat Fcfast ??= DesignVar(0.4); ///< Factor for determining shortening speed at optimum length
  };
  #endif


  #if BM_LEG_MUSCLES_RIGHT | BM_LEG_MUSCLES_LEFT
/// The fiber length value have been corrected compared to the original data set. (Optimum fiber length Ward et al 2009) To keep the same PCSA, the muscle mass have also been changed.
  AnyFolder PeroneusBrevis =
  {
    AnyString Muscle = "Peroneus brev."; ///< Descriptive name for the muscle, e.g. for plotting
    AnyIntVar MuscleElemAmount = 3; ///< The total amount of elements for this muscle
    AnyFloat Pennationangle ??= DesignVar(23.1); ///< Pennation angle of the muscle fibers (degres)
    AnyFloat VolumeScaleFactor ??= DesignVar(1.0); ///< Factor for scaling the muscle volume
    AnyFloat MuscleVolume ??= DesignVar(86.09); ///< Volume of the muscle  (ml)
    AnyFloat MuscleVolumeSIScaled ??= .VolumeUnitFactor*VolumeScaleFactor*MuscleVolume; ///< Scaled Volume of the muscle in SI base unit (m^3)
    AnyFloat OptimalFiberlength ??= _FIBER_LENGTH_DESIGNVAR(4.54/100); ///< Optimal working length of the muscle fiber (m)
    AnyFloat TotalTendonLength ??= _TENDON_LENGTH_DESIGNVAR(6.40/100);///< The total tendon length (m)
    AnyFloat K1 ??= DesignVar(10.00); ///< K1 constant in the muscle model.  Factor for determining shortening speed at optimum length
    AnyFloat K2 ??= DesignVar(0.00); ///< K2 constant in the muscle model.  Factor for determining shortening speed at optimum length
    AnyFloat Epsilon0 ??= DesignVar(0.0530); ///< Epsilon bar in the muscle model. Represents tendon strain at F0
    AnyFloat Fcfast ??= DesignVar(0.4); ///< Factor for determining shortening speed at optimum length
  };
  #endif


  #if BM_LEG_MUSCLES_RIGHT | BM_LEG_MUSCLES_LEFT
/// The fiber length value have been corrected compared to the original data set. (Optimum fiber length Ward et al 2009) To keep the same PCSA, the muscle mass have also been changed.
  AnyFolder PeroneusLongus =
  {
    AnyString Muscle = "Peroneus long."; ///< Descriptive name for the muscle, e.g. for plotting
    AnyIntVar MuscleElemAmount = 3; ///< The total amount of elements for this muscle
    AnyFloat Pennationangle ??= DesignVar(15.8); ///< Pennation angle of the muscle fibers (degres)
    AnyFloat VolumeScaleFactor ??= DesignVar(1.0); ///< Factor for scaling the muscle volume
    AnyFloat MuscleVolume ??= DesignVar(121.52); ///< Volume of the muscle  (ml)
    AnyFloat MuscleVolumeSIScaled ??= .VolumeUnitFactor*VolumeScaleFactor*MuscleVolume; ///< Scaled Volume of the muscle in SI base unit (m^3)
    AnyFloat OptimalFiberlength ??= _FIBER_LENGTH_DESIGNVAR(5.08/100); ///< Optimal working length of the muscle fiber (m)
    AnyFloat TotalTendonLength ??= _TENDON_LENGTH_DESIGNVAR(15.90/100);///< The total tendon length (m)
    AnyFloat K1 ??= DesignVar(10.00); ///< K1 constant in the muscle model.  Factor for determining shortening speed at optimum length
    AnyFloat K2 ??= DesignVar(0.00); ///< K2 constant in the muscle model.  Factor for determining shortening speed at optimum length
    AnyFloat Epsilon0 ??= DesignVar(0.0530); ///< Epsilon bar in the muscle model. Represents tendon strain at F0
    AnyFloat Fcfast ??= DesignVar(0.4); ///< Factor for determining shortening speed at optimum length
  };
  #endif


  #if BM_LEG_MUSCLES_RIGHT | BM_LEG_MUSCLES_LEFT

  AnyFolder PeroneusTertius =
  {
    AnyString Muscle = "Peroneus tert."; ///< Descriptive name for the muscle, e.g. for plotting
    AnyIntVar MuscleElemAmount = 3; ///< The total amount of elements for this muscle
    AnyFloat Pennationangle ??= DesignVar(19.1); ///< Pennation angle of the muscle fibers (degres)
    AnyFloat VolumeScaleFactor ??= DesignVar(1.0); ///< Factor for scaling the muscle volume
    AnyFloat MuscleVolume ??= DesignVar(26.52); ///< Volume of the muscle  (ml)
    AnyFloat MuscleVolumeSIScaled ??= .VolumeUnitFactor*VolumeScaleFactor*MuscleVolume; ///< Scaled Volume of the muscle in SI base unit (m^3)
    AnyFloat OptimalFiberlength ??= _FIBER_LENGTH_DESIGNVAR(4.27/100); ///< Optimal working length of the muscle fiber (m)
    AnyFloat TotalTendonLength ??= _TENDON_LENGTH_DESIGNVAR(10.00/100);///< The total tendon length (m)
    AnyFloat K1 ??= DesignVar(10.00); ///< K1 constant in the muscle model.  Factor for determining shortening speed at optimum length
    AnyFloat K2 ??= DesignVar(0.00); ///< K2 constant in the muscle model.  Factor for determining shortening speed at optimum length
    AnyFloat Epsilon0 ??= DesignVar(0.0530); ///< Epsilon bar in the muscle model. Represents tendon strain at F0
    AnyFloat Fcfast ??= DesignVar(0.4); ///< Factor for determining shortening speed at optimum length
  };
  #endif


  #if BM_LEG_MUSCLES_RIGHT | BM_LEG_MUSCLES_LEFT

  AnyFolder Piriformis =
  {
    AnyString Muscle = "Piriformis"; ///< Descriptive name for the muscle, e.g. for plotting
    AnyIntVar MuscleElemAmount = 1; ///< The total amount of elements for this muscle
    AnyFloat Pennationangle ??= DesignVar(0.0); ///< Pennation angle of the muscle fibers (degres)
    AnyFloat VolumeScaleFactor ??= DesignVar(1.0); ///< Factor for scaling the muscle volume
    AnyFloat MuscleVolume ??= DesignVar(31.25); ///< Volume of the muscle  (ml)
    AnyFloat MuscleVolumeSIScaled ??= .VolumeUnitFactor*VolumeScaleFactor*MuscleVolume; ///< Scaled Volume of the muscle in SI base unit (m^3)
    AnyFloat OptimalFiberlength ??= _FIBER_LENGTH_DESIGNVAR(3.88/100); ///< Optimal working length of the muscle fiber (m)
    AnyFloat TotalTendonLength ??= _TENDON_LENGTH_DESIGNVAR(1.60/100);///< The total tendon length (m)
    AnyFloat K1 ??= DesignVar(10.00); ///< K1 constant in the muscle model.  Factor for determining shortening speed at optimum length
    AnyFloat K2 ??= DesignVar(0.00); ///< K2 constant in the muscle model.  Factor for determining shortening speed at optimum length
    AnyFloat Epsilon0 ??= DesignVar(0.0530); ///< Epsilon bar in the muscle model. Represents tendon strain at F0
    AnyFloat Fcfast ??= DesignVar(0.4); ///< Factor for determining shortening speed at optimum length
  };
  #endif


  #if BM_LEG_MUSCLES_RIGHT | BM_LEG_MUSCLES_LEFT

  AnyFolder Plantaris =
  {
    AnyString Muscle = "Plantaris"; ///< Descriptive name for the muscle, e.g. for plotting
    AnyIntVar MuscleElemAmount = 1; ///< The total amount of elements for this muscle
    AnyFloat Pennationangle ??= DesignVar(0.0); ///< Pennation angle of the muscle fibers (degres)
    AnyFloat VolumeScaleFactor ??= DesignVar(1.0); ///< Factor for scaling the muscle volume
    AnyFloat MuscleVolume ??= DesignVar(11.36); ///< Volume of the muscle  (ml)
    AnyFloat MuscleVolumeSIScaled ??= .VolumeUnitFactor*VolumeScaleFactor*MuscleVolume; ///< Scaled Volume of the muscle in SI base unit (m^3)
    AnyFloat OptimalFiberlength ??= _FIBER_LENGTH_DESIGNVAR(4.77/100); ///< Optimal working length of the muscle fiber (m)
    AnyFloat TotalTendonLength ??= _TENDON_LENGTH_DESIGNVAR(35.00/100);///< The total tendon length (m)
    AnyFloat K1 ??= DesignVar(10.00); ///< K1 constant in the muscle model.  Factor for determining shortening speed at optimum length
    AnyFloat K2 ??= DesignVar(0.00); ///< K2 constant in the muscle model.  Factor for determining shortening speed at optimum length
    AnyFloat Epsilon0 ??= DesignVar(0.0530); ///< Epsilon bar in the muscle model. Represents tendon strain at F0
    AnyFloat Fcfast ??= DesignVar(0.4); ///< Factor for determining shortening speed at optimum length
  };
  #endif


  #if BM_LEG_MUSCLES_RIGHT | BM_LEG_MUSCLES_LEFT

  AnyFolder Popliteus =
  {
    AnyString Muscle = "Popliteus"; ///< Descriptive name for the muscle, e.g. for plotting
    AnyIntVar MuscleElemAmount = 3; ///< The total amount of elements for this muscle
    AnyFloat Pennationangle ??= DesignVar(0.0); ///< Pennation angle of the muscle fibers (degres)
    AnyFloat VolumeScaleFactor ??= DesignVar(1.0); ///< Factor for scaling the muscle volume
    AnyFloat MuscleVolume ??= DesignVar(25.57); ///< Volume of the muscle  (ml)
    AnyFloat MuscleVolumeSIScaled ??= .VolumeUnitFactor*VolumeScaleFactor*MuscleVolume; ///< Scaled Volume of the muscle in SI base unit (m^3)
    AnyFloat OptimalFiberlength ??= _FIBER_LENGTH_DESIGNVAR(2.40/100); ///< Optimal working length of the muscle fiber (m)
    AnyFloat TotalTendonLength ??= _TENDON_LENGTH_DESIGNVAR(1.00/100);///< The total tendon length (m)
    AnyFloat K1 ??= DesignVar(10.00); ///< K1 constant in the muscle model.  Factor for determining shortening speed at optimum length
    AnyFloat K2 ??= DesignVar(0.00); ///< K2 constant in the muscle model.  Factor for determining shortening speed at optimum length
    AnyFloat Epsilon0 ??= DesignVar(0.0530); ///< Epsilon bar in the muscle model. Represents tendon strain at F0
    AnyFloat Fcfast ??= DesignVar(0.4); ///< Factor for determining shortening speed at optimum length
  };
  #endif


  #if BM_LEG_MUSCLES_RIGHT | BM_LEG_MUSCLES_LEFT

  AnyFolder PsoasMinor =
  {
    AnyString Muscle = "Psoas minor"; ///< Descriptive name for the muscle, e.g. for plotting
    AnyIntVar MuscleElemAmount = 1; ///< The total amount of elements for this muscle
    AnyFloat Pennationangle ??= DesignVar(0.0); ///< Pennation angle of the muscle fibers (degres)
    AnyFloat VolumeScaleFactor ??= DesignVar(1.0); ///< Factor for scaling the muscle volume
    AnyFloat MuscleVolume ??= DesignVar(6.63); ///< Volume of the muscle  (ml)
    AnyFloat MuscleVolumeSIScaled ??= .VolumeUnitFactor*VolumeScaleFactor*MuscleVolume; ///< Scaled Volume of the muscle in SI base unit (m^3)
    AnyFloat OptimalFiberlength ??= _FIBER_LENGTH_DESIGNVAR(5.91/100); ///< Optimal working length of the muscle fiber (m)
    AnyFloat TotalTendonLength ??= _TENDON_LENGTH_DESIGNVAR(15.20/100);///< The total tendon length (m)
    AnyFloat K1 ??= DesignVar(10.00); ///< K1 constant in the muscle model.  Factor for determining shortening speed at optimum length
    AnyFloat K2 ??= DesignVar(0.00); ///< K2 constant in the muscle model.  Factor for determining shortening speed at optimum length
    AnyFloat Epsilon0 ??= DesignVar(0.0530); ///< Epsilon bar in the muscle model. Represents tendon strain at F0
    AnyFloat Fcfast ??= DesignVar(0.4); ///< Factor for determining shortening speed at optimum length
  };
  #endif


  #if BM_LEG_MUSCLES_RIGHT | BM_LEG_MUSCLES_LEFT

  AnyFolder PsoasMajor =
  {
    AnyString Muscle = "Psoas major"; ///< Descriptive name for the muscle, e.g. for plotting
    AnyIntVar MuscleElemAmount = 11; ///< The total amount of elements for this muscle
    AnyFloat Pennationangle ??= DesignVar(13.4); ///< Pennation angle of the muscle fibers (degres)
    AnyFloat VolumeScaleFactor ??= DesignVar(1.0); ///< Factor for scaling the muscle volume
    AnyFloat MuscleVolume ??= DesignVar(193.18); ///< Volume of the muscle  (ml)
    AnyFloat MuscleVolumeSIScaled ??= .VolumeUnitFactor*VolumeScaleFactor*MuscleVolume; ///< Scaled Volume of the muscle in SI base unit (m^3)
    AnyFloat OptimalFiberlength ??= _FIBER_LENGTH_DESIGNVAR(9.92/100); ///< Optimal working length of the muscle fiber (m)
    AnyFloat TotalTendonLength ??= _TENDON_LENGTH_DESIGNVAR(11.30/100);///< The total tendon length (m)
    AnyFloat K1 ??= DesignVar(10.00); ///< K1 constant in the muscle model.  Factor for determining shortening speed at optimum length
    AnyFloat K2 ??= DesignVar(0.00); ///< K2 constant in the muscle model.  Factor for determining shortening speed at optimum length
    AnyFloat Epsilon0 ??= DesignVar(0.0530); ///< Epsilon bar in the muscle model. Represents tendon strain at F0
    AnyFloat Fcfast ??= DesignVar(0.4); ///< Factor for determining shortening speed at optimum length
  };
  #endif


  #if BM_LEG_MUSCLES_RIGHT | BM_LEG_MUSCLES_LEFT

  AnyFolder QuadratusFemoris =
  {
    AnyString Muscle = "Quadratis fem."; ///< Descriptive name for the muscle, e.g. for plotting
    AnyIntVar MuscleElemAmount = 4; ///< The total amount of elements for this muscle
    AnyFloat Pennationangle ??= DesignVar(0.0); ///< Pennation angle of the muscle fibers (degres)
    AnyFloat VolumeScaleFactor ??= DesignVar(1.0); ///< Factor for scaling the muscle volume
    AnyFloat MuscleVolume ??= DesignVar(49.24); ///< Volume of the muscle  (ml)
    AnyFloat MuscleVolumeSIScaled ??= .VolumeUnitFactor*VolumeScaleFactor*MuscleVolume; ///< Scaled Volume of the muscle in SI base unit (m^3)
    AnyFloat OptimalFiberlength ??= _FIBER_LENGTH_DESIGNVAR(3.37/100); ///< Optimal working length of the muscle fiber (m)
    AnyFloat TotalTendonLength ??= _TENDON_LENGTH_DESIGNVAR(0.00/100);///< The total tendon length (m)
    AnyFloat K1 ??= DesignVar(10.00); ///< K1 constant in the muscle model.  Factor for determining shortening speed at optimum length
    AnyFloat K2 ??= DesignVar(0.00); ///< K2 constant in the muscle model.  Factor for determining shortening speed at optimum length
    AnyFloat Epsilon0 ??= DesignVar(0.0530); ///< Epsilon bar in the muscle model. Represents tendon strain at F0
    AnyFloat Fcfast ??= DesignVar(0.4); ///< Factor for determining shortening speed at optimum length
  };
  #endif


  #if BM_LEG_MUSCLES_RIGHT | BM_LEG_MUSCLES_LEFT

  AnyFolder RectusFemoris =
  {
    AnyString Muscle = "Rectus fem."; ///< Descriptive name for the muscle, e.g. for plotting
    AnyIntVar MuscleElemAmount = 2; ///< The total amount of elements for this muscle
    AnyFloat Pennationangle ??= DesignVar(21.9); ///< Pennation angle of the muscle fibers (degres)
    AnyFloat VolumeScaleFactor ??= DesignVar(1.0); ///< Factor for scaling the muscle volume
    AnyFloat MuscleVolume ??= DesignVar(226.33); ///< Volume of the muscle  (ml)
    AnyFloat MuscleVolumeSIScaled ??= .VolumeUnitFactor*VolumeScaleFactor*MuscleVolume; ///< Scaled Volume of the muscle in SI base unit (m^3)
    AnyFloat OptimalFiberlength ??= _FIBER_LENGTH_DESIGNVAR(7.84/100); ///< Optimal working length of the muscle fiber (m)
    AnyFloat TotalTendonLength ??= _TENDON_LENGTH_DESIGNVAR(9.60/100);///< The total tendon length (m)
    AnyFloat K1 ??= DesignVar(10.00); ///< K1 constant in the muscle model.  Factor for determining shortening speed at optimum length
    AnyFloat K2 ??= DesignVar(0.00); ///< K2 constant in the muscle model.  Factor for determining shortening speed at optimum length
    AnyFloat Epsilon0 ??= DesignVar(0.0530); ///< Epsilon bar in the muscle model. Represents tendon strain at F0
    AnyFloat Fcfast ??= DesignVar(0.4); ///< Factor for determining shortening speed at optimum length
  };
  #endif


  #if BM_LEG_MUSCLES_RIGHT | BM_LEG_MUSCLES_LEFT
/// In TLEM 2 the Sartorius mucles is no longer split into a distal/proximal part.
  AnyFolder Sartorius =
  {
    AnyString Muscle = "Sartorius"; ///< Descriptive name for the muscle, e.g. for plotting
    AnyIntVar MuscleElemAmount = 1; ///< The total amount of elements for this muscle
    AnyFloat Pennationangle ??= DesignVar(0.0); ///< Pennation angle of the muscle fibers (degres)
    AnyFloat VolumeScaleFactor ??= DesignVar(1.0); ///< Factor for scaling the muscle volume
    AnyFloat MuscleVolume ??= DesignVar(205.49); ///< Volume of the muscle  (ml)
    AnyFloat MuscleVolumeSIScaled ??= .VolumeUnitFactor*VolumeScaleFactor*MuscleVolume; ///< Scaled Volume of the muscle in SI base unit (m^3)
    AnyFloat OptimalFiberlength ??= _FIBER_LENGTH_DESIGNVAR(34.71/100); ///< Optimal working length of the muscle fiber (m)
    AnyFloat TotalTendonLength ??= _TENDON_LENGTH_DESIGNVAR(7.90/100);///< The total tendon length (m)
    AnyFloat K1 ??= DesignVar(10.00); ///< K1 constant in the muscle model.  Factor for determining shortening speed at optimum length
    AnyFloat K2 ??= DesignVar(0.00); ///< K2 constant in the muscle model.  Factor for determining shortening speed at optimum length
    AnyFloat Epsilon0 ??= DesignVar(0.0530); ///< Epsilon bar in the muscle model. Represents tendon strain at F0
    AnyFloat Fcfast ??= DesignVar(0.4); ///< Factor for determining shortening speed at optimum length
  };
  #endif


  #if BM_LEG_MUSCLES_RIGHT | BM_LEG_MUSCLES_LEFT

  AnyFolder Semimembranosus =
  {
    AnyString Muscle = "Semimembr."; ///< Descriptive name for the muscle, e.g. for plotting
    AnyIntVar MuscleElemAmount = 3; ///< The total amount of elements for this muscle
    AnyFloat Pennationangle ??= DesignVar(25.0); ///< Pennation angle of the muscle fibers (degres)
    AnyFloat VolumeScaleFactor ??= DesignVar(1.0); ///< Factor for scaling the muscle volume
    AnyFloat MuscleVolume ??= DesignVar(138.26); ///< Volume of the muscle  (ml)
    AnyFloat MuscleVolumeSIScaled ??= .VolumeUnitFactor*VolumeScaleFactor*MuscleVolume; ///< Scaled Volume of the muscle in SI base unit (m^3)
    AnyFloat OptimalFiberlength ??= _FIBER_LENGTH_DESIGNVAR(8.09/100); ///< Optimal working length of the muscle fiber (m)
    AnyFloat TotalTendonLength ??= _TENDON_LENGTH_DESIGNVAR(15.70/100);///< The total tendon length (m)
    AnyFloat K1 ??= DesignVar(10.00); ///< K1 constant in the muscle model.  Factor for determining shortening speed at optimum length
    AnyFloat K2 ??= DesignVar(0.00); ///< K2 constant in the muscle model.  Factor for determining shortening speed at optimum length
    AnyFloat Epsilon0 ??= DesignVar(0.0530); ///< Epsilon bar in the muscle model. Represents tendon strain at F0
    AnyFloat Fcfast ??= DesignVar(0.4); ///< Factor for determining shortening speed at optimum length
  };
  #endif


  #if BM_LEG_MUSCLES_RIGHT | BM_LEG_MUSCLES_LEFT

  AnyFolder Semitendinosus =
  {
    AnyString Muscle = "Semitend."; ///< Descriptive name for the muscle, e.g. for plotting
    AnyIntVar MuscleElemAmount = 1; ///< The total amount of elements for this muscle
    AnyFloat Pennationangle ??= DesignVar(0.0); ///< Pennation angle of the muscle fibers (degres)
    AnyFloat VolumeScaleFactor ??= DesignVar(1.0); ///< Factor for scaling the muscle volume
    AnyFloat MuscleVolume ??= DesignVar(208.33); ///< Volume of the muscle  (ml)
    AnyFloat MuscleVolumeSIScaled ??= .VolumeUnitFactor*VolumeScaleFactor*MuscleVolume; ///< Scaled Volume of the muscle in SI base unit (m^3)
    AnyFloat OptimalFiberlength ??= _FIBER_LENGTH_DESIGNVAR(14.16/100); ///< Optimal working length of the muscle fiber (m)
    AnyFloat TotalTendonLength ??= _TENDON_LENGTH_DESIGNVAR(23.70/100);///< The total tendon length (m)
    AnyFloat K1 ??= DesignVar(10.00); ///< K1 constant in the muscle model.  Factor for determining shortening speed at optimum length
    AnyFloat K2 ??= DesignVar(0.00); ///< K2 constant in the muscle model.  Factor for determining shortening speed at optimum length
    AnyFloat Epsilon0 ??= DesignVar(0.0530); ///< Epsilon bar in the muscle model. Represents tendon strain at F0
    AnyFloat Fcfast ??= DesignVar(0.4); ///< Factor for determining shortening speed at optimum length
  };
  #endif


  #if BM_LEG_MUSCLES_RIGHT | BM_LEG_MUSCLES_LEFT
/// The fiber length  value have been corrected compared to the original data set (original value = 2.4).To keep the same PCSA, the muscle mass have also been changed.
  AnyFolder SoleusMedialis =
  {
    AnyString Muscle = "Soleus (med.)"; ///< Descriptive name for the muscle, e.g. for plotting
    AnyIntVar MuscleElemAmount = 3; ///< The total amount of elements for this muscle
    AnyFloat Pennationangle ??= DesignVar(64.5); ///< Pennation angle of the muscle fibers (degres)
    AnyFloat VolumeScaleFactor ??= DesignVar(1.0); ///< Factor for scaling the muscle volume
    AnyFloat MuscleVolume ??= DesignVar(414.86); ///< Volume of the muscle  (ml)
    AnyFloat MuscleVolumeSIScaled ??= .VolumeUnitFactor*VolumeScaleFactor*MuscleVolume; ///< Scaled Volume of the muscle in SI base unit (m^3)
    AnyFloat OptimalFiberlength ??= _FIBER_LENGTH_DESIGNVAR(4.40/100); ///< Optimal working length of the muscle fiber (m)
    AnyFloat TotalTendonLength ??= _TENDON_LENGTH_DESIGNVAR(8.50/100);///< The total tendon length (m)
    AnyFloat K1 ??= DesignVar(10.00); ///< K1 constant in the muscle model.  Factor for determining shortening speed at optimum length
    AnyFloat K2 ??= DesignVar(0.00); ///< K2 constant in the muscle model.  Factor for determining shortening speed at optimum length
    AnyFloat Epsilon0 ??= DesignVar(0.0530); ///< Epsilon bar in the muscle model. Represents tendon strain at F0
    AnyFloat Fcfast ??= DesignVar(0.4); ///< Factor for determining shortening speed at optimum length
  };
  #endif


  #if BM_LEG_MUSCLES_RIGHT | BM_LEG_MUSCLES_LEFT
/// The fiber length  value have been corrected compared to the original data set (original value = 2.6). To keep the same PCSA,  the muscle mass have also been changed.
  AnyFolder SoleusLateralis =
  {
    AnyString Muscle = "Soleus (lat.)"; ///< Descriptive name for the muscle, e.g. for plotting
    AnyIntVar MuscleElemAmount = 3; ///< The total amount of elements for this muscle
    AnyFloat Pennationangle ??= DesignVar(58.7); ///< Pennation angle of the muscle fibers (degres)
    AnyFloat VolumeScaleFactor ??= DesignVar(1.0); ///< Factor for scaling the muscle volume
    AnyFloat MuscleVolume ??= DesignVar(378.05); ///< Volume of the muscle  (ml)
    AnyFloat MuscleVolumeSIScaled ??= .VolumeUnitFactor*VolumeScaleFactor*MuscleVolume; ///< Scaled Volume of the muscle in SI base unit (m^3)
    AnyFloat OptimalFiberlength ??= _FIBER_LENGTH_DESIGNVAR(4.40/100); ///< Optimal working length of the muscle fiber (m)
    AnyFloat TotalTendonLength ??= _TENDON_LENGTH_DESIGNVAR(8.50/100);///< The total tendon length (m)
    AnyFloat K1 ??= DesignVar(10.00); ///< K1 constant in the muscle model.  Factor for determining shortening speed at optimum length
    AnyFloat K2 ??= DesignVar(0.00); ///< K2 constant in the muscle model.  Factor for determining shortening speed at optimum length
    AnyFloat Epsilon0 ??= DesignVar(0.0530); ///< Epsilon bar in the muscle model. Represents tendon strain at F0
    AnyFloat Fcfast ??= DesignVar(0.4); ///< Factor for determining shortening speed at optimum length
  };
  #endif


  #if BM_LEG_MUSCLES_RIGHT | BM_LEG_MUSCLES_LEFT

  AnyFolder TensorFasciaeLatae =
  {
    AnyString Muscle = "Tensor fasc. l."; ///< Descriptive name for the muscle, e.g. for plotting
    AnyIntVar MuscleElemAmount = 2; ///< The total amount of elements for this muscle
    AnyFloat Pennationangle ??= DesignVar(0.0); ///< Pennation angle of the muscle fibers (degres)
    AnyFloat VolumeScaleFactor ??= DesignVar(1.0); ///< Factor for scaling the muscle volume
    AnyFloat MuscleVolume ??= DesignVar(83.33); ///< Volume of the muscle  (ml)
    AnyFloat MuscleVolumeSIScaled ??= .VolumeUnitFactor*VolumeScaleFactor*MuscleVolume; ///< Scaled Volume of the muscle in SI base unit (m^3)
    AnyFloat OptimalFiberlength ??= _FIBER_LENGTH_DESIGNVAR(9.49/100); ///< Optimal working length of the muscle fiber (m)
    AnyFloat TotalTendonLength ??= _TENDON_LENGTH_DESIGNVAR(0.00/100);///< The total tendon length (m)
    AnyFloat K1 ??= DesignVar(10.00); ///< K1 constant in the muscle model.  Factor for determining shortening speed at optimum length
    AnyFloat K2 ??= DesignVar(0.00); ///< K2 constant in the muscle model.  Factor for determining shortening speed at optimum length
    AnyFloat Epsilon0 ??= DesignVar(0.0530); ///< Epsilon bar in the muscle model. Represents tendon strain at F0
    AnyFloat Fcfast ??= DesignVar(0.4); ///< Factor for determining shortening speed at optimum length
  };
  #endif


  #if BM_LEG_MUSCLES_RIGHT | BM_LEG_MUSCLES_LEFT
/// The fiber length value have been corrected compared to the original data set. (Optimum fiber length Ward et al 2009
  AnyFolder TibialisAnterior =
  {
    AnyString Muscle = "Tibialis ant."; ///< Descriptive name for the muscle, e.g. for plotting
    AnyIntVar MuscleElemAmount = 3; ///< The total amount of elements for this muscle
    AnyFloat Pennationangle ??= DesignVar(9.6); ///< Pennation angle of the muscle fibers (degres)
    AnyFloat VolumeScaleFactor ??= DesignVar(1.0); ///< Factor for scaling the muscle volume
    AnyFloat MuscleVolume ??= DesignVar(181.49); ///< Volume of the muscle  (ml)
    AnyFloat MuscleVolumeSIScaled ??= .VolumeUnitFactor*VolumeScaleFactor*MuscleVolume; ///< Scaled Volume of the muscle in SI base unit (m^3)
    AnyFloat OptimalFiberlength ??= _FIBER_LENGTH_DESIGNVAR(6.83/100); ///< Optimal working length of the muscle fiber (m)
    AnyFloat TotalTendonLength ??= _TENDON_LENGTH_DESIGNVAR(23.50/100);///< The total tendon length (m)
    AnyFloat K1 ??= DesignVar(10.00); ///< K1 constant in the muscle model.  Factor for determining shortening speed at optimum length
    AnyFloat K2 ??= DesignVar(0.00); ///< K2 constant in the muscle model.  Factor for determining shortening speed at optimum length
    AnyFloat Epsilon0 ??= DesignVar(0.0530); ///< Epsilon bar in the muscle model. Represents tendon strain at F0
    AnyFloat Fcfast ??= DesignVar(0.4); ///< Factor for determining shortening speed at optimum length
  };
  #endif


  #if BM_LEG_MUSCLES_RIGHT | BM_LEG_MUSCLES_LEFT
/// The fiber length value have been corrected compared to the original data set. (Optimum fiber length Ward et al 2009
  AnyFolder TibialisPosteriorMedialis =
  {
    AnyString Muscle = "Tibial post. (med.)"; ///< Descriptive name for the muscle, e.g. for plotting
    AnyIntVar MuscleElemAmount = 3; ///< The total amount of elements for this muscle
    AnyFloat Pennationangle ??= DesignVar(25.2); ///< Pennation angle of the muscle fibers (degres)
    AnyFloat VolumeScaleFactor ??= DesignVar(1.0); ///< Factor for scaling the muscle volume
    AnyFloat MuscleVolume ??= DesignVar(81.68); ///< Volume of the muscle  (ml)
    AnyFloat MuscleVolumeSIScaled ??= .VolumeUnitFactor*VolumeScaleFactor*MuscleVolume; ///< Scaled Volume of the muscle in SI base unit (m^3)
    AnyFloat OptimalFiberlength ??= _FIBER_LENGTH_DESIGNVAR(3.78/100); ///< Optimal working length of the muscle fiber (m)
    AnyFloat TotalTendonLength ??= _TENDON_LENGTH_DESIGNVAR(11.00/100);///< The total tendon length (m)
    AnyFloat K1 ??= DesignVar(10.00); ///< K1 constant in the muscle model.  Factor for determining shortening speed at optimum length
    AnyFloat K2 ??= DesignVar(0.00); ///< K2 constant in the muscle model.  Factor for determining shortening speed at optimum length
    AnyFloat Epsilon0 ??= DesignVar(0.0530); ///< Epsilon bar in the muscle model. Represents tendon strain at F0
    AnyFloat Fcfast ??= DesignVar(0.4); ///< Factor for determining shortening speed at optimum length
  };
  #endif


  #if BM_LEG_MUSCLES_RIGHT | BM_LEG_MUSCLES_LEFT
/// The fiber length value have been corrected compared to the original data set. (Optimum fiber length Ward et al 2009
  AnyFolder TibialisPosteriorLateralis =
  {
    AnyString Muscle = "Tibial post. (lat.)"; ///< Descriptive name for the muscle, e.g. for plotting
    AnyIntVar MuscleElemAmount = 3; ///< The total amount of elements for this muscle
    AnyFloat Pennationangle ??= DesignVar(43.1); ///< Pennation angle of the muscle fibers (degres)
    AnyFloat VolumeScaleFactor ??= DesignVar(1.0); ///< Factor for scaling the muscle volume
    AnyFloat MuscleVolume ??= DesignVar(81.68); ///< Volume of the muscle  (ml)
    AnyFloat MuscleVolumeSIScaled ??= .VolumeUnitFactor*VolumeScaleFactor*MuscleVolume; ///< Scaled Volume of the muscle in SI base unit (m^3)
    AnyFloat OptimalFiberlength ??= _FIBER_LENGTH_DESIGNVAR(3.78/100); ///< Optimal working length of the muscle fiber (m)
    AnyFloat TotalTendonLength ??= _TENDON_LENGTH_DESIGNVAR(11.00/100);///< The total tendon length (m)
    AnyFloat K1 ??= DesignVar(10.00); ///< K1 constant in the muscle model.  Factor for determining shortening speed at optimum length
    AnyFloat K2 ??= DesignVar(0.00); ///< K2 constant in the muscle model.  Factor for determining shortening speed at optimum length
    AnyFloat Epsilon0 ??= DesignVar(0.0530); ///< Epsilon bar in the muscle model. Represents tendon strain at F0
    AnyFloat Fcfast ??= DesignVar(0.4); ///< Factor for determining shortening speed at optimum length
  };
  #endif


  #if BM_LEG_MUSCLES_RIGHT | BM_LEG_MUSCLES_LEFT

  AnyFolder VastusIntermedius =
  {
    AnyString Muscle = "Vastus interm."; ///< Descriptive name for the muscle, e.g. for plotting
    AnyIntVar MuscleElemAmount = 6; ///< The total amount of elements for this muscle
    AnyFloat Pennationangle ??= DesignVar(11.8); ///< Pennation angle of the muscle fibers (degres)
    AnyFloat VolumeScaleFactor ??= DesignVar(1.0); ///< Factor for scaling the muscle volume
    AnyFloat MuscleVolume ??= DesignVar(292.61); ///< Volume of the muscle  (ml)
    AnyFloat MuscleVolumeSIScaled ??= .VolumeUnitFactor*VolumeScaleFactor*MuscleVolume; ///< Scaled Volume of the muscle in SI base unit (m^3)
    AnyFloat OptimalFiberlength ??= _FIBER_LENGTH_DESIGNVAR(7.68/100); ///< Optimal working length of the muscle fiber (m)
    AnyFloat TotalTendonLength ??= _TENDON_LENGTH_DESIGNVAR(12.60/100);///< The total tendon length (m)
    AnyFloat K1 ??= DesignVar(10.00); ///< K1 constant in the muscle model.  Factor for determining shortening speed at optimum length
    AnyFloat K2 ??= DesignVar(0.00); ///< K2 constant in the muscle model.  Factor for determining shortening speed at optimum length
    AnyFloat Epsilon0 ??= DesignVar(0.0530); ///< Epsilon bar in the muscle model. Represents tendon strain at F0
    AnyFloat Fcfast ??= DesignVar(0.4); ///< Factor for determining shortening speed at optimum length
  };
  #endif


  #if BM_LEG_MUSCLES_RIGHT | BM_LEG_MUSCLES_LEFT

  AnyFolder VastusLateralisInferior =
  {
    AnyString Muscle = "Vastus lat. (inf.)"; ///< Descriptive name for the muscle, e.g. for plotting
    AnyIntVar MuscleElemAmount = 6; ///< The total amount of elements for this muscle
    AnyFloat Pennationangle ??= DesignVar(0.0); ///< Pennation angle of the muscle fibers (degres)
    AnyFloat VolumeScaleFactor ??= DesignVar(1.0); ///< Factor for scaling the muscle volume
    AnyFloat MuscleVolume ??= DesignVar(45.45); ///< Volume of the muscle  (ml)
    AnyFloat MuscleVolumeSIScaled ??= .VolumeUnitFactor*VolumeScaleFactor*MuscleVolume; ///< Scaled Volume of the muscle in SI base unit (m^3)
    AnyFloat OptimalFiberlength ??= _FIBER_LENGTH_DESIGNVAR(4.25/100); ///< Optimal working length of the muscle fiber (m)
    AnyFloat TotalTendonLength ??= _TENDON_LENGTH_DESIGNVAR(9.60/100);///< The total tendon length (m)
    AnyFloat K1 ??= DesignVar(10.00); ///< K1 constant in the muscle model.  Factor for determining shortening speed at optimum length
    AnyFloat K2 ??= DesignVar(0.00); ///< K2 constant in the muscle model.  Factor for determining shortening speed at optimum length
    AnyFloat Epsilon0 ??= DesignVar(0.0530); ///< Epsilon bar in the muscle model. Represents tendon strain at F0
    AnyFloat Fcfast ??= DesignVar(0.4); ///< Factor for determining shortening speed at optimum length
  };
  #endif


  #if BM_LEG_MUSCLES_RIGHT | BM_LEG_MUSCLES_LEFT

  AnyFolder VastusLateralisSuperior =
  {
    AnyString Muscle = "Vastus lat. (sup.)"; ///< Descriptive name for the muscle, e.g. for plotting
    AnyIntVar MuscleElemAmount = 2; ///< The total amount of elements for this muscle
    AnyFloat Pennationangle ??= DesignVar(0.0); ///< Pennation angle of the muscle fibers (degres)
    AnyFloat VolumeScaleFactor ??= DesignVar(1.0); ///< Factor for scaling the muscle volume
    AnyFloat MuscleVolume ??= DesignVar(537.88); ///< Volume of the muscle  (ml)
    AnyFloat MuscleVolumeSIScaled ??= .VolumeUnitFactor*VolumeScaleFactor*MuscleVolume; ///< Scaled Volume of the muscle in SI base unit (m^3)
    AnyFloat OptimalFiberlength ??= _FIBER_LENGTH_DESIGNVAR(9.12/100); ///< Optimal working length of the muscle fiber (m)
    AnyFloat TotalTendonLength ??= _TENDON_LENGTH_DESIGNVAR(9.60/100);///< The total tendon length (m)
    AnyFloat K1 ??= DesignVar(10.00); ///< K1 constant in the muscle model.  Factor for determining shortening speed at optimum length
    AnyFloat K2 ??= DesignVar(0.00); ///< K2 constant in the muscle model.  Factor for determining shortening speed at optimum length
    AnyFloat Epsilon0 ??= DesignVar(0.0530); ///< Epsilon bar in the muscle model. Represents tendon strain at F0
    AnyFloat Fcfast ??= DesignVar(0.4); ///< Factor for determining shortening speed at optimum length
  };
  #endif


  #if BM_LEG_MUSCLES_RIGHT | BM_LEG_MUSCLES_LEFT
/// The fiber length was changed (keeping PCSA constant) since it was too long compared to the unscaled muscle length. In the AMMR 1.4 this correction was only applied to  VastusMedialisInferior2Par.
  AnyFolder VastusMedialisInferior =
  {
    AnyString Muscle = "Vastus med. (inf.)"; ///< Descriptive name for the muscle, e.g. for plotting
    AnyIntVar MuscleElemAmount = 2; ///< The total amount of elements for this muscle
    AnyFloat Pennationangle ??= DesignVar(0.0); ///< Pennation angle of the muscle fibers (degres)
    AnyFloat VolumeScaleFactor ??= DesignVar(1.0); ///< Factor for scaling the muscle volume
    AnyFloat MuscleVolume ??= DesignVar(54.65); ///< Volume of the muscle  (ml)
    AnyFloat MuscleVolumeSIScaled ??= .VolumeUnitFactor*VolumeScaleFactor*MuscleVolume; ///< Scaled Volume of the muscle in SI base unit (m^3)
    AnyFloat OptimalFiberlength ??= _FIBER_LENGTH_DESIGNVAR(5.60/100); ///< Optimal working length of the muscle fiber (m)
    AnyFloat TotalTendonLength ??= _TENDON_LENGTH_DESIGNVAR(9.60/100);///< The total tendon length (m)
    AnyFloat K1 ??= DesignVar(10.00); ///< K1 constant in the muscle model.  Factor for determining shortening speed at optimum length
    AnyFloat K2 ??= DesignVar(0.00); ///< K2 constant in the muscle model.  Factor for determining shortening speed at optimum length
    AnyFloat Epsilon0 ??= DesignVar(0.0530); ///< Epsilon bar in the muscle model. Represents tendon strain at F0
    AnyFloat Fcfast ??= DesignVar(0.4); ///< Factor for determining shortening speed at optimum length
  };
  #endif


  #if BM_LEG_MUSCLES_RIGHT | BM_LEG_MUSCLES_LEFT

  AnyFolder VastusMedialisMid =
  {
    AnyString Muscle = "Vastus med. (mid.)"; ///< Descriptive name for the muscle, e.g. for plotting
    AnyIntVar MuscleElemAmount = 2; ///< The total amount of elements for this muscle
    AnyFloat Pennationangle ??= DesignVar(0.0); ///< Pennation angle of the muscle fibers (degres)
    AnyFloat VolumeScaleFactor ??= DesignVar(1.0); ///< Factor for scaling the muscle volume
    AnyFloat MuscleVolume ??= DesignVar(176.14); ///< Volume of the muscle  (ml)
    AnyFloat MuscleVolumeSIScaled ??= .VolumeUnitFactor*VolumeScaleFactor*MuscleVolume; ///< Scaled Volume of the muscle in SI base unit (m^3)
    AnyFloat OptimalFiberlength ??= _FIBER_LENGTH_DESIGNVAR(7.58/100); ///< Optimal working length of the muscle fiber (m)
    AnyFloat TotalTendonLength ??= _TENDON_LENGTH_DESIGNVAR(9.60/100);///< The total tendon length (m)
    AnyFloat K1 ??= DesignVar(10.00); ///< K1 constant in the muscle model.  Factor for determining shortening speed at optimum length
    AnyFloat K2 ??= DesignVar(0.00); ///< K2 constant in the muscle model.  Factor for determining shortening speed at optimum length
    AnyFloat Epsilon0 ??= DesignVar(0.0530); ///< Epsilon bar in the muscle model. Represents tendon strain at F0
    AnyFloat Fcfast ??= DesignVar(0.4); ///< Factor for determining shortening speed at optimum length
  };
  #endif


  #if BM_LEG_MUSCLES_RIGHT | BM_LEG_MUSCLES_LEFT

  AnyFolder VastusMedialisSuperior =
  {
    AnyString Muscle = "Vastus med. (sup.)"; ///< Descriptive name for the muscle, e.g. for plotting
    AnyIntVar MuscleElemAmount = 4; ///< The total amount of elements for this muscle
    AnyFloat Pennationangle ??= DesignVar(0.0); ///< Pennation angle of the muscle fibers (degres)
    AnyFloat VolumeScaleFactor ??= DesignVar(1.0); ///< Factor for scaling the muscle volume
    AnyFloat MuscleVolume ??= DesignVar(223.48); ///< Volume of the muscle  (ml)
    AnyFloat MuscleVolumeSIScaled ??= .VolumeUnitFactor*VolumeScaleFactor*MuscleVolume; ///< Scaled Volume of the muscle in SI base unit (m^3)
    AnyFloat OptimalFiberlength ??= _FIBER_LENGTH_DESIGNVAR(8.30/100); ///< Optimal working length of the muscle fiber (m)
    AnyFloat TotalTendonLength ??= _TENDON_LENGTH_DESIGNVAR(9.60/100);///< The total tendon length (m)
    AnyFloat K1 ??= DesignVar(10.00); ///< K1 constant in the muscle model.  Factor for determining shortening speed at optimum length
    AnyFloat K2 ??= DesignVar(0.00); ///< K2 constant in the muscle model.  Factor for determining shortening speed at optimum length
    AnyFloat Epsilon0 ??= DesignVar(0.0530); ///< Epsilon bar in the muscle model. Represents tendon strain at F0
    AnyFloat Fcfast ??= DesignVar(0.4); ///< Factor for determining shortening speed at optimum length
  };
  #endif


  #if (BM_FOOT_MODEL == _FOOT_MODEL_TOE_FLEX_GM_) | (BM_FOOT_MODEL == _FOOT_MODEL_DETAILED_GM_)

  AnyFolder AbductorHallucis =
  {
    AnyString Muscle = "AbductorHallucis"; ///< Descriptive name for the muscle, e.g. for plotting
    AnyIntVar MuscleElemAmount = 1; ///< The total amount of elements for this muscle
    AnyFloat Pennationangle ??= DesignVar(13.8); ///< Pennation angle of the muscle fibers (degres)
    AnyFloat VolumeScaleFactor ??= DesignVar(1.0); ///< Factor for scaling the muscle volume
    AnyFloat MuscleVolume ??= DesignVar(15.36); ///< Volume of the muscle  (ml)
    AnyFloat MuscleVolumeSIScaled ??= .VolumeUnitFactor*VolumeScaleFactor*MuscleVolume; ///< Scaled Volume of the muscle in SI base unit (m^3)
    AnyFloat OptimalFiberlength ??= _FIBER_LENGTH_DESIGNVAR(2.30/100); ///< Optimal working length of the muscle fiber (m)
    AnyFloat TotalTendonLength ??= _TENDON_LENGTH_DESIGNVAR(14.14/100);///< The total tendon length (m)
    AnyFloat K1 ??= DesignVar(10.00); ///< K1 constant in the muscle model.  Factor for determining shortening speed at optimum length
    AnyFloat K2 ??= DesignVar(0.00); ///< K2 constant in the muscle model.  Factor for determining shortening speed at optimum length
    AnyFloat Epsilon0 ??= DesignVar(0.0530); ///< Epsilon bar in the muscle model. Represents tendon strain at F0
    AnyFloat Fcfast ??= DesignVar(0.4); ///< Factor for determining shortening speed at optimum length
  };
  #endif


  #if (BM_FOOT_MODEL == _FOOT_MODEL_TOE_FLEX_GM_) | (BM_FOOT_MODEL == _FOOT_MODEL_DETAILED_GM_)

  AnyFolder FlexorHallucisBrevisLateralis_1 =
  {
    AnyString Muscle = "FlexorHallucisBrevisLateralis_1"; ///< Descriptive name for the muscle, e.g. for plotting
    AnyIntVar MuscleElemAmount = 1; ///< The total amount of elements for this muscle
    AnyFloat Pennationangle ??= DesignVar(20.1); ///< Pennation angle of the muscle fibers (degres)
    AnyFloat VolumeScaleFactor ??= DesignVar(1.0); ///< Factor for scaling the muscle volume
    AnyFloat MuscleVolume ??= DesignVar(1.75); ///< Volume of the muscle  (ml)
    AnyFloat MuscleVolumeSIScaled ??= .VolumeUnitFactor*VolumeScaleFactor*MuscleVolume; ///< Scaled Volume of the muscle in SI base unit (m^3)
    AnyFloat OptimalFiberlength ??= _FIBER_LENGTH_DESIGNVAR(1.65/100); ///< Optimal working length of the muscle fiber (m)
    AnyFloat TotalTendonLength ??= _TENDON_LENGTH_DESIGNVAR(8.75/100);///< The total tendon length (m)
    AnyFloat K1 ??= DesignVar(10.00); ///< K1 constant in the muscle model.  Factor for determining shortening speed at optimum length
    AnyFloat K2 ??= DesignVar(0.00); ///< K2 constant in the muscle model.  Factor for determining shortening speed at optimum length
    AnyFloat Epsilon0 ??= DesignVar(0.0530); ///< Epsilon bar in the muscle model. Represents tendon strain at F0
    AnyFloat Fcfast ??= DesignVar(0.4); ///< Factor for determining shortening speed at optimum length
  };
  #endif


  #if (BM_FOOT_MODEL == _FOOT_MODEL_TOE_FLEX_GM_) | (BM_FOOT_MODEL == _FOOT_MODEL_DETAILED_GM_)

  AnyFolder FlexorHallucisBrevisLateralis_2 =
  {
    AnyString Muscle = "FlexorHallucisBrevisLateralis_2"; ///< Descriptive name for the muscle, e.g. for plotting
    AnyIntVar MuscleElemAmount = 1; ///< The total amount of elements for this muscle
    AnyFloat Pennationangle ??= DesignVar(20.1); ///< Pennation angle of the muscle fibers (degres)
    AnyFloat VolumeScaleFactor ??= DesignVar(1.0); ///< Factor for scaling the muscle volume
    AnyFloat MuscleVolume ??= DesignVar(1.75); ///< Volume of the muscle  (ml)
    AnyFloat MuscleVolumeSIScaled ??= .VolumeUnitFactor*VolumeScaleFactor*MuscleVolume; ///< Scaled Volume of the muscle in SI base unit (m^3)
    AnyFloat OptimalFiberlength ??= _FIBER_LENGTH_DESIGNVAR(1.65/100); ///< Optimal working length of the muscle fiber (m)
    AnyFloat TotalTendonLength ??= _TENDON_LENGTH_DESIGNVAR(7.97/100);///< The total tendon length (m)
    AnyFloat K1 ??= DesignVar(10.00); ///< K1 constant in the muscle model.  Factor for determining shortening speed at optimum length
    AnyFloat K2 ??= DesignVar(0.00); ///< K2 constant in the muscle model.  Factor for determining shortening speed at optimum length
    AnyFloat Epsilon0 ??= DesignVar(0.0530); ///< Epsilon bar in the muscle model. Represents tendon strain at F0
    AnyFloat Fcfast ??= DesignVar(0.4); ///< Factor for determining shortening speed at optimum length
  };
  #endif


  #if (BM_FOOT_MODEL == _FOOT_MODEL_TOE_FLEX_GM_) | (BM_FOOT_MODEL == _FOOT_MODEL_DETAILED_GM_)

  AnyFolder FlexorHallucisBrevisMedialis =
  {
    AnyString Muscle = "FlexorHallucisBrevisMedialis"; ///< Descriptive name for the muscle, e.g. for plotting
    AnyIntVar MuscleElemAmount = 1; ///< The total amount of elements for this muscle
    AnyFloat Pennationangle ??= DesignVar(8.9); ///< Pennation angle of the muscle fibers (degres)
    AnyFloat VolumeScaleFactor ??= DesignVar(1.0); ///< Factor for scaling the muscle volume
    AnyFloat MuscleVolume ??= DesignVar(3.15); ///< Volume of the muscle  (ml)
    AnyFloat MuscleVolumeSIScaled ??= .VolumeUnitFactor*VolumeScaleFactor*MuscleVolume; ///< Scaled Volume of the muscle in SI base unit (m^3)
    AnyFloat OptimalFiberlength ??= _FIBER_LENGTH_DESIGNVAR(1.75/100); ///< Optimal working length of the muscle fiber (m)
    AnyFloat TotalTendonLength ??= _TENDON_LENGTH_DESIGNVAR(7.69/100);///< The total tendon length (m)
    AnyFloat K1 ??= DesignVar(10.00); ///< K1 constant in the muscle model.  Factor for determining shortening speed at optimum length
    AnyFloat K2 ??= DesignVar(0.00); ///< K2 constant in the muscle model.  Factor for determining shortening speed at optimum length
    AnyFloat Epsilon0 ??= DesignVar(0.0530); ///< Epsilon bar in the muscle model. Represents tendon strain at F0
    AnyFloat Fcfast ??= DesignVar(0.4); ///< Factor for determining shortening speed at optimum length
  };
  #endif


  #if (BM_FOOT_MODEL == _FOOT_MODEL_TOE_FLEX_GM_) | (BM_FOOT_MODEL == _FOOT_MODEL_DETAILED_GM_)

  AnyFolder AdductorHallucisOblique1 =
  {
    AnyString Muscle = "AdductorHallucisOblique1"; ///< Descriptive name for the muscle, e.g. for plotting
    AnyIntVar MuscleElemAmount = 1; ///< The total amount of elements for this muscle
    AnyFloat Pennationangle ??= DesignVar(19.2); ///< Pennation angle of the muscle fibers (degres)
    AnyFloat VolumeScaleFactor ??= DesignVar(1.0); ///< Factor for scaling the muscle volume
    AnyFloat MuscleVolume ??= DesignVar(1.84); ///< Volume of the muscle  (ml)
    AnyFloat MuscleVolumeSIScaled ??= .VolumeUnitFactor*VolumeScaleFactor*MuscleVolume; ///< Scaled Volume of the muscle in SI base unit (m^3)
    AnyFloat OptimalFiberlength ??= _FIBER_LENGTH_DESIGNVAR(1.86/100); ///< Optimal working length of the muscle fiber (m)
    AnyFloat TotalTendonLength ??= _TENDON_LENGTH_DESIGNVAR(5.08/100);///< The total tendon length (m)
    AnyFloat K1 ??= DesignVar(10.00); ///< K1 constant in the muscle model.  Factor for determining shortening speed at optimum length
    AnyFloat K2 ??= DesignVar(0.00); ///< K2 constant in the muscle model.  Factor for determining shortening speed at optimum length
    AnyFloat Epsilon0 ??= DesignVar(0.0530); ///< Epsilon bar in the muscle model. Represents tendon strain at F0
    AnyFloat Fcfast ??= DesignVar(0.4); ///< Factor for determining shortening speed at optimum length
  };
  #endif


  #if (BM_FOOT_MODEL == _FOOT_MODEL_TOE_FLEX_GM_) | (BM_FOOT_MODEL == _FOOT_MODEL_DETAILED_GM_)

  AnyFolder AdductorHallucisOblique2 =
  {
    AnyString Muscle = "AdductorHallucisOblique2"; ///< Descriptive name for the muscle, e.g. for plotting
    AnyIntVar MuscleElemAmount = 1; ///< The total amount of elements for this muscle
    AnyFloat Pennationangle ??= DesignVar(19.2); ///< Pennation angle of the muscle fibers (degres)
    AnyFloat VolumeScaleFactor ??= DesignVar(1.0); ///< Factor for scaling the muscle volume
    AnyFloat MuscleVolume ??= DesignVar(1.84); ///< Volume of the muscle  (ml)
    AnyFloat MuscleVolumeSIScaled ??= .VolumeUnitFactor*VolumeScaleFactor*MuscleVolume; ///< Scaled Volume of the muscle in SI base unit (m^3)
    AnyFloat OptimalFiberlength ??= _FIBER_LENGTH_DESIGNVAR(1.86/100); ///< Optimal working length of the muscle fiber (m)
    AnyFloat TotalTendonLength ??= _TENDON_LENGTH_DESIGNVAR(5.24/100);///< The total tendon length (m)
    AnyFloat K1 ??= DesignVar(10.00); ///< K1 constant in the muscle model.  Factor for determining shortening speed at optimum length
    AnyFloat K2 ??= DesignVar(0.00); ///< K2 constant in the muscle model.  Factor for determining shortening speed at optimum length
    AnyFloat Epsilon0 ??= DesignVar(0.0530); ///< Epsilon bar in the muscle model. Represents tendon strain at F0
    AnyFloat Fcfast ??= DesignVar(0.4); ///< Factor for determining shortening speed at optimum length
  };
  #endif


  #if (BM_FOOT_MODEL == _FOOT_MODEL_TOE_FLEX_GM_) | (BM_FOOT_MODEL == _FOOT_MODEL_DETAILED_GM_)

  AnyFolder AdductorHallucisOblique3 =
  {
    AnyString Muscle = "AdductorHallucisOblique3"; ///< Descriptive name for the muscle, e.g. for plotting
    AnyIntVar MuscleElemAmount = 1; ///< The total amount of elements for this muscle
    AnyFloat Pennationangle ??= DesignVar(19.2); ///< Pennation angle of the muscle fibers (degres)
    AnyFloat VolumeScaleFactor ??= DesignVar(1.0); ///< Factor for scaling the muscle volume
    AnyFloat MuscleVolume ??= DesignVar(1.84); ///< Volume of the muscle  (ml)
    AnyFloat MuscleVolumeSIScaled ??= .VolumeUnitFactor*VolumeScaleFactor*MuscleVolume; ///< Scaled Volume of the muscle in SI base unit (m^3)
    AnyFloat OptimalFiberlength ??= _FIBER_LENGTH_DESIGNVAR(1.86/100); ///< Optimal working length of the muscle fiber (m)
    AnyFloat TotalTendonLength ??= _TENDON_LENGTH_DESIGNVAR(5.89/100);///< The total tendon length (m)
    AnyFloat K1 ??= DesignVar(10.00); ///< K1 constant in the muscle model.  Factor for determining shortening speed at optimum length
    AnyFloat K2 ??= DesignVar(0.00); ///< K2 constant in the muscle model.  Factor for determining shortening speed at optimum length
    AnyFloat Epsilon0 ??= DesignVar(0.0530); ///< Epsilon bar in the muscle model. Represents tendon strain at F0
    AnyFloat Fcfast ??= DesignVar(0.4); ///< Factor for determining shortening speed at optimum length
  };
  #endif


  #if (BM_FOOT_MODEL == _FOOT_MODEL_TOE_FLEX_GM_) | (BM_FOOT_MODEL == _FOOT_MODEL_DETAILED_GM_)

  AnyFolder AdductorHallucisOblique4 =
  {
    AnyString Muscle = "AdductorHallucisOblique4"; ///< Descriptive name for the muscle, e.g. for plotting
    AnyIntVar MuscleElemAmount = 1; ///< The total amount of elements for this muscle
    AnyFloat Pennationangle ??= DesignVar(19.2); ///< Pennation angle of the muscle fibers (degres)
    AnyFloat VolumeScaleFactor ??= DesignVar(1.0); ///< Factor for scaling the muscle volume
    AnyFloat MuscleVolume ??= DesignVar(1.84); ///< Volume of the muscle  (ml)
    AnyFloat MuscleVolumeSIScaled ??= .VolumeUnitFactor*VolumeScaleFactor*MuscleVolume; ///< Scaled Volume of the muscle in SI base unit (m^3)
    AnyFloat OptimalFiberlength ??= _FIBER_LENGTH_DESIGNVAR(1.86/100); ///< Optimal working length of the muscle fiber (m)
    AnyFloat TotalTendonLength ??= _TENDON_LENGTH_DESIGNVAR(7.49/100);///< The total tendon length (m)
    AnyFloat K1 ??= DesignVar(10.00); ///< K1 constant in the muscle model.  Factor for determining shortening speed at optimum length
    AnyFloat K2 ??= DesignVar(0.00); ///< K2 constant in the muscle model.  Factor for determining shortening speed at optimum length
    AnyFloat Epsilon0 ??= DesignVar(0.0530); ///< Epsilon bar in the muscle model. Represents tendon strain at F0
    AnyFloat Fcfast ??= DesignVar(0.4); ///< Factor for determining shortening speed at optimum length
  };
  #endif


  #if (BM_FOOT_MODEL == _FOOT_MODEL_TOE_FLEX_GM_) | (BM_FOOT_MODEL == _FOOT_MODEL_DETAILED_GM_)

  AnyFolder AdductorHallucisOblique5 =
  {
    AnyString Muscle = "AdductorHallucisOblique5"; ///< Descriptive name for the muscle, e.g. for plotting
    AnyIntVar MuscleElemAmount = 1; ///< The total amount of elements for this muscle
    AnyFloat Pennationangle ??= DesignVar(19.2); ///< Pennation angle of the muscle fibers (degres)
    AnyFloat VolumeScaleFactor ??= DesignVar(1.0); ///< Factor for scaling the muscle volume
    AnyFloat MuscleVolume ??= DesignVar(1.84); ///< Volume of the muscle  (ml)
    AnyFloat MuscleVolumeSIScaled ??= .VolumeUnitFactor*VolumeScaleFactor*MuscleVolume; ///< Scaled Volume of the muscle in SI base unit (m^3)
    AnyFloat OptimalFiberlength ??= _FIBER_LENGTH_DESIGNVAR(1.86/100); ///< Optimal working length of the muscle fiber (m)
    AnyFloat TotalTendonLength ??= _TENDON_LENGTH_DESIGNVAR(6.67/100);///< The total tendon length (m)
    AnyFloat K1 ??= DesignVar(10.00); ///< K1 constant in the muscle model.  Factor for determining shortening speed at optimum length
    AnyFloat K2 ??= DesignVar(0.00); ///< K2 constant in the muscle model.  Factor for determining shortening speed at optimum length
    AnyFloat Epsilon0 ??= DesignVar(0.0530); ///< Epsilon bar in the muscle model. Represents tendon strain at F0
    AnyFloat Fcfast ??= DesignVar(0.4); ///< Factor for determining shortening speed at optimum length
  };
  #endif


  #if (BM_FOOT_MODEL == _FOOT_MODEL_TOE_FLEX_GM_) | (BM_FOOT_MODEL == _FOOT_MODEL_DETAILED_GM_)
  AnyFolder AdductorHallucisTransverse1 =
  {
    AnyString Muscle = "AdductorHallucisTransverse1"; ///< Descriptive name for the muscle, e.g. for plotting
    AnyIntVar MuscleElemAmount = 1; ///< The total amount of elements for this muscle
    AnyFloat Pennationangle ??= DesignVar(9.9); ///< Pennation angle of the muscle fibers (degres)
    AnyFloat VolumeScaleFactor ??= DesignVar(1.0); ///< Factor for scaling the muscle volume
    AnyFloat MuscleVolume ??= DesignVar(0.39); ///< Volume of the muscle  (ml)
    AnyFloat MuscleVolumeSIScaled ??= .VolumeUnitFactor*VolumeScaleFactor*MuscleVolume; ///< Scaled Volume of the muscle in SI base unit (m^3)
    AnyFloat OptimalFiberlength ??= _FIBER_LENGTH_DESIGNVAR(1.87/100); ///< Optimal working length of the muscle fiber (m)
    AnyFloat TotalTendonLength ??= _TENDON_LENGTH_DESIGNVAR(2.33/100);///< The total tendon length (m)
    AnyFloat K1 ??= DesignVar(10.00); ///< K1 constant in the muscle model.  Factor for determining shortening speed at optimum length
    AnyFloat K2 ??= DesignVar(0.00); ///< K2 constant in the muscle model.  Factor for determining shortening speed at optimum length
    AnyFloat Epsilon0 ??= DesignVar(0.0530); ///< Epsilon bar in the muscle model. Represents tendon strain at F0
    AnyFloat Fcfast ??= DesignVar(0.4); ///< Factor for determining shortening speed at optimum length
  };
  #endif


  #if (BM_FOOT_MODEL == _FOOT_MODEL_TOE_FLEX_GM_) | (BM_FOOT_MODEL == _FOOT_MODEL_DETAILED_GM_)

  AnyFolder AdductorHallucisTransverse2 =
  {
    AnyString Muscle = "AdductorHallucisTransverse2"; ///< Descriptive name for the muscle, e.g. for plotting
    AnyIntVar MuscleElemAmount = 1; ///< The total amount of elements for this muscle
    AnyFloat Pennationangle ??= DesignVar(9.9); ///< Pennation angle of the muscle fibers (degres)
    AnyFloat VolumeScaleFactor ??= DesignVar(1.0); ///< Factor for scaling the muscle volume
    AnyFloat MuscleVolume ??= DesignVar(0.39); ///< Volume of the muscle  (ml)
    AnyFloat MuscleVolumeSIScaled ??= .VolumeUnitFactor*VolumeScaleFactor*MuscleVolume; ///< Scaled Volume of the muscle in SI base unit (m^3)
    AnyFloat OptimalFiberlength ??= _FIBER_LENGTH_DESIGNVAR(1.87/100); ///< Optimal working length of the muscle fiber (m)
    AnyFloat TotalTendonLength ??= _TENDON_LENGTH_DESIGNVAR(3.70/100);///< The total tendon length (m)
    AnyFloat K1 ??= DesignVar(10.00); ///< K1 constant in the muscle model.  Factor for determining shortening speed at optimum length
    AnyFloat K2 ??= DesignVar(0.00); ///< K2 constant in the muscle model.  Factor for determining shortening speed at optimum length
    AnyFloat Epsilon0 ??= DesignVar(0.0530); ///< Epsilon bar in the muscle model. Represents tendon strain at F0
    AnyFloat Fcfast ??= DesignVar(0.4); ///< Factor for determining shortening speed at optimum length
  };
  #endif


  #if (BM_FOOT_MODEL == _FOOT_MODEL_TOE_FLEX_GM_) | (BM_FOOT_MODEL == _FOOT_MODEL_DETAILED_GM_)

  AnyFolder AdductorHallucisTransverse3 =
  {
    AnyString Muscle = "AdductorHallucisTransverse3"; ///< Descriptive name for the muscle, e.g. for plotting
    AnyIntVar MuscleElemAmount = 1; ///< The total amount of elements for this muscle
    AnyFloat Pennationangle ??= DesignVar(9.9); ///< Pennation angle of the muscle fibers (degres)
    AnyFloat VolumeScaleFactor ??= DesignVar(1.0); ///< Factor for scaling the muscle volume
    AnyFloat MuscleVolume ??= DesignVar(0.39); ///< Volume of the muscle  (ml)
    AnyFloat MuscleVolumeSIScaled ??= .VolumeUnitFactor*VolumeScaleFactor*MuscleVolume; ///< Scaled Volume of the muscle in SI base unit (m^3)
    AnyFloat OptimalFiberlength ??= _FIBER_LENGTH_DESIGNVAR(1.87/100); ///< Optimal working length of the muscle fiber (m)
    AnyFloat TotalTendonLength ??= _TENDON_LENGTH_DESIGNVAR(5.32/100);///< The total tendon length (m)
    AnyFloat K1 ??= DesignVar(10.00); ///< K1 constant in the muscle model.  Factor for determining shortening speed at optimum length
    AnyFloat K2 ??= DesignVar(0.00); ///< K2 constant in the muscle model.  Factor for determining shortening speed at optimum length
    AnyFloat Epsilon0 ??= DesignVar(0.0530); ///< Epsilon bar in the muscle model. Represents tendon strain at F0
    AnyFloat Fcfast ??= DesignVar(0.4); ///< Factor for determining shortening speed at optimum length
  };
  #endif


  #if (BM_FOOT_MODEL == _FOOT_MODEL_TOE_FLEX_GM_) | (BM_FOOT_MODEL == _FOOT_MODEL_DETAILED_GM_)

  AnyFolder ExtensorHallucisBrevis =
  {
    AnyString Muscle = "ExtensorHallucisBrevis"; ///< Descriptive name for the muscle, e.g. for plotting
    AnyIntVar MuscleElemAmount = 1; ///< The total amount of elements for this muscle
    AnyFloat Pennationangle ??= DesignVar(13.1); ///< Pennation angle of the muscle fibers (degres)
    AnyFloat VolumeScaleFactor ??= DesignVar(1.0); ///< Factor for scaling the muscle volume
    AnyFloat MuscleVolume ??= DesignVar(3.74); ///< Volume of the muscle  (ml)
    AnyFloat MuscleVolumeSIScaled ??= .VolumeUnitFactor*VolumeScaleFactor*MuscleVolume; ///< Scaled Volume of the muscle in SI base unit (m^3)
    AnyFloat OptimalFiberlength ??= _FIBER_LENGTH_DESIGNVAR(2.79/100); ///< Optimal working length of the muscle fiber (m)
    AnyFloat TotalTendonLength ??= _TENDON_LENGTH_DESIGNVAR(14.13/100);///< The total tendon length (m)
    AnyFloat K1 ??= DesignVar(10.00); ///< K1 constant in the muscle model.  Factor for determining shortening speed at optimum length
    AnyFloat K2 ??= DesignVar(0.00); ///< K2 constant in the muscle model.  Factor for determining shortening speed at optimum length
    AnyFloat Epsilon0 ??= DesignVar(0.0530); ///< Epsilon bar in the muscle model. Represents tendon strain at F0
    AnyFloat Fcfast ??= DesignVar(0.4); ///< Factor for determining shortening speed at optimum length
  };
  #endif


  #if (BM_FOOT_MODEL == _FOOT_MODEL_TOE_FLEX_GM_) | (BM_FOOT_MODEL == _FOOT_MODEL_DETAILED_GM_)

  AnyFolder DorsalInterosseous1Part1 =
  {
    AnyString Muscle = "DorsalInterosseous1Part1"; ///< Descriptive name for the muscle, e.g. for plotting
    AnyIntVar MuscleElemAmount = 1; ///< The total amount of elements for this muscle
    AnyFloat Pennationangle ??= DesignVar(20.9); ///< Pennation angle of the muscle fibers (degres)
    AnyFloat VolumeScaleFactor ??= DesignVar(1.0); ///< Factor for scaling the muscle volume
    AnyFloat MuscleVolume ??= DesignVar(1.37); ///< Volume of the muscle  (ml)
    AnyFloat MuscleVolumeSIScaled ??= .VolumeUnitFactor*VolumeScaleFactor*MuscleVolume; ///< Scaled Volume of the muscle in SI base unit (m^3)
    AnyFloat OptimalFiberlength ??= _FIBER_LENGTH_DESIGNVAR(1.61/100); ///< Optimal working length of the muscle fiber (m)
    AnyFloat TotalTendonLength ??= _TENDON_LENGTH_DESIGNVAR(5.24/100);///< The total tendon length (m)
    AnyFloat K1 ??= DesignVar(10.00); ///< K1 constant in the muscle model.  Factor for determining shortening speed at optimum length
    AnyFloat K2 ??= DesignVar(0.00); ///< K2 constant in the muscle model.  Factor for determining shortening speed at optimum length
    AnyFloat Epsilon0 ??= DesignVar(0.0530); ///< Epsilon bar in the muscle model. Represents tendon strain at F0
    AnyFloat Fcfast ??= DesignVar(0.4); ///< Factor for determining shortening speed at optimum length
  };
  #endif


  #if (BM_FOOT_MODEL == _FOOT_MODEL_TOE_FLEX_GM_) | (BM_FOOT_MODEL == _FOOT_MODEL_DETAILED_GM_)

  AnyFolder DorsalInterosseous1Part2 =
  {
    AnyString Muscle = "DorsalInterosseous1Part2"; ///< Descriptive name for the muscle, e.g. for plotting
    AnyIntVar MuscleElemAmount = 1; ///< The total amount of elements for this muscle
    AnyFloat Pennationangle ??= DesignVar(20.9); ///< Pennation angle of the muscle fibers (degres)
    AnyFloat VolumeScaleFactor ??= DesignVar(1.0); ///< Factor for scaling the muscle volume
    AnyFloat MuscleVolume ??= DesignVar(1.37); ///< Volume of the muscle  (ml)
    AnyFloat MuscleVolumeSIScaled ??= .VolumeUnitFactor*VolumeScaleFactor*MuscleVolume; ///< Scaled Volume of the muscle in SI base unit (m^3)
    AnyFloat OptimalFiberlength ??= _FIBER_LENGTH_DESIGNVAR(1.61/100); ///< Optimal working length of the muscle fiber (m)
    AnyFloat TotalTendonLength ??= _TENDON_LENGTH_DESIGNVAR(4.09/100);///< The total tendon length (m)
    AnyFloat K1 ??= DesignVar(10.00); ///< K1 constant in the muscle model.  Factor for determining shortening speed at optimum length
    AnyFloat K2 ??= DesignVar(0.00); ///< K2 constant in the muscle model.  Factor for determining shortening speed at optimum length
    AnyFloat Epsilon0 ??= DesignVar(0.0530); ///< Epsilon bar in the muscle model. Represents tendon strain at F0
    AnyFloat Fcfast ??= DesignVar(0.4); ///< Factor for determining shortening speed at optimum length
  };
  #endif


  #if (BM_FOOT_MODEL == _FOOT_MODEL_TOE_FLEX_GM_) | (BM_FOOT_MODEL == _FOOT_MODEL_DETAILED_GM_)

  AnyFolder DorsalInterosseous2Part1 =
  {
    AnyString Muscle = "DorsalInterosseous2Part1"; ///< Descriptive name for the muscle, e.g. for plotting
    AnyIntVar MuscleElemAmount = 1; ///< The total amount of elements for this muscle
    AnyFloat Pennationangle ??= DesignVar(17.1); ///< Pennation angle of the muscle fibers (degres)
    AnyFloat VolumeScaleFactor ??= DesignVar(1.0); ///< Factor for scaling the muscle volume
    AnyFloat MuscleVolume ??= DesignVar(1.29); ///< Volume of the muscle  (ml)
    AnyFloat MuscleVolumeSIScaled ??= .VolumeUnitFactor*VolumeScaleFactor*MuscleVolume; ///< Scaled Volume of the muscle in SI base unit (m^3)
    AnyFloat OptimalFiberlength ??= _FIBER_LENGTH_DESIGNVAR(1.53/100); ///< Optimal working length of the muscle fiber (m)
    AnyFloat TotalTendonLength ??= _TENDON_LENGTH_DESIGNVAR(5.22/100);///< The total tendon length (m)
    AnyFloat K1 ??= DesignVar(10.00); ///< K1 constant in the muscle model.  Factor for determining shortening speed at optimum length
    AnyFloat K2 ??= DesignVar(0.00); ///< K2 constant in the muscle model.  Factor for determining shortening speed at optimum length
    AnyFloat Epsilon0 ??= DesignVar(0.0530); ///< Epsilon bar in the muscle model. Represents tendon strain at F0
    AnyFloat Fcfast ??= DesignVar(0.4); ///< Factor for determining shortening speed at optimum length
  };
  #endif


  #if (BM_FOOT_MODEL == _FOOT_MODEL_TOE_FLEX_GM_) | (BM_FOOT_MODEL == _FOOT_MODEL_DETAILED_GM_)

  AnyFolder DorsalInterosseous2Part2 =
  {
    AnyString Muscle = "DorsalInterosseous2Part2"; ///< Descriptive name for the muscle, e.g. for plotting
    AnyIntVar MuscleElemAmount = 1; ///< The total amount of elements for this muscle
    AnyFloat Pennationangle ??= DesignVar(17.1); ///< Pennation angle of the muscle fibers (degres)
    AnyFloat VolumeScaleFactor ??= DesignVar(1.0); ///< Factor for scaling the muscle volume
    AnyFloat MuscleVolume ??= DesignVar(1.29); ///< Volume of the muscle  (ml)
    AnyFloat MuscleVolumeSIScaled ??= .VolumeUnitFactor*VolumeScaleFactor*MuscleVolume; ///< Scaled Volume of the muscle in SI base unit (m^3)
    AnyFloat OptimalFiberlength ??= _FIBER_LENGTH_DESIGNVAR(1.53/100); ///< Optimal working length of the muscle fiber (m)
    AnyFloat TotalTendonLength ??= _TENDON_LENGTH_DESIGNVAR(5.21/100);///< The total tendon length (m)
    AnyFloat K1 ??= DesignVar(10.00); ///< K1 constant in the muscle model.  Factor for determining shortening speed at optimum length
    AnyFloat K2 ??= DesignVar(0.00); ///< K2 constant in the muscle model.  Factor for determining shortening speed at optimum length
    AnyFloat Epsilon0 ??= DesignVar(0.0530); ///< Epsilon bar in the muscle model. Represents tendon strain at F0
    AnyFloat Fcfast ??= DesignVar(0.4); ///< Factor for determining shortening speed at optimum length
  };
  #endif


  #if (BM_FOOT_MODEL == _FOOT_MODEL_TOE_FLEX_GM_) | (BM_FOOT_MODEL == _FOOT_MODEL_DETAILED_GM_)

  AnyFolder DorsalInterosseous3Part1 =
  {
    AnyString Muscle = "DorsalInterosseous3Part1"; ///< Descriptive name for the muscle, e.g. for plotting
    AnyIntVar MuscleElemAmount = 1; ///< The total amount of elements for this muscle
    AnyFloat Pennationangle ??= DesignVar(14.7); ///< Pennation angle of the muscle fibers (degres)
    AnyFloat VolumeScaleFactor ??= DesignVar(1.0); ///< Factor for scaling the muscle volume
    AnyFloat MuscleVolume ??= DesignVar(1.28); ///< Volume of the muscle  (ml)
    AnyFloat MuscleVolumeSIScaled ??= .VolumeUnitFactor*VolumeScaleFactor*MuscleVolume; ///< Scaled Volume of the muscle in SI base unit (m^3)
    AnyFloat OptimalFiberlength ??= _FIBER_LENGTH_DESIGNVAR(1.56/100); ///< Optimal working length of the muscle fiber (m)
    AnyFloat TotalTendonLength ??= _TENDON_LENGTH_DESIGNVAR(4.85/100);///< The total tendon length (m)
    AnyFloat K1 ??= DesignVar(10.00); ///< K1 constant in the muscle model.  Factor for determining shortening speed at optimum length
    AnyFloat K2 ??= DesignVar(0.00); ///< K2 constant in the muscle model.  Factor for determining shortening speed at optimum length
    AnyFloat Epsilon0 ??= DesignVar(0.0530); ///< Epsilon bar in the muscle model. Represents tendon strain at F0
    AnyFloat Fcfast ??= DesignVar(0.4); ///< Factor for determining shortening speed at optimum length
  };
  #endif


  #if (BM_FOOT_MODEL == _FOOT_MODEL_TOE_FLEX_GM_) | (BM_FOOT_MODEL == _FOOT_MODEL_DETAILED_GM_)

  AnyFolder DorsalInterosseous3Part2 =
  {
    AnyString Muscle = "DorsalInterosseous3Part2"; ///< Descriptive name for the muscle, e.g. for plotting
    AnyIntVar MuscleElemAmount = 1; ///< The total amount of elements for this muscle
    AnyFloat Pennationangle ??= DesignVar(14.7); ///< Pennation angle of the muscle fibers (degres)
    AnyFloat VolumeScaleFactor ??= DesignVar(1.0); ///< Factor for scaling the muscle volume
    AnyFloat MuscleVolume ??= DesignVar(1.28); ///< Volume of the muscle  (ml)
    AnyFloat MuscleVolumeSIScaled ??= .VolumeUnitFactor*VolumeScaleFactor*MuscleVolume; ///< Scaled Volume of the muscle in SI base unit (m^3)
    AnyFloat OptimalFiberlength ??= _FIBER_LENGTH_DESIGNVAR(1.56/100); ///< Optimal working length of the muscle fiber (m)
    AnyFloat TotalTendonLength ??= _TENDON_LENGTH_DESIGNVAR(4.91/100);///< The total tendon length (m)
    AnyFloat K1 ??= DesignVar(10.00); ///< K1 constant in the muscle model.  Factor for determining shortening speed at optimum length
    AnyFloat K2 ??= DesignVar(0.00); ///< K2 constant in the muscle model.  Factor for determining shortening speed at optimum length
    AnyFloat Epsilon0 ??= DesignVar(0.0530); ///< Epsilon bar in the muscle model. Represents tendon strain at F0
    AnyFloat Fcfast ??= DesignVar(0.4); ///< Factor for determining shortening speed at optimum length
  };
  #endif


  #if (BM_FOOT_MODEL == _FOOT_MODEL_TOE_FLEX_GM_) | (BM_FOOT_MODEL == _FOOT_MODEL_DETAILED_GM_)

  AnyFolder DorsalInterosseous4Part1 =
  {
    AnyString Muscle = "DorsalInterosseous4Part1"; ///< Descriptive name for the muscle, e.g. for plotting
    AnyIntVar MuscleElemAmount = 1; ///< The total amount of elements for this muscle
    AnyFloat Pennationangle ??= DesignVar(18.4); ///< Pennation angle of the muscle fibers (degres)
    AnyFloat VolumeScaleFactor ??= DesignVar(1.0); ///< Factor for scaling the muscle volume
    AnyFloat MuscleVolume ??= DesignVar(2.18); ///< Volume of the muscle  (ml)
    AnyFloat MuscleVolumeSIScaled ??= .VolumeUnitFactor*VolumeScaleFactor*MuscleVolume; ///< Scaled Volume of the muscle in SI base unit (m^3)
    AnyFloat OptimalFiberlength ??= _FIBER_LENGTH_DESIGNVAR(1.60/100); ///< Optimal working length of the muscle fiber (m)
    AnyFloat TotalTendonLength ??= _TENDON_LENGTH_DESIGNVAR(4.52/100);///< The total tendon length (m)
    AnyFloat K1 ??= DesignVar(10.00); ///< K1 constant in the muscle model.  Factor for determining shortening speed at optimum length
    AnyFloat K2 ??= DesignVar(0.00); ///< K2 constant in the muscle model.  Factor for determining shortening speed at optimum length
    AnyFloat Epsilon0 ??= DesignVar(0.0530); ///< Epsilon bar in the muscle model. Represents tendon strain at F0
    AnyFloat Fcfast ??= DesignVar(0.4); ///< Factor for determining shortening speed at optimum length
  };
  #endif


  #if (BM_FOOT_MODEL == _FOOT_MODEL_TOE_FLEX_GM_) | (BM_FOOT_MODEL == _FOOT_MODEL_DETAILED_GM_)

  AnyFolder DorsalInterosseous4Part2 =
  {
    AnyString Muscle = "DorsalInterosseous4Part2"; ///< Descriptive name for the muscle, e.g. for plotting
    AnyIntVar MuscleElemAmount = 1; ///< The total amount of elements for this muscle
    AnyFloat Pennationangle ??= DesignVar(18.4); ///< Pennation angle of the muscle fibers (degres)
    AnyFloat VolumeScaleFactor ??= DesignVar(1.0); ///< Factor for scaling the muscle volume
    AnyFloat MuscleVolume ??= DesignVar(2.18); ///< Volume of the muscle  (ml)
    AnyFloat MuscleVolumeSIScaled ??= .VolumeUnitFactor*VolumeScaleFactor*MuscleVolume; ///< Scaled Volume of the muscle in SI base unit (m^3)
    AnyFloat OptimalFiberlength ??= _FIBER_LENGTH_DESIGNVAR(1.60/100); ///< Optimal working length of the muscle fiber (m)
    AnyFloat TotalTendonLength ??= _TENDON_LENGTH_DESIGNVAR(4.81/100);///< The total tendon length (m)
    AnyFloat K1 ??= DesignVar(10.00); ///< K1 constant in the muscle model.  Factor for determining shortening speed at optimum length
    AnyFloat K2 ??= DesignVar(0.00); ///< K2 constant in the muscle model.  Factor for determining shortening speed at optimum length
    AnyFloat Epsilon0 ??= DesignVar(0.0530); ///< Epsilon bar in the muscle model. Represents tendon strain at F0
    AnyFloat Fcfast ??= DesignVar(0.4); ///< Factor for determining shortening speed at optimum length
  };
  #endif


  #if (BM_FOOT_MODEL == _FOOT_MODEL_TOE_FLEX_GM_) | (BM_FOOT_MODEL == _FOOT_MODEL_DETAILED_GM_)

  AnyFolder ExtensorDigitoriumBrevis2 =
  {
    AnyString Muscle = "ExtensorDigitoriumBrevis2"; ///< Descriptive name for the muscle, e.g. for plotting
    AnyIntVar MuscleElemAmount = 1; ///< The total amount of elements for this muscle
    AnyFloat Pennationangle ??= DesignVar(9.3); ///< Pennation angle of the muscle fibers (degres)
    AnyFloat VolumeScaleFactor ??= DesignVar(1.0); ///< Factor for scaling the muscle volume
    AnyFloat MuscleVolume ??= DesignVar(2.21); ///< Volume of the muscle  (ml)
    AnyFloat MuscleVolumeSIScaled ??= .VolumeUnitFactor*VolumeScaleFactor*MuscleVolume; ///< Scaled Volume of the muscle in SI base unit (m^3)
    AnyFloat OptimalFiberlength ??= _FIBER_LENGTH_DESIGNVAR(2.80/100); ///< Optimal working length of the muscle fiber (m)
    AnyFloat TotalTendonLength ??= _TENDON_LENGTH_DESIGNVAR(15.23/100);///< The total tendon length (m)
    AnyFloat K1 ??= DesignVar(10.00); ///< K1 constant in the muscle model.  Factor for determining shortening speed at optimum length
    AnyFloat K2 ??= DesignVar(0.00); ///< K2 constant in the muscle model.  Factor for determining shortening speed at optimum length
    AnyFloat Epsilon0 ??= DesignVar(0.0530); ///< Epsilon bar in the muscle model. Represents tendon strain at F0
    AnyFloat Fcfast ??= DesignVar(0.4); ///< Factor for determining shortening speed at optimum length
  };
  #endif


  #if (BM_FOOT_MODEL == _FOOT_MODEL_TOE_FLEX_GM_) | (BM_FOOT_MODEL == _FOOT_MODEL_DETAILED_GM_)

  AnyFolder ExtensorDigitoriumBrevis3 =
  {
    AnyString Muscle = "ExtensorDigitoriumBrevis3"; ///< Descriptive name for the muscle, e.g. for plotting
    AnyIntVar MuscleElemAmount = 1; ///< The total amount of elements for this muscle
    AnyFloat Pennationangle ??= DesignVar(10.2); ///< Pennation angle of the muscle fibers (degres)
    AnyFloat VolumeScaleFactor ??= DesignVar(1.0); ///< Factor for scaling the muscle volume
    AnyFloat MuscleVolume ??= DesignVar(1.35); ///< Volume of the muscle  (ml)
    AnyFloat MuscleVolumeSIScaled ??= .VolumeUnitFactor*VolumeScaleFactor*MuscleVolume; ///< Scaled Volume of the muscle in SI base unit (m^3)
    AnyFloat OptimalFiberlength ??= _FIBER_LENGTH_DESIGNVAR(2.64/100); ///< Optimal working length of the muscle fiber (m)
    AnyFloat TotalTendonLength ??= _TENDON_LENGTH_DESIGNVAR(14.17/100);///< The total tendon length (m)
    AnyFloat K1 ??= DesignVar(10.00); ///< K1 constant in the muscle model.  Factor for determining shortening speed at optimum length
    AnyFloat K2 ??= DesignVar(0.00); ///< K2 constant in the muscle model.  Factor for determining shortening speed at optimum length
    AnyFloat Epsilon0 ??= DesignVar(0.0530); ///< Epsilon bar in the muscle model. Represents tendon strain at F0
    AnyFloat Fcfast ??= DesignVar(0.4); ///< Factor for determining shortening speed at optimum length
  };
  #endif


  #if (BM_FOOT_MODEL == _FOOT_MODEL_TOE_FLEX_GM_) | (BM_FOOT_MODEL == _FOOT_MODEL_DETAILED_GM_)

  AnyFolder ExtensorDigitoriumBrevis4 =
  {
    AnyString Muscle = "ExtensorDigitoriumBrevis4"; ///< Descriptive name for the muscle, e.g. for plotting
    AnyIntVar MuscleElemAmount = 1; ///< The total amount of elements for this muscle
    AnyFloat Pennationangle ??= DesignVar(9.6); ///< Pennation angle of the muscle fibers (degres)
    AnyFloat VolumeScaleFactor ??= DesignVar(1.0); ///< Factor for scaling the muscle volume
    AnyFloat MuscleVolume ??= DesignVar(1.02); ///< Volume of the muscle  (ml)
    AnyFloat MuscleVolumeSIScaled ??= .VolumeUnitFactor*VolumeScaleFactor*MuscleVolume; ///< Scaled Volume of the muscle in SI base unit (m^3)
    AnyFloat OptimalFiberlength ??= _FIBER_LENGTH_DESIGNVAR(2.31/100); ///< Optimal working length of the muscle fiber (m)
    AnyFloat TotalTendonLength ??= _TENDON_LENGTH_DESIGNVAR(13.01/100);///< The total tendon length (m)
    AnyFloat K1 ??= DesignVar(10.00); ///< K1 constant in the muscle model.  Factor for determining shortening speed at optimum length
    AnyFloat K2 ??= DesignVar(0.00); ///< K2 constant in the muscle model.  Factor for determining shortening speed at optimum length
    AnyFloat Epsilon0 ??= DesignVar(0.0530); ///< Epsilon bar in the muscle model. Represents tendon strain at F0
    AnyFloat Fcfast ??= DesignVar(0.4); ///< Factor for determining shortening speed at optimum length
  };
  #endif


  #if (BM_FOOT_MODEL == _FOOT_MODEL_TOE_FLEX_GM_) | (BM_FOOT_MODEL == _FOOT_MODEL_DETAILED_GM_)

  AnyFolder PlantarInterosseous1 =
  {
    AnyString Muscle = "PlantarInterosseous1"; ///< Descriptive name for the muscle, e.g. for plotting
    AnyIntVar MuscleElemAmount = 1; ///< The total amount of elements for this muscle
    AnyFloat Pennationangle ??= DesignVar(14.0); ///< Pennation angle of the muscle fibers (degres)
    AnyFloat VolumeScaleFactor ??= DesignVar(1.0); ///< Factor for scaling the muscle volume
    AnyFloat MuscleVolume ??= DesignVar(1.67); ///< Volume of the muscle  (ml)
    AnyFloat MuscleVolumeSIScaled ??= .VolumeUnitFactor*VolumeScaleFactor*MuscleVolume; ///< Scaled Volume of the muscle in SI base unit (m^3)
    AnyFloat OptimalFiberlength ??= _FIBER_LENGTH_DESIGNVAR(1.36/100); ///< Optimal working length of the muscle fiber (m)
    AnyFloat TotalTendonLength ??= _TENDON_LENGTH_DESIGNVAR(6.54/100);///< The total tendon length (m)
    AnyFloat K1 ??= DesignVar(10.00); ///< K1 constant in the muscle model.  Factor for determining shortening speed at optimum length
    AnyFloat K2 ??= DesignVar(0.00); ///< K2 constant in the muscle model.  Factor for determining shortening speed at optimum length
    AnyFloat Epsilon0 ??= DesignVar(0.0530); ///< Epsilon bar in the muscle model. Represents tendon strain at F0
    AnyFloat Fcfast ??= DesignVar(0.4); ///< Factor for determining shortening speed at optimum length
  };
  #endif


  #if (BM_FOOT_MODEL == _FOOT_MODEL_TOE_FLEX_GM_) | (BM_FOOT_MODEL == _FOOT_MODEL_DETAILED_GM_)

  AnyFolder PlantarInterosseous2Part1 =
  {
    AnyString Muscle = "PlantarInterosseous2Part1"; ///< Descriptive name for the muscle, e.g. for plotting
    AnyIntVar MuscleElemAmount = 1; ///< The total amount of elements for this muscle
    AnyFloat Pennationangle ??= DesignVar(10.0); ///< Pennation angle of the muscle fibers (degres)
    AnyFloat VolumeScaleFactor ??= DesignVar(1.0); ///< Factor for scaling the muscle volume
    AnyFloat MuscleVolume ??= DesignVar(0.65); ///< Volume of the muscle  (ml)
    AnyFloat MuscleVolumeSIScaled ??= .VolumeUnitFactor*VolumeScaleFactor*MuscleVolume; ///< Scaled Volume of the muscle in SI base unit (m^3)
    AnyFloat OptimalFiberlength ??= _FIBER_LENGTH_DESIGNVAR(1.39/100); ///< Optimal working length of the muscle fiber (m)
    AnyFloat TotalTendonLength ??= _TENDON_LENGTH_DESIGNVAR(4.63/100);///< The total tendon length (m)
    AnyFloat K1 ??= DesignVar(10.00); ///< K1 constant in the muscle model.  Factor for determining shortening speed at optimum length
    AnyFloat K2 ??= DesignVar(0.00); ///< K2 constant in the muscle model.  Factor for determining shortening speed at optimum length
    AnyFloat Epsilon0 ??= DesignVar(0.0530); ///< Epsilon bar in the muscle model. Represents tendon strain at F0
    AnyFloat Fcfast ??= DesignVar(0.4); ///< Factor for determining shortening speed at optimum length
  };
  #endif


  #if (BM_FOOT_MODEL == _FOOT_MODEL_TOE_FLEX_GM_) | (BM_FOOT_MODEL == _FOOT_MODEL_DETAILED_GM_)

  AnyFolder PlantarInterosseous2Part2 =
  {
    AnyString Muscle = "PlantarInterosseous2Part2"; ///< Descriptive name for the muscle, e.g. for plotting
    AnyIntVar MuscleElemAmount = 1; ///< The total amount of elements for this muscle
    AnyFloat Pennationangle ??= DesignVar(10.0); ///< Pennation angle of the muscle fibers (degres)
    AnyFloat VolumeScaleFactor ??= DesignVar(1.0); ///< Factor for scaling the muscle volume
    AnyFloat MuscleVolume ??= DesignVar(0.65); ///< Volume of the muscle  (ml)
    AnyFloat MuscleVolumeSIScaled ??= .VolumeUnitFactor*VolumeScaleFactor*MuscleVolume; ///< Scaled Volume of the muscle in SI base unit (m^3)
    AnyFloat OptimalFiberlength ??= _FIBER_LENGTH_DESIGNVAR(1.39/100); ///< Optimal working length of the muscle fiber (m)
    AnyFloat TotalTendonLength ??= _TENDON_LENGTH_DESIGNVAR(5.16/100);///< The total tendon length (m)
    AnyFloat K1 ??= DesignVar(10.00); ///< K1 constant in the muscle model.  Factor for determining shortening speed at optimum length
    AnyFloat K2 ??= DesignVar(0.00); ///< K2 constant in the muscle model.  Factor for determining shortening speed at optimum length
    AnyFloat Epsilon0 ??= DesignVar(0.0530); ///< Epsilon bar in the muscle model. Represents tendon strain at F0
    AnyFloat Fcfast ??= DesignVar(0.4); ///< Factor for determining shortening speed at optimum length
  };
  #endif


  #if (BM_FOOT_MODEL == _FOOT_MODEL_TOE_FLEX_GM_) | (BM_FOOT_MODEL == _FOOT_MODEL_DETAILED_GM_)

  AnyFolder PlantarInterosseous2Part3 =
  {
    AnyString Muscle = "PlantarInterosseous2Part3"; ///< Descriptive name for the muscle, e.g. for plotting
    AnyIntVar MuscleElemAmount = 1; ///< The total amount of elements for this muscle
    AnyFloat Pennationangle ??= DesignVar(10.0); ///< Pennation angle of the muscle fibers (degres)
    AnyFloat VolumeScaleFactor ??= DesignVar(1.0); ///< Factor for scaling the muscle volume
    AnyFloat MuscleVolume ??= DesignVar(0.65); ///< Volume of the muscle  (ml)
    AnyFloat MuscleVolumeSIScaled ??= .VolumeUnitFactor*VolumeScaleFactor*MuscleVolume; ///< Scaled Volume of the muscle in SI base unit (m^3)
    AnyFloat OptimalFiberlength ??= _FIBER_LENGTH_DESIGNVAR(1.39/100); ///< Optimal working length of the muscle fiber (m)
    AnyFloat TotalTendonLength ??= _TENDON_LENGTH_DESIGNVAR(6.46/100);///< The total tendon length (m)
    AnyFloat K1 ??= DesignVar(10.00); ///< K1 constant in the muscle model.  Factor for determining shortening speed at optimum length
    AnyFloat K2 ??= DesignVar(0.00); ///< K2 constant in the muscle model.  Factor for determining shortening speed at optimum length
    AnyFloat Epsilon0 ??= DesignVar(0.0530); ///< Epsilon bar in the muscle model. Represents tendon strain at F0
    AnyFloat Fcfast ??= DesignVar(0.4); ///< Factor for determining shortening speed at optimum length
  };
  #endif


  #if (BM_FOOT_MODEL == _FOOT_MODEL_TOE_FLEX_GM_) | (BM_FOOT_MODEL == _FOOT_MODEL_DETAILED_GM_)

  AnyFolder PlantarInterosseous3Part1 =
  {
    AnyString Muscle = "PlantarInterosseous3Part1"; ///< Descriptive name for the muscle, e.g. for plotting
    AnyIntVar MuscleElemAmount = 1; ///< The total amount of elements for this muscle
    AnyFloat Pennationangle ??= DesignVar(8.5); ///< Pennation angle of the muscle fibers (degres)
    AnyFloat VolumeScaleFactor ??= DesignVar(1.0); ///< Factor for scaling the muscle volume
    AnyFloat MuscleVolume ??= DesignVar(0.65); ///< Volume of the muscle  (ml)
    AnyFloat MuscleVolumeSIScaled ??= .VolumeUnitFactor*VolumeScaleFactor*MuscleVolume; ///< Scaled Volume of the muscle in SI base unit (m^3)
    AnyFloat OptimalFiberlength ??= _FIBER_LENGTH_DESIGNVAR(1.42/100); ///< Optimal working length of the muscle fiber (m)
    AnyFloat TotalTendonLength ??= _TENDON_LENGTH_DESIGNVAR(4.47/100);///< The total tendon length (m)
    AnyFloat K1 ??= DesignVar(10.00); ///< K1 constant in the muscle model.  Factor for determining shortening speed at optimum length
    AnyFloat K2 ??= DesignVar(0.00); ///< K2 constant in the muscle model.  Factor for determining shortening speed at optimum length
    AnyFloat Epsilon0 ??= DesignVar(0.0530); ///< Epsilon bar in the muscle model. Represents tendon strain at F0
    AnyFloat Fcfast ??= DesignVar(0.4); ///< Factor for determining shortening speed at optimum length
  };
  #endif


  #if (BM_FOOT_MODEL == _FOOT_MODEL_TOE_FLEX_GM_) | (BM_FOOT_MODEL == _FOOT_MODEL_DETAILED_GM_)

  AnyFolder PlantarInterosseous3Part2 =
  {
    AnyString Muscle = "PlantarInterosseous3Part2"; ///< Descriptive name for the muscle, e.g. for plotting
    AnyIntVar MuscleElemAmount = 1; ///< The total amount of elements for this muscle
    AnyFloat Pennationangle ??= DesignVar(8.5); ///< Pennation angle of the muscle fibers (degres)
    AnyFloat VolumeScaleFactor ??= DesignVar(1.0); ///< Factor for scaling the muscle volume
    AnyFloat MuscleVolume ??= DesignVar(0.65); ///< Volume of the muscle  (ml)
    AnyFloat MuscleVolumeSIScaled ??= .VolumeUnitFactor*VolumeScaleFactor*MuscleVolume; ///< Scaled Volume of the muscle in SI base unit (m^3)
    AnyFloat OptimalFiberlength ??= _FIBER_LENGTH_DESIGNVAR(1.42/100); ///< Optimal working length of the muscle fiber (m)
    AnyFloat TotalTendonLength ??= _TENDON_LENGTH_DESIGNVAR(5.77/100);///< The total tendon length (m)
    AnyFloat K1 ??= DesignVar(10.00); ///< K1 constant in the muscle model.  Factor for determining shortening speed at optimum length
    AnyFloat K2 ??= DesignVar(0.00); ///< K2 constant in the muscle model.  Factor for determining shortening speed at optimum length
    AnyFloat Epsilon0 ??= DesignVar(0.0530); ///< Epsilon bar in the muscle model. Represents tendon strain at F0
    AnyFloat Fcfast ??= DesignVar(0.4); ///< Factor for determining shortening speed at optimum length
  };
  #endif


  #if (BM_FOOT_MODEL == _FOOT_MODEL_TOE_FLEX_GM_) | (BM_FOOT_MODEL == _FOOT_MODEL_DETAILED_GM_)

  AnyFolder PlantarInterosseous3Part3 =
  {
    AnyString Muscle = "PlantarInterosseous3Part3"; ///< Descriptive name for the muscle, e.g. for plotting
    AnyIntVar MuscleElemAmount = 1; ///< The total amount of elements for this muscle
    AnyFloat Pennationangle ??= DesignVar(8.5); ///< Pennation angle of the muscle fibers (degres)
    AnyFloat VolumeScaleFactor ??= DesignVar(1.0); ///< Factor for scaling the muscle volume
    AnyFloat MuscleVolume ??= DesignVar(0.65); ///< Volume of the muscle  (ml)
    AnyFloat MuscleVolumeSIScaled ??= .VolumeUnitFactor*VolumeScaleFactor*MuscleVolume; ///< Scaled Volume of the muscle in SI base unit (m^3)
    AnyFloat OptimalFiberlength ??= _FIBER_LENGTH_DESIGNVAR(1.42/100); ///< Optimal working length of the muscle fiber (m)
    AnyFloat TotalTendonLength ??= _TENDON_LENGTH_DESIGNVAR(5.36/100);///< The total tendon length (m)
    AnyFloat K1 ??= DesignVar(10.00); ///< K1 constant in the muscle model.  Factor for determining shortening speed at optimum length
    AnyFloat K2 ??= DesignVar(0.00); ///< K2 constant in the muscle model.  Factor for determining shortening speed at optimum length
    AnyFloat Epsilon0 ??= DesignVar(0.0530); ///< Epsilon bar in the muscle model. Represents tendon strain at F0
    AnyFloat Fcfast ??= DesignVar(0.4); ///< Factor for determining shortening speed at optimum length
  };
  #endif


  #if (BM_FOOT_MODEL == _FOOT_MODEL_TOE_FLEX_GM_) | (BM_FOOT_MODEL == _FOOT_MODEL_DETAILED_GM_)

  AnyFolder FlexorDigitorumBrevis2 =
  {
    AnyString Muscle = "FlexorDigitorumBrevis2"; ///< Descriptive name for the muscle, e.g. for plotting
    AnyIntVar MuscleElemAmount = 1; ///< The total amount of elements for this muscle
    AnyFloat Pennationangle ??= DesignVar(14.2); ///< Pennation angle of the muscle fibers (degres)
    AnyFloat VolumeScaleFactor ??= DesignVar(1.0); ///< Factor for scaling the muscle volume
    AnyFloat MuscleVolume ??= DesignVar(4.52); ///< Volume of the muscle  (ml)
    AnyFloat MuscleVolumeSIScaled ??= .VolumeUnitFactor*VolumeScaleFactor*MuscleVolume; ///< Scaled Volume of the muscle in SI base unit (m^3)
    AnyFloat OptimalFiberlength ??= _FIBER_LENGTH_DESIGNVAR(2.54/100); ///< Optimal working length of the muscle fiber (m)
    AnyFloat TotalTendonLength ??= _TENDON_LENGTH_DESIGNVAR(15.64/100);///< The total tendon length (m)
    AnyFloat K1 ??= DesignVar(10.00); ///< K1 constant in the muscle model.  Factor for determining shortening speed at optimum length
    AnyFloat K2 ??= DesignVar(0.00); ///< K2 constant in the muscle model.  Factor for determining shortening speed at optimum length
    AnyFloat Epsilon0 ??= DesignVar(0.0530); ///< Epsilon bar in the muscle model. Represents tendon strain at F0
    AnyFloat Fcfast ??= DesignVar(0.4); ///< Factor for determining shortening speed at optimum length
  };
  #endif


  #if (BM_FOOT_MODEL == _FOOT_MODEL_TOE_FLEX_GM_) | (BM_FOOT_MODEL == _FOOT_MODEL_DETAILED_GM_)

  AnyFolder FlexorDigitorumBrevis3 =
  {
    AnyString Muscle = "FlexorDigitorumBrevis3"; ///< Descriptive name for the muscle, e.g. for plotting
    AnyIntVar MuscleElemAmount = 1; ///< The total amount of elements for this muscle
    AnyFloat Pennationangle ??= DesignVar(29.7); ///< Pennation angle of the muscle fibers (degres)
    AnyFloat VolumeScaleFactor ??= DesignVar(1.0); ///< Factor for scaling the muscle volume
    AnyFloat MuscleVolume ??= DesignVar(3.40); ///< Volume of the muscle  (ml)
    AnyFloat MuscleVolumeSIScaled ??= .VolumeUnitFactor*VolumeScaleFactor*MuscleVolume; ///< Scaled Volume of the muscle in SI base unit (m^3)
    AnyFloat OptimalFiberlength ??= _FIBER_LENGTH_DESIGNVAR(2.28/100); ///< Optimal working length of the muscle fiber (m)
    AnyFloat TotalTendonLength ??= _TENDON_LENGTH_DESIGNVAR(15.71/100);///< The total tendon length (m)
    AnyFloat K1 ??= DesignVar(10.00); ///< K1 constant in the muscle model.  Factor for determining shortening speed at optimum length
    AnyFloat K2 ??= DesignVar(0.00); ///< K2 constant in the muscle model.  Factor for determining shortening speed at optimum length
    AnyFloat Epsilon0 ??= DesignVar(0.0530); ///< Epsilon bar in the muscle model. Represents tendon strain at F0
    AnyFloat Fcfast ??= DesignVar(0.4); ///< Factor for determining shortening speed at optimum length
  };
  #endif


  #if (BM_FOOT_MODEL == _FOOT_MODEL_TOE_FLEX_GM_) | (BM_FOOT_MODEL == _FOOT_MODEL_DETAILED_GM_)

  AnyFolder FlexorDigitorumBrevis4 =
  {
    AnyString Muscle = "FlexorDigitorumBrevis4"; ///< Descriptive name for the muscle, e.g. for plotting
    AnyIntVar MuscleElemAmount = 1; ///< The total amount of elements for this muscle
    AnyFloat Pennationangle ??= DesignVar(23.8); ///< Pennation angle of the muscle fibers (degres)
    AnyFloat VolumeScaleFactor ??= DesignVar(1.0); ///< Factor for scaling the muscle volume
    AnyFloat MuscleVolume ??= DesignVar(2.62); ///< Volume of the muscle  (ml)
    AnyFloat MuscleVolumeSIScaled ??= .VolumeUnitFactor*VolumeScaleFactor*MuscleVolume; ///< Scaled Volume of the muscle in SI base unit (m^3)
    AnyFloat OptimalFiberlength ??= _FIBER_LENGTH_DESIGNVAR(2.08/100); ///< Optimal working length of the muscle fiber (m)
    AnyFloat TotalTendonLength ??= _TENDON_LENGTH_DESIGNVAR(14.70/100);///< The total tendon length (m)
    AnyFloat K1 ??= DesignVar(10.00); ///< K1 constant in the muscle model.  Factor for determining shortening speed at optimum length
    AnyFloat K2 ??= DesignVar(0.00); ///< K2 constant in the muscle model.  Factor for determining shortening speed at optimum length
    AnyFloat Epsilon0 ??= DesignVar(0.0530); ///< Epsilon bar in the muscle model. Represents tendon strain at F0
    AnyFloat Fcfast ??= DesignVar(0.4); ///< Factor for determining shortening speed at optimum length
  };
  #endif


  #if (BM_FOOT_MODEL == _FOOT_MODEL_TOE_FLEX_GM_) | (BM_FOOT_MODEL == _FOOT_MODEL_DETAILED_GM_)

  AnyFolder FlexorDigitorumBrevis5 =
  {
    AnyString Muscle = "FlexorDigitorumBrevis5"; ///< Descriptive name for the muscle, e.g. for plotting
    AnyIntVar MuscleElemAmount = 1; ///< The total amount of elements for this muscle
    AnyFloat Pennationangle ??= DesignVar(20.0); ///< Pennation angle of the muscle fibers (degres)
    AnyFloat VolumeScaleFactor ??= DesignVar(1.0); ///< Factor for scaling the muscle volume
    AnyFloat MuscleVolume ??= DesignVar(0.64); ///< Volume of the muscle  (ml)
    AnyFloat MuscleVolumeSIScaled ??= .VolumeUnitFactor*VolumeScaleFactor*MuscleVolume; ///< Scaled Volume of the muscle in SI base unit (m^3)
    AnyFloat OptimalFiberlength ??= _FIBER_LENGTH_DESIGNVAR(1.82/100); ///< Optimal working length of the muscle fiber (m)
    AnyFloat TotalTendonLength ??= _TENDON_LENGTH_DESIGNVAR(14.00/100);///< The total tendon length (m)
    AnyFloat K1 ??= DesignVar(10.00); ///< K1 constant in the muscle model.  Factor for determining shortening speed at optimum length
    AnyFloat K2 ??= DesignVar(0.00); ///< K2 constant in the muscle model.  Factor for determining shortening speed at optimum length
    AnyFloat Epsilon0 ??= DesignVar(0.0530); ///< Epsilon bar in the muscle model. Represents tendon strain at F0
    AnyFloat Fcfast ??= DesignVar(0.4); ///< Factor for determining shortening speed at optimum length
  };
  #endif


  #if (BM_FOOT_MODEL == _FOOT_MODEL_TOE_FLEX_GM_) | (BM_FOOT_MODEL == _FOOT_MODEL_DETAILED_GM_)

  AnyFolder QuadratusPlantarMedialis1 =
  {
    AnyString Muscle = "QuadratusPlantarMedialis1"; ///< Descriptive name for the muscle, e.g. for plotting
    AnyIntVar MuscleElemAmount = 1; ///< The total amount of elements for this muscle
    AnyFloat Pennationangle ??= DesignVar(15.6); ///< Pennation angle of the muscle fibers (degres)
    AnyFloat VolumeScaleFactor ??= DesignVar(1.0); ///< Factor for scaling the muscle volume
    AnyFloat MuscleVolume ??= DesignVar(1.80); ///< Volume of the muscle  (ml)
    AnyFloat MuscleVolumeSIScaled ??= .VolumeUnitFactor*VolumeScaleFactor*MuscleVolume; ///< Scaled Volume of the muscle in SI base unit (m^3)
    AnyFloat OptimalFiberlength ??= _FIBER_LENGTH_DESIGNVAR(2.75/100); ///< Optimal working length of the muscle fiber (m)
    AnyFloat TotalTendonLength ??= _TENDON_LENGTH_DESIGNVAR(3.33/100);///< The total tendon length (m)
    AnyFloat K1 ??= DesignVar(10.00); ///< K1 constant in the muscle model.  Factor for determining shortening speed at optimum length
    AnyFloat K2 ??= DesignVar(0.00); ///< K2 constant in the muscle model.  Factor for determining shortening speed at optimum length
    AnyFloat Epsilon0 ??= DesignVar(0.0530); ///< Epsilon bar in the muscle model. Represents tendon strain at F0
    AnyFloat Fcfast ??= DesignVar(0.4); ///< Factor for determining shortening speed at optimum length
  };
  #endif


  #if (BM_FOOT_MODEL == _FOOT_MODEL_TOE_FLEX_GM_) | (BM_FOOT_MODEL == _FOOT_MODEL_DETAILED_GM_)

  AnyFolder QuadratusPlantarMedialis2 =
  {
    AnyString Muscle = "QuadratusPlantarMedialis2"; ///< Descriptive name for the muscle, e.g. for plotting
    AnyIntVar MuscleElemAmount = 1; ///< The total amount of elements for this muscle
    AnyFloat Pennationangle ??= DesignVar(15.6); ///< Pennation angle of the muscle fibers (degres)
    AnyFloat VolumeScaleFactor ??= DesignVar(1.0); ///< Factor for scaling the muscle volume
    AnyFloat MuscleVolume ??= DesignVar(1.80); ///< Volume of the muscle  (ml)
    AnyFloat MuscleVolumeSIScaled ??= .VolumeUnitFactor*VolumeScaleFactor*MuscleVolume; ///< Scaled Volume of the muscle in SI base unit (m^3)
    AnyFloat OptimalFiberlength ??= _FIBER_LENGTH_DESIGNVAR(2.75/100); ///< Optimal working length of the muscle fiber (m)
    AnyFloat TotalTendonLength ??= _TENDON_LENGTH_DESIGNVAR(4.82/100);///< The total tendon length (m)
    AnyFloat K1 ??= DesignVar(10.00); ///< K1 constant in the muscle model.  Factor for determining shortening speed at optimum length
    AnyFloat K2 ??= DesignVar(0.00); ///< K2 constant in the muscle model.  Factor for determining shortening speed at optimum length
    AnyFloat Epsilon0 ??= DesignVar(0.0530); ///< Epsilon bar in the muscle model. Represents tendon strain at F0
    AnyFloat Fcfast ??= DesignVar(0.4); ///< Factor for determining shortening speed at optimum length
  };
  #endif


  #if (BM_FOOT_MODEL == _FOOT_MODEL_TOE_FLEX_GM_) | (BM_FOOT_MODEL == _FOOT_MODEL_DETAILED_GM_)

  AnyFolder QuadratusPlantarMedialis3 =
  {
    AnyString Muscle = "QuadratusPlantarMedialis3"; ///< Descriptive name for the muscle, e.g. for plotting
    AnyIntVar MuscleElemAmount = 1; ///< The total amount of elements for this muscle
    AnyFloat Pennationangle ??= DesignVar(15.6); ///< Pennation angle of the muscle fibers (degres)
    AnyFloat VolumeScaleFactor ??= DesignVar(1.0); ///< Factor for scaling the muscle volume
    AnyFloat MuscleVolume ??= DesignVar(1.80); ///< Volume of the muscle  (ml)
    AnyFloat MuscleVolumeSIScaled ??= .VolumeUnitFactor*VolumeScaleFactor*MuscleVolume; ///< Scaled Volume of the muscle in SI base unit (m^3)
    AnyFloat OptimalFiberlength ??= _FIBER_LENGTH_DESIGNVAR(2.75/100); ///< Optimal working length of the muscle fiber (m)
    AnyFloat TotalTendonLength ??= _TENDON_LENGTH_DESIGNVAR(5.24/100);///< The total tendon length (m)
    AnyFloat K1 ??= DesignVar(10.00); ///< K1 constant in the muscle model.  Factor for determining shortening speed at optimum length
    AnyFloat K2 ??= DesignVar(0.00); ///< K2 constant in the muscle model.  Factor for determining shortening speed at optimum length
    AnyFloat Epsilon0 ??= DesignVar(0.0530); ///< Epsilon bar in the muscle model. Represents tendon strain at F0
    AnyFloat Fcfast ??= DesignVar(0.4); ///< Factor for determining shortening speed at optimum length
  };
  #endif


  #if (BM_FOOT_MODEL == _FOOT_MODEL_TOE_FLEX_GM_) | (BM_FOOT_MODEL == _FOOT_MODEL_DETAILED_GM_)

  AnyFolder QuadratusPlantarLateralis1 =
  {
    AnyString Muscle = "QuadratusPlantarLateralis1"; ///< Descriptive name for the muscle, e.g. for plotting
    AnyIntVar MuscleElemAmount = 1; ///< The total amount of elements for this muscle
    AnyFloat Pennationangle ??= DesignVar(6.9); ///< Pennation angle of the muscle fibers (degres)
    AnyFloat VolumeScaleFactor ??= DesignVar(1.0); ///< Factor for scaling the muscle volume
    AnyFloat MuscleVolume ??= DesignVar(0.78); ///< Volume of the muscle  (ml)
    AnyFloat MuscleVolumeSIScaled ??= .VolumeUnitFactor*VolumeScaleFactor*MuscleVolume; ///< Scaled Volume of the muscle in SI base unit (m^3)
    AnyFloat OptimalFiberlength ??= _FIBER_LENGTH_DESIGNVAR(2.34/100); ///< Optimal working length of the muscle fiber (m)
    AnyFloat TotalTendonLength ??= _TENDON_LENGTH_DESIGNVAR(1.77/100);///< The total tendon length (m)
    AnyFloat K1 ??= DesignVar(10.00); ///< K1 constant in the muscle model.  Factor for determining shortening speed at optimum length
    AnyFloat K2 ??= DesignVar(0.00); ///< K2 constant in the muscle model.  Factor for determining shortening speed at optimum length
    AnyFloat Epsilon0 ??= DesignVar(0.0530); ///< Epsilon bar in the muscle model. Represents tendon strain at F0
    AnyFloat Fcfast ??= DesignVar(0.4); ///< Factor for determining shortening speed at optimum length
  };
  #endif


  #if (BM_FOOT_MODEL == _FOOT_MODEL_TOE_FLEX_GM_) | (BM_FOOT_MODEL == _FOOT_MODEL_DETAILED_GM_)

  AnyFolder QuadratusPlantarLateralis2 =
  {
    AnyString Muscle = "QuadratusPlantarLateralis2"; ///< Descriptive name for the muscle, e.g. for plotting
    AnyIntVar MuscleElemAmount = 1; ///< The total amount of elements for this muscle
    AnyFloat Pennationangle ??= DesignVar(6.9); ///< Pennation angle of the muscle fibers (degres)
    AnyFloat VolumeScaleFactor ??= DesignVar(1.0); ///< Factor for scaling the muscle volume
    AnyFloat MuscleVolume ??= DesignVar(0.78); ///< Volume of the muscle  (ml)
    AnyFloat MuscleVolumeSIScaled ??= .VolumeUnitFactor*VolumeScaleFactor*MuscleVolume; ///< Scaled Volume of the muscle in SI base unit (m^3)
    AnyFloat OptimalFiberlength ??= _FIBER_LENGTH_DESIGNVAR(2.34/100); ///< Optimal working length of the muscle fiber (m)
    AnyFloat TotalTendonLength ??= _TENDON_LENGTH_DESIGNVAR(3.54/100);///< The total tendon length (m)
    AnyFloat K1 ??= DesignVar(10.00); ///< K1 constant in the muscle model.  Factor for determining shortening speed at optimum length
    AnyFloat K2 ??= DesignVar(0.00); ///< K2 constant in the muscle model.  Factor for determining shortening speed at optimum length
    AnyFloat Epsilon0 ??= DesignVar(0.0530); ///< Epsilon bar in the muscle model. Represents tendon strain at F0
    AnyFloat Fcfast ??= DesignVar(0.4); ///< Factor for determining shortening speed at optimum length
  };
  #endif


  #if (BM_FOOT_MODEL == _FOOT_MODEL_TOE_FLEX_GM_) | (BM_FOOT_MODEL == _FOOT_MODEL_DETAILED_GM_)

  AnyFolder QuadratusPlantarLateralis3 =
  {
    AnyString Muscle = "QuadratusPlantarLateralis3"; ///< Descriptive name for the muscle, e.g. for plotting
    AnyIntVar MuscleElemAmount = 1; ///< The total amount of elements for this muscle
    AnyFloat Pennationangle ??= DesignVar(6.9); ///< Pennation angle of the muscle fibers (degres)
    AnyFloat VolumeScaleFactor ??= DesignVar(1.0); ///< Factor for scaling the muscle volume
    AnyFloat MuscleVolume ??= DesignVar(0.78); ///< Volume of the muscle  (ml)
    AnyFloat MuscleVolumeSIScaled ??= .VolumeUnitFactor*VolumeScaleFactor*MuscleVolume; ///< Scaled Volume of the muscle in SI base unit (m^3)
    AnyFloat OptimalFiberlength ??= _FIBER_LENGTH_DESIGNVAR(2.34/100); ///< Optimal working length of the muscle fiber (m)
    AnyFloat TotalTendonLength ??= _TENDON_LENGTH_DESIGNVAR(5.38/100);///< The total tendon length (m)
    AnyFloat K1 ??= DesignVar(10.00); ///< K1 constant in the muscle model.  Factor for determining shortening speed at optimum length
    AnyFloat K2 ??= DesignVar(0.00); ///< K2 constant in the muscle model.  Factor for determining shortening speed at optimum length
    AnyFloat Epsilon0 ??= DesignVar(0.0530); ///< Epsilon bar in the muscle model. Represents tendon strain at F0
    AnyFloat Fcfast ??= DesignVar(0.4); ///< Factor for determining shortening speed at optimum length
  };
  #endif


  #if (BM_FOOT_MODEL == _FOOT_MODEL_TOE_FLEX_GM_) | (BM_FOOT_MODEL == _FOOT_MODEL_DETAILED_GM_)

  AnyFolder Lumbrical2 =
  {
    AnyString Muscle = "Lumbrical2"; ///< Descriptive name for the muscle, e.g. for plotting
    AnyIntVar MuscleElemAmount = 1; ///< The total amount of elements for this muscle
    AnyFloat Pennationangle ??= DesignVar(5.6); ///< Pennation angle of the muscle fibers (degres)
    AnyFloat VolumeScaleFactor ??= DesignVar(1.0); ///< Factor for scaling the muscle volume
    AnyFloat MuscleVolume ??= DesignVar(0.90); ///< Volume of the muscle  (ml)
    AnyFloat MuscleVolumeSIScaled ??= .VolumeUnitFactor*VolumeScaleFactor*MuscleVolume; ///< Scaled Volume of the muscle in SI base unit (m^3)
    AnyFloat OptimalFiberlength ??= _FIBER_LENGTH_DESIGNVAR(2.24/100); ///< Optimal working length of the muscle fiber (m)
    AnyFloat TotalTendonLength ??= _TENDON_LENGTH_DESIGNVAR(6.33/100);///< The total tendon length (m)
    AnyFloat K1 ??= DesignVar(10.00); ///< K1 constant in the muscle model.  Factor for determining shortening speed at optimum length
    AnyFloat K2 ??= DesignVar(0.00); ///< K2 constant in the muscle model.  Factor for determining shortening speed at optimum length
    AnyFloat Epsilon0 ??= DesignVar(0.0530); ///< Epsilon bar in the muscle model. Represents tendon strain at F0
    AnyFloat Fcfast ??= DesignVar(0.4); ///< Factor for determining shortening speed at optimum length
  };
  #endif


  #if (BM_FOOT_MODEL == _FOOT_MODEL_TOE_FLEX_GM_) | (BM_FOOT_MODEL == _FOOT_MODEL_DETAILED_GM_)

  AnyFolder Lumbrical3 =
  {
    AnyString Muscle = "Lumbrical3"; ///< Descriptive name for the muscle, e.g. for plotting
    AnyIntVar MuscleElemAmount = 1; ///< The total amount of elements for this muscle
    AnyFloat Pennationangle ??= DesignVar(0.0); ///< Pennation angle of the muscle fibers (degres)
    AnyFloat VolumeScaleFactor ??= DesignVar(1.0); ///< Factor for scaling the muscle volume
    AnyFloat MuscleVolume ??= DesignVar(0.89); ///< Volume of the muscle  (ml)
    AnyFloat MuscleVolumeSIScaled ??= .VolumeUnitFactor*VolumeScaleFactor*MuscleVolume; ///< Scaled Volume of the muscle in SI base unit (m^3)
    AnyFloat OptimalFiberlength ??= _FIBER_LENGTH_DESIGNVAR(2.23/100); ///< Optimal working length of the muscle fiber (m)
    AnyFloat TotalTendonLength ??= _TENDON_LENGTH_DESIGNVAR(5.76/100);///< The total tendon length (m)
    AnyFloat K1 ??= DesignVar(10.00); ///< K1 constant in the muscle model.  Factor for determining shortening speed at optimum length
    AnyFloat K2 ??= DesignVar(0.00); ///< K2 constant in the muscle model.  Factor for determining shortening speed at optimum length
    AnyFloat Epsilon0 ??= DesignVar(0.0530); ///< Epsilon bar in the muscle model. Represents tendon strain at F0
    AnyFloat Fcfast ??= DesignVar(0.4); ///< Factor for determining shortening speed at optimum length
  };
  #endif


  #if (BM_FOOT_MODEL == _FOOT_MODEL_TOE_FLEX_GM_) | (BM_FOOT_MODEL == _FOOT_MODEL_DETAILED_GM_)

  AnyFolder Lumbrical4 =
  {
    AnyString Muscle = "Lumbrical4"; ///< Descriptive name for the muscle, e.g. for plotting
    AnyIntVar MuscleElemAmount = 1; ///< The total amount of elements for this muscle
    AnyFloat Pennationangle ??= DesignVar(5.2); ///< Pennation angle of the muscle fibers (degres)
    AnyFloat VolumeScaleFactor ??= DesignVar(1.0); ///< Factor for scaling the muscle volume
    AnyFloat MuscleVolume ??= DesignVar(0.63); ///< Volume of the muscle  (ml)
    AnyFloat MuscleVolumeSIScaled ??= .VolumeUnitFactor*VolumeScaleFactor*MuscleVolume; ///< Scaled Volume of the muscle in SI base unit (m^3)
    AnyFloat OptimalFiberlength ??= _FIBER_LENGTH_DESIGNVAR(2.11/100); ///< Optimal working length of the muscle fiber (m)
    AnyFloat TotalTendonLength ??= _TENDON_LENGTH_DESIGNVAR(5.15/100);///< The total tendon length (m)
    AnyFloat K1 ??= DesignVar(10.00); ///< K1 constant in the muscle model.  Factor for determining shortening speed at optimum length
    AnyFloat K2 ??= DesignVar(0.00); ///< K2 constant in the muscle model.  Factor for determining shortening speed at optimum length
    AnyFloat Epsilon0 ??= DesignVar(0.0530); ///< Epsilon bar in the muscle model. Represents tendon strain at F0
    AnyFloat Fcfast ??= DesignVar(0.4); ///< Factor for determining shortening speed at optimum length
  };
  #endif


  #if (BM_FOOT_MODEL == _FOOT_MODEL_TOE_FLEX_GM_) | (BM_FOOT_MODEL == _FOOT_MODEL_DETAILED_GM_)

  AnyFolder Lumbrical5 =
  {
    AnyString Muscle = "Lumbrical5"; ///< Descriptive name for the muscle, e.g. for plotting
    AnyIntVar MuscleElemAmount = 1; ///< The total amount of elements for this muscle
    AnyFloat Pennationangle ??= DesignVar(10.0); ///< Pennation angle of the muscle fibers (degres)
    AnyFloat VolumeScaleFactor ??= DesignVar(1.0); ///< Factor for scaling the muscle volume
    AnyFloat MuscleVolume ??= DesignVar(0.29); ///< Volume of the muscle  (ml)
    AnyFloat MuscleVolumeSIScaled ??= .VolumeUnitFactor*VolumeScaleFactor*MuscleVolume; ///< Scaled Volume of the muscle in SI base unit (m^3)
    AnyFloat OptimalFiberlength ??= _FIBER_LENGTH_DESIGNVAR(1.62/100); ///< Optimal working length of the muscle fiber (m)
    AnyFloat TotalTendonLength ??= _TENDON_LENGTH_DESIGNVAR(4.70/100);///< The total tendon length (m)
    AnyFloat K1 ??= DesignVar(10.00); ///< K1 constant in the muscle model.  Factor for determining shortening speed at optimum length
    AnyFloat K2 ??= DesignVar(0.00); ///< K2 constant in the muscle model.  Factor for determining shortening speed at optimum length
    AnyFloat Epsilon0 ??= DesignVar(0.0530); ///< Epsilon bar in the muscle model. Represents tendon strain at F0
    AnyFloat Fcfast ??= DesignVar(0.4); ///< Factor for determining shortening speed at optimum length
  };
  #endif


  #if (BM_FOOT_MODEL == _FOOT_MODEL_TOE_FLEX_GM_) | (BM_FOOT_MODEL == _FOOT_MODEL_DETAILED_GM_)

  AnyFolder AbductorDigitiMinimi1 =
  {
    AnyString Muscle = "AbductorDigitiMinimi1"; ///< Descriptive name for the muscle, e.g. for plotting
    AnyIntVar MuscleElemAmount = 1; ///< The total amount of elements for this muscle
    AnyFloat Pennationangle ??= DesignVar(3.9); ///< Pennation angle of the muscle fibers (degres)
    AnyFloat VolumeScaleFactor ??= DesignVar(1.0); ///< Factor for scaling the muscle volume
    AnyFloat MuscleVolume ??= DesignVar(3.02); ///< Volume of the muscle  (ml)
    AnyFloat MuscleVolumeSIScaled ??= .VolumeUnitFactor*VolumeScaleFactor*MuscleVolume; ///< Scaled Volume of the muscle in SI base unit (m^3)
    AnyFloat OptimalFiberlength ??= _FIBER_LENGTH_DESIGNVAR(2.39/100); ///< Optimal working length of the muscle fiber (m)
    AnyFloat TotalTendonLength ??= _TENDON_LENGTH_DESIGNVAR(10.87/100);///< The total tendon length (m)
    AnyFloat K1 ??= DesignVar(10.00); ///< K1 constant in the muscle model.  Factor for determining shortening speed at optimum length
    AnyFloat K2 ??= DesignVar(0.00); ///< K2 constant in the muscle model.  Factor for determining shortening speed at optimum length
    AnyFloat Epsilon0 ??= DesignVar(0.0530); ///< Epsilon bar in the muscle model. Represents tendon strain at F0
    AnyFloat Fcfast ??= DesignVar(0.4); ///< Factor for determining shortening speed at optimum length
  };
  #endif


  #if (BM_FOOT_MODEL == _FOOT_MODEL_TOE_FLEX_GM_) | (BM_FOOT_MODEL == _FOOT_MODEL_DETAILED_GM_)

  AnyFolder AbductorDigitiMinimi2 =
  {
    AnyString Muscle = "AbductorDigitiMinimi2"; ///< Descriptive name for the muscle, e.g. for plotting
    AnyIntVar MuscleElemAmount = 1; ///< The total amount of elements for this muscle
    AnyFloat Pennationangle ??= DesignVar(3.9); ///< Pennation angle of the muscle fibers (degres)
    AnyFloat VolumeScaleFactor ??= DesignVar(1.0); ///< Factor for scaling the muscle volume
    AnyFloat MuscleVolume ??= DesignVar(3.02); ///< Volume of the muscle  (ml)
    AnyFloat MuscleVolumeSIScaled ??= .VolumeUnitFactor*VolumeScaleFactor*MuscleVolume; ///< Scaled Volume of the muscle in SI base unit (m^3)
    AnyFloat OptimalFiberlength ??= _FIBER_LENGTH_DESIGNVAR(2.39/100); ///< Optimal working length of the muscle fiber (m)
    AnyFloat TotalTendonLength ??= _TENDON_LENGTH_DESIGNVAR(11.16/100);///< The total tendon length (m)
    AnyFloat K1 ??= DesignVar(10.00); ///< K1 constant in the muscle model.  Factor for determining shortening speed at optimum length
    AnyFloat K2 ??= DesignVar(0.00); ///< K2 constant in the muscle model.  Factor for determining shortening speed at optimum length
    AnyFloat Epsilon0 ??= DesignVar(0.0530); ///< Epsilon bar in the muscle model. Represents tendon strain at F0
    AnyFloat Fcfast ??= DesignVar(0.4); ///< Factor for determining shortening speed at optimum length
  };
  #endif


  #if (BM_FOOT_MODEL == _FOOT_MODEL_TOE_FLEX_GM_) | (BM_FOOT_MODEL == _FOOT_MODEL_DETAILED_GM_)

  AnyFolder AbductorDigitiMinimi3 =
  {
    AnyString Muscle = "AbductorDigitiMinimi3"; ///< Descriptive name for the muscle, e.g. for plotting
    AnyIntVar MuscleElemAmount = 1; ///< The total amount of elements for this muscle
    AnyFloat Pennationangle ??= DesignVar(3.9); ///< Pennation angle of the muscle fibers (degres)
    AnyFloat VolumeScaleFactor ??= DesignVar(1.0); ///< Factor for scaling the muscle volume
    AnyFloat MuscleVolume ??= DesignVar(3.02); ///< Volume of the muscle  (ml)
    AnyFloat MuscleVolumeSIScaled ??= .VolumeUnitFactor*VolumeScaleFactor*MuscleVolume; ///< Scaled Volume of the muscle in SI base unit (m^3)
    AnyFloat OptimalFiberlength ??= _FIBER_LENGTH_DESIGNVAR(2.39/100); ///< Optimal working length of the muscle fiber (m)
    AnyFloat TotalTendonLength ??= _TENDON_LENGTH_DESIGNVAR(11.43/100);///< The total tendon length (m)
    AnyFloat K1 ??= DesignVar(10.00); ///< K1 constant in the muscle model.  Factor for determining shortening speed at optimum length
    AnyFloat K2 ??= DesignVar(0.00); ///< K2 constant in the muscle model.  Factor for determining shortening speed at optimum length
    AnyFloat Epsilon0 ??= DesignVar(0.0530); ///< Epsilon bar in the muscle model. Represents tendon strain at F0
    AnyFloat Fcfast ??= DesignVar(0.4); ///< Factor for determining shortening speed at optimum length
  };
  #endif


  #if (BM_FOOT_MODEL == _FOOT_MODEL_TOE_FLEX_GM_) | (BM_FOOT_MODEL == _FOOT_MODEL_DETAILED_GM_)

  AnyFolder FlexorDigitiMinimiBrevis =
  {
    AnyString Muscle = "FlexorDigitiMinimiBrevis"; ///< Descriptive name for the muscle, e.g. for plotting
    AnyIntVar MuscleElemAmount = 1; ///< The total amount of elements for this muscle
    AnyFloat Pennationangle ??= DesignVar(14.5); ///< Pennation angle of the muscle fibers (degres)
    AnyFloat VolumeScaleFactor ??= DesignVar(1.0); ///< Factor for scaling the muscle volume
    AnyFloat MuscleVolume ??= DesignVar(3.54); ///< Volume of the muscle  (ml)
    AnyFloat MuscleVolumeSIScaled ??= .VolumeUnitFactor*VolumeScaleFactor*MuscleVolume; ///< Scaled Volume of the muscle in SI base unit (m^3)
    AnyFloat OptimalFiberlength ??= _FIBER_LENGTH_DESIGNVAR(1.77/100); ///< Optimal working length of the muscle fiber (m)
    AnyFloat TotalTendonLength ??= _TENDON_LENGTH_DESIGNVAR(4.78/100);///< The total tendon length (m)
    AnyFloat K1 ??= DesignVar(10.00); ///< K1 constant in the muscle model.  Factor for determining shortening speed at optimum length
    AnyFloat K2 ??= DesignVar(0.00); ///< K2 constant in the muscle model.  Factor for determining shortening speed at optimum length
    AnyFloat Epsilon0 ??= DesignVar(0.0530); ///< Epsilon bar in the muscle model. Represents tendon strain at F0
    AnyFloat Fcfast ??= DesignVar(0.4); ///< Factor for determining shortening speed at optimum length
  };
  #endif


  #if (BM_FOOT_MODEL == _FOOT_MODEL_TOE_FLEX_GM_) | (BM_FOOT_MODEL == _FOOT_MODEL_DETAILED_GM_)

  AnyFolder FlexorDigitorumLongusToe2Tendon =
  {
    AnyString Muscle = "FlexorDigitorumLongusToe2Tendon"; ///< Descriptive name for the muscle, e.g. for plotting
    AnyIntVar MuscleElemAmount = 1; ///< The total amount of elements for this muscle
    AnyFloat Pennationangle ??= DesignVar(0.0); ///< Pennation angle of the muscle fibers (degres)
    AnyFloat VolumeScaleFactor ??= DesignVar(1.0); ///< Factor for scaling the muscle volume
    AnyFloat MuscleVolume ??= DesignVar(201.72); ///< Volume of the muscle  (ml)
    AnyFloat MuscleVolumeSIScaled ??= .VolumeUnitFactor*VolumeScaleFactor*MuscleVolume; ///< Scaled Volume of the muscle in SI base unit (m^3)
    AnyFloat OptimalFiberlength ??= _FIBER_LENGTH_DESIGNVAR(12.00/100); ///< Optimal working length of the muscle fiber (m)
    AnyFloat TotalTendonLength ??= _TENDON_LENGTH_DESIGNVAR(0.00/100);///< The total tendon length (m)
    AnyFloat K1 ??= DesignVar(10.00); ///< K1 constant in the muscle model.  Factor for determining shortening speed at optimum length
    AnyFloat K2 ??= DesignVar(0.00); ///< K2 constant in the muscle model.  Factor for determining shortening speed at optimum length
    AnyFloat Epsilon0 ??= DesignVar(0.0530); ///< Epsilon bar in the muscle model. Represents tendon strain at F0
    AnyFloat Fcfast ??= DesignVar(0.4); ///< Factor for determining shortening speed at optimum length
  };
  #endif


  #if (BM_FOOT_MODEL == _FOOT_MODEL_TOE_FLEX_GM_) | (BM_FOOT_MODEL == _FOOT_MODEL_DETAILED_GM_)

  AnyFolder FlexorDigitorumLongusToe3Tendon =
  {
    AnyString Muscle = "FlexorDigitorumLongusToe3Tendon"; ///< Descriptive name for the muscle, e.g. for plotting
    AnyIntVar MuscleElemAmount = 1; ///< The total amount of elements for this muscle
    AnyFloat Pennationangle ??= DesignVar(0.0); ///< Pennation angle of the muscle fibers (degres)
    AnyFloat VolumeScaleFactor ??= DesignVar(1.0); ///< Factor for scaling the muscle volume
    AnyFloat MuscleVolume ??= DesignVar(192.50); ///< Volume of the muscle  (ml)
    AnyFloat MuscleVolumeSIScaled ??= .VolumeUnitFactor*VolumeScaleFactor*MuscleVolume; ///< Scaled Volume of the muscle in SI base unit (m^3)
    AnyFloat OptimalFiberlength ??= _FIBER_LENGTH_DESIGNVAR(11.45/100); ///< Optimal working length of the muscle fiber (m)
    AnyFloat TotalTendonLength ??= _TENDON_LENGTH_DESIGNVAR(0.00/100);///< The total tendon length (m)
    AnyFloat K1 ??= DesignVar(10.00); ///< K1 constant in the muscle model.  Factor for determining shortening speed at optimum length
    AnyFloat K2 ??= DesignVar(0.00); ///< K2 constant in the muscle model.  Factor for determining shortening speed at optimum length
    AnyFloat Epsilon0 ??= DesignVar(0.0530); ///< Epsilon bar in the muscle model. Represents tendon strain at F0
    AnyFloat Fcfast ??= DesignVar(0.4); ///< Factor for determining shortening speed at optimum length
  };
  #endif


  #if (BM_FOOT_MODEL == _FOOT_MODEL_TOE_FLEX_GM_) | (BM_FOOT_MODEL == _FOOT_MODEL_DETAILED_GM_)

  AnyFolder FlexorDigitorumLongusToe4Tendon =
  {
    AnyString Muscle = "FlexorDigitorumLongusToe4Tendon"; ///< Descriptive name for the muscle, e.g. for plotting
    AnyIntVar MuscleElemAmount = 1; ///< The total amount of elements for this muscle
    AnyFloat Pennationangle ??= DesignVar(0.0); ///< Pennation angle of the muscle fibers (degres)
    AnyFloat VolumeScaleFactor ??= DesignVar(1.0); ///< Factor for scaling the muscle volume
    AnyFloat MuscleVolume ??= DesignVar(172.82); ///< Volume of the muscle  (ml)
    AnyFloat MuscleVolumeSIScaled ??= .VolumeUnitFactor*VolumeScaleFactor*MuscleVolume; ///< Scaled Volume of the muscle in SI base unit (m^3)
    AnyFloat OptimalFiberlength ??= _FIBER_LENGTH_DESIGNVAR(10.28/100); ///< Optimal working length of the muscle fiber (m)
    AnyFloat TotalTendonLength ??= _TENDON_LENGTH_DESIGNVAR(0.00/100);///< The total tendon length (m)
    AnyFloat K1 ??= DesignVar(10.00); ///< K1 constant in the muscle model.  Factor for determining shortening speed at optimum length
    AnyFloat K2 ??= DesignVar(0.00); ///< K2 constant in the muscle model.  Factor for determining shortening speed at optimum length
    AnyFloat Epsilon0 ??= DesignVar(0.0530); ///< Epsilon bar in the muscle model. Represents tendon strain at F0
    AnyFloat Fcfast ??= DesignVar(0.4); ///< Factor for determining shortening speed at optimum length
  };
  #endif


  #if (BM_FOOT_MODEL == _FOOT_MODEL_TOE_FLEX_GM_) | (BM_FOOT_MODEL == _FOOT_MODEL_DETAILED_GM_)

  AnyFolder FlexorDigitorumLongusToe5Tendon =
  {
    AnyString Muscle = "FlexorDigitorumLongusToe5Tendon"; ///< Descriptive name for the muscle, e.g. for plotting
    AnyIntVar MuscleElemAmount = 1; ///< The total amount of elements for this muscle
    AnyFloat Pennationangle ??= DesignVar(0.0); ///< Pennation angle of the muscle fibers (degres)
    AnyFloat VolumeScaleFactor ??= DesignVar(1.0); ///< Factor for scaling the muscle volume
    AnyFloat MuscleVolume ??= DesignVar(149.87); ///< Volume of the muscle  (ml)
    AnyFloat MuscleVolumeSIScaled ??= .VolumeUnitFactor*VolumeScaleFactor*MuscleVolume; ///< Scaled Volume of the muscle in SI base unit (m^3)
    AnyFloat OptimalFiberlength ??= _FIBER_LENGTH_DESIGNVAR(8.92/100); ///< Optimal working length of the muscle fiber (m)
    AnyFloat TotalTendonLength ??= _TENDON_LENGTH_DESIGNVAR(0.00/100);///< The total tendon length (m)
    AnyFloat K1 ??= DesignVar(10.00); ///< K1 constant in the muscle model.  Factor for determining shortening speed at optimum length
    AnyFloat K2 ??= DesignVar(0.00); ///< K2 constant in the muscle model.  Factor for determining shortening speed at optimum length
    AnyFloat Epsilon0 ??= DesignVar(0.0530); ///< Epsilon bar in the muscle model. Represents tendon strain at F0
    AnyFloat Fcfast ??= DesignVar(0.4); ///< Factor for determining shortening speed at optimum length
  };
  #endif


  #if (BM_FOOT_MODEL == _FOOT_MODEL_TOE_FLEX_GM_) | (BM_FOOT_MODEL == _FOOT_MODEL_DETAILED_GM_)

  AnyFolder ExtensorDigitorumLongusToe2TendonPart1 =
  {
    AnyString Muscle = "ExtensorDigitorumLongusToe2TendonPart1"; ///< Descriptive name for the muscle, e.g. for plotting
    AnyIntVar MuscleElemAmount = 1; ///< The total amount of elements for this muscle
    AnyFloat Pennationangle ??= DesignVar(0.0); ///< Pennation angle of the muscle fibers (degres)
    AnyFloat VolumeScaleFactor ??= DesignVar(1.0); ///< Factor for scaling the muscle volume
    AnyFloat MuscleVolume ??= DesignVar(82.13); ///< Volume of the muscle  (ml)
    AnyFloat MuscleVolumeSIScaled ??= .VolumeUnitFactor*VolumeScaleFactor*MuscleVolume; ///< Scaled Volume of the muscle in SI base unit (m^3)
    AnyFloat OptimalFiberlength ??= _FIBER_LENGTH_DESIGNVAR(4.89/100); ///< Optimal working length of the muscle fiber (m)
    AnyFloat TotalTendonLength ??= _TENDON_LENGTH_DESIGNVAR(0.00/100);///< The total tendon length (m)
    AnyFloat K1 ??= DesignVar(10.00); ///< K1 constant in the muscle model.  Factor for determining shortening speed at optimum length
    AnyFloat K2 ??= DesignVar(0.00); ///< K2 constant in the muscle model.  Factor for determining shortening speed at optimum length
    AnyFloat Epsilon0 ??= DesignVar(0.0530); ///< Epsilon bar in the muscle model. Represents tendon strain at F0
    AnyFloat Fcfast ??= DesignVar(0.4); ///< Factor for determining shortening speed at optimum length
  };
  #endif


  #if (BM_FOOT_MODEL == _FOOT_MODEL_TOE_FLEX_GM_) | (BM_FOOT_MODEL == _FOOT_MODEL_DETAILED_GM_)

  AnyFolder ExtensorDigitorumLongusToe2TendonPart2 =
  {
    AnyString Muscle = "ExtensorDigitorumLongusToe2TendonPart2"; ///< Descriptive name for the muscle, e.g. for plotting
    AnyIntVar MuscleElemAmount = 1; ///< The total amount of elements for this muscle
    AnyFloat Pennationangle ??= DesignVar(0.0); ///< Pennation angle of the muscle fibers (degres)
    AnyFloat VolumeScaleFactor ??= DesignVar(1.0); ///< Factor for scaling the muscle volume
    AnyFloat MuscleVolume ??= DesignVar(62.52); ///< Volume of the muscle  (ml)
    AnyFloat MuscleVolumeSIScaled ??= .VolumeUnitFactor*VolumeScaleFactor*MuscleVolume; ///< Scaled Volume of the muscle in SI base unit (m^3)
    AnyFloat OptimalFiberlength ??= _FIBER_LENGTH_DESIGNVAR(3.72/100); ///< Optimal working length of the muscle fiber (m)
    AnyFloat TotalTendonLength ??= _TENDON_LENGTH_DESIGNVAR(0.00/100);///< The total tendon length (m)
    AnyFloat K1 ??= DesignVar(10.00); ///< K1 constant in the muscle model.  Factor for determining shortening speed at optimum length
    AnyFloat K2 ??= DesignVar(0.00); ///< K2 constant in the muscle model.  Factor for determining shortening speed at optimum length
    AnyFloat Epsilon0 ??= DesignVar(0.0530); ///< Epsilon bar in the muscle model. Represents tendon strain at F0
    AnyFloat Fcfast ??= DesignVar(0.4); ///< Factor for determining shortening speed at optimum length
  };
  #endif


  #if (BM_FOOT_MODEL == _FOOT_MODEL_TOE_FLEX_GM_) | (BM_FOOT_MODEL == _FOOT_MODEL_DETAILED_GM_)

  AnyFolder ExtensorDigitorumLongusToe2TendonPart3 =
  {
    AnyString Muscle = "ExtensorDigitorumLongusToe2TendonPart3"; ///< Descriptive name for the muscle, e.g. for plotting
    AnyIntVar MuscleElemAmount = 1; ///< The total amount of elements for this muscle
    AnyFloat Pennationangle ??= DesignVar(0.0); ///< Pennation angle of the muscle fibers (degres)
    AnyFloat VolumeScaleFactor ??= DesignVar(1.0); ///< Factor for scaling the muscle volume
    AnyFloat MuscleVolume ??= DesignVar(29.50); ///< Volume of the muscle  (ml)
    AnyFloat MuscleVolumeSIScaled ??= .VolumeUnitFactor*VolumeScaleFactor*MuscleVolume; ///< Scaled Volume of the muscle in SI base unit (m^3)
    AnyFloat OptimalFiberlength ??= _FIBER_LENGTH_DESIGNVAR(1.76/100); ///< Optimal working length of the muscle fiber (m)
    AnyFloat TotalTendonLength ??= _TENDON_LENGTH_DESIGNVAR(0.00/100);///< The total tendon length (m)
    AnyFloat K1 ??= DesignVar(10.00); ///< K1 constant in the muscle model.  Factor for determining shortening speed at optimum length
    AnyFloat K2 ??= DesignVar(0.00); ///< K2 constant in the muscle model.  Factor for determining shortening speed at optimum length
    AnyFloat Epsilon0 ??= DesignVar(0.0530); ///< Epsilon bar in the muscle model. Represents tendon strain at F0
    AnyFloat Fcfast ??= DesignVar(0.4); ///< Factor for determining shortening speed at optimum length
  };
  #endif


  #if (BM_FOOT_MODEL == _FOOT_MODEL_TOE_FLEX_GM_) | (BM_FOOT_MODEL == _FOOT_MODEL_DETAILED_GM_)

  AnyFolder ExtensorDigitorumLongusToe2TendonPart4 =
  {
    AnyString Muscle = "ExtensorDigitorumLongusToe2TendonPart4"; ///< Descriptive name for the muscle, e.g. for plotting
    AnyIntVar MuscleElemAmount = 1; ///< The total amount of elements for this muscle
    AnyFloat Pennationangle ??= DesignVar(0.0); ///< Pennation angle of the muscle fibers (degres)
    AnyFloat VolumeScaleFactor ??= DesignVar(1.0); ///< Factor for scaling the muscle volume
    AnyFloat MuscleVolume ??= DesignVar(30.12); ///< Volume of the muscle  (ml)
    AnyFloat MuscleVolumeSIScaled ??= .VolumeUnitFactor*VolumeScaleFactor*MuscleVolume; ///< Scaled Volume of the muscle in SI base unit (m^3)
    AnyFloat OptimalFiberlength ??= _FIBER_LENGTH_DESIGNVAR(1.79/100); ///< Optimal working length of the muscle fiber (m)
    AnyFloat TotalTendonLength ??= _TENDON_LENGTH_DESIGNVAR(0.00/100);///< The total tendon length (m)
    AnyFloat K1 ??= DesignVar(10.00); ///< K1 constant in the muscle model.  Factor for determining shortening speed at optimum length
    AnyFloat K2 ??= DesignVar(0.00); ///< K2 constant in the muscle model.  Factor for determining shortening speed at optimum length
    AnyFloat Epsilon0 ??= DesignVar(0.0530); ///< Epsilon bar in the muscle model. Represents tendon strain at F0
    AnyFloat Fcfast ??= DesignVar(0.4); ///< Factor for determining shortening speed at optimum length
  };
  #endif


  #if (BM_FOOT_MODEL == _FOOT_MODEL_TOE_FLEX_GM_) | (BM_FOOT_MODEL == _FOOT_MODEL_DETAILED_GM_)

  AnyFolder ExtensorDigitorumLongusToe3TendonPart1 =
  {
    AnyString Muscle = "ExtensorDigitorumLongusToe3TendonPart1"; ///< Descriptive name for the muscle, e.g. for plotting
    AnyIntVar MuscleElemAmount = 1; ///< The total amount of elements for this muscle
    AnyFloat Pennationangle ??= DesignVar(0.0); ///< Pennation angle of the muscle fibers (degres)
    AnyFloat VolumeScaleFactor ??= DesignVar(1.0); ///< Factor for scaling the muscle volume
    AnyFloat MuscleVolume ??= DesignVar(78.37); ///< Volume of the muscle  (ml)
    AnyFloat MuscleVolumeSIScaled ??= .VolumeUnitFactor*VolumeScaleFactor*MuscleVolume; ///< Scaled Volume of the muscle in SI base unit (m^3)
    AnyFloat OptimalFiberlength ??= _FIBER_LENGTH_DESIGNVAR(4.66/100); ///< Optimal working length of the muscle fiber (m)
    AnyFloat TotalTendonLength ??= _TENDON_LENGTH_DESIGNVAR(0.00/100);///< The total tendon length (m)
    AnyFloat K1 ??= DesignVar(10.00); ///< K1 constant in the muscle model.  Factor for determining shortening speed at optimum length
    AnyFloat K2 ??= DesignVar(0.00); ///< K2 constant in the muscle model.  Factor for determining shortening speed at optimum length
    AnyFloat Epsilon0 ??= DesignVar(0.0530); ///< Epsilon bar in the muscle model. Represents tendon strain at F0
    AnyFloat Fcfast ??= DesignVar(0.4); ///< Factor for determining shortening speed at optimum length
  };
  #endif


  #if (BM_FOOT_MODEL == _FOOT_MODEL_TOE_FLEX_GM_) | (BM_FOOT_MODEL == _FOOT_MODEL_DETAILED_GM_)

  AnyFolder ExtensorDigitorumLongusToe3TendonPart2 =
  {
    AnyString Muscle = "ExtensorDigitorumLongusToe3TendonPart2"; ///< Descriptive name for the muscle, e.g. for plotting
    AnyIntVar MuscleElemAmount = 1; ///< The total amount of elements for this muscle
    AnyFloat Pennationangle ??= DesignVar(0.0); ///< Pennation angle of the muscle fibers (degres)
    AnyFloat VolumeScaleFactor ??= DesignVar(1.0); ///< Factor for scaling the muscle volume
    AnyFloat MuscleVolume ??= DesignVar(54.35); ///< Volume of the muscle  (ml)
    AnyFloat MuscleVolumeSIScaled ??= .VolumeUnitFactor*VolumeScaleFactor*MuscleVolume; ///< Scaled Volume of the muscle in SI base unit (m^3)
    AnyFloat OptimalFiberlength ??= _FIBER_LENGTH_DESIGNVAR(3.23/100); ///< Optimal working length of the muscle fiber (m)
    AnyFloat TotalTendonLength ??= _TENDON_LENGTH_DESIGNVAR(0.00/100);///< The total tendon length (m)
    AnyFloat K1 ??= DesignVar(10.00); ///< K1 constant in the muscle model.  Factor for determining shortening speed at optimum length
    AnyFloat K2 ??= DesignVar(0.00); ///< K2 constant in the muscle model.  Factor for determining shortening speed at optimum length
    AnyFloat Epsilon0 ??= DesignVar(0.0530); ///< Epsilon bar in the muscle model. Represents tendon strain at F0
    AnyFloat Fcfast ??= DesignVar(0.4); ///< Factor for determining shortening speed at optimum length
  };
  #endif


  #if (BM_FOOT_MODEL == _FOOT_MODEL_TOE_FLEX_GM_) | (BM_FOOT_MODEL == _FOOT_MODEL_DETAILED_GM_)

  AnyFolder ExtensorDigitorumLongusToe3TendonPart3 =
  {
    AnyString Muscle = "ExtensorDigitorumLongusToe3TendonPart3"; ///< Descriptive name for the muscle, e.g. for plotting
    AnyIntVar MuscleElemAmount = 1; ///< The total amount of elements for this muscle
    AnyFloat Pennationangle ??= DesignVar(0.0); ///< Pennation angle of the muscle fibers (degres)
    AnyFloat VolumeScaleFactor ??= DesignVar(1.0); ///< Factor for scaling the muscle volume
    AnyFloat MuscleVolume ??= DesignVar(25.92); ///< Volume of the muscle  (ml)
    AnyFloat MuscleVolumeSIScaled ??= .VolumeUnitFactor*VolumeScaleFactor*MuscleVolume; ///< Scaled Volume of the muscle in SI base unit (m^3)
    AnyFloat OptimalFiberlength ??= _FIBER_LENGTH_DESIGNVAR(1.54/100); ///< Optimal working length of the muscle fiber (m)
    AnyFloat TotalTendonLength ??= _TENDON_LENGTH_DESIGNVAR(0.00/100);///< The total tendon length (m)
    AnyFloat K1 ??= DesignVar(10.00); ///< K1 constant in the muscle model.  Factor for determining shortening speed at optimum length
    AnyFloat K2 ??= DesignVar(0.00); ///< K2 constant in the muscle model.  Factor for determining shortening speed at optimum length
    AnyFloat Epsilon0 ??= DesignVar(0.0530); ///< Epsilon bar in the muscle model. Represents tendon strain at F0
    AnyFloat Fcfast ??= DesignVar(0.4); ///< Factor for determining shortening speed at optimum length
  };
  #endif


  #if (BM_FOOT_MODEL == _FOOT_MODEL_TOE_FLEX_GM_) | (BM_FOOT_MODEL == _FOOT_MODEL_DETAILED_GM_)

  AnyFolder ExtensorDigitorumLongusToe3TendonPart4 =
  {
    AnyString Muscle = "ExtensorDigitorumLongusToe3TendonPart4"; ///< Descriptive name for the muscle, e.g. for plotting
    AnyIntVar MuscleElemAmount = 1; ///< The total amount of elements for this muscle
    AnyFloat Pennationangle ??= DesignVar(0.0); ///< Pennation angle of the muscle fibers (degres)
    AnyFloat VolumeScaleFactor ??= DesignVar(1.0); ///< Factor for scaling the muscle volume
    AnyFloat MuscleVolume ??= DesignVar(28.42); ///< Volume of the muscle  (ml)
    AnyFloat MuscleVolumeSIScaled ??= .VolumeUnitFactor*VolumeScaleFactor*MuscleVolume; ///< Scaled Volume of the muscle in SI base unit (m^3)
    AnyFloat OptimalFiberlength ??= _FIBER_LENGTH_DESIGNVAR(1.69/100); ///< Optimal working length of the muscle fiber (m)
    AnyFloat TotalTendonLength ??= _TENDON_LENGTH_DESIGNVAR(0.00/100);///< The total tendon length (m)
    AnyFloat K1 ??= DesignVar(10.00); ///< K1 constant in the muscle model.  Factor for determining shortening speed at optimum length
    AnyFloat K2 ??= DesignVar(0.00); ///< K2 constant in the muscle model.  Factor for determining shortening speed at optimum length
    AnyFloat Epsilon0 ??= DesignVar(0.0530); ///< Epsilon bar in the muscle model. Represents tendon strain at F0
    AnyFloat Fcfast ??= DesignVar(0.4); ///< Factor for determining shortening speed at optimum length
  };
  #endif


  #if (BM_FOOT_MODEL == _FOOT_MODEL_TOE_FLEX_GM_) | (BM_FOOT_MODEL == _FOOT_MODEL_DETAILED_GM_)

  AnyFolder ExtensorDigitorumLongusToe4TendonPart1 =
  {
    AnyString Muscle = "ExtensorDigitorumLongusToe4TendonPart1"; ///< Descriptive name for the muscle, e.g. for plotting
    AnyIntVar MuscleElemAmount = 1; ///< The total amount of elements for this muscle
    AnyFloat Pennationangle ??= DesignVar(0.0); ///< Pennation angle of the muscle fibers (degres)
    AnyFloat VolumeScaleFactor ??= DesignVar(1.0); ///< Factor for scaling the muscle volume
    AnyFloat MuscleVolume ??= DesignVar(68.54); ///< Volume of the muscle  (ml)
    AnyFloat MuscleVolumeSIScaled ??= .VolumeUnitFactor*VolumeScaleFactor*MuscleVolume; ///< Scaled Volume of the muscle in SI base unit (m^3)
    AnyFloat OptimalFiberlength ??= _FIBER_LENGTH_DESIGNVAR(4.08/100); ///< Optimal working length of the muscle fiber (m)
    AnyFloat TotalTendonLength ??= _TENDON_LENGTH_DESIGNVAR(0.00/100);///< The total tendon length (m)
    AnyFloat K1 ??= DesignVar(10.00); ///< K1 constant in the muscle model.  Factor for determining shortening speed at optimum length
    AnyFloat K2 ??= DesignVar(0.00); ///< K2 constant in the muscle model.  Factor for determining shortening speed at optimum length
    AnyFloat Epsilon0 ??= DesignVar(0.0530); ///< Epsilon bar in the muscle model. Represents tendon strain at F0
    AnyFloat Fcfast ??= DesignVar(0.4); ///< Factor for determining shortening speed at optimum length
  };
  #endif


  #if (BM_FOOT_MODEL == _FOOT_MODEL_TOE_FLEX_GM_) | (BM_FOOT_MODEL == _FOOT_MODEL_DETAILED_GM_)

  AnyFolder ExtensorDigitorumLongusToe4TendonPart2 =
  {
    AnyString Muscle = "ExtensorDigitorumLongusToe4TendonPart2"; ///< Descriptive name for the muscle, e.g. for plotting
    AnyIntVar MuscleElemAmount = 1; ///< The total amount of elements for this muscle
    AnyFloat Pennationangle ??= DesignVar(0.0); ///< Pennation angle of the muscle fibers (degres)
    AnyFloat VolumeScaleFactor ??= DesignVar(1.0); ///< Factor for scaling the muscle volume
    AnyFloat MuscleVolume ??= DesignVar(45.15); ///< Volume of the muscle  (ml)
    AnyFloat MuscleVolumeSIScaled ??= .VolumeUnitFactor*VolumeScaleFactor*MuscleVolume; ///< Scaled Volume of the muscle in SI base unit (m^3)
    AnyFloat OptimalFiberlength ??= _FIBER_LENGTH_DESIGNVAR(2.69/100); ///< Optimal working length of the muscle fiber (m)
    AnyFloat TotalTendonLength ??= _TENDON_LENGTH_DESIGNVAR(0.00/100);///< The total tendon length (m)
    AnyFloat K1 ??= DesignVar(10.00); ///< K1 constant in the muscle model.  Factor for determining shortening speed at optimum length
    AnyFloat K2 ??= DesignVar(0.00); ///< K2 constant in the muscle model.  Factor for determining shortening speed at optimum length
    AnyFloat Epsilon0 ??= DesignVar(0.0530); ///< Epsilon bar in the muscle model. Represents tendon strain at F0
    AnyFloat Fcfast ??= DesignVar(0.4); ///< Factor for determining shortening speed at optimum length
  };
  #endif


  #if (BM_FOOT_MODEL == _FOOT_MODEL_TOE_FLEX_GM_) | (BM_FOOT_MODEL == _FOOT_MODEL_DETAILED_GM_)

  AnyFolder ExtensorDigitorumLongusToe4TendonPart3 =
  {
    AnyString Muscle = "ExtensorDigitorumLongusToe4TendonPart3"; ///< Descriptive name for the muscle, e.g. for plotting
    AnyIntVar MuscleElemAmount = 1; ///< The total amount of elements for this muscle
    AnyFloat Pennationangle ??= DesignVar(0.0); ///< Pennation angle of the muscle fibers (degres)
    AnyFloat VolumeScaleFactor ??= DesignVar(1.0); ///< Factor for scaling the muscle volume
    AnyFloat MuscleVolume ??= DesignVar(25.75); ///< Volume of the muscle  (ml)
    AnyFloat MuscleVolumeSIScaled ??= .VolumeUnitFactor*VolumeScaleFactor*MuscleVolume; ///< Scaled Volume of the muscle in SI base unit (m^3)
    AnyFloat OptimalFiberlength ??= _FIBER_LENGTH_DESIGNVAR(1.53/100); ///< Optimal working length of the muscle fiber (m)
    AnyFloat TotalTendonLength ??= _TENDON_LENGTH_DESIGNVAR(0.00/100);///< The total tendon length (m)
    AnyFloat K1 ??= DesignVar(10.00); ///< K1 constant in the muscle model.  Factor for determining shortening speed at optimum length
    AnyFloat K2 ??= DesignVar(0.00); ///< K2 constant in the muscle model.  Factor for determining shortening speed at optimum length
    AnyFloat Epsilon0 ??= DesignVar(0.0530); ///< Epsilon bar in the muscle model. Represents tendon strain at F0
    AnyFloat Fcfast ??= DesignVar(0.4); ///< Factor for determining shortening speed at optimum length
  };
  #endif


  #if (BM_FOOT_MODEL == _FOOT_MODEL_TOE_FLEX_GM_) | (BM_FOOT_MODEL == _FOOT_MODEL_DETAILED_GM_)

  AnyFolder ExtensorDigitorumLongusToe4TendonPart4 =
  {
    AnyString Muscle = "ExtensorDigitorumLongusToe4TendonPart4"; ///< Descriptive name for the muscle, e.g. for plotting
    AnyIntVar MuscleElemAmount = 1; ///< The total amount of elements for this muscle
    AnyFloat Pennationangle ??= DesignVar(0.0); ///< Pennation angle of the muscle fibers (degres)
    AnyFloat VolumeScaleFactor ??= DesignVar(1.0); ///< Factor for scaling the muscle volume
    AnyFloat MuscleVolume ??= DesignVar(26.02); ///< Volume of the muscle  (ml)
    AnyFloat MuscleVolumeSIScaled ??= .VolumeUnitFactor*VolumeScaleFactor*MuscleVolume; ///< Scaled Volume of the muscle in SI base unit (m^3)
    AnyFloat OptimalFiberlength ??= _FIBER_LENGTH_DESIGNVAR(1.55/100); ///< Optimal working length of the muscle fiber (m)
    AnyFloat TotalTendonLength ??= _TENDON_LENGTH_DESIGNVAR(0.00/100);///< The total tendon length (m)
    AnyFloat K1 ??= DesignVar(10.00); ///< K1 constant in the muscle model.  Factor for determining shortening speed at optimum length
    AnyFloat K2 ??= DesignVar(0.00); ///< K2 constant in the muscle model.  Factor for determining shortening speed at optimum length
    AnyFloat Epsilon0 ??= DesignVar(0.0530); ///< Epsilon bar in the muscle model. Represents tendon strain at F0
    AnyFloat Fcfast ??= DesignVar(0.4); ///< Factor for determining shortening speed at optimum length
  };
  #endif


  #if (BM_FOOT_MODEL == _FOOT_MODEL_TOE_FLEX_GM_) | (BM_FOOT_MODEL == _FOOT_MODEL_DETAILED_GM_)

  AnyFolder ExtensorDigitorumLongusToe5TendonPart1 =
  {
    AnyString Muscle = "ExtensorDigitorumLongusToe5TendonPart1"; ///< Descriptive name for the muscle, e.g. for plotting
    AnyIntVar MuscleElemAmount = 1; ///< The total amount of elements for this muscle
    AnyFloat Pennationangle ??= DesignVar(0.0); ///< Pennation angle of the muscle fibers (degres)
    AnyFloat VolumeScaleFactor ??= DesignVar(1.0); ///< Factor for scaling the muscle volume
    AnyFloat MuscleVolume ??= DesignVar(61.73); ///< Volume of the muscle  (ml)
    AnyFloat MuscleVolumeSIScaled ??= .VolumeUnitFactor*VolumeScaleFactor*MuscleVolume; ///< Scaled Volume of the muscle in SI base unit (m^3)
    AnyFloat OptimalFiberlength ??= _FIBER_LENGTH_DESIGNVAR(3.67/100); ///< Optimal working length of the muscle fiber (m)
    AnyFloat TotalTendonLength ??= _TENDON_LENGTH_DESIGNVAR(0.00/100);///< The total tendon length (m)
    AnyFloat K1 ??= DesignVar(10.00); ///< K1 constant in the muscle model.  Factor for determining shortening speed at optimum length
    AnyFloat K2 ??= DesignVar(0.00); ///< K2 constant in the muscle model.  Factor for determining shortening speed at optimum length
    AnyFloat Epsilon0 ??= DesignVar(0.0530); ///< Epsilon bar in the muscle model. Represents tendon strain at F0
    AnyFloat Fcfast ??= DesignVar(0.4); ///< Factor for determining shortening speed at optimum length
  };
  #endif


  #if (BM_FOOT_MODEL == _FOOT_MODEL_TOE_FLEX_GM_) | (BM_FOOT_MODEL == _FOOT_MODEL_DETAILED_GM_)

  AnyFolder ExtensorDigitorumLongusToe5TendonPart2 =
  {
    AnyString Muscle = "ExtensorDigitorumLongusToe5TendonPart2"; ///< Descriptive name for the muscle, e.g. for plotting
    AnyIntVar MuscleElemAmount = 1; ///< The total amount of elements for this muscle
    AnyFloat Pennationangle ??= DesignVar(0.0); ///< Pennation angle of the muscle fibers (degres)
    AnyFloat VolumeScaleFactor ??= DesignVar(1.0); ///< Factor for scaling the muscle volume
    AnyFloat MuscleVolume ??= DesignVar(48.55); ///< Volume of the muscle  (ml)
    AnyFloat MuscleVolumeSIScaled ??= .VolumeUnitFactor*VolumeScaleFactor*MuscleVolume; ///< Scaled Volume of the muscle in SI base unit (m^3)
    AnyFloat OptimalFiberlength ??= _FIBER_LENGTH_DESIGNVAR(2.89/100); ///< Optimal working length of the muscle fiber (m)
    AnyFloat TotalTendonLength ??= _TENDON_LENGTH_DESIGNVAR(0.00/100);///< The total tendon length (m)
    AnyFloat K1 ??= DesignVar(10.00); ///< K1 constant in the muscle model.  Factor for determining shortening speed at optimum length
    AnyFloat K2 ??= DesignVar(0.00); ///< K2 constant in the muscle model.  Factor for determining shortening speed at optimum length
    AnyFloat Epsilon0 ??= DesignVar(0.0530); ///< Epsilon bar in the muscle model. Represents tendon strain at F0
    AnyFloat Fcfast ??= DesignVar(0.4); ///< Factor for determining shortening speed at optimum length
  };
  #endif


  #if (BM_FOOT_MODEL == _FOOT_MODEL_TOE_FLEX_GM_) | (BM_FOOT_MODEL == _FOOT_MODEL_DETAILED_GM_)

  AnyFolder ExtensorDigitorumLongusToe5TendonPart3 =
  {
    AnyString Muscle = "ExtensorDigitorumLongusToe5TendonPart3"; ///< Descriptive name for the muscle, e.g. for plotting
    AnyIntVar MuscleElemAmount = 1; ///< The total amount of elements for this muscle
    AnyFloat Pennationangle ??= DesignVar(0.0); ///< Pennation angle of the muscle fibers (degres)
    AnyFloat VolumeScaleFactor ??= DesignVar(1.0); ///< Factor for scaling the muscle volume
    AnyFloat MuscleVolume ??= DesignVar(26.96); ///< Volume of the muscle  (ml)
    AnyFloat MuscleVolumeSIScaled ??= .VolumeUnitFactor*VolumeScaleFactor*MuscleVolume; ///< Scaled Volume of the muscle in SI base unit (m^3)
    AnyFloat OptimalFiberlength ??= _FIBER_LENGTH_DESIGNVAR(1.60/100); ///< Optimal working length of the muscle fiber (m)
    AnyFloat TotalTendonLength ??= _TENDON_LENGTH_DESIGNVAR(0.00/100);///< The total tendon length (m)
    AnyFloat K1 ??= DesignVar(10.00); ///< K1 constant in the muscle model.  Factor for determining shortening speed at optimum length
    AnyFloat K2 ??= DesignVar(0.00); ///< K2 constant in the muscle model.  Factor for determining shortening speed at optimum length
    AnyFloat Epsilon0 ??= DesignVar(0.0530); ///< Epsilon bar in the muscle model. Represents tendon strain at F0
    AnyFloat Fcfast ??= DesignVar(0.4); ///< Factor for determining shortening speed at optimum length
  };
  #endif


  #if (BM_FOOT_MODEL == _FOOT_MODEL_TOE_FLEX_GM_) | (BM_FOOT_MODEL == _FOOT_MODEL_DETAILED_GM_)

  AnyFolder ExtensorDigitorumLongusToe5TendonPart4 =
  {
    AnyString Muscle = "ExtensorDigitorumLongusToe5TendonPart4"; ///< Descriptive name for the muscle, e.g. for plotting
    AnyIntVar MuscleElemAmount = 1; ///< The total amount of elements for this muscle
    AnyFloat Pennationangle ??= DesignVar(0.0); ///< Pennation angle of the muscle fibers (degres)
    AnyFloat VolumeScaleFactor ??= DesignVar(1.0); ///< Factor for scaling the muscle volume
    AnyFloat MuscleVolume ??= DesignVar(22.98); ///< Volume of the muscle  (ml)
    AnyFloat MuscleVolumeSIScaled ??= .VolumeUnitFactor*VolumeScaleFactor*MuscleVolume; ///< Scaled Volume of the muscle in SI base unit (m^3)
    AnyFloat OptimalFiberlength ??= _FIBER_LENGTH_DESIGNVAR(1.37/100); ///< Optimal working length of the muscle fiber (m)
    AnyFloat TotalTendonLength ??= _TENDON_LENGTH_DESIGNVAR(0.00/100);///< The total tendon length (m)
    AnyFloat K1 ??= DesignVar(10.00); ///< K1 constant in the muscle model.  Factor for determining shortening speed at optimum length
    AnyFloat K2 ??= DesignVar(0.00); ///< K2 constant in the muscle model.  Factor for determining shortening speed at optimum length
    AnyFloat Epsilon0 ??= DesignVar(0.0530); ///< Epsilon bar in the muscle model. Represents tendon strain at F0
    AnyFloat Fcfast ??= DesignVar(0.4); ///< Factor for determining shortening speed at optimum length
  };
  #endif


  #if (BM_FOOT_MODEL == _FOOT_MODEL_TOE_FLEX_GM_) | (BM_FOOT_MODEL == _FOOT_MODEL_DETAILED_GM_)

  AnyFolder ExtensorHallucisLongusTendonPart1 =
  {
    AnyString Muscle = "ExtensorHallucisLongusTendonPart1"; ///< Descriptive name for the muscle, e.g. for plotting
    AnyIntVar MuscleElemAmount = 1; ///< The total amount of elements for this muscle
    AnyFloat Pennationangle ??= DesignVar(0.0); ///< Pennation angle of the muscle fibers (degres)
    AnyFloat VolumeScaleFactor ??= DesignVar(1.0); ///< Factor for scaling the muscle volume
    AnyFloat MuscleVolume ??= DesignVar(78.04); ///< Volume of the muscle  (ml)
    AnyFloat MuscleVolumeSIScaled ??= .VolumeUnitFactor*VolumeScaleFactor*MuscleVolume; ///< Scaled Volume of the muscle in SI base unit (m^3)
    AnyFloat OptimalFiberlength ??= _FIBER_LENGTH_DESIGNVAR(4.64/100); ///< Optimal working length of the muscle fiber (m)
    AnyFloat TotalTendonLength ??= _TENDON_LENGTH_DESIGNVAR(0.00/100);///< The total tendon length (m)
    AnyFloat K1 ??= DesignVar(10.00); ///< K1 constant in the muscle model.  Factor for determining shortening speed at optimum length
    AnyFloat K2 ??= DesignVar(0.00); ///< K2 constant in the muscle model.  Factor for determining shortening speed at optimum length
    AnyFloat Epsilon0 ??= DesignVar(0.0530); ///< Epsilon bar in the muscle model. Represents tendon strain at F0
    AnyFloat Fcfast ??= DesignVar(0.4); ///< Factor for determining shortening speed at optimum length
  };
  #endif


  #if (BM_FOOT_MODEL == _FOOT_MODEL_TOE_FLEX_GM_) | (BM_FOOT_MODEL == _FOOT_MODEL_DETAILED_GM_)

  AnyFolder ExtensorHallucisLongusTendonPart2 =
  {
    AnyString Muscle = "ExtensorHallucisLongusTendonPart2"; ///< Descriptive name for the muscle, e.g. for plotting
    AnyIntVar MuscleElemAmount = 1; ///< The total amount of elements for this muscle
    AnyFloat Pennationangle ??= DesignVar(0.0); ///< Pennation angle of the muscle fibers (degres)
    AnyFloat VolumeScaleFactor ??= DesignVar(1.0); ///< Factor for scaling the muscle volume
    AnyFloat MuscleVolume ??= DesignVar(39.61); ///< Volume of the muscle  (ml)
    AnyFloat MuscleVolumeSIScaled ??= .VolumeUnitFactor*VolumeScaleFactor*MuscleVolume; ///< Scaled Volume of the muscle in SI base unit (m^3)
    AnyFloat OptimalFiberlength ??= _FIBER_LENGTH_DESIGNVAR(2.36/100); ///< Optimal working length of the muscle fiber (m)
    AnyFloat TotalTendonLength ??= _TENDON_LENGTH_DESIGNVAR(0.00/100);///< The total tendon length (m)
    AnyFloat K1 ??= DesignVar(10.00); ///< K1 constant in the muscle model.  Factor for determining shortening speed at optimum length
    AnyFloat K2 ??= DesignVar(0.00); ///< K2 constant in the muscle model.  Factor for determining shortening speed at optimum length
    AnyFloat Epsilon0 ??= DesignVar(0.0530); ///< Epsilon bar in the muscle model. Represents tendon strain at F0
    AnyFloat Fcfast ??= DesignVar(0.4); ///< Factor for determining shortening speed at optimum length
  };
  #endif


  #if (BM_FOOT_MODEL == _FOOT_MODEL_TOE_FLEX_GM_) | (BM_FOOT_MODEL == _FOOT_MODEL_DETAILED_GM_)

  AnyFolder ExtensorHallucisLongusTendonPart3 =
  {
    AnyString Muscle = "ExtensorHallucisLongusTendonPart3"; ///< Descriptive name for the muscle, e.g. for plotting
    AnyIntVar MuscleElemAmount = 1; ///< The total amount of elements for this muscle
    AnyFloat Pennationangle ??= DesignVar(0.0); ///< Pennation angle of the muscle fibers (degres)
    AnyFloat VolumeScaleFactor ??= DesignVar(1.0); ///< Factor for scaling the muscle volume
    AnyFloat MuscleVolume ??= DesignVar(40.29); ///< Volume of the muscle  (ml)
    AnyFloat MuscleVolumeSIScaled ??= .VolumeUnitFactor*VolumeScaleFactor*MuscleVolume; ///< Scaled Volume of the muscle in SI base unit (m^3)
    AnyFloat OptimalFiberlength ??= _FIBER_LENGTH_DESIGNVAR(2.40/100); ///< Optimal working length of the muscle fiber (m)
    AnyFloat TotalTendonLength ??= _TENDON_LENGTH_DESIGNVAR(0.00/100);///< The total tendon length (m)
    AnyFloat K1 ??= DesignVar(10.00); ///< K1 constant in the muscle model.  Factor for determining shortening speed at optimum length
    AnyFloat K2 ??= DesignVar(0.00); ///< K2 constant in the muscle model.  Factor for determining shortening speed at optimum length
    AnyFloat Epsilon0 ??= DesignVar(0.0530); ///< Epsilon bar in the muscle model. Represents tendon strain at F0
    AnyFloat Fcfast ??= DesignVar(0.4); ///< Factor for determining shortening speed at optimum length
  };
  #endif

}; // Muscles


#undef _TENDON_LENGTH_DESIGNVAR
#undef _FIBER_LENGTH_DESIGNVAR
