Layer_L1.BaseSegPosterior= {
  ///^ The new via-nodes of the erector spinae muscles were placed on the layers instead of the vertebrae, but use the same position data as before.
  ///^ Since the nodes were originally defined at the same height as the spinous process of the vertebrae, they were moved to a layer below to be closer
  ///^ to the center of the layer joint longitudinally. Note that since we used the old data, the via-nodes are not exactly at the same height as the
  ///^ layer joints. However, with the new implementation, the model is less sensitive to the location of the via-nodes than before, as the layers are
  ///^ connected to each other with three rotationally recruited actuators, and the abdominal muscles help balance this interconnected layer structure.
  ///^ In the previous implementation, the via-nodes were placed on the vertebrae with a moment arm relative to the center of the vertebra or
  ///^ intervertebral joint, making the model more sensitive to changes in the via-node position.


  AnyRefNode IliocostalisLumborumR5Via6NodeR = {sRel = ..Segref.ScaleAbdominal(....Data.unscaled.ModelParameters.R12.Right.IliocostalisLumborumR5Via6Node_pos);};
  AnyRefNode IliocostalisLumborumR5Via6NodeL = {sRel = ..Segref.ScaleAbdominal(....Data.unscaled.ModelParameters.R12.Left.IliocostalisLumborumR5Via6Node_pos);};
  AnyRefNode IliocostalisLumborumR6Via5NodeR = {sRel = ..Segref.ScaleAbdominal(....Data.unscaled.ModelParameters.R12.Right.IliocostalisLumborumR6Via5Node_pos);};
  AnyRefNode IliocostalisLumborumR6Via5NodeL = {sRel = ..Segref.ScaleAbdominal(....Data.unscaled.ModelParameters.R12.Left.IliocostalisLumborumR6Via5Node_pos);};
  AnyRefNode IliocostalisLumborumR7Via4NodeR = {sRel = ..Segref.ScaleAbdominal(....Data.unscaled.ModelParameters.R12.Right.IliocostalisLumborumR7Via4Node_pos);};
  AnyRefNode IliocostalisLumborumR7Via4NodeL = {sRel = ..Segref.ScaleAbdominal(....Data.unscaled.ModelParameters.R12.Left.IliocostalisLumborumR7Via4Node_pos);};
  AnyRefNode IliocostalisLumborumR8Via3NodeR = {sRel = ..Segref.ScaleAbdominal(....Data.unscaled.ModelParameters.R12.Right.IliocostalisLumborumR8Via3Node_pos);};
  AnyRefNode IliocostalisLumborumR8Via3NodeL = {sRel = ..Segref.ScaleAbdominal(....Data.unscaled.ModelParameters.R12.Left.IliocostalisLumborumR8Via3Node_pos);};
  AnyRefNode IliocostalisLumborumR9Via2NodeR = {sRel = ..Segref.ScaleAbdominal(....Data.unscaled.ModelParameters.R12.Right.IliocostalisLumborumR9Via2Node_pos);};
  AnyRefNode IliocostalisLumborumR9Via2NodeL = {sRel = ..Segref.ScaleAbdominal(....Data.unscaled.ModelParameters.R12.Left.IliocostalisLumborumR9Via2Node_pos);};
  AnyRefNode IliocostalisLumborumR10Via1NodeR = {sRel = ..Segref.ScaleAbdominal(....Data.unscaled.ModelParameters.R12.Right.IliocostalisLumborumR10Via1Node_pos);};
  AnyRefNode IliocostalisLumborumR10Via1NodeL = {sRel = ..Segref.ScaleAbdominal(....Data.unscaled.ModelParameters.R12.Left.IliocostalisLumborumR10Via1Node_pos);};
  AnyRefNode LTptT10SacrumVia2NodeR = {sRel = ..Segref.ScaleAbdominal(....Data.unscaled.ModelParameters.Thorax.Right.LTptT10SacrumVia2Node_pos);};
  AnyRefNode LTptT10SacrumVia2NodeL = {sRel = ..Segref.ScaleAbdominal(....Data.unscaled.ModelParameters.Thorax.Left.LTptT10SacrumVia2Node_pos);};
  AnyRefNode LTptT11SacrumVia1NodeR = {sRel = ..Segref.ScaleAbdominal(....Data.unscaled.ModelParameters.Thorax.Right.LTptT11SacrumVia1Node_pos);};
  AnyRefNode LTptT11SacrumVia1NodeL = {sRel = ..Segref.ScaleAbdominal(....Data.unscaled.ModelParameters.Thorax.Left.LTptT11SacrumVia1Node_pos);};
  AnyRefNode LTptC10SacrumVia2NodeR = {sRel = ..Segref.ScaleAbdominal(....Data.unscaled.ModelParameters.R12.Right.LTptC10SacrumVia2Node_pos);};
  AnyRefNode LTptC10SacrumVia2NodeL = {sRel = ..Segref.ScaleAbdominal(....Data.unscaled.ModelParameters.R12.Left.LTptC10SacrumVia2Node_pos);};
  AnyRefNode LTptC11SacrumVia1NodeR = {sRel = ..Segref.ScaleAbdominal(....Data.unscaled.ModelParameters.R12.Right.LTptC11SacrumVia1Node_pos);};
  AnyRefNode LTptC11SacrumVia1NodeL = {sRel = ..Segref.ScaleAbdominal(....Data.unscaled.ModelParameters.R12.Left.LTptC11SacrumVia1Node_pos);};
};

Layer_L2.BaseSegPosterior= {
  ///^ The new via-nodes of the erector spinae muscles were placed on the layers instead of the vertebrae, but use the same position data as before.
  ///^ Since the nodes were originally defined at the same height as the spinous process of the vertebrae, they were moved to a layer below to be closer
  ///^ to the center of the layer joint longitudinally. Note that since we used the old data, the via-nodes are not exactly at the same height as the
  ///^ layer joints. However, with the new implementation, the model is less sensitive to the location of the via-nodes than before, as the layers are
  ///^ connected to each other with three rotationally recruited actuators, and the abdominal muscles help balance this interconnected layer structure.
  ///^ In the previous implementation, the via-nodes were placed on the vertebrae with a moment arm relative to the center of the vertebra or
  ///^ intervertebral joint, making the model more sensitive to changes in the via-node position.

  AnyRefNode IliocostalisLumborumR5Via7NodeR = {sRel = ..Segref.ScaleAbdominal(....Data.unscaled.ModelParameters.L1.Right.IliocostalisLumborumR5Via7Node_pos);};
  AnyRefNode IliocostalisLumborumR5Via7NodeL = {sRel = ..Segref.ScaleAbdominal(....Data.unscaled.ModelParameters.L1.Left.IliocostalisLumborumR5Via7Node_pos);};
  AnyRefNode IliocostalisLumborumR6Via6NodeR = {sRel = ..Segref.ScaleAbdominal(....Data.unscaled.ModelParameters.L1.Right.IliocostalisLumborumR6Via6Node_pos);};
  AnyRefNode IliocostalisLumborumR6Via6NodeL = {sRel = ..Segref.ScaleAbdominal(....Data.unscaled.ModelParameters.L1.Left.IliocostalisLumborumR6Via6Node_pos);};
  AnyRefNode IliocostalisLumborumR7Via5NodeR = {sRel = ..Segref.ScaleAbdominal(....Data.unscaled.ModelParameters.L1.Right.IliocostalisLumborumR7Via5Node_pos);};
  AnyRefNode IliocostalisLumborumR7Via5NodeL = {sRel = ..Segref.ScaleAbdominal(....Data.unscaled.ModelParameters.L1.Left.IliocostalisLumborumR7Via5Node_pos);};
  AnyRefNode IliocostalisLumborumR8Via4NodeR = {sRel = ..Segref.ScaleAbdominal(....Data.unscaled.ModelParameters.L1.Right.IliocostalisLumborumR8Via4Node_pos);};
  AnyRefNode IliocostalisLumborumR8Via4NodeL = {sRel = ..Segref.ScaleAbdominal(....Data.unscaled.ModelParameters.L1.Left.IliocostalisLumborumR8Via4Node_pos);};
  AnyRefNode IliocostalisLumborumR9Via3NodeR = {sRel = ..Segref.ScaleAbdominal(....Data.unscaled.ModelParameters.L1.Right.IliocostalisLumborumR9Via3Node_pos);};
  AnyRefNode IliocostalisLumborumR9Via3NodeL = {sRel = ..Segref.ScaleAbdominal(....Data.unscaled.ModelParameters.L1.Left.IliocostalisLumborumR9Via3Node_pos);};
  AnyRefNode IliocostalisLumborumR10Via2NodeR = {sRel = ..Segref.ScaleAbdominal(....Data.unscaled.ModelParameters.L1.Right.IliocostalisLumborumR10Via2Node_pos);};
  AnyRefNode IliocostalisLumborumR10Via2NodeL = {sRel = ..Segref.ScaleAbdominal(....Data.unscaled.ModelParameters.L1.Left.IliocostalisLumborumR10Via2Node_pos);};
  AnyRefNode IliocostalisLumborumR11Via1NodeR = {sRel = ..Segref.ScaleAbdominal(....Data.unscaled.ModelParameters.L1.Right.IliocostalisLumborumR11Via1Node_pos);};
  AnyRefNode IliocostalisLumborumR11Via1NodeL = {sRel = ..Segref.ScaleAbdominal(....Data.unscaled.ModelParameters.L1.Left.IliocostalisLumborumR11Via1Node_pos);};
  AnyRefNode IliocostalisLumborumR12Via1NodeR = {sRel = ..Segref.ScaleAbdominal(....Data.unscaled.ModelParameters.L1.Right.IliocostalisLumborumR12Via1Node_pos);};
  AnyRefNode IliocostalisLumborumR12Via1NodeL = {sRel = ..Segref.ScaleAbdominal(....Data.unscaled.ModelParameters.L1.Left.IliocostalisLumborumR12Via1Node_pos);};

  AnyRefNode LTptT10SacrumVia3NodeR = {sRel = ..Segref.ScaleAbdominal(....Data.unscaled.ModelParameters.L1.Right.LTptT10SacrumVia3Node_pos);};
  AnyRefNode LTptT10SacrumVia3NodeL = {sRel = ..Segref.ScaleAbdominal(....Data.unscaled.ModelParameters.L1.Left.LTptT10SacrumVia3Node_pos);};
  AnyRefNode LTptT11SacrumVia2NodeR = {sRel = ..Segref.ScaleAbdominal(....Data.unscaled.ModelParameters.L1.Right.LTptT11SacrumVia2Node_pos);};
  AnyRefNode LTptT11SacrumVia2NodeL = {sRel = ..Segref.ScaleAbdominal(....Data.unscaled.ModelParameters.L1.Left.LTptT11SacrumVia2Node_pos);};
  AnyRefNode LTptT12SacrumVia1NodeR = {sRel = ..Segref.ScaleAbdominal(....Data.unscaled.ModelParameters.L1.Right.LTptT12SacrumVia1Node_pos);};
  AnyRefNode LTptT12SacrumVia1NodeL = {sRel = ..Segref.ScaleAbdominal(....Data.unscaled.ModelParameters.L1.Left.LTptT12SacrumVia1Node_pos);};
  AnyRefNode LTptC10SacrumVia3NodeR = {sRel = ..Segref.ScaleAbdominal(....Data.unscaled.ModelParameters.L1.Right.LTptC10SacrumVia3Node_pos);};
  AnyRefNode LTptC10SacrumVia3NodeL = {sRel = ..Segref.ScaleAbdominal(....Data.unscaled.ModelParameters.L1.Left.LTptC10SacrumVia3Node_pos);};
  AnyRefNode LTptC11SacrumVia2NodeR = {sRel = ..Segref.ScaleAbdominal(....Data.unscaled.ModelParameters.L1.Right.LTptC11SacrumVia2Node_pos);};
  AnyRefNode LTptC11SacrumVia2NodeL = {sRel = ..Segref.ScaleAbdominal(....Data.unscaled.ModelParameters.L1.Left.LTptC11SacrumVia2Node_pos);};
  AnyRefNode LTptC12SacrumVia1NodeR = {sRel = ..Segref.ScaleAbdominal(....Data.unscaled.ModelParameters.L1.Right.LTptC12SacrumVia1Node_pos);};
  AnyRefNode LTptC12SacrumVia1NodeL = {sRel = ..Segref.ScaleAbdominal(....Data.unscaled.ModelParameters.L1.Left.LTptC12SacrumVia1Node_pos);};
};

Layer_L3.BaseSegPosterior= {
  ///^ The new via-nodes of the erector spinae muscles were placed on the layers instead of the vertebrae, but use the same position data as before.
  ///^ Since the nodes were originally defined at the same height as the spinous process of the vertebrae, they were moved to a layer below to be closer
  ///^ to the center of the layer joint longitudinally. Note that since we used the old data, the via-nodes are not exactly at the same height as the
  ///^ layer joints. However, with the new implementation, the model is less sensitive to the location of the via-nodes than before, as the layers are
  ///^ connected to each other with three rotationally recruited actuators, and the abdominal muscles help balance this interconnected layer structure.
  ///^ In the previous implementation, the via-nodes were placed on the vertebrae with a moment arm relative to the center of the vertebra or
  ///^ intervertebral joint, making the model more sensitive to changes in the via-node position.

  AnyRefNode IliocostalisLumborumL1ViaNodeR = {sRel = ..Segref.ScaleAbdominal(....Data.unscaled.ModelParameters.L2.Right.IliocostalisLumborumL1ViaNode_pos);};
  AnyRefNode IliocostalisLumborumL1ViaNodeL = {sRel = ..Segref.ScaleAbdominal(....Data.unscaled.ModelParameters.L2.Left.IliocostalisLumborumL1ViaNode_pos);};
  AnyRefNode LTplL1SIPSViaNodeR = {sRel = ..Segref.ScaleAbdominal(....Data.unscaled.ModelParameters.L2.Right.LTplL1SIPSViaNode_pos);};
  AnyRefNode LTplL1SIPSViaNodeL = {sRel = ..Segref.ScaleAbdominal(....Data.unscaled.ModelParameters.L2.Left.LTplL1SIPSViaNode_pos);};
  AnyRefNode IliocostalisLumborumR5Via8NodeR = {sRel = ..Segref.ScaleAbdominal(....Data.unscaled.ModelParameters.L2.Right.IliocostalisLumborumR5Via8Node_pos);};
  AnyRefNode IliocostalisLumborumR5Via8NodeL = {sRel = ..Segref.ScaleAbdominal(....Data.unscaled.ModelParameters.L2.Left.IliocostalisLumborumR5Via8Node_pos);};
  AnyRefNode IliocostalisLumborumR6Via7NodeR = {sRel = ..Segref.ScaleAbdominal(....Data.unscaled.ModelParameters.L2.Right.IliocostalisLumborumR6Via7Node_pos);};
  AnyRefNode IliocostalisLumborumR6Via7NodeL = {sRel = ..Segref.ScaleAbdominal(....Data.unscaled.ModelParameters.L2.Left.IliocostalisLumborumR6Via7Node_pos);};
  AnyRefNode IliocostalisLumborumR7Via6NodeR = {sRel = ..Segref.ScaleAbdominal(....Data.unscaled.ModelParameters.L2.Right.IliocostalisLumborumR7Via6Node_pos);};
  AnyRefNode IliocostalisLumborumR7Via6NodeL = {sRel = ..Segref.ScaleAbdominal(....Data.unscaled.ModelParameters.L2.Left.IliocostalisLumborumR7Via6Node_pos);};
  AnyRefNode IliocostalisLumborumR8Via5NodeR = {sRel = ..Segref.ScaleAbdominal(....Data.unscaled.ModelParameters.L2.Right.IliocostalisLumborumR8Via5Node_pos);};
  AnyRefNode IliocostalisLumborumR8Via5NodeL = {sRel = ..Segref.ScaleAbdominal(....Data.unscaled.ModelParameters.L2.Left.IliocostalisLumborumR8Via5Node_pos);};
  AnyRefNode IliocostalisLumborumR9Via4NodeR = {sRel = ..Segref.ScaleAbdominal(....Data.unscaled.ModelParameters.L2.Right.IliocostalisLumborumR9Via4Node_pos);};
  AnyRefNode IliocostalisLumborumR9Via4NodeL = {sRel = ..Segref.ScaleAbdominal(....Data.unscaled.ModelParameters.L2.Left.IliocostalisLumborumR9Via4Node_pos);};
  AnyRefNode IliocostalisLumborumR10Via3NodeR = {sRel = ..Segref.ScaleAbdominal(....Data.unscaled.ModelParameters.L2.Right.IliocostalisLumborumR10Via3Node_pos);};
  AnyRefNode IliocostalisLumborumR10Via3NodeL = {sRel = ..Segref.ScaleAbdominal(....Data.unscaled.ModelParameters.L2.Left.IliocostalisLumborumR10Via3Node_pos);};
  AnyRefNode IliocostalisLumborumR11Via2NodeR = {sRel = ..Segref.ScaleAbdominal(....Data.unscaled.ModelParameters.L2.Right.IliocostalisLumborumR11Via2Node_pos);};
  AnyRefNode IliocostalisLumborumR11Via2NodeL = {sRel = ..Segref.ScaleAbdominal(....Data.unscaled.ModelParameters.L2.Left.IliocostalisLumborumR11Via2Node_pos);};
  AnyRefNode IliocostalisLumborumR12Via2NodeR = {sRel = ..Segref.ScaleAbdominal(....Data.unscaled.ModelParameters.L2.Right.IliocostalisLumborumR12Via2Node_pos);};
  AnyRefNode IliocostalisLumborumR12Via2NodeL = {sRel = ..Segref.ScaleAbdominal(....Data.unscaled.ModelParameters.L2.Left.IliocostalisLumborumR12Via2Node_pos);};

  AnyRefNode LTptT10SacrumVia4NodeR = {sRel = ..Segref.ScaleAbdominal(....Data.unscaled.ModelParameters.L2.Right.LTptT10SacrumVia4Node_pos);};
  AnyRefNode LTptT10SacrumVia4NodeL = {sRel = ..Segref.ScaleAbdominal(....Data.unscaled.ModelParameters.L2.Left.LTptT10SacrumVia4Node_pos);};
  AnyRefNode LTptT11SacrumVia3NodeR = {sRel = ..Segref.ScaleAbdominal(....Data.unscaled.ModelParameters.L2.Right.LTptT11SacrumVia3Node_pos);};
  AnyRefNode LTptT11SacrumVia3NodeL = {sRel = ..Segref.ScaleAbdominal(....Data.unscaled.ModelParameters.L2.Left.LTptT11SacrumVia3Node_pos);};
  AnyRefNode LTptT12SacrumVia2NodeR = {sRel = ..Segref.ScaleAbdominal(....Data.unscaled.ModelParameters.L2.Right.LTptT12SacrumVia2Node_pos);};
  AnyRefNode LTptT12SacrumVia2NodeL = {sRel = ..Segref.ScaleAbdominal(....Data.unscaled.ModelParameters.L2.Left.LTptT12SacrumVia2Node_pos);};
  AnyRefNode LTptC10SacrumVia4NodeR = {sRel = ..Segref.ScaleAbdominal(....Data.unscaled.ModelParameters.L2.Right.LTptC10SacrumVia4Node_pos);};
  AnyRefNode LTptC10SacrumVia4NodeL = {sRel = ..Segref.ScaleAbdominal(....Data.unscaled.ModelParameters.L2.Left.LTptC10SacrumVia4Node_pos);};
  AnyRefNode LTptC11SacrumVia3NodeR = {sRel = ..Segref.ScaleAbdominal(....Data.unscaled.ModelParameters.L2.Right.LTptC11SacrumVia3Node_pos);};
  AnyRefNode LTptC11SacrumVia3NodeL = {sRel = ..Segref.ScaleAbdominal(....Data.unscaled.ModelParameters.L2.Left.LTptC11SacrumVia3Node_pos);};
  AnyRefNode LTptC12SacrumVia2NodeR = {sRel = ..Segref.ScaleAbdominal(....Data.unscaled.ModelParameters.L2.Right.LTptC12SacrumVia2Node_pos);};
  AnyRefNode LTptC12SacrumVia2NodeL = {sRel = ..Segref.ScaleAbdominal(....Data.unscaled.ModelParameters.L2.Left.LTptC12SacrumVia2Node_pos);};
};

Layer_L4.BaseSegPosterior= {
  ///^ The new via-nodes of the erector spinae muscles were placed on the layers instead of the vertebrae, but use the same position data as before.
  ///^ Since the nodes were originally defined at the same height as the spinous process of the vertebrae, they were moved to a layer below to be closer
  ///^ to the center of the layer joint longitudinally. Note that since we used the old data, the via-nodes are not exactly at the same height as the
  ///^ layer joints. However, with the new implementation, the model is less sensitive to the location of the via-nodes than before, as the layers are
  ///^ connected to each other with three rotationally recruited actuators, and the abdominal muscles help balance this interconnected layer structure.
  ///^ In the previous implementation, the via-nodes were placed on the vertebrae with a moment arm relative to the center of the vertebra or
  ///^ intervertebral joint, making the model more sensitive to changes in the via-node position.

  AnyRefNode LTptT10SacrumVia5NodeR = {sRel = ..Segref.ScaleAbdominal(....Data.unscaled.ModelParameters.L3.Right.LTptT10SacrumVia5Node_pos);};
  AnyRefNode LTptT10SacrumVia5NodeL = {sRel = ..Segref.ScaleAbdominal(....Data.unscaled.ModelParameters.L3.Left.LTptT10SacrumVia5Node_pos);};
  AnyRefNode LTptT11SacrumVia4NodeR = {sRel = ..Segref.ScaleAbdominal(....Data.unscaled.ModelParameters.L3.Right.LTptT11SacrumVia4Node_pos);};
  AnyRefNode LTptT11SacrumVia4NodeL = {sRel = ..Segref.ScaleAbdominal(....Data.unscaled.ModelParameters.L3.Left.LTptT11SacrumVia4Node_pos);};
  AnyRefNode LTptT12SacrumVia3NodeR = {sRel = ..Segref.ScaleAbdominal(....Data.unscaled.ModelParameters.L3.Right.LTptT12SacrumVia3Node_pos);};
  AnyRefNode LTptT12SacrumVia3NodeL = {sRel = ..Segref.ScaleAbdominal(....Data.unscaled.ModelParameters.L3.Left.LTptT12SacrumVia3Node_pos);};
  AnyRefNode LTptC10SacrumVia5NodeR = {sRel = ..Segref.ScaleAbdominal(....Data.unscaled.ModelParameters.L3.Right.LTptC10SacrumVia5Node_pos);};
  AnyRefNode LTptC10SacrumVia5NodeL = {sRel = ..Segref.ScaleAbdominal(....Data.unscaled.ModelParameters.L3.Left.LTptC10SacrumVia5Node_pos);};
  AnyRefNode LTptC11SacrumVia4NodeR = {sRel = ..Segref.ScaleAbdominal(....Data.unscaled.ModelParameters.L3.Right.LTptC11SacrumVia4Node_pos);};
  AnyRefNode LTptC11SacrumVia4NodeL = {sRel = ..Segref.ScaleAbdominal(....Data.unscaled.ModelParameters.L3.Left.LTptC11SacrumVia4Node_pos);};
  AnyRefNode LTptC12SacrumVia3NodeR = {sRel = ..Segref.ScaleAbdominal(....Data.unscaled.ModelParameters.L3.Right.LTptC12SacrumVia3Node_pos);};
  AnyRefNode LTptC12SacrumVia3NodeL = {sRel = ..Segref.ScaleAbdominal(....Data.unscaled.ModelParameters.L3.Left.LTptC12SacrumVia3Node_pos);};
};

Layer_L5.BaseSegPosterior= {
  ///^ The new via-nodes of the erector spinae muscles were placed on the layers instead of the vertebrae, but use the same position data as before.
  ///^ Since the nodes were originally defined at the same height as the spinous process of the vertebrae, they were moved to a layer below to be closer
  ///^ to the center of the layer joint longitudinally. Note that since we used the old data, the via-nodes are not exactly at the same height as the
  ///^ layer joints. However, with the new implementation, the model is less sensitive to the location of the via-nodes than before, as the layers are
  ///^ connected to each other with three rotationally recruited actuators, and the abdominal muscles help balance this interconnected layer structure.
  ///^ In the previous implementation, the via-nodes were placed on the vertebrae with a moment arm relative to the center of the vertebra or
  ///^ intervertebral joint, making the model more sensitive to changes in the via-node position.

  AnyRefNode LTptT10SacrumVia6NodeR = {sRel = ..Segref.ScaleAbdominal(....Data.unscaled.ModelParameters.L4.Right.LTptT10SacrumVia6Node_pos);};
  AnyRefNode LTptT10SacrumVia6NodeL = {sRel = ..Segref.ScaleAbdominal(....Data.unscaled.ModelParameters.L4.Left.LTptT10SacrumVia6Node_pos);};
  AnyRefNode LTptT10SacrumVia7NodeR = {sRel = ..Segref.ScaleAbdominal(....Data.unscaled.ModelParameters.L5.Right.LTptT10SacrumVia7Node_pos);};
  AnyRefNode LTptT10SacrumVia7NodeL = {sRel = ..Segref.ScaleAbdominal(....Data.unscaled.ModelParameters.L5.Left.LTptT10SacrumVia7Node_pos);};
  AnyRefNode LTptT11SacrumVia5NodeR = {sRel = ..Segref.ScaleAbdominal(....Data.unscaled.ModelParameters.L4.Right.LTptT11SacrumVia5Node_pos);};
  AnyRefNode LTptT11SacrumVia5NodeL = {sRel = ..Segref.ScaleAbdominal(....Data.unscaled.ModelParameters.L4.Left.LTptT11SacrumVia5Node_pos);};
  AnyRefNode LTptT11SacrumVia6NodeR = {sRel = ..Segref.ScaleAbdominal(....Data.unscaled.ModelParameters.L5.Right.LTptT11SacrumVia6Node_pos);};
  AnyRefNode LTptT11SacrumVia6NodeL = {sRel = ..Segref.ScaleAbdominal(....Data.unscaled.ModelParameters.L5.Left.LTptT11SacrumVia6Node_pos);};
  AnyRefNode LTptT12SacrumVia4NodeR = {sRel = ..Segref.ScaleAbdominal(....Data.unscaled.ModelParameters.L4.Right.LTptT12SacrumVia4Node_pos);};
  AnyRefNode LTptT12SacrumVia4NodeL = {sRel = ..Segref.ScaleAbdominal(....Data.unscaled.ModelParameters.L4.Left.LTptT12SacrumVia4Node_pos);};
  AnyRefNode LTptT12SacrumVia5NodeR = {sRel = ..Segref.ScaleAbdominal(....Data.unscaled.ModelParameters.L5.Right.LTptT12SacrumVia5Node_pos);};
  AnyRefNode LTptT12SacrumVia5NodeL = {sRel = ..Segref.ScaleAbdominal(....Data.unscaled.ModelParameters.L5.Left.LTptT12SacrumVia5Node_pos);};
  AnyRefNode LTptC10SacrumVia6NodeR = {sRel = ..Segref.ScaleAbdominal(....Data.unscaled.ModelParameters.L4.Right.LTptC10SacrumVia6Node_pos);};
  AnyRefNode LTptC10SacrumVia6NodeL = {sRel = ..Segref.ScaleAbdominal(....Data.unscaled.ModelParameters.L4.Left.LTptC10SacrumVia6Node_pos);};
  AnyRefNode LTptC10SacrumVia7NodeR = {sRel = ..Segref.ScaleAbdominal(....Data.unscaled.ModelParameters.L5.Right.LTptC10SacrumVia7Node_pos);};
  AnyRefNode LTptC10SacrumVia7NodeL = {sRel = ..Segref.ScaleAbdominal(....Data.unscaled.ModelParameters.L5.Left.LTptC10SacrumVia7Node_pos);};
  AnyRefNode LTptC11SacrumVia5NodeR = {sRel = ..Segref.ScaleAbdominal(....Data.unscaled.ModelParameters.L4.Right.LTptC11SacrumVia5Node_pos);};
  AnyRefNode LTptC11SacrumVia5NodeL = {sRel = ..Segref.ScaleAbdominal(....Data.unscaled.ModelParameters.L4.Left.LTptC11SacrumVia5Node_pos);};
  AnyRefNode LTptC11SacrumVia6NodeR = {sRel = ..Segref.ScaleAbdominal(....Data.unscaled.ModelParameters.L5.Right.LTptC11SacrumVia6Node_pos);};
  AnyRefNode LTptC11SacrumVia6NodeL = {sRel = ..Segref.ScaleAbdominal(....Data.unscaled.ModelParameters.L5.Left.LTptC11SacrumVia6Node_pos);};
  AnyRefNode LTptC12SacrumVia4NodeR = {sRel = ..Segref.ScaleAbdominal(....Data.unscaled.ModelParameters.L4.Right.LTptC12SacrumVia4Node_pos);};
  AnyRefNode LTptC12SacrumVia4NodeL = {sRel = ..Segref.ScaleAbdominal(....Data.unscaled.ModelParameters.L4.Left.LTptC12SacrumVia4Node_pos);};
  AnyRefNode LTptC12SacrumVia5NodeR = {sRel = ..Segref.ScaleAbdominal(....Data.unscaled.ModelParameters.L5.Right.LTptC12SacrumVia5Node_pos);};
  AnyRefNode LTptC12SacrumVia5NodeL = {sRel = ..Segref.ScaleAbdominal(....Data.unscaled.ModelParameters.L5.Left.LTptC12SacrumVia5Node_pos);};
};
