//This will run calibration on the spine ligaments
AnyFolder ThoraxMuscleCalibration = {
  AnyFolder CalibrationSettings ={
    AnyComponentDefinition obj = {};
    AnyFolder& Segments =  ...BodyModel.Trunk.Segments;
    #if BM_TRUNK_CAVITY_MODEL == _CAVITY_MODEL_BUCKLE_
    AnyFolder& Buckle = ...BodyModel.Trunk.Buckle;
    #endif
    #if BM_TRUNK_CAVITY_MODEL == _CAVITY_MODEL_VOLUME_
    AnyFolder& Abdominal = ...BodyModel.Trunk.Abdominal;
    #endif


    AnyFolder& Joints =  ...BodyModel.Trunk.Joints;
    AnyFolder& Muscles =  ...BodyModel.Trunk.Muscles;
    #if BM_LEG_MODEL & BM_LEG_RIGHT
    AnyFolder& RightThigh = ...BodyModel.Right.Leg.Segments.Thigh;
    AnyFolder& RightHipJoint =  ...BodyModel.Right.Leg.Joints.Hip;
    #endif
    #if BM_LEG_MODEL & BM_LEG_LEFT
    AnyFolder& LeftThigh = ...BodyModel.Left.Leg.Segments.Thigh;
    AnyFolder& LeftHipJoint =  ...BodyModel.Left.Leg.Joints.Hip;
    #endif


    AnyFixedRefFrame ground = {
      AnyRefNode node = {
        ARel=..Segments.PelvisSeg.Axes0;
        sRel=..Segments.PelvisSeg.r0;
      };
    };

    AnyKinEq PelvisFix = {
      AnyKinLinear Lin = {
        AnyRefFrame &ground = ..ground.node;
        AnyRefFrame &Pelvis = ..Segments.PelvisSeg;
      };

      AnyKinRotational Rot = {
        Type = RotAxesAngles;
        AnyRefFrame &ground = ..ground.node;
        AnyRefFrame &Pelvis = ..Segments.PelvisSeg;
      };
    };


    AnyKinEqSimpleDriver AllRelevantJoints = {
      AnyKinMeasureOrg DOFs = {
        AnyKinMeasure &u1 = .....BodyModel.Interface.Trunk.PelvisThoraxExtension;
        AnyKinMeasure &u2 = .....BodyModel.Interface.Trunk.PelvisThoraxLateralBending;
        AnyKinMeasure &u3 = .....BodyModel.Interface.Trunk.PelvisThoraxRotation;
        AnyKinMeasure &u4 = .....BodyModel.Interface.Trunk.SkullThoraxFlexion;
        AnyKinMeasure &u5 = .....BodyModel.Interface.Trunk.SkullThoraxLateralBending;
        AnyKinMeasure &u6 = .....BodyModel.Interface.Trunk.SkullThoraxRotation;
        #if BM_LEG_MODEL & BM_LEG_LEFT
          AnyKinMeasure &u7 = .....BodyModel.Interface.Left.HipFlexion;
          AnyKinMeasure &u8 = .....BodyModel.Interface.Left.HipAbduction;
          AnyKinMeasure &u9 = .....BodyModel.Interface.Left.HipExternalRotation;
        #endif
        #if BM_LEG_MODEL & BM_LEG_RIGHT
          AnyKinMeasure &u10 = .....BodyModel.Interface.Right.HipFlexion;
          AnyKinMeasure &u11 = .....BodyModel.Interface.Right.HipAbduction;
          AnyKinMeasure &u12 = .....BodyModel.Interface.Right.HipExternalRotation;
        #endif
      };
      DriverPos = repmat(DOFs.nDim, 0);
      DriverVel = repmat(DOFs.nDim, 0);
      Reaction.Type = repmat(DOFs.nDim, On);
    };
  };

  // The study: Operations to be performed on the model
  AnyBodyCalibrationStudy CalibrationStudy = {
    AnyFolder &ref=.CalibrationSettings;
    nStep = 1;
    InitialConditions.SmallStepAssumptionOnOff = Off;
    Kinematics.SmallStepAssumptionOnOff = Off;
    Kinematics.PosAnalysisOnlyOnOff = On;
    InitialConditions.PosAnalysisOnlyOnOff = On;

    /// Array of muscles to calibrate
    /// The Pelvic floor muscles are excluded as they cross the Pelvis-Sacrum joint which has no movement.
    /// This gives them zero range of motion and thereby no fiberlength [Lf0] when calibrated.
    MuscleArr = set_difference(
      ObjSearchRecursive(&...BodyModel.Trunk.Muscles, "*", "AnyMuscle", 3),
      ObjSearch(&Main.HumanModel.BodyModel.Trunk.Muscles, "*.Pubococcygeus.*"),
      ObjSearch(&Main.HumanModel.BodyModel.Trunk.Muscles, "*.Puborectalis.*")
    );
  };
};

CalibrationSequence ={
  AnyOperation &ThoraxMusCal = .ThoraxMuscleCalibration.CalibrationStudy.TendonLengthAdjustment;
};
