AnySeg  CostalCartilageSeg = {

  AnyFolder &Data=...ModelParameters;

  r0= ..SternumSeg.r0;

  // AnyVar SternumMassStandard = ..StandardParameters.Thorax.SternumMass;
  // AnyVar MassScale = ..Scaling.MassScaling.Thorax.MassScale;
  Mass = 0*1; //MassScale*SternumMassStandard;

  Jii = 0*{0.0001,0.00001,0.0001};


  AnyMatrix  M = {{0,0,-1},{0,1,0},{1,0,0}};

  AnyFunTransform3D &Scale = ...Scaling.GeometricalScaling.Thorax.ScaleFunction;


  AnyDrawSurf CostalCartilageSeg = {
    FileName = ....Data.unscaled.STL.FilenameSternalBodySeg;
    RGB = ......DrawSettings.Colors.Segments;
    AnyFunTransform3D &Scale = .Scale;
  };

    AnyRefNode CostalCartilageJointNode ={
      sRel = .Scale(....Data.unscaled.ModelParameters.Sternum._SIDE_.CostalCartilageJointNode_Pos);
    };


};
