AnyFunTransform3DLin ScaleFunction ={
  PreTransforms = {&Main.HumanModel.Scaling.GeometricalScaling.Lumbar.ScaleFunction};
  Offset ={0,0,0};
  ScaleMat = {{1,0,0},{0,1,0},{0,0,1}};
};
//     AnyDrawPointCloud drw_points = {
//          Points = .mesh.Points;
//          RGB = {0,0,1};
//          Points3D = On;
//          // Vectors3D = On;
//           PointStyle.Size = 0.005;
//      };


#ifndef MESH_TYPE
#define MESH_TYPE "ELLIPSOID_SIDE"
#endif

#if  BM_TRUNK_EXPERIMENTAL_RECTUS_ABDOMINIS == ON
AnyRefNode EllipsoidPoint2E  = {sRel=.ScaleFunction(....Data.unscaled.ModelParameters.Abdominal._LAYER_.AbdominalCavityPoints.Right.EllipsoidCalculation.Cal.Point2);};
AnyRefNode EllipsoidPoint1E  = {sRel=.ScaleFunction(....Data.unscaled.ModelParameters.Abdominal._LAYER_.AbdominalCavityPoints.Right.EllipsoidCalculation.Cal.Point1);};
AnyRefNode EllipsoidCenterE  = {sRel=.ScaleFunction(....Data.unscaled.ModelParameters.Abdominal._LAYER_.AbdominalCavityPoints.Right.EllipsoidCalculation.Cal.Center);};

AnySurfCylinder mesh = {
  sRel =  .EllipsoidCenterE.sRel+{0,0,-0.5*Length};
  Radius    = vnorm(.EllipsoidPoint2E.sRel-.EllipsoidCenterE.sRel);
Length= 2*  vnorm(.EllipsoidPoint1E.sRel-.EllipsoidCenterE.sRel);

  //viewSurface ={
  //  Visible =On;
  //};
};


#endif


#if MESH_TYPE == "ELLIPSOID"
AnyRefNode EllipsoidPoint2E  = {sRel=.ScaleFunction(....Data.unscaled.ModelParameters.Abdominal._LAYER_.AbdominalCavityPoints.Right.EllipsoidCalculation.Cal.Point2);};
AnyRefNode EllipsoidPoint1E  = {sRel=.ScaleFunction(....Data.unscaled.ModelParameters.Abdominal._LAYER_.AbdominalCavityPoints.Right.EllipsoidCalculation.Cal.Point1);};
AnyRefNode EllipsoidCenterE  = {sRel=.ScaleFunction(....Data.unscaled.ModelParameters.Abdominal._LAYER_.AbdominalCavityPoints.Right.EllipsoidCalculation.Cal.Center);};

AnySurfEllipsoid mesh = {
  sRel =  .EllipsoidCenterE.sRel;
  AnyFloat  R1 = vnorm(.EllipsoidPoint2E.sRel-.EllipsoidCenterE.sRel);
  AnyFloat R3 = vnorm(.EllipsoidPoint1E.sRel-.EllipsoidCenterE.sRel);
  Radius   ={R1,(R1+R3)/6,R3};
  viewSurface ={
    Visible =On;
  };
};


#endif

#if MESH_TYPE == "ELLIPSOID_SIDE"
AnyRefNode EllipsoidPoint2  = {sRel=.ScaleFunction(....Data.unscaled.ModelParameters.Abdominal._LAYER_.AbdominalCavityPoints.Right.EllipsoidCalculation.Cal.Point2);};
AnyRefNode EllipsoidPoint1  = {sRel=.ScaleFunction(....Data.unscaled.ModelParameters.Abdominal._LAYER_.AbdominalCavityPoints.Right.EllipsoidCalculation.Cal.Point1);};
AnyRefNode EllipsoidCenter  = {sRel=.ScaleFunction(....Data.unscaled.ModelParameters.Abdominal._LAYER_.AbdominalCavityPoints.Right.EllipsoidCalculation.Cal.Center);};

AnySurfEllipsoid mesh_Full = {
  sRel =  .EllipsoidCenter.sRel;
  AnyFloat  R1 = vnorm(.EllipsoidPoint2.sRel-.EllipsoidCenter.sRel);
  AnyFloat R3 = vnorm(.EllipsoidPoint1.sRel-.EllipsoidCenter.sRel);
  Radius   ={R1,(R1+R3)/6,R3};
//  viewSurface ={
//   Visible =On;
//  };
};


  AnyFloat FrontNodes_sRels = {
       Main.HumanModel.BodyModel.Trunk.Abdominal._LAYER_.BaseSegAnterior.VolumePoints.Right.nn12.sRel,
       Main.HumanModel.BodyModel.Trunk.Abdominal._LAYER_.BaseSegAnterior.VolumePoints.Right.nn11.sRel,
       Main.HumanModel.BodyModel.Trunk.Abdominal._LAYER_.BaseSegAnterior.VolumePoints.Right.nn10.sRel,
       Main.HumanModel.BodyModel.Trunk.Abdominal._LAYER_.BaseSegAnterior.VolumePoints.Right.nn09.sRel,
       Main.HumanModel.BodyModel.Trunk.Abdominal._LAYER_.BaseSegAnterior.VolumePoints.Right.nn08.sRel,
       Main.HumanModel.BodyModel.Trunk.Abdominal._LAYER_.BaseSegAnterior.VolumePoints.Right.nn07.sRel,
       Main.HumanModel.BodyModel.Trunk.Abdominal._LAYER_.BaseSegAnterior.VolumePoints.Right.nn06.sRel,
       Main.HumanModel.BodyModel.Trunk.Abdominal._LAYER_.BaseSegAnterior.VolumePoints.Right.nn05.sRel,

       Main.HumanModel.BodyModel.Trunk.Abdominal._LAYER_.BaseSegAnterior.VolumePoints.Left.nn12.sRel,
       Main.HumanModel.BodyModel.Trunk.Abdominal._LAYER_.BaseSegAnterior.VolumePoints.Left.nn11.sRel,
       Main.HumanModel.BodyModel.Trunk.Abdominal._LAYER_.BaseSegAnterior.VolumePoints.Left.nn10.sRel,
       Main.HumanModel.BodyModel.Trunk.Abdominal._LAYER_.BaseSegAnterior.VolumePoints.Left.nn09.sRel,
       Main.HumanModel.BodyModel.Trunk.Abdominal._LAYER_.BaseSegAnterior.VolumePoints.Left.nn08.sRel,
       Main.HumanModel.BodyModel.Trunk.Abdominal._LAYER_.BaseSegAnterior.VolumePoints.Left.nn07.sRel,
       Main.HumanModel.BodyModel.Trunk.Abdominal._LAYER_.BaseSegAnterior.VolumePoints.Left.nn06.sRel,
       Main.HumanModel.BodyModel.Trunk.Abdominal._LAYER_.BaseSegAnterior.VolumePoints.Left.nn05.sRel,
     } ;
  AnyFloat FrontNodes_mirror_sRels = {
  {2*Main.HumanModel.BodyModel.Trunk.Abdominal._LAYER_.BaseSegPosterior.VolumePoints.Right.nn01.sRel[0]-
  Main.HumanModel.BodyModel.Trunk.Abdominal._LAYER_.BaseSegAnterior.VolumePoints.Right.nn12.sRel[0],
  Main.HumanModel.BodyModel.Trunk.Abdominal._LAYER_.BaseSegAnterior.VolumePoints.Right.nn12.sRel[1],
  Main.HumanModel.BodyModel.Trunk.Abdominal._LAYER_.BaseSegAnterior.VolumePoints.Right.nn12.sRel[2],
},
{2*Main.HumanModel.BodyModel.Trunk.Abdominal._LAYER_.BaseSegPosterior.VolumePoints.Right.nn01.sRel[0]-
  Main.HumanModel.BodyModel.Trunk.Abdominal._LAYER_.BaseSegAnterior.VolumePoints.Right.nn11.sRel[0],
  Main.HumanModel.BodyModel.Trunk.Abdominal._LAYER_.BaseSegAnterior.VolumePoints.Right.nn11.sRel[1],
  Main.HumanModel.BodyModel.Trunk.Abdominal._LAYER_.BaseSegAnterior.VolumePoints.Right.nn11.sRel[2],
},
  {2*Main.HumanModel.BodyModel.Trunk.Abdominal._LAYER_.BaseSegPosterior.VolumePoints.Right.nn01.sRel[0]-
  Main.HumanModel.BodyModel.Trunk.Abdominal._LAYER_.BaseSegAnterior.VolumePoints.Right.nn10.sRel[0],
  Main.HumanModel.BodyModel.Trunk.Abdominal._LAYER_.BaseSegAnterior.VolumePoints.Right.nn10.sRel[1],
  Main.HumanModel.BodyModel.Trunk.Abdominal._LAYER_.BaseSegAnterior.VolumePoints.Right.nn10.sRel[2],
},
  {2*Main.HumanModel.BodyModel.Trunk.Abdominal._LAYER_.BaseSegPosterior.VolumePoints.Right.nn01.sRel[0]-
  Main.HumanModel.BodyModel.Trunk.Abdominal._LAYER_.BaseSegAnterior.VolumePoints.Right.nn09.sRel[0],
  Main.HumanModel.BodyModel.Trunk.Abdominal._LAYER_.BaseSegAnterior.VolumePoints.Right.nn09.sRel[1],
  Main.HumanModel.BodyModel.Trunk.Abdominal._LAYER_.BaseSegAnterior.VolumePoints.Right.nn09.sRel[2],
},
  {2*Main.HumanModel.BodyModel.Trunk.Abdominal._LAYER_.BaseSegPosterior.VolumePoints.Right.nn01.sRel[0]-
  Main.HumanModel.BodyModel.Trunk.Abdominal._LAYER_.BaseSegAnterior.VolumePoints.Right.nn08.sRel[0],
  Main.HumanModel.BodyModel.Trunk.Abdominal._LAYER_.BaseSegAnterior.VolumePoints.Right.nn08.sRel[1],
  Main.HumanModel.BodyModel.Trunk.Abdominal._LAYER_.BaseSegAnterior.VolumePoints.Right.nn08.sRel[2],
},
  {2*Main.HumanModel.BodyModel.Trunk.Abdominal._LAYER_.BaseSegPosterior.VolumePoints.Right.nn01.sRel[0]-
  Main.HumanModel.BodyModel.Trunk.Abdominal._LAYER_.BaseSegAnterior.VolumePoints.Right.nn07.sRel[0],
  Main.HumanModel.BodyModel.Trunk.Abdominal._LAYER_.BaseSegAnterior.VolumePoints.Right.nn07.sRel[1],
  Main.HumanModel.BodyModel.Trunk.Abdominal._LAYER_.BaseSegAnterior.VolumePoints.Right.nn07.sRel[2],
},
  {2*Main.HumanModel.BodyModel.Trunk.Abdominal._LAYER_.BaseSegPosterior.VolumePoints.Right.nn01.sRel[0]-
  Main.HumanModel.BodyModel.Trunk.Abdominal._LAYER_.BaseSegAnterior.VolumePoints.Right.nn06.sRel[0],
  Main.HumanModel.BodyModel.Trunk.Abdominal._LAYER_.BaseSegAnterior.VolumePoints.Right.nn06.sRel[1],
  Main.HumanModel.BodyModel.Trunk.Abdominal._LAYER_.BaseSegAnterior.VolumePoints.Right.nn06.sRel[2],
},
  {2*Main.HumanModel.BodyModel.Trunk.Abdominal._LAYER_.BaseSegPosterior.VolumePoints.Right.nn01.sRel[0]-
  Main.HumanModel.BodyModel.Trunk.Abdominal._LAYER_.BaseSegAnterior.VolumePoints.Right.nn05.sRel[0],
  Main.HumanModel.BodyModel.Trunk.Abdominal._LAYER_.BaseSegAnterior.VolumePoints.Right.nn05.sRel[1],
  Main.HumanModel.BodyModel.Trunk.Abdominal._LAYER_.BaseSegAnterior.VolumePoints.Right.nn05.sRel[2],
},

  {2*Main.HumanModel.BodyModel.Trunk.Abdominal._LAYER_.BaseSegPosterior.VolumePoints.Right.nn01.sRel[0]-
  Main.HumanModel.BodyModel.Trunk.Abdominal._LAYER_.BaseSegAnterior.VolumePoints.Left.nn12.sRel[0],
  Main.HumanModel.BodyModel.Trunk.Abdominal._LAYER_.BaseSegAnterior.VolumePoints.Left.nn12.sRel[1],
  Main.HumanModel.BodyModel.Trunk.Abdominal._LAYER_.BaseSegAnterior.VolumePoints.Left.nn12.sRel[2],
},
  {2*Main.HumanModel.BodyModel.Trunk.Abdominal._LAYER_.BaseSegPosterior.VolumePoints.Right.nn01.sRel[0]-
  Main.HumanModel.BodyModel.Trunk.Abdominal._LAYER_.BaseSegAnterior.VolumePoints.Left.nn11.sRel[0],
  Main.HumanModel.BodyModel.Trunk.Abdominal._LAYER_.BaseSegAnterior.VolumePoints.Left.nn11.sRel[1],
  Main.HumanModel.BodyModel.Trunk.Abdominal._LAYER_.BaseSegAnterior.VolumePoints.Left.nn11.sRel[2],
},
  {2*Main.HumanModel.BodyModel.Trunk.Abdominal._LAYER_.BaseSegPosterior.VolumePoints.Right.nn01.sRel[0]-
  Main.HumanModel.BodyModel.Trunk.Abdominal._LAYER_.BaseSegAnterior.VolumePoints.Left.nn10.sRel[0],
  Main.HumanModel.BodyModel.Trunk.Abdominal._LAYER_.BaseSegAnterior.VolumePoints.Left.nn10.sRel[1],
  Main.HumanModel.BodyModel.Trunk.Abdominal._LAYER_.BaseSegAnterior.VolumePoints.Left.nn10.sRel[2],
},
  {2*Main.HumanModel.BodyModel.Trunk.Abdominal._LAYER_.BaseSegPosterior.VolumePoints.Right.nn01.sRel[0]-
  Main.HumanModel.BodyModel.Trunk.Abdominal._LAYER_.BaseSegAnterior.VolumePoints.Left.nn09.sRel[0],
  Main.HumanModel.BodyModel.Trunk.Abdominal._LAYER_.BaseSegAnterior.VolumePoints.Left.nn09.sRel[1],
  Main.HumanModel.BodyModel.Trunk.Abdominal._LAYER_.BaseSegAnterior.VolumePoints.Left.nn09.sRel[2],
},
  {2*Main.HumanModel.BodyModel.Trunk.Abdominal._LAYER_.BaseSegPosterior.VolumePoints.Right.nn01.sRel[0]-
  Main.HumanModel.BodyModel.Trunk.Abdominal._LAYER_.BaseSegAnterior.VolumePoints.Left.nn08.sRel[0],
  Main.HumanModel.BodyModel.Trunk.Abdominal._LAYER_.BaseSegAnterior.VolumePoints.Left.nn08.sRel[1],
  Main.HumanModel.BodyModel.Trunk.Abdominal._LAYER_.BaseSegAnterior.VolumePoints.Left.nn08.sRel[2],
},
  {2*Main.HumanModel.BodyModel.Trunk.Abdominal._LAYER_.BaseSegPosterior.VolumePoints.Right.nn01.sRel[0]-
  Main.HumanModel.BodyModel.Trunk.Abdominal._LAYER_.BaseSegAnterior.VolumePoints.Left.nn07.sRel[0],
  Main.HumanModel.BodyModel.Trunk.Abdominal._LAYER_.BaseSegAnterior.VolumePoints.Left.nn07.sRel[1],
  Main.HumanModel.BodyModel.Trunk.Abdominal._LAYER_.BaseSegAnterior.VolumePoints.Left.nn07.sRel[2],
},
  {2*Main.HumanModel.BodyModel.Trunk.Abdominal._LAYER_.BaseSegPosterior.VolumePoints.Right.nn01.sRel[0]-
  Main.HumanModel.BodyModel.Trunk.Abdominal._LAYER_.BaseSegAnterior.VolumePoints.Left.nn06.sRel[0],
  Main.HumanModel.BodyModel.Trunk.Abdominal._LAYER_.BaseSegAnterior.VolumePoints.Left.nn06.sRel[1],
  Main.HumanModel.BodyModel.Trunk.Abdominal._LAYER_.BaseSegAnterior.VolumePoints.Left.nn06.sRel[2],
},
  {2*Main.HumanModel.BodyModel.Trunk.Abdominal._LAYER_.BaseSegPosterior.VolumePoints.Right.nn01.sRel[0]-
  Main.HumanModel.BodyModel.Trunk.Abdominal._LAYER_.BaseSegAnterior.VolumePoints.Left.nn05.sRel[0],
  Main.HumanModel.BodyModel.Trunk.Abdominal._LAYER_.BaseSegAnterior.VolumePoints.Left.nn05.sRel[1],
  Main.HumanModel.BodyModel.Trunk.Abdominal._LAYER_.BaseSegAnterior.VolumePoints.Left.nn05.sRel[2],
},
} ;

AnyRefNodeGroup FrontNodes = {
NodeAmount =16;
Node_sRels = .FrontNodes_sRels;
};
AnyRefNodeGroup FrontNodes_mirror = {
NodeAmount =16;
Node_sRels = .FrontNodes_mirror_sRels;
};


AnySurfEllipsoidFit mesh3 =
{
  viewRefFrame.Visible = Off;
  viewNodes.Visible = Off;
  viewSurface.Visible = On;
  FixedAxes = On;
  //AxisSymmetry = Off;
  //Spherical = Off;
  Axis = y;

//  AnyFloat Center  = mean(AllPoints');
AnyFloat ExtraPoints =reshape(arrcat(
0.5*(Main.HumanModel.BodyModel.Trunk.Abdominal._LAYER_.BaseSegPosterior.VolumePoints.Right.nn01.sRel+
Main.HumanModel.BodyModel.Trunk.Abdominal._LAYER_.BaseSegPosterior.VolumePoints.Left.nn01.sRel)+
{0,0.03,0},
0.5*(Main.HumanModel.BodyModel.Trunk.Abdominal._LAYER_.BaseSegPosterior.VolumePoints.Right.nn01.sRel+
Main.HumanModel.BodyModel.Trunk.Abdominal._LAYER_.BaseSegPosterior.VolumePoints.Left.nn01.sRel)+
{0,-0.03,0}),{2,3});
//  Points=arrcat(.anterior_l_mirror.Node_sRels,
//  .anterior_r_mirror.Node_sRels,
//  .anterior_l.Node_sRels,
//  .anterior_r.Node_sRels,
//  ExtraPoints);
       Points = arrcat( .FrontNodes_mirror.Node_sRels, .FrontNodes.Node_sRels, ExtraPoints );

};

  AnyDrawPointCloud drw = {Points=.mesh3.Points; PointStyle.Size=0.01; Points3D = On;};


AnyRefNode  Right ={
  AnyRefNode Center  = {sRel=..ScaleFunction(.....Data.unscaled.ModelParameters.Abdominal._LAYER_.AbdominalCavityPoints.Right.EllipsoidCalculation.Cal.Center);};
  AnyRefNode EP1  = {sRel=..ScaleFunction(.....Data.unscaled.ModelParameters.Abdominal._LAYER_.AbdominalCavityPoints.Right.EllipsoidCalculation.Cal.Point1);};
  AnyRefNode EP3  = {sRel=..ScaleFunction(.....Data.unscaled.ModelParameters.Abdominal._LAYER_.AbdominalCavityPoints.Right.EllipsoidCalculation.Cal.Point3);};

  AnyRefNode ECenterSideEllipsoid  = {sRel=..ScaleFunction(.....Data.unscaled.ModelParameters.Abdominal._LAYER_.AbdominalCavityPoints.Right.EllipsoidCalculation.Cal.CenterSideEllipsoid);};
  AnyRefNode ECalculatedPoint0  = {sRel=..ScaleFunction(.....Data.unscaled.ModelParameters.Abdominal._LAYER_.AbdominalCavityPoints.Right.EllipsoidCalculation.Cal.CalculatedPoint0);};
  AnyRefNode ECalculatedPoint1  = {sRel=..ScaleFunction(.....Data.unscaled.ModelParameters.Abdominal._LAYER_.AbdominalCavityPoints.Right.EllipsoidCalculation.Cal.CalculatedPoint1);};

  AnySurfEllipsoid mesh = {
    sRel =  .ECenterSideEllipsoid.sRel;
    ARel = RotMat(sRel,.ECalculatedPoint1.sRel,.ECalculatedPoint0.sRel);

    // AnyDrawRefFrame drw ={};
    AnyFloat  R1 = 0.5*vnorm(.EP1.sRel-.EP3.sRel);
    AnyFloat R3 = vnorm(.ECalculatedPoint0.sRel-.ECenterSideEllipsoid.sRel);

    Radius   ={R1,R3,(R1+R3)/4};
//    viewSurface ={
//      RGB={0,1,0};
//      Visible =On;
//    };
  };

  AnySurfEllipsoid mesh2 = {
    sRel =  .ECenterSideEllipsoid.sRel+ {-0.05,0,0.02};
    ARel = .mesh.ARel * RotMat (-pi/4, z);

    // AnyDrawRefFrame drw ={};
    AnyFloat  R1 = 0.5*vnorm(.EP1.sRel-.EP3.sRel);
    AnyFloat R3 = vnorm(.ECalculatedPoint0.sRel-.ECenterSideEllipsoid.sRel);

    Radius   ={R1,R3,(R1+R3)/4};
    //    viewSurface ={
    //      RGB={0,1,0};
    //      Visible =On;
    //    };
  };

//    AnyFloat FrontNodes_sRels = {
//       Main.HumanModel.BodyModel.Trunk.Abdominal._LAYER_.BaseSegAnterior.VolumePoints.Right.nn12.sRel,
//       Main.HumanModel.BodyModel.Trunk.Abdominal._LAYER_.BaseSegAnterior.VolumePoints.Right.nn11.sRel,
//       Main.HumanModel.BodyModel.Trunk.Abdominal._LAYER_.BaseSegAnterior.VolumePoints.Right.nn10.sRel,
//       Main.HumanModel.BodyModel.Trunk.Abdominal._LAYER_.BaseSegAnterior.VolumePoints.Right.nn09.sRel,
//       Main.HumanModel.BodyModel.Trunk.Abdominal._LAYER_.BaseSegAnterior.VolumePoints.Right.nn08.sRel,
//       Main.HumanModel.BodyModel.Trunk.Abdominal._LAYER_.BaseSegAnterior.VolumePoints.Right.nn07.sRel,
//       Main.HumanModel.BodyModel.Trunk.Abdominal._LAYER_.BaseSegAnterior.VolumePoints.Right.nn06.sRel,
//       Main.HumanModel.BodyModel.Trunk.Abdominal._LAYER_.BaseSegAnterior.VolumePoints.Right.nn05.sRel,
//
//       Main.HumanModel.BodyModel.Trunk.Abdominal._LAYER_.BaseSegAnterior.VolumePoints.Left.nn12.sRel,
//       Main.HumanModel.BodyModel.Trunk.Abdominal._LAYER_.BaseSegAnterior.VolumePoints.Left.nn11.sRel,
//       Main.HumanModel.BodyModel.Trunk.Abdominal._LAYER_.BaseSegAnterior.VolumePoints.Left.nn10.sRel,
//       Main.HumanModel.BodyModel.Trunk.Abdominal._LAYER_.BaseSegAnterior.VolumePoints.Left.nn09.sRel,
//       Main.HumanModel.BodyModel.Trunk.Abdominal._LAYER_.BaseSegAnterior.VolumePoints.Left.nn08.sRel,
//       Main.HumanModel.BodyModel.Trunk.Abdominal._LAYER_.BaseSegAnterior.VolumePoints.Left.nn07.sRel,
//       Main.HumanModel.BodyModel.Trunk.Abdominal._LAYER_.BaseSegAnterior.VolumePoints.Left.nn06.sRel,
//       Main.HumanModel.BodyModel.Trunk.Abdominal._LAYER_.BaseSegAnterior.VolumePoints.Left.nn05.sRel,
//     } ;

//  AnySurfEllipsoidFit mesh3_posterior =
//{
//  viewRefFrame.Visible = Off;
//  viewNodes.Visible = Off;
//  viewSurface.Visible = On;
//  //FixedAxes = Off;
//  AxisSymmetry = On;
//  //Spherical = Off;
//  Axis = y;
//  AnyFloat AllPoints = arrcat(
//  ) ;
//  AnyFloat Center  = mean(AllPoints');
//  AnyFloat ExtraPoints =reshape(arrcat(Center+{0,0.03,0},Center+{0,-0.03,0}),{2,3});
//  Points=arrcat(AllPoints,ExtraPoints);
//};


};


AnyRefNode  Left ={
  AnyRefNode Center  = {sRel=..ScaleFunction(.....Data.unscaled.ModelParameters.Abdominal._LAYER_.AbdominalCavityPoints.Left.EllipsoidCalculation.Cal.Center);};
  AnyRefNode EP1  = {sRel=..ScaleFunction(.....Data.unscaled.ModelParameters.Abdominal._LAYER_.AbdominalCavityPoints.Left.EllipsoidCalculation.Cal.Point1);};
  AnyRefNode EP3  = {sRel=..ScaleFunction(.....Data.unscaled.ModelParameters.Abdominal._LAYER_.AbdominalCavityPoints.Left.EllipsoidCalculation.Cal.Point3);};

  AnyRefNode ECenterSideEllipsoid  = {sRel=..ScaleFunction(.....Data.unscaled.ModelParameters.Abdominal._LAYER_.AbdominalCavityPoints.Left.EllipsoidCalculation.Cal.CenterSideEllipsoid);};
  AnyRefNode ECalculatedPoint0  = {sRel=..ScaleFunction(.....Data.unscaled.ModelParameters.Abdominal._LAYER_.AbdominalCavityPoints.Left.EllipsoidCalculation.Cal.CalculatedPoint0);};
  AnyRefNode ECalculatedPoint1  = {sRel=..ScaleFunction(.....Data.unscaled.ModelParameters.Abdominal._LAYER_.AbdominalCavityPoints.Left.EllipsoidCalculation.Cal.CalculatedPoint1);};

  AnySurfEllipsoid mesh = {
    sRel =  .ECenterSideEllipsoid.sRel;
    ARel = RotMat(sRel,.ECalculatedPoint1.sRel,.ECalculatedPoint0.sRel);

    // AnyDrawRefFrame drw ={};
    AnyFloat  R1 = 0.5*vnorm(.EP1.sRel-.EP3.sRel);
    AnyFloat R3 = vnorm(.ECalculatedPoint0.sRel-.ECenterSideEllipsoid.sRel);

    Radius   ={R1,R3,(R1+R3)/4};
//    viewSurface ={
//      RGB={0,1,0};
//      Visible =On;
//    };
  };
};


#endif


#if MESH_TYPE == "QUAD"

AnySurfTriCylMesh mesh = {

  viewSurface ={es
    Visible =On;
    AnyStyleDrawMaterial1 mat ={
      EnableWireframe  =On;
    };
  };

  AnyDrawSurfBase drw ={Opacity =0.9;};

  AnyFloat center_top ={0.03,0.015,0}+mean(arrcat(....Data.unscaled.ModelParameters.Abdominal.AllLayers.AbdominalPoints.calculations.Right._LAYER_.inner_points[0],
  flip(....Data.unscaled.ModelParameters.Abdominal.AllLayers.AbdominalPoints.calculations.Left._LAYER_.inner_points[0],0))');

  AnyFloat center_top_rep=   reshape(repmat( MeshSize*2,center_top ),{MeshSize*2,3});

  AnyFloat center_bottom ={0.03,-0.015,0}+mean(arrcat(....Data.unscaled.ModelParameters.Abdominal.AllLayers.AbdominalPoints.calculations.Right._LAYER_.inner_points[10],
  flip(....Data.unscaled.ModelParameters.Abdominal.AllLayers.AbdominalPoints.calculations.Left._LAYER_.inner_points[10],0))');
  AnyFloat center_bottom_rep=   reshape(repmat( MeshSize*2,center_bottom ),{MeshSize*2,3});

  AnyFloat TopRing = 0.5*(      reshape(repmat( MeshSize*2,center_top ),{MeshSize*2,3})+
  arrcat(....Data.unscaled.ModelParameters.Abdominal.AllLayers.AbdominalPoints.calculations.Right._LAYER_.inner_points[0],
  flip(....Data.unscaled.ModelParameters.Abdominal.AllLayers.AbdominalPoints.calculations.Left._LAYER_.inner_points[0],0)));

  AnyFloat BottomRing = 0.5*(     reshape(repmat( MeshSize*2,center_bottom ),{MeshSize*2,3})+
  arrcat(....Data.unscaled.ModelParameters.Abdominal.AllLayers.AbdominalPoints.calculations.Right._LAYER_.inner_points[10],
  flip(....Data.unscaled.ModelParameters.Abdominal.AllLayers.AbdominalPoints.calculations.Left._LAYER_.inner_points[10],0)));

  AnyFloat SmallTopRing = (  0.8*    reshape(repmat( MeshSize*2,center_top ),{MeshSize*2,3})+ 0.2*
  arrcat(....Data.unscaled.ModelParameters.Abdominal.AllLayers.AbdominalPoints.calculations.Right._LAYER_.inner_points[0],
  flip(....Data.unscaled.ModelParameters.Abdominal.AllLayers.AbdominalPoints.calculations.Left._LAYER_.inner_points[0],0)));

  AnyFloat SmallBottomRing = ( 0.8*    reshape(repmat( MeshSize*2,center_bottom ),{MeshSize*2,3})+0.2*
  arrcat(....Data.unscaled.ModelParameters.Abdominal.AllLayers.AbdominalPoints.calculations.Right._LAYER_.inner_points[10],
  flip(....Data.unscaled.ModelParameters.Abdominal.AllLayers.AbdominalPoints.calculations.Left._LAYER_.inner_points[10],0)));


  AnyInt MeshSize=....Data.unscaled.ModelParameters.Abdominal.AllLayers.AbdominalPoints.calculations.Right._LAYER_.n_points;
  Points =.ScaleFunction (
  arrcat(
  arrcat(
  //reshape(repmat( MeshSize*2,center_top ),{MeshSize*2,3}),
  SmallTopRing,
  TopRing,
  arrcat(....Data.unscaled.ModelParameters.Abdominal.AllLayers.AbdominalPoints.calculations.Right._LAYER_.inner_points[0],
  flip(....Data.unscaled.ModelParameters.Abdominal.AllLayers.AbdominalPoints.calculations.Left._LAYER_.inner_points[0],0)),
  arrcat(....Data.unscaled.ModelParameters.Abdominal.AllLayers.AbdominalPoints.calculations.Right._LAYER_.inner_points[1],
  flip(....Data.unscaled.ModelParameters.Abdominal.AllLayers.AbdominalPoints.calculations.Left._LAYER_.inner_points[1],0)),
  arrcat(....Data.unscaled.ModelParameters.Abdominal.AllLayers.AbdominalPoints.calculations.Right._LAYER_.inner_points[2],
  flip(....Data.unscaled.ModelParameters.Abdominal.AllLayers.AbdominalPoints.calculations.Left._LAYER_.inner_points[2],0)),
  arrcat(....Data.unscaled.ModelParameters.Abdominal.AllLayers.AbdominalPoints.calculations.Right._LAYER_.inner_points[3],
  flip(....Data.unscaled.ModelParameters.Abdominal.AllLayers.AbdominalPoints.calculations.Left._LAYER_.inner_points[3],0)),
  arrcat(....Data.unscaled.ModelParameters.Abdominal.AllLayers.AbdominalPoints.calculations.Right._LAYER_.inner_points[4],
  flip(....Data.unscaled.ModelParameters.Abdominal.AllLayers.AbdominalPoints.calculations.Left._LAYER_.inner_points[4],0))
  )
  ,
  arrcat(
  arrcat(....Data.unscaled.ModelParameters.Abdominal.AllLayers.AbdominalPoints.calculations.Right._LAYER_.inner_points[5],
  flip(....Data.unscaled.ModelParameters.Abdominal.AllLayers.AbdominalPoints.calculations.Left._LAYER_.inner_points[5],0)),
  arrcat(....Data.unscaled.ModelParameters.Abdominal.AllLayers.AbdominalPoints.calculations.Right._LAYER_.inner_points[6],
  flip(....Data.unscaled.ModelParameters.Abdominal.AllLayers.AbdominalPoints.calculations.Left._LAYER_.inner_points[6],0)),
  arrcat(....Data.unscaled.ModelParameters.Abdominal.AllLayers.AbdominalPoints.calculations.Right._LAYER_.inner_points[7],
  flip(....Data.unscaled.ModelParameters.Abdominal.AllLayers.AbdominalPoints.calculations.Left._LAYER_.inner_points[7],0)),
  arrcat(....Data.unscaled.ModelParameters.Abdominal.AllLayers.AbdominalPoints.calculations.Right._LAYER_.inner_points[8],
  flip(....Data.unscaled.ModelParameters.Abdominal.AllLayers.AbdominalPoints.calculations.Left._LAYER_.inner_points[8],0)),
  arrcat(....Data.unscaled.ModelParameters.Abdominal.AllLayers.AbdominalPoints.calculations.Right._LAYER_.inner_points[9],
  flip(....Data.unscaled.ModelParameters.Abdominal.AllLayers.AbdominalPoints.calculations.Left._LAYER_.inner_points[9],0)),
  arrcat(....Data.unscaled.ModelParameters.Abdominal.AllLayers.AbdominalPoints.calculations.Right._LAYER_.inner_points[10],
  flip(....Data.unscaled.ModelParameters.Abdominal.AllLayers.AbdominalPoints.calculations.Left._LAYER_.inner_points[10],0)
  ),
  BottomRing,
  SmallBottomRing
  //reshape(repmat( MeshSize*2,center_bottom ),{MeshSize*2,3})
  ),
  )
  ) ;
  CylMesh = {
    iarr(14*2*MeshSize,1,15*2*MeshSize-1),
    iarr(13*2*MeshSize,1,14*2*MeshSize-1),
    iarr(12*2*MeshSize,1,13*2*MeshSize-1),
    iarr(11*2*MeshSize,1,12*2*MeshSize-1),
    iarr(10*2*MeshSize,1,11*2*MeshSize-1),
    iarr(9*2*MeshSize,1,10*2*MeshSize-1),
    iarr(8*2*MeshSize,1,9*2*MeshSize-1),
    iarr(7*2*MeshSize,1,8*2*MeshSize-1),
    iarr(6*2*MeshSize,1,7*2*MeshSize-1),
    iarr(5*2*MeshSize,1,6*2*MeshSize-1),
    iarr(4*2*MeshSize,1,5*2*MeshSize-1),
    iarr(3*2*MeshSize,1,4*2*MeshSize-1),
    iarr(2*2*MeshSize,1,3*2*MeshSize-1),
    iarr(1*2*MeshSize,1,2*2*MeshSize-1),
    iarr(0,1,2*MeshSize-1)
  };
};

#endif


//Made for debug to create same mesh as in Quad as a Triangular mesg, created for npoints=39 which can not be altered... this option should be removed eventually
#if MESH_TYPE== "TRI"
AnySurfTriMesh mesh = {

  viewSurface ={
    Visible =On;
    AnyStyleDrawMaterial1 mat ={
      EnableWireframe  =On;
    };
  };

  AnyDrawSurfBase drw ={Opacity =0.9;};

  AnyFloat center_top ={0.03,0.015,0}+mean(arrcat(....Data.unscaled.ModelParameters.Abdominal.AllLayers.AbdominalPoints.calculations.Right._LAYER_.inner_points[0],
  flip(....Data.unscaled.ModelParameters.Abdominal.AllLayers.AbdominalPoints.calculations.Left._LAYER_.inner_points[0],0))');
  AnyFloat center_top_rep=   reshape(repmat( MeshSize*2,center_top ),{MeshSize*2,3});

  AnyFloat center_bottom ={0.03,-0.015,0}+mean(arrcat(....Data.unscaled.ModelParameters.Abdominal.AllLayers.AbdominalPoints.calculations.Right._LAYER_.inner_points[10],
  flip(....Data.unscaled.ModelParameters.Abdominal.AllLayers.AbdominalPoints.calculations.Left._LAYER_.inner_points[10],0))');
  AnyFloat center_bottom_rep=   reshape(repmat( MeshSize*2,center_bottom ),{MeshSize*2,3});

  AnyFloat TopRing = (  0.25*    reshape(repmat( MeshSize*2,center_top ),{MeshSize*2,3})+ 0.75*
  arrcat(....Data.unscaled.ModelParameters.Abdominal.AllLayers.AbdominalPoints.calculations.Right._LAYER_.inner_points[0],
  flip(....Data.unscaled.ModelParameters.Abdominal.AllLayers.AbdominalPoints.calculations.Left._LAYER_.inner_points[0],0)));

  AnyFloat BottomRing = ( 0.25*    reshape(repmat( MeshSize*2,center_bottom ),{MeshSize*2,3})+0.75*
  arrcat(....Data.unscaled.ModelParameters.Abdominal.AllLayers.AbdominalPoints.calculations.Right._LAYER_.inner_points[10],
  flip(....Data.unscaled.ModelParameters.Abdominal.AllLayers.AbdominalPoints.calculations.Left._LAYER_.inner_points[10],0)));


  AnyInt MeshSize=....Data.unscaled.ModelParameters.Abdominal.AllLayers.AbdominalPoints.calculations.Right._LAYER_.n_points;
  Points =.ScaleFunction (
  arrcat(
  arrcat(
  reshape(repmat( MeshSize*2,center_top ),{MeshSize*2,3}),
  TopRing,
  arrcat(....Data.unscaled.ModelParameters.Abdominal.AllLayers.AbdominalPoints.calculations.Right._LAYER_.inner_points[0],
  flip(....Data.unscaled.ModelParameters.Abdominal.AllLayers.AbdominalPoints.calculations.Left._LAYER_.inner_points[0],0)),
  arrcat(....Data.unscaled.ModelParameters.Abdominal.AllLayers.AbdominalPoints.calculations.Right._LAYER_.inner_points[1],
  flip(....Data.unscaled.ModelParameters.Abdominal.AllLayers.AbdominalPoints.calculations.Left._LAYER_.inner_points[1],0)),
  arrcat(....Data.unscaled.ModelParameters.Abdominal.AllLayers.AbdominalPoints.calculations.Right._LAYER_.inner_points[2],
  flip(....Data.unscaled.ModelParameters.Abdominal.AllLayers.AbdominalPoints.calculations.Left._LAYER_.inner_points[2],0)),
  arrcat(....Data.unscaled.ModelParameters.Abdominal.AllLayers.AbdominalPoints.calculations.Right._LAYER_.inner_points[3],
  flip(....Data.unscaled.ModelParameters.Abdominal.AllLayers.AbdominalPoints.calculations.Left._LAYER_.inner_points[3],0)),
  arrcat(....Data.unscaled.ModelParameters.Abdominal.AllLayers.AbdominalPoints.calculations.Right._LAYER_.inner_points[4],
  flip(....Data.unscaled.ModelParameters.Abdominal.AllLayers.AbdominalPoints.calculations.Left._LAYER_.inner_points[4],0))
  )
  ,
  arrcat(
  arrcat(....Data.unscaled.ModelParameters.Abdominal.AllLayers.AbdominalPoints.calculations.Right._LAYER_.inner_points[5],
  flip(....Data.unscaled.ModelParameters.Abdominal.AllLayers.AbdominalPoints.calculations.Left._LAYER_.inner_points[5],0)),
  arrcat(....Data.unscaled.ModelParameters.Abdominal.AllLayers.AbdominalPoints.calculations.Right._LAYER_.inner_points[6],
  flip(....Data.unscaled.ModelParameters.Abdominal.AllLayers.AbdominalPoints.calculations.Left._LAYER_.inner_points[6],0)),
  arrcat(....Data.unscaled.ModelParameters.Abdominal.AllLayers.AbdominalPoints.calculations.Right._LAYER_.inner_points[7],
  flip(....Data.unscaled.ModelParameters.Abdominal.AllLayers.AbdominalPoints.calculations.Left._LAYER_.inner_points[7],0)),
  arrcat(....Data.unscaled.ModelParameters.Abdominal.AllLayers.AbdominalPoints.calculations.Right._LAYER_.inner_points[8],
  flip(....Data.unscaled.ModelParameters.Abdominal.AllLayers.AbdominalPoints.calculations.Left._LAYER_.inner_points[8],0)),
  arrcat(....Data.unscaled.ModelParameters.Abdominal.AllLayers.AbdominalPoints.calculations.Right._LAYER_.inner_points[9],
  flip(....Data.unscaled.ModelParameters.Abdominal.AllLayers.AbdominalPoints.calculations.Left._LAYER_.inner_points[9],0)),
  arrcat(....Data.unscaled.ModelParameters.Abdominal.AllLayers.AbdominalPoints.calculations.Right._LAYER_.inner_points[10],
  flip(....Data.unscaled.ModelParameters.Abdominal.AllLayers.AbdominalPoints.calculations.Left._LAYER_.inner_points[10],0)
  ),
  BottomRing,
  reshape(repmat( MeshSize*2,center_bottom ),{MeshSize*2,3})
  )
  )
  ) ;


  Triangles =
  {


    //          {1092, 1093, 1015},
    //{1093, 1094, 1016},
    //{1094, 1095, 1017},
    //{1095, 1096, 1018},
    //{1096, 1097, 1019},
    //{1097, 1098, 1020},
    //{1098, 1099, 1021},
    //{1099, 1100, 1022},
    //{1100, 1101, 1023},
    //{1101, 1102, 1024},
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    //{1169, 1092, 1014},
    {1014, 1015, 937},
    {1015, 1016, 938},
    {1016, 1017, 939},
    {1017, 1018, 940},
    {1018, 1019, 941},
    {1019, 1020, 942},
    {1020, 1021, 943},
    {1021, 1022, 944},
    {1022, 1023, 945},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};


};
#endif
