#if BM_TRUNK_MUSCLES

#if BM_TRUNK_CAVITY_MODEL == _CAVITY_MODEL_VOLUME_
MuscleGroup Diaphragm = {

  AnyMuscleShortestPath DiaphragmL1_1 = {
    AnyMuscleModel &MusMdl = ....MuscleModels.Left.Diaphragm.DiaphragmL1_1;
    AnyRefNode &Org = ....Segments.L1Seg.DiaphragmL1_1NodeL;
    AnyRefNode &Ins = ....Abdominal.Diaphragm.CavitySegSuperoanterior.Layer_T10.Left.DiaphragmL1_1Node;
    viewMuscle = {#include "../DrawSettings/MusDrawSettings.any"};
    viewForce.Visible ??= Off;
    AnyParamSurf &Srf = ....Abdominal.Diaphragm.CavitySegSuperoposterior.Layer_T10.Left.DiaphragmL1_1;
    SPLine = {
      StringMesh=35;
      AnyMatrix InitWrapPos = {transf3D({0,-.Srf.Radius[0],0}, &.Srf)};
      InitWrapPosVecArr = {&InitWrapPos};
    };
  };

  AnyMuscleShortestPath DiaphragmL1_2 = {
    AnyMuscleModel &MusMdl = ....MuscleModels.Left.Diaphragm.DiaphragmL1_2;
    AnyRefNode &Org = ....Segments.L1Seg.DiaphragmL1_2NodeL;
    AnyRefNode &Ins = ....Abdominal.Diaphragm.CavitySegSuperoanterior.Layer_T10.Left.DiaphragmL1_2Node;
    viewMuscle = {#include "../DrawSettings/MusDrawSettings.any"};
    viewForce.Visible ??= Off;
    AnyParamSurf &Srf = ....Abdominal.Diaphragm.CavitySegSuperoposterior.Layer_T10.Left.DiaphragmL1_2;
    SPLine = {
      StringMesh=35;
      AnyMatrix InitWrapPos = {transf3D({0,-.Srf.Radius[0],0}, &.Srf)};
      InitWrapPosVecArr = {&InitWrapPos};
    };
  };

  AnyMuscleShortestPath DiaphragmL2_1 = {
    AnyMuscleModel &MusMdl = ....MuscleModels.Left.Diaphragm.DiaphragmL2_1;
    AnyRefNode &Org = ....Segments.L2Seg.DiaphragmL2_1NodeL;
    AnyRefNode &Ins = ....Abdominal.Diaphragm.CavitySegSuperoanterior.Layer_T10.Left.DiaphragmL2_1Node;
    viewMuscle = {#include "../DrawSettings/MusDrawSettings.any"};
    viewForce.Visible ??= Off;
    AnyParamSurf &Srf = ....Abdominal.Diaphragm.CavitySegSuperoposterior.Layer_T10.Left.DiaphragmL2_1;
    SPLine = {
      StringMesh=35;
      AnyMatrix InitWrapPos = {transf3D({0,-.Srf.Radius[0],0}, &.Srf)};
      InitWrapPosVecArr = {&InitWrapPos};
    };
  };

  AnyMuscleShortestPath DiaphragmL2_2 = {
    AnyMuscleModel &MusMdl = ....MuscleModels.Left.Diaphragm.DiaphragmL2_2;
    AnyRefNode &Org = ....Segments.L2Seg.DiaphragmL2_2NodeL;
    AnyRefNode &Ins = ....Abdominal.Diaphragm.CavitySegSuperoanterior.Layer_T10.Left.DiaphragmL2_2Node;
    viewMuscle = {#include "../DrawSettings/MusDrawSettings.any"};
    viewForce.Visible ??= Off;
    AnyParamSurf &Srf = ....Abdominal.Diaphragm.CavitySegSuperoposterior.Layer_T10.Left.DiaphragmL2_2;
    SPLine = {
      StringMesh=35;
      AnyMatrix InitWrapPos = {transf3D({0,-.Srf.Radius[0],0}, &.Srf)};
      InitWrapPosVecArr = {&InitWrapPos};
    };
  };
  AnyMuscleShortestPath DiaphragmL1_3 = {
    AnyMuscleModel &MusMdl = ....MuscleModels.Left.Diaphragm.DiaphragmL1_3;
    AnyRefNode &Org = ....Segments.L1Seg.DiaphragmL1_3NodeL;
    AnyRefNode &Ins = ....Abdominal.Diaphragm.CavitySegSuperoanterior.Layer_T10.Left.DiaphragmL1_3Node;
    viewMuscle = {#include "../DrawSettings/MusDrawSettings.any"};
    viewForce.Visible ??= Off;
    AnyParamSurf &Srf = ....Abdominal.Diaphragm.CavitySegSuperoposterior.Layer_T10.Left.DiaphragmL1_3;
    SPLine = {
      StringMesh=35;
      AnyMatrix InitWrapPos = {transf3D({0,-.Srf.Radius[0],0}, &.Srf)};
      InitWrapPosVecArr = {&InitWrapPos};
    };
  };
  AnyMuscleShortestPath DiaphragmR12_2 = {
    AnyMuscleModel &MusMdl = ....MuscleModels.Left.Diaphragm.DiaphragmR12_2;
    AnyRefNode &Org = ....Segments.Left.R12Seg.DiaphragmR12_2NodeL;
    AnyRefNode &Ins = ....Abdominal.Diaphragm.CavitySegSuperoanterior.Layer_T10.Left.DiaphragmR12_2Node;
    viewMuscle = {#include "../DrawSettings/MusDrawSettings.any"};
    viewForce.Visible ??= Off;
    AnyParamSurf &Srf = ....Abdominal.Diaphragm.CavitySegSuperoposterior.Layer_T10.Left.DiaphragmR12_2;
    SPLine = {
      StringMesh=35;
      AnyMatrix InitWrapPos = {transf3D({0,-.Srf.Radius[0],0}, &.Srf)};
      InitWrapPosVecArr = {&InitWrapPos};
    };
  };
  AnyMuscleShortestPath DiaphragmR12_1 = {
    AnyMuscleModel &MusMdl = ....MuscleModels.Left.Diaphragm.DiaphragmR12_1;
    AnyRefNode &Org = ....Segments.Left.R12Seg.DiaphragmR12_1NodeL;
    AnyRefNode &Ins = ....Abdominal.Diaphragm.CavitySegSuperoanterior.Layer_T10.Left.DiaphragmR12_1Node;
    viewMuscle = {#include "../DrawSettings/MusDrawSettings.any"};
    viewForce.Visible ??= Off;
    AnyParamSurf &Srf = ....Abdominal.Diaphragm.CavitySegSuperoposterior.Layer_T10.Left.DiaphragmR12_1;
    SPLine = {
      StringMesh=35;
      AnyMatrix InitWrapPos = {transf3D({0,-.Srf.Radius[0],0}, &.Srf)};
      InitWrapPosVecArr = {&InitWrapPos};
    };
  };
  AnyMuscleShortestPath DiaphragmR11_3 = {
    AnyMuscleModel &MusMdl = ....MuscleModels.Left.Diaphragm.DiaphragmR11_3;
    AnyRefNode &Org = ....Segments.Left.R11Seg.DiaphragmR11_3NodeL;
    AnyRefNode &Ins = ....Abdominal.Diaphragm.CavitySegSuperoanterior.Layer_T10.Left.DiaphragmR11_3Node;
    viewMuscle = {#include "../DrawSettings/MusDrawSettings.any"};
    viewForce.Visible ??= Off;
    AnyParamSurf &Srf = ....Abdominal.Diaphragm.CavitySegSuperoanterior.Layer_T10.Left.DiaphragmR11_3;
    SPLine = {
      StringMesh=35;
      AnyMatrix InitWrapPos = {transf3D({0,-.Srf.Radius[0],0}, &.Srf)};
      InitWrapPosVecArr = {&InitWrapPos};
    };
  };
  AnyMuscleShortestPath DiaphragmR11_2 = {
    AnyMuscleModel &MusMdl = ....MuscleModels.Left.Diaphragm.DiaphragmR11_2;
    AnyRefNode &Org = ....Segments.Left.R11Seg.DiaphragmR11_2NodeL;
    AnyRefNode &Ins = ....Abdominal.Diaphragm.CavitySegSuperoanterior.Layer_T10.Left.DiaphragmR11_2Node;
    viewMuscle = {#include "../DrawSettings/MusDrawSettings.any"};
    viewForce.Visible ??= Off;
    AnyParamSurf &Srf = ....Abdominal.Diaphragm.CavitySegSuperoanterior.Layer_T10.Left.DiaphragmR11_2;
    SPLine = {
      StringMesh=35;
      AnyMatrix InitWrapPos = {transf3D({0,-.Srf.Radius[0],0}, &.Srf)};
      InitWrapPosVecArr = {&InitWrapPos};
    };
  };
  AnyMuscleShortestPath DiaphragmR11_1 = {
    AnyMuscleModel &MusMdl = ....MuscleModels.Left.Diaphragm.DiaphragmR11_1;
    AnyRefNode &Org = ....Segments.Left.R11Seg.DiaphragmR11_1NodeL;
    AnyRefNode &Ins = ....Abdominal.Diaphragm.CavitySegSuperoanterior.Layer_T10.Left.DiaphragmR11_1Node;
    viewMuscle = {#include "../DrawSettings/MusDrawSettings.any"};
    viewForce.Visible ??= Off;
    AnyParamSurf &Srf = ....Abdominal.Diaphragm.CavitySegSuperoanterior.Layer_T10.Left.DiaphragmR11_1;
    SPLine = {
      StringMesh=35;
      AnyMatrix InitWrapPos = {transf3D({0,-.Srf.Radius[0],0}, &.Srf)};
      InitWrapPosVecArr = {&InitWrapPos};
    };
  };
  AnyMuscleShortestPath DiaphragmR10_1 = {
    AnyMuscleModel &MusMdl = ....MuscleModels.Left.Diaphragm.DiaphragmR10_1;
    AnyRefNode &Org = ....Segments.Left.R10Seg.DiaphragmR10_1NodeL;
    AnyRefNode &Ins = ....Abdominal.Diaphragm.CavitySegSuperoanterior.Layer_T10.Left.DiaphragmR10_1Node;
    viewMuscle = {#include "../DrawSettings/MusDrawSettings.any"};
    viewForce.Visible ??= Off;
    AnyParamSurf &Srf = ....Abdominal.Diaphragm.CavitySegSuperoanterior.Layer_T10.Left.DiaphragmR10_1;
    SPLine = {
      StringMesh=35;
      AnyMatrix InitWrapPos = {transf3D({0,-.Srf.Radius[0],0}, &.Srf)};
      InitWrapPosVecArr = {&InitWrapPos};
    };
  };
  AnyMuscleShortestPath DiaphragmR10_2 = {
    AnyMuscleModel &MusMdl = ....MuscleModels.Left.Diaphragm.DiaphragmR10_2;
    AnyRefNode &Org = ....Segments.Left.R10Seg.DiaphragmR10_2NodeL;
    AnyRefNode &Ins = ....Abdominal.Diaphragm.CavitySegSuperoanterior.Layer_T10.Left.DiaphragmR10_2Node;
    viewMuscle = {#include "../DrawSettings/MusDrawSettings.any"};
    viewForce.Visible ??= Off;
    AnyParamSurf &Srf = ....Abdominal.Diaphragm.CavitySegSuperoanterior.Layer_T10.Left.DiaphragmR10_2;
    SPLine = {
      StringMesh=35;
      AnyMatrix InitWrapPos = {transf3D({0,-.Srf.Radius[0],0}, &.Srf)};
      InitWrapPosVecArr = {&InitWrapPos};
    };
  };
  AnyMuscleShortestPath DiaphragmR10_3 = {
    AnyMuscleModel &MusMdl = ....MuscleModels.Left.Diaphragm.DiaphragmR10_3;
    AnyRefNode &Org = ....Segments.Left.R10Seg.DiaphragmR10_3NodeL;
    AnyRefNode &Ins = ....Abdominal.Diaphragm.CavitySegSuperoanterior.Layer_T10.Left.DiaphragmR10_3Node;
    viewMuscle = {#include "../DrawSettings/MusDrawSettings.any"};
    viewForce.Visible ??= Off;
    AnyParamSurf &Srf = ....Abdominal.Diaphragm.CavitySegSuperoanterior.Layer_T10.Left.DiaphragmR10_3;
    SPLine = {
      StringMesh=35;
      AnyMatrix InitWrapPos = {transf3D({0,-.Srf.Radius[0],0}, &.Srf)};
      InitWrapPosVecArr = {&InitWrapPos};
    };
  };
  AnyMuscleShortestPath DiaphragmCC_7 = {
    AnyMuscleModel &MusMdl = ....MuscleModels.Left.Diaphragm.DiaphragmCC_7;
    #if BM_TRUNK_THORACIC_STERNUM_TOPOLOGY == 4
    AnyRefNode &Org = ....Segments.Left.CostalCartilageSeg.DiaphragmCC_7L;
    #else
    AnyRefNode &Org = ....Segments.SternalBodySeg.DiaphragmCC_7L;
    #endif
    AnyRefNode &Ins = ....Abdominal.Diaphragm.CavitySegSuperoanterior.Layer_T10.Left.DiaphragmCC_7Node;
    viewMuscle = {#include "../DrawSettings/MusDrawSettings.any"};
    viewForce.Visible ??= Off;
    AnyParamSurf &Srf = ....Abdominal.Diaphragm.CavitySegSuperoanterior.Layer_T10.Left.DiaphragmCC_7;
    SPLine = {
      StringMesh=35;
      AnyMatrix InitWrapPos = {transf3D({0,-.Srf.Radius[0],0}, &.Srf)};
      InitWrapPosVecArr = {&InitWrapPos};
    };
  };
  AnyMuscleShortestPath DiaphragmCC_6 = {
    AnyMuscleModel &MusMdl = ....MuscleModels.Left.Diaphragm.DiaphragmCC_6;
    #if BM_TRUNK_THORACIC_STERNUM_TOPOLOGY == 4
    AnyRefNode &Org = ....Segments.Left.CostalCartilageSeg.DiaphragmCC_6L;
    #else
    AnyRefNode &Org = ....Segments.SternalBodySeg.DiaphragmCC_6L;
    #endif
    AnyRefNode &Ins = ....Abdominal.Diaphragm.CavitySegSuperoanterior.Layer_T10.Left.DiaphragmCC_6Node;
    viewMuscle = {#include "../DrawSettings/MusDrawSettings.any"};
    viewForce.Visible ??= Off;
    AnyParamSurf &Srf = ....Abdominal.Diaphragm.CavitySegSuperoanterior.Layer_T10.Left.DiaphragmCC_6;
    SPLine = {
      StringMesh=35;
      AnyMatrix InitWrapPos = {transf3D({0,-.Srf.Radius[0],0}, &.Srf)};
      InitWrapPosVecArr = {&InitWrapPos};
    };
  };
  AnyMuscleShortestPath DiaphragmCC_5 = {
    AnyMuscleModel &MusMdl = ....MuscleModels.Left.Diaphragm.DiaphragmCC_5;
    #if BM_TRUNK_THORACIC_STERNUM_TOPOLOGY == 4
    AnyRefNode &Org = ....Segments.Left.CostalCartilageSeg.DiaphragmCC_5L;
    #else
    AnyRefNode &Org = ....Segments.SternalBodySeg.DiaphragmCC_5L;
    #endif
    AnyRefNode &Ins = ....Abdominal.Diaphragm.CavitySegSuperoanterior.Layer_T10.Left.DiaphragmCC_5Node;
    viewMuscle = {#include "../DrawSettings/MusDrawSettings.any"};
    viewForce.Visible ??= Off;
    AnyParamSurf &Srf = ....Abdominal.Diaphragm.CavitySegSuperoanterior.Layer_T10.Left.DiaphragmCC_5;
    SPLine = {
      StringMesh=35;
      AnyMatrix InitWrapPos = {transf3D({0,-.Srf.Radius[0],0}, &.Srf)};
      InitWrapPosVecArr = {&InitWrapPos};
    };
  };
  AnyMuscleShortestPath DiaphragmCC_4 = {
    AnyMuscleModel &MusMdl = ....MuscleModels.Left.Diaphragm.DiaphragmCC_4;
    #if BM_TRUNK_THORACIC_STERNUM_TOPOLOGY == 4
    AnyRefNode &Org = ....Segments.Left.CostalCartilageSeg.DiaphragmCC_4L;
    #else
    AnyRefNode &Org = ....Segments.SternalBodySeg.DiaphragmCC_4L;
    #endif
    AnyRefNode &Ins = ....Abdominal.Diaphragm.CavitySegSuperoanterior.Layer_T10.Left.DiaphragmCC_4Node;
    viewMuscle = {#include "../DrawSettings/MusDrawSettings.any"};
    viewForce.Visible ??= Off;
    AnyParamSurf &Srf = ....Abdominal.Diaphragm.CavitySegSuperoanterior.Layer_T10.Left.DiaphragmCC_4;
    SPLine = {
      StringMesh=35;
      AnyMatrix InitWrapPos = {transf3D({0,-.Srf.Radius[0],0}, &.Srf)};
      InitWrapPosVecArr = {&InitWrapPos};
    };
  };
  AnyMuscleShortestPath DiaphragmCC_3 = {
    AnyMuscleModel &MusMdl = ....MuscleModels.Left.Diaphragm.DiaphragmCC_3;
    #if BM_TRUNK_THORACIC_STERNUM_TOPOLOGY == 4
    AnyRefNode &Org = ....Segments.Left.CostalCartilageSeg.DiaphragmCC_3L;
    #else
    AnyRefNode &Org = ....Segments.SternalBodySeg.DiaphragmCC_3L;
    #endif
    AnyRefNode &Ins = ....Abdominal.Diaphragm.CavitySegSuperoanterior.Layer_T10.Left.DiaphragmCC_3Node;
    viewMuscle = {#include "../DrawSettings/MusDrawSettings.any"};
    viewForce.Visible ??= Off;
    AnyParamSurf &Srf = ....Abdominal.Diaphragm.CavitySegSuperoanterior.Layer_T10.Left.DiaphragmCC_3;
    SPLine = {
      StringMesh=35;
      AnyMatrix InitWrapPos = {transf3D({0,-.Srf.Radius[0],0}, &.Srf)};
      InitWrapPosVecArr = {&InitWrapPos};
    };
  };
  AnyMuscleShortestPath DiaphragmCC_2 = {
    AnyMuscleModel &MusMdl = ....MuscleModels.Left.Diaphragm.DiaphragmCC_2;
    #if BM_TRUNK_THORACIC_STERNUM_TOPOLOGY == 4
    AnyRefNode &Org = ....Segments.Left.CostalCartilageSeg.DiaphragmCC_2L;
    #else
    AnyRefNode &Org = ....Segments.SternalBodySeg.DiaphragmCC_2L;
    #endif
    AnyRefNode &Ins = ....Abdominal.Diaphragm.CavitySegSuperoanterior.Layer_T10.Left.DiaphragmCC_2Node;
    viewMuscle = {#include "../DrawSettings/MusDrawSettings.any"};
    viewForce.Visible ??= Off;
    AnyParamSurf &Srf = ....Abdominal.Diaphragm.CavitySegSuperoanterior.Layer_T10.Left.DiaphragmCC_2;
    SPLine = {
      StringMesh=35;
      AnyMatrix InitWrapPos = {transf3D({0,-.Srf.Radius[0],0}, &.Srf)};
      InitWrapPosVecArr = {&InitWrapPos};
    };
  };
  AnyMuscleShortestPath DiaphragmCC_1 = {
    AnyMuscleModel &MusMdl = ....MuscleModels.Left.Diaphragm.DiaphragmCC_1;
    #if BM_TRUNK_THORACIC_STERNUM_TOPOLOGY == 4
    AnyRefNode &Org = ....Segments.Left.CostalCartilageSeg.DiaphragmCC_1L;
    #else
    AnyRefNode &Org = ....Segments.SternalBodySeg.DiaphragmCC_1L;
    #endif
    AnyRefNode &Ins = ....Abdominal.Diaphragm.CavitySegSuperoanterior.Layer_T10.Left.DiaphragmCC_1Node;
    viewMuscle = {#include "../DrawSettings/MusDrawSettings.any"};
    viewForce.Visible ??= Off;
    AnyParamSurf &Srf = ....Abdominal.Diaphragm.CavitySegSuperoanterior.Layer_T10.Left.DiaphragmCC_1;
    SPLine = {
      StringMesh=35;
      AnyMatrix InitWrapPos = {transf3D({0,-.Srf.Radius[0],0}, &.Srf)};
      InitWrapPosVecArr = {&InitWrapPos};
    };
  };

  AnyMuscleShortestPath DiaphragmXiphoid = {
    AnyMuscleModel &MusMdl = ....MuscleModels.Left.Diaphragm.DiaphragmXiphoid;
    AnyRefNode &Org = ....Segments.SternalBodySeg.DiaphragmXiphoidNodeL;
    AnyRefNode &Ins = ....Abdominal.Diaphragm.CavitySegSuperoanterior.Layer_T10.Left.DiaphragmXiphoidNode;
    viewMuscle = {#include "../DrawSettings/MusDrawSettings.any"};
    viewForce.Visible ??= Off;
    AnyParamSurf &Srf = ....Abdominal.Diaphragm.CavitySegSuperoanterior.Layer_T10.Left.DiaphragmXiphoid;
    SPLine = {
      StringMesh=35;
      AnyMatrix InitWrapPos = {transf3D({0,-.Srf.Radius[0],0}, &.Srf)};
      InitWrapPosVecArr = {&InitWrapPos};
    };
  };
};
#endif

// Model needs the Hyoid bone. The hyoid muscles try to stabilize the trachea and play a
// vital part in swallowing and speech.
MuscleGroup Hyoid = {
  AnyMuscleViaPoint LumpedHyoidStC0 = {
    AnyMuscleModel &MusMdl = ....MuscleModels.Left.Hyoid.LumpedHyoidStC0;
    AnyRefNode &Org = ....Segments.SkullSeg.LumpedHyoidT1C0NodeL;
    AnyRefNode &Ins = ....Segments.SternumSeg.LumpedHyoidStC0NodeLIns;
    viewMuscle = {#include "../DrawSettings/MusDrawSettings.any"};
    viewForce.Visible ??= Off;
  };
};

// Iliocostalis Cervicis
AnyFolder IliocostalisCervicis = {
  AnyMuscleViaPoint IliocostalisCervicisR3C4 = {
    AnyMuscleModel &MusMdl = ....MuscleModels.Left.IliocostalisCervicis.IliocostalisCervicisR3C4;
    AnyRefNode &Org = ....Segments.C4Seg.Left.IliocostalisCervicisR3C4Node;
    AnyRefNode &Via1 = ....Segments.C7Seg.Left.IliocostalisCervicisR3C4Via1Node;
    AnyRefNode &Via2 = ....Segments.Left.R1Seg.IliocostalisCervicisR3C4Via2Node;
    AnyRefNode &Ins = ....Segments.Left.R3Seg.IliocostalisCervicisR3C4Node;
    viewMuscle = {#include "../DrawSettings/MusDrawSettings.any"};
    viewForce.Visible ??= Off;
  };
  AnyMuscleViaPoint IliocostalisCervicisR4C5 = {
    AnyMuscleModel &MusMdl = ....MuscleModels.Left.IliocostalisCervicis.IliocostalisCervicisR4C5;
    AnyRefNode &Org = ....Segments.C5Seg.Left.IliocostalisCervicisR4C5Node;
    AnyRefNode &Via1 = ....Segments.C7Seg.Left.IliocostalisCervicisR4C5Via1Node;
    AnyRefNode &Via2 = ....Segments.Left.R1Seg.IliocostalisCervicisR4C5Via2Node;
    AnyRefNode &Via3 = ....Segments.Left.R3Seg.IliocostalisCervicisR4C5Via3Node;
    AnyRefNode &Ins = ....Segments.Left.R4Seg.IliocostalisCervicisR4C5Node;
    viewMuscle = {#include "../DrawSettings/MusDrawSettings.any"};
    viewForce.Visible ??= Off;
  };
  AnyMuscleViaPoint IliocostalisCervicisR5C6 = {
    AnyMuscleModel &MusMdl = ....MuscleModels.Left.IliocostalisCervicis.IliocostalisCervicisR5C6;
    AnyRefNode &Org = ....Segments.C6Seg.Left.IliocostalisCervicisR5C6Node;
    AnyRefNode &Via1 = ....Segments.C7Seg.Left.IliocostalisCervicisR5C6Via1Node;
    AnyRefNode &Via2 = ....Segments.Left.R1Seg.IliocostalisCervicisR5C6Via2Node;
    AnyRefNode &Via3 = ....Segments.Left.R3Seg.IliocostalisCervicisR5C6Via3Node;
    AnyRefNode &Via4 = ....Segments.Left.R4Seg.IliocostalisCervicisR5C6Via4Node;
    AnyRefNode &Ins = ....Segments.Left.R5Seg.IliocostalisCervicisR5C6Node;
    viewMuscle = {#include "../DrawSettings/MusDrawSettings.any"};
    viewForce.Visible ??= Off;
  };
  AnyMuscleViaPoint IliocostalisCervicisR6C4 = {
    AnyMuscleModel &MusMdl = ....MuscleModels.Left.IliocostalisCervicis.IliocostalisCervicisR6C4;
    AnyRefNode &Org = ....Segments.C4Seg.Left.IliocostalisCervicisR6C4Node;
    AnyRefNode &Via1 = ....Segments.C7Seg.Left.IliocostalisCervicisR6C4Via1Node;
    AnyRefNode &Via2 = ....Segments.Left.R1Seg.IliocostalisCervicisR6C4Via2Node;
    AnyRefNode &Via3 = ....Segments.Left.R3Seg.IliocostalisCervicisR6C4Via3Node;
    AnyRefNode &Via4 = ....Segments.Left.R4Seg.IliocostalisCervicisR6C4Via4Node;
    AnyRefNode &Via5 = ....Segments.Left.R5Seg.IliocostalisCervicisR6C4Via5Node;
    AnyRefNode &Ins = ....Segments.Left.R6Seg.IliocostalisCervicisR6C4Node;
    viewMuscle = {#include "../DrawSettings/MusDrawSettings.any"};
    viewForce.Visible ??= Off;
  };
}; // End of Iliocostalis cervicis

AnyFolder IliocostalisLumborum = {
  // Iliocostalis lumborum
    AnyMuscleViaPoint IliocostalisLumborumL1 = {
    AnyMuscleModel &MusMdl = ....MuscleModels.Left.IliocostalisLumborum.IliocostalisLumborumL1;
    AnyRefNode &Org = ....Segments.L1Seg.IliocostalisLumborumL1NodeL;
    #if BM_TRUNK_CAVITY_MODEL == _CAVITY_MODEL_VOLUME_
    AnyRefNode &Via1 = ....Abdominal.Layer_L3.BaseSegPosterior.IliocostalisLumborumL1ViaNodeL;
    #else
    AnyRefNode &Via1 = ....Segments.L2Seg.IliocostalisLumborumL1ViaNodeL;
    #endif
    AnyRefNode &Ins = ....Segments.PelvisSeg.IliocostalisLumborumL1NodeL;
    viewMuscle = {#include "../DrawSettings/MusDrawSettings.any"};
    viewForce.Visible ??= Off;
  };
  AnyMuscleViaPoint IliocostalisLumborumL2 = {
    AnyMuscleModel &MusMdl = ....MuscleModels.Left.IliocostalisLumborum.IliocostalisLumborumL2;
    AnyRefNode &Org = ....Segments.L2Seg.IliocostalisLumborumL2NodeL;
    AnyRefNode &Ins = ....Segments.PelvisSeg.IliocostalisLumborumL2NodeL;
    viewMuscle = {#include "../DrawSettings/MusDrawSettings.any"};
    viewForce.Visible ??= Off;
  };
  AnyMuscleViaPoint IliocostalisLumborumL3 = {
    AnyMuscleModel &MusMdl = ....MuscleModels.Left.IliocostalisLumborum.IliocostalisLumborumL3;
    AnyRefNode &Org = ....Segments.L3Seg.IliocostalisLumborumL3NodeL;
    AnyRefNode &Ins = ....Segments.PelvisSeg.IliocostalisLumborumL3NodeL;
    viewMuscle = {#include "../DrawSettings/MusDrawSettings.any"};
    viewForce.Visible ??= Off;
  };
  AnyMuscleViaPoint IliocostalisLumborumL4 = {
    AnyMuscleModel &MusMdl = ....MuscleModels.Left.IliocostalisLumborum.IliocostalisLumborumL4;
    AnyRefNode &Org = ....Segments.L4Seg.IliocostalisLumborumL4NodeL;
    AnyRefNode &Ins = ....Segments.PelvisSeg.IliocostalisLumborumL4NodeL;
    viewMuscle = {#include "../DrawSettings/MusDrawSettings.any"};
    viewForce.Visible ??= Off;
  };
    AnyMuscleViaPoint IliocostalisLumborumR5 = {
    AnyMuscleModel &MusMdl = ....MuscleModels.Left.IliocostalisLumborum.IliocostalisLumborumR5;
    AnyRefNode &Org = ....Segments.Left.R5Seg.IliocostalisLumborumR5NodeL;
    AnyRefNode &Via1 = ....Segments.Left.R6Seg.IliocostalisLumborumR5Via1NodeL;
    AnyRefNode &Via2 = ....Segments.Left.R7Seg.IliocostalisLumborumR5Via2NodeL;
    AnyRefNode &Via3 = ....Segments.Left.R8Seg.IliocostalisLumborumR5Via3NodeL;
    AnyRefNode &Via4 = ....Segments.Left.R9Seg.IliocostalisLumborumR5Via4NodeL;
    AnyRefNode &Via5 = ....Segments.Left.R10Seg.IliocostalisLumborumR5Via5NodeL;
    #if BM_TRUNK_CAVITY_MODEL == _CAVITY_MODEL_VOLUME_
    AnyRefNode &Via6 = ....Abdominal.Layer_L1.BaseSegPosterior.IliocostalisLumborumR5Via6NodeL;
    AnyRefNode &Via7 = ....Abdominal.Layer_L2.BaseSegPosterior.IliocostalisLumborumR5Via7NodeL;
    AnyRefNode &Via8 = ....Abdominal.Layer_L3.BaseSegPosterior.IliocostalisLumborumR5Via8NodeL;
    #else
    AnyRefNode &Via6 = ....Segments.Left.R12Seg.IliocostalisLumborumR5Via6NodeL;
    AnyRefNode &Via7 = ....Segments.L1Seg.IliocostalisLumborumR5Via7NodeL;
    AnyRefNode &Via8 = ....Segments.L2Seg.IliocostalisLumborumR5Via8NodeL;
    #endif
    AnyRefNode &Ins = ....Segments.PelvisSeg.IliocostalisLumborumR5NodeL;
    viewMuscle = {#include "../DrawSettings/MusDrawSettings.any"};
    viewForce.Visible ??= Off;
  };
  AnyMuscleViaPoint IliocostalisLumborumR6 = {
    AnyMuscleModel &MusMdl = ....MuscleModels.Left.IliocostalisLumborum.IliocostalisLumborumR6;
    AnyRefNode &Org = ....Segments.Left.R6Seg.IliocostalisLumborumR6NodeL;
    AnyRefNode &Via1 = ....Segments.Left.R7Seg.IliocostalisLumborumR6Via1NodeL;
    AnyRefNode &Via2 = ....Segments.Left.R8Seg.IliocostalisLumborumR6Via2NodeL;
    AnyRefNode &Via3 = ....Segments.Left.R9Seg.IliocostalisLumborumR6Via3NodeL;
    AnyRefNode &Via4 = ....Segments.Left.R10Seg.IliocostalisLumborumR6Via4NodeL;
    #if BM_TRUNK_CAVITY_MODEL == _CAVITY_MODEL_VOLUME_
    AnyRefNode &Via5 = ....Abdominal.Layer_L1.BaseSegPosterior.IliocostalisLumborumR6Via5NodeL;
    AnyRefNode &Via6 = ....Abdominal.Layer_L2.BaseSegPosterior.IliocostalisLumborumR6Via6NodeL;
    AnyRefNode &Via7 = ....Abdominal.Layer_L3.BaseSegPosterior.IliocostalisLumborumR6Via7NodeL;
    #else
    AnyRefNode &Via5 = ....Segments.Left.R12Seg.IliocostalisLumborumR6Via5NodeL;
    AnyRefNode &Via6 = ....Segments.L1Seg.IliocostalisLumborumR6Via6NodeL;
    AnyRefNode &Via7 = ....Segments.L2Seg.IliocostalisLumborumR6Via7NodeL;
    #endif
    AnyRefNode &Ins = ....Segments.PelvisSeg.IliocostalisLumborumR6NodeL;
    viewMuscle = {#include "../DrawSettings/MusDrawSettings.any"};
    viewForce.Visible ??= Off;
  };
  AnyMuscleViaPoint IliocostalisLumborumR7 = {
    AnyMuscleModel &MusMdl = ....MuscleModels.Left.IliocostalisLumborum.IliocostalisLumborumR7;
    AnyRefNode &Org = ....Segments.Left.R7Seg.IliocostalisLumborumR7NodeL;
    AnyRefNode &Via1 = ....Segments.Left.R8Seg.IliocostalisLumborumR7Via1NodeL;
    AnyRefNode &Via2 = ....Segments.Left.R9Seg.IliocostalisLumborumR7Via2NodeL;
    AnyRefNode &Via3 = ....Segments.Left.R10Seg.IliocostalisLumborumR7Via3NodeL;
    #if BM_TRUNK_CAVITY_MODEL == _CAVITY_MODEL_VOLUME_
    AnyRefNode &Via4 = ....Abdominal.Layer_L1.BaseSegPosterior.IliocostalisLumborumR7Via4NodeL;
    AnyRefNode &Via5 = ....Abdominal.Layer_L2.BaseSegPosterior.IliocostalisLumborumR7Via5NodeL;
    AnyRefNode &Via6 = ....Abdominal.Layer_L3.BaseSegPosterior.IliocostalisLumborumR7Via6NodeL;
    #else
    AnyRefNode &Via4 = ....Segments.Left.R12Seg.IliocostalisLumborumR7Via4NodeL;
    AnyRefNode &Via5 = ....Segments.L1Seg.IliocostalisLumborumR7Via5NodeL;
    AnyRefNode &Via6 = ....Segments.L2Seg.IliocostalisLumborumR7Via6NodeL;
    #endif
    AnyRefNode &Ins = ....Segments.PelvisSeg.IliocostalisLumborumR7NodeL;
    viewMuscle = {#include "../DrawSettings/MusDrawSettings.any"};
    viewForce.Visible ??= Off;
  };
  AnyMuscleViaPoint IliocostalisLumborumR8 = {
    AnyMuscleModel &MusMdl = ....MuscleModels.Left.IliocostalisLumborum.IliocostalisLumborumR8;
    AnyRefNode &Org = ....Segments.Left.R8Seg.IliocostalisLumborumR8NodeL;
    AnyRefNode &Via1 = ....Segments.Left.R9Seg.IliocostalisLumborumR8Via1NodeL;
    AnyRefNode &Via2 = ....Segments.Left.R10Seg.IliocostalisLumborumR8Via2NodeL;
    #if BM_TRUNK_CAVITY_MODEL == _CAVITY_MODEL_VOLUME_
    AnyRefNode &Via3 = ....Abdominal.Layer_L1.BaseSegPosterior.IliocostalisLumborumR8Via3NodeL;
    AnyRefNode &Via4 = ....Abdominal.Layer_L2.BaseSegPosterior.IliocostalisLumborumR8Via4NodeL;
    AnyRefNode &Via5 = ....Abdominal.Layer_L3.BaseSegPosterior.IliocostalisLumborumR8Via5NodeL;
    #else
    AnyRefNode &Via3 = ....Segments.Left.R12Seg.IliocostalisLumborumR8Via3NodeL;
    AnyRefNode &Via4 = ....Segments.L1Seg.IliocostalisLumborumR8Via4NodeL;
    AnyRefNode &Via5 = ....Segments.L2Seg.IliocostalisLumborumR8Via5NodeL;
    #endif
    AnyRefNode &Ins = ....Segments.PelvisSeg.IliocostalisLumborumR8NodeL;
    viewMuscle = {#include "../DrawSettings/MusDrawSettings.any"};
    viewForce.Visible ??= Off;
  };
  AnyMuscleViaPoint IliocostalisLumborumR9 = {
    AnyMuscleModel &MusMdl = ....MuscleModels.Left.IliocostalisLumborum.IliocostalisLumborumR9;
    AnyRefNode &Org = ....Segments.Left.R9Seg.IliocostalisLumborumR9NodeL;
    AnyRefNode &Via1 = ....Segments.Left.R10Seg.IliocostalisLumborumR9Via1NodeL;
    #if BM_TRUNK_CAVITY_MODEL == _CAVITY_MODEL_VOLUME_
    AnyRefNode &Via2 = ....Abdominal.Layer_L1.BaseSegPosterior.IliocostalisLumborumR9Via2NodeL;
    AnyRefNode &Via3 = ....Abdominal.Layer_L2.BaseSegPosterior.IliocostalisLumborumR9Via3NodeL;
    AnyRefNode &Via4 = ....Abdominal.Layer_L3.BaseSegPosterior.IliocostalisLumborumR9Via4NodeL;
    #else
    AnyRefNode &Via2 = ....Segments.Left.R12Seg.IliocostalisLumborumR9Via2NodeL;
    AnyRefNode &Via3 = ....Segments.L1Seg.IliocostalisLumborumR9Via3NodeL;
    AnyRefNode &Via4 = ....Segments.L2Seg.IliocostalisLumborumR9Via4NodeL;
    #endif
    AnyRefNode &Ins = ....Segments.PelvisSeg.IliocostalisLumborumR9NodeL;
    viewMuscle = {#include "../DrawSettings/MusDrawSettings.any"};
    viewForce.Visible ??= Off;
  };
  AnyMuscleViaPoint IliocostalisLumborumR10 = {
    AnyMuscleModel &MusMdl = ....MuscleModels.Left.IliocostalisLumborum.IliocostalisLumborumR10;
    AnyRefNode &Org = ....Segments.Left.R10Seg.IliocostalisLumborumR10NodeL;
    #if BM_TRUNK_CAVITY_MODEL == _CAVITY_MODEL_VOLUME_
    AnyRefNode &Via1 = ....Abdominal.Layer_L1.BaseSegPosterior.IliocostalisLumborumR10Via1NodeL;
    AnyRefNode &Via2 = ....Abdominal.Layer_L2.BaseSegPosterior.IliocostalisLumborumR10Via2NodeL;
    AnyRefNode &Via3 = ....Abdominal.Layer_L3.BaseSegPosterior.IliocostalisLumborumR10Via3NodeL;
    #else
    AnyRefNode &Via1 = ....Segments.Left.R12Seg.IliocostalisLumborumR10Via1NodeL;
    AnyRefNode &Via2 = ....Segments.L1Seg.IliocostalisLumborumR10Via2NodeL;
    AnyRefNode &Via3 = ....Segments.L2Seg.IliocostalisLumborumR10Via3NodeL;
    #endif
    AnyRefNode &Ins = ....Segments.PelvisSeg.IliocostalisLumborumR10NodeL;
    viewMuscle = {#include "../DrawSettings/MusDrawSettings.any"};
    viewForce.Visible ??= Off;
  };
  AnyMuscleViaPoint IliocostalisLumborumR11 = {
    AnyMuscleModel &MusMdl = ....MuscleModels.Left.IliocostalisLumborum.IliocostalisLumborumR11;
    AnyRefNode &Org = ....Segments.Left.R11Seg.IliocostalisLumborumR11NodeL;
    #if BM_TRUNK_CAVITY_MODEL == _CAVITY_MODEL_VOLUME_
//    AnyRefNode &Via1 = ....Abdominal.Layer_L2.BaseSegPosterior.IliocostalisLumborumR11Via1NodeL;
//    AnyRefNode &Via2 = ....Abdominal.Layer_L3.BaseSegPosterior.IliocostalisLumborumR11Via2NodeL;
    #else
    AnyRefNode &Via1 = ....Segments.L1Seg.IliocostalisLumborumR11Via1NodeL;
    AnyRefNode &Via2 = ....Segments.L2Seg.IliocostalisLumborumR11Via2NodeL;
    #endif
    AnyRefNode &Ins = ....Segments.PelvisSeg.IliocostalisLumborumR11NodeL;
    viewMuscle = {#include "../DrawSettings/MusDrawSettings.any"};
    viewForce.Visible ??= Off;
  };
  AnyMuscleViaPoint IliocostalisLumborumR12 = {
    AnyMuscleModel &MusMdl = ....MuscleModels.Left.IliocostalisLumborum.IliocostalisLumborumR12;
    AnyRefNode &Org = ....Segments.Left.R12Seg.IliocostalisLumborumR12NodeL;
    #if BM_TRUNK_CAVITY_MODEL == _CAVITY_MODEL_VOLUME_
//    AnyRefNode &Via1 = ....Abdominal.Layer_L2.BaseSegPosterior.IliocostalisLumborumR12Via1NodeL;
//    AnyRefNode &Via2 = ....Abdominal.Layer_L3.BaseSegPosterior.IliocostalisLumborumR12Via2NodeL;
    #else
    AnyRefNode &Via1 = ....Segments.L1Seg.IliocostalisLumborumR12Via1NodeL;
    AnyRefNode &Via2 = ....Segments.L2Seg.IliocostalisLumborumR12Via2NodeL;
    #endif
    AnyRefNode &Ins = ....Segments.PelvisSeg.IliocostalisLumborumR12NodeL;
    viewMuscle = {#include "../DrawSettings/MusDrawSettings.any"};
    viewForce.Visible ??= Off;
  };
}; // End of Iliocostalis lumborum

// Iliocostalis Thoracis
AnyFolder IliocostalisThoracis = {
  AnyMuscleViaPoint IliocostalisThoracisC7R7 = {
    AnyMuscleModel &MusMdl = ....MuscleModels.Left.IliocostalisThoracis.IliocostalisThoracisC7R7;
    AnyRefNode &Org = ....Segments.C7Seg.Left.IliocostalisThoracisC7R7NodeOrg;
    AnyRefNode &Via1 = ....Segments.Left.R1Seg.IliocostalisThoracisC7R7Via1NodeL;
    AnyRefNode &Via2 = ....Segments.Left.R2Seg.IliocostalisThoracisC7R7Via2NodeL;
    AnyRefNode &Via3 = ....Segments.Left.R3Seg.IliocostalisThoracisC7R7Via3NodeL;
    AnyRefNode &Via4 = ....Segments.Left.R4Seg.IliocostalisThoracisC7R7Via4NodeL;
    AnyRefNode &Via5 = ....Segments.Left.R5Seg.IliocostalisThoracisC7R7Via5NodeL;
    AnyRefNode &Via6 = ....Segments.Left.R6Seg.IliocostalisThoracisC7R7Via6NodeL;
    AnyRefNode &Ins = ....Segments.Left.R7Seg.IliocostalisThoracisC7R7NodeLIns;
    viewMuscle = {#include "../DrawSettings/MusDrawSettings.any"};
    viewForce.Visible ??= Off;
  };
  #if BM_TRUNK_THORACIC_MODEL == _THORACIC_MODEL_FLEXIBLE_
  AnyMuscleViaPoint IliocostalisThoracisR1R7 = {
    AnyMuscleModel &MusMdl = ....MuscleModels.Left.IliocostalisThoracis.IliocostalisThoracisR1R7;
    AnyRefNode &Org = ....Segments.Left.R1Seg.IliocostalisThoracisR1R7NodeLOrg;
    AnyRefNode &Via2 = ....Segments.Left.R2Seg.IliocostalisThoracisR1R7Via1NodeL;
    AnyRefNode &Via3 = ....Segments.Left.R3Seg.IliocostalisThoracisR1R7Via2NodeL;
    AnyRefNode &Via4 = ....Segments.Left.R4Seg.IliocostalisThoracisR1R7Via3NodeL;
    AnyRefNode &Via5 = ....Segments.Left.R5Seg.IliocostalisThoracisR1R7Via4NodeL;
    AnyRefNode &Via6 = ....Segments.Left.R6Seg.IliocostalisThoracisR1R7Via5NodeL;
    AnyRefNode &Ins = ....Segments.Left.R7Seg.IliocostalisThoracisR1R7NodeLIns;
    viewMuscle = {#include "../DrawSettings/MusDrawSettings.any"};
    viewForce.Visible ??= Off;
  };
  AnyMuscleViaPoint IliocostalisThoracisR2R8 = {
    AnyMuscleModel &MusMdl = ....MuscleModels.Left.IliocostalisThoracis.IliocostalisThoracisR2R8;
    AnyRefNode &Org = ....Segments.Left.R2Seg.IliocostalisThoracisR2R8NodeLOrg;
    AnyRefNode &Via2 = ....Segments.Left.R3Seg.IliocostalisThoracisR2R8Via1NodeL;
    AnyRefNode &Via3 = ....Segments.Left.R4Seg.IliocostalisThoracisR2R8Via2NodeL;
    AnyRefNode &Via4 = ....Segments.Left.R5Seg.IliocostalisThoracisR2R8Via3NodeL;
    AnyRefNode &Via5 = ....Segments.Left.R6Seg.IliocostalisThoracisR2R8Via4NodeL;
    AnyRefNode &Via6 = ....Segments.Left.R7Seg.IliocostalisThoracisR2R8Via5NodeL;
    AnyRefNode &Ins = ....Segments.Left.R8Seg.IliocostalisThoracisR2R8NodeLIns;
    viewMuscle = {#include "../DrawSettings/MusDrawSettings.any"};
    viewForce.Visible ??= Off;
  };
  AnyMuscleViaPoint IliocostalisThoracisR3R9 = {
    AnyMuscleModel &MusMdl = ....MuscleModels.Left.IliocostalisThoracis.IliocostalisThoracisR3R9;
    AnyRefNode &Org = ....Segments.Left.R3Seg.IliocostalisThoracisR3R9NodeLOrg;
    AnyRefNode &Via2 = ....Segments.Left.R4Seg.IliocostalisThoracisR3R9Via1NodeL;
    AnyRefNode &Via3 = ....Segments.Left.R5Seg.IliocostalisThoracisR3R9Via2NodeL;
    AnyRefNode &Via4 = ....Segments.Left.R6Seg.IliocostalisThoracisR3R9Via3NodeL;
    AnyRefNode &Via5 = ....Segments.Left.R7Seg.IliocostalisThoracisR3R9Via4NodeL;
    AnyRefNode &Via6 = ....Segments.Left.R8Seg.IliocostalisThoracisR3R9Via5NodeL;
    AnyRefNode &Ins = ....Segments.Left.R9Seg.IliocostalisThoracisR3R9NodeLIns;
    viewMuscle = {#include "../DrawSettings/MusDrawSettings.any"};
    viewForce.Visible ??= Off;
  };
  AnyMuscleViaPoint IliocostalisThoracisR4R10 = {
    AnyMuscleModel &MusMdl = ....MuscleModels.Left.IliocostalisThoracis.IliocostalisThoracisR4R10;
    AnyRefNode &Org = ....Segments.Left.R4Seg.IliocostalisThoracisR4R10NodeLOrg;
    AnyRefNode &Via2 = ....Segments.Left.R5Seg.IliocostalisThoracisR4R10Via1NodeL;
    AnyRefNode &Via3 = ....Segments.Left.R6Seg.IliocostalisThoracisR4R10Via2NodeL;
    AnyRefNode &Via4 = ....Segments.Left.R7Seg.IliocostalisThoracisR4R10Via3NodeL;
    AnyRefNode &Via5 = ....Segments.Left.R8Seg.IliocostalisThoracisR4R10Via4NodeL;
    AnyRefNode &Via6 = ....Segments.Left.R9Seg.IliocostalisThoracisR4R10Via5NodeL;
    AnyRefNode &Ins = ....Segments.Left.R10Seg.IliocostalisThoracisR4R10NodeLIns;
    viewMuscle = {#include "../DrawSettings/MusDrawSettings.any"};
    viewForce.Visible ??= Off;
  };
  AnyMuscleViaPoint IliocostalisThoracisR5R11 = {
    AnyMuscleModel &MusMdl = ....MuscleModels.Left.IliocostalisThoracis.IliocostalisThoracisR5R11;
    AnyRefNode &Org = ....Segments.Left.R5Seg.IliocostalisThoracisR5R11NodeLOrg;
    AnyRefNode &Via2 = ....Segments.Left.R6Seg.IliocostalisThoracisR5R11Via1NodeL;
    AnyRefNode &Via3 = ....Segments.Left.R7Seg.IliocostalisThoracisR5R11Via2NodeL;
    AnyRefNode &Via4 = ....Segments.Left.R8Seg.IliocostalisThoracisR5R11Via3NodeL;
    AnyRefNode &Via5 = ....Segments.Left.R9Seg.IliocostalisThoracisR5R11Via4NodeL;
    AnyRefNode &Via6 = ....Segments.Left.R10Seg.IliocostalisThoracisR5R11Via5NodeL;
    AnyRefNode &Ins = ....Segments.Left.R11Seg.IliocostalisThoracisR5R11NodeLIns;
    viewMuscle = {#include "../DrawSettings/MusDrawSettings.any"};
    viewForce.Visible ??= Off;
  };
  AnyMuscleViaPoint IliocostalisThoracisR6R12 = {
    AnyMuscleModel &MusMdl = ....MuscleModels.Left.IliocostalisThoracis.IliocostalisThoracisR6R12;
    AnyRefNode &Org = ....Segments.Left.R6Seg.IliocostalisThoracisR6R12NodeL;
    AnyRefNode &Via2 = ....Segments.Left.R7Seg.IliocostalisThoracisR6R12Via1NodeL;
    AnyRefNode &Via3 = ....Segments.Left.R8Seg.IliocostalisThoracisR6R12Via2NodeL;
    AnyRefNode &Via4 = ....Segments.Left.R9Seg.IliocostalisThoracisR6R12Via3NodeL;
    AnyRefNode &Via5 = ....Segments.Left.R10Seg.IliocostalisThoracisR6R12Via4NodeL;
    AnyRefNode &Via6 = ....Segments.Left.R11Seg.IliocostalisThoracisR6R12Via5NodeL;
    AnyRefNode &Ins = ....Segments.Left.R12Seg.IliocostalisThoracisR6R12NodeLIns;
    viewMuscle = {#include "../DrawSettings/MusDrawSettings.any"};
    viewForce.Visible ??= Off;
  };
  #endif
}; // End of Iliocostalis thoracis

#if BM_TRUNK_THORACIC_MODEL == _THORACIC_MODEL_FLEXIBLE_

#if IC_TYPE == OLD

MuscleGroup IntercostalisExternus(searchString="*.*") = {
  SplineMuscle_CreateMuscle IntercostalisExternusR1R2(
  CREATE_ELEMENTS=IC_MULTIPLIER*(IC_SIZE),
  OriginSegment=....Segments.Left.R1Seg,
  ORIGIN_POINTS=....Data.unscaled.ModelParameters.R1.Left.IC_R1_Ext_Inf.Points,
  InsertionSegment=....Segments.Left.R2Seg,
  INSERTION_POINTS=....Data.unscaled.ModelParameters.R2.Left.IC_R2_Ext_Sup.Points,
  MUSCLE_MODEL_PARAMETERS=....MuscleModels.Left.IntercostalisExternus.IntercostalisExternusR1R2,
  )= {};

  SplineMuscle_CreateMuscle IntercostalisExternusR2R3 (
  CREATE_ELEMENTS=IC_MULTIPLIER*(IC_SIZE+1),
  OriginSegment=....Segments.Left.R2Seg,
  ORIGIN_POINTS=....Data.unscaled.ModelParameters.R2.Left.IC_R2_Ext_Inf.Points,
  InsertionSegment=....Segments.Left.R5Seg,
  INSERTION_POINTS=....Data.unscaled.ModelParameters.R3.Left.IC_R3_Ext_Sup.Points,
  MUSCLE_MODEL_PARAMETERS=....MuscleModels.Left.IntercostalisExternus.IntercostalisExternusR2R3,
  )= {};

  SplineMuscle_CreateMuscle IntercostalisExternusR3R4 (
  CREATE_ELEMENTS=IC_MULTIPLIER*(IC_SIZE+1),
  OriginSegment=....Segments.Left.R3Seg,
  ORIGIN_POINTS=....Data.unscaled.ModelParameters.R3.Left.IC_R3_Ext_Inf.Points,
  InsertionSegment=....Segments.Left.R4Seg,
  INSERTION_POINTS=....Data.unscaled.ModelParameters.R4.Left.IC_R4_Ext_Sup.Points,
  MUSCLE_MODEL_PARAMETERS=....MuscleModels.Left.IntercostalisExternus.IntercostalisExternusR3R4,
  )= {};

  SplineMuscle_CreateMuscle IntercostalisExternusR4R5 (
  CREATE_ELEMENTS=IC_MULTIPLIER*(IC_SIZE+1),
  OriginSegment=....Segments.Left.R4Seg,
  ORIGIN_POINTS=....Data.unscaled.ModelParameters.R4.Left.IC_R4_Ext_Inf.Points,
  InsertionSegment=....Segments.Left.R5Seg,
  INSERTION_POINTS=....Data.unscaled.ModelParameters.R5.Left.IC_R5_Ext_Sup.Points,
  MUSCLE_MODEL_PARAMETERS=....MuscleModels.Left.IntercostalisExternus.IntercostalisExternusR4R5,
  )= {};

  SplineMuscle_CreateMuscle IntercostalisExternusR5R6 (
  CREATE_ELEMENTS=IC_MULTIPLIER*(IC_SIZE+1),
  OriginSegment=....Segments.Left.R5Seg,
  ORIGIN_POINTS=....Data.unscaled.ModelParameters.R5.Left.IC_R5_Ext_Inf.Points,
  InsertionSegment=....Segments.Left.R6Seg,
  INSERTION_POINTS=....Data.unscaled.ModelParameters.R6.Left.IC_R6_Ext_Sup.Points,
  MUSCLE_MODEL_PARAMETERS=....MuscleModels.Left.IntercostalisExternus.IntercostalisExternusR5R6,
  )= {};

  SplineMuscle_CreateMuscle IntercostalisExternusR6R7 (
  CREATE_ELEMENTS=IC_MULTIPLIER*(IC_SIZE+1),
  OriginSegment=....Segments.Left.R6Seg,
  ORIGIN_POINTS=....Data.unscaled.ModelParameters.R6.Left.IC_R6_Ext_Inf.Points,
  InsertionSegment=....Segments.Left.R7Seg,
  INSERTION_POINTS=....Data.unscaled.ModelParameters.R7.Left.IC_R7_Ext_Sup.Points,
  MUSCLE_MODEL_PARAMETERS=....MuscleModels.Left.IntercostalisExternus.IntercostalisExternusR6R7,
  )= {};

  SplineMuscle_CreateMuscle IntercostalisExternusR7R8 (
  CREATE_ELEMENTS=IC_MULTIPLIER*(IC_SIZE+1),
  OriginSegment=....Segments.Left.R7Seg,
  ORIGIN_POINTS=....Data.unscaled.ModelParameters.R7.Left.IC_R7_Ext_Inf.Points,
  InsertionSegment=....Segments.Left.R8Seg,
  INSERTION_POINTS=....Data.unscaled.ModelParameters.R8.Left.IC_R8_Ext_Sup.Points,
  MUSCLE_MODEL_PARAMETERS=....MuscleModels.Left.IntercostalisExternus.IntercostalisExternusR7R8,
  )= {};

  SplineMuscle_CreateMuscle IntercostalisExternusR8R9 (
  CREATE_ELEMENTS=IC_MULTIPLIER*(IC_SIZE+1),
  OriginSegment=....Segments.Left.R8Seg,
  ORIGIN_POINTS=....Data.unscaled.ModelParameters.R8.Left.IC_R8_Ext_Inf.Points,
  InsertionSegment=....Segments.Left.R9Seg,
  INSERTION_POINTS=....Data.unscaled.ModelParameters.R9.Left.IC_R9_Ext_Sup.Points,
  MUSCLE_MODEL_PARAMETERS=....MuscleModels.Left.IntercostalisExternus.IntercostalisExternusR8R9,
  )= {};

  SplineMuscle_CreateMuscle IntercostalisExternusR9R10 (
  CREATE_ELEMENTS=IC_MULTIPLIER*(IC_SIZE+1),
  OriginSegment=....Segments.Left.R9Seg,
  ORIGIN_POINTS=....Data.unscaled.ModelParameters.R9.Left.IC_R9_Ext_Inf.Points,
  InsertionSegment=....Segments.Left.R10Seg,
  INSERTION_POINTS=....Data.unscaled.ModelParameters.R10.Left.IC_R10_Ext_Sup.Points,
  MUSCLE_MODEL_PARAMETERS=....MuscleModels.Left.IntercostalisExternus.IntercostalisExternusR9R10,
  )= {};

  SplineMuscle_CreateMuscle IntercostalisExternusR10R11 (
  CREATE_ELEMENTS=IC_MULTIPLIER*(IC_SIZE),
  OriginSegment=....Segments.Left.R10Seg,
  ORIGIN_POINTS=....Data.unscaled.ModelParameters.R10.Left.IC_R10_Ext_Inf.Points,
  InsertionSegment=....Segments.Left.R11Seg,
  INSERTION_POINTS=....Data.unscaled.ModelParameters.R11.Left.IC_R11_Ext_Sup.Points,
  MUSCLE_MODEL_PARAMETERS=....MuscleModels.Left.IntercostalisExternus.IntercostalisExternusR10R11,
  )= {};

  SplineMuscle_CreateMuscle IntercostalisExternusR11R12 (
  CREATE_ELEMENTS=IC_MULTIPLIER*(IC_SIZE-2),
  OriginSegment=....Segments.Left.R11Seg,
  ORIGIN_POINTS=....Data.unscaled.ModelParameters.R11.Left.IC_R11_Ext_Inf.Points,
  InsertionSegment=....Segments.Left.R12Seg,
  INSERTION_POINTS=....Data.unscaled.ModelParameters.R12.Left.IC_R12_Ext_Sup.Points,
  MUSCLE_MODEL_PARAMETERS=....MuscleModels.Left.IntercostalisExternus.IntercostalisExternusR11R12,
  )= {};
};

MuscleGroup IntercostalisInternus(searchString="*.*") = {

  SplineMuscle_CreateMuscle IntercostalisInternusR1R2 (
  CREATE_ELEMENTS=IC_MULTIPLIER*(IC_SIZE),
  OriginSegment=....Segments.Left.R1Seg,
  ORIGIN_POINTS=....Data.unscaled.ModelParameters.R1.Left.IC_R1_Int_Inf.Points,
  InsertionSegment=....Segments.Left.R2Seg,
  INSERTION_POINTS=....Data.unscaled.ModelParameters.R2.Left.IC_R2_Int_Sup.Points,
  MUSCLE_MODEL_PARAMETERS=....MuscleModels.Left.IntercostalisInternus.IntercostalisInternusR1R2,
  )= {
    NumberOfElements = IC_MULTIPLIER*(IC_SIZE)+1;
    //The Last element is defined manually
    AnyMuscleViaPoint elem_sternum = {
      AnyRefNode &Org = .....Segments.SternumSeg.Left_IntercostalisInternusR1R2_elem_sternum;
      AnyRefNode &Ins = .InsertionSegment.IntercostalisInternusR1R2_elem_sternum;
      AnyMuscleModel MusMdl = {
        F0=..MuscleModel.F0/..NumberOfElements;
        Lf0=..MuscleModel.F0;
        Vol0=..MuscleModel.Vol0/..NumberOfElements;
      };
      viewMuscle = {#include "../DrawSettings/MusDrawSettings3.any"};
      // AnyDrawPLine drwLine = {AnyFloat RGB_Red= {1,0,0};AnyFloat RGB_Green= {0,1,0};RGB=iffun(gtfun(.LmtDot,0),RGB_Red,RGB_Green);Thickness=0.005;};

    };
  };

  SplineMuscle_CreateMuscle IntercostalisInternusR2R3 (
  CREATE_ELEMENTS=IC_MULTIPLIER*(IC_SIZE+1),
  OriginSegment=....Segments.Left.R2Seg,
  ORIGIN_POINTS=....Data.unscaled.ModelParameters.R2.Left.IC_R2_Int_Inf.Points,
  InsertionSegment=....Segments.Left.R3Seg,
  INSERTION_POINTS=....Data.unscaled.ModelParameters.R3.Left.IC_R3_Int_Sup.Points,
  MUSCLE_MODEL_PARAMETERS=....MuscleModels.Left.IntercostalisInternus.IntercostalisInternusR2R3,
  )= {
    NumberOfElements =  IC_MULTIPLIER*(IC_SIZE+1)+1;
    AnyMuscleViaPoint elem_sternum= {
      AnyRefNode &Org = .....Segments.SternalBodySeg.Left_IntercostalisInternusR2R3_elem_sternum;
      AnyRefNode &Ins = .InsertionSegment.IntercostalisInternusR2R3_elem_sternum;
      AnyMuscleModel MusMdl = {
        F0=..MuscleModel.F0/..NumberOfElements;
        Lf0=..MuscleModel.F0;
        Vol0=..MuscleModel.Vol0/..NumberOfElements;
      };
      viewMuscle = {#include "../DrawSettings/MusDrawSettings3.any"};
      // AnyDrawPLine drwLine = {AnyFloat RGB_Red= {1,0,0};AnyFloat RGB_Green= {0,1,0};RGB=iffun(gtfun(.LmtDot,0),RGB_Red,RGB_Green);Thickness=0.005;};

    };
  };

  SplineMuscle_CreateMuscle IntercostalisInternusR3R4 (
  CREATE_ELEMENTS=IC_MULTIPLIER*(IC_SIZE+1),
  OriginSegment=....Segments.Left.R3Seg,
  ORIGIN_POINTS=....Data.unscaled.ModelParameters.R3.Left.IC_R3_Int_Inf.Points,
  InsertionSegment=....Segments.Left.R4Seg,
  INSERTION_POINTS=....Data.unscaled.ModelParameters.R4.Left.IC_R4_Int_Sup.Points,
  MUSCLE_MODEL_PARAMETERS=....MuscleModels.Left.IntercostalisInternus.IntercostalisInternusR3R4,
  )= {
    NumberOfElements =  IC_MULTIPLIER*(IC_SIZE+1)+1;
    AnyMuscleViaPoint elem_sternum= {
      AnyRefNode &Org = .....Segments.SternalBodySeg.Left_IntercostalisInternusR3R4_elem_sternum;
      AnyRefNode &Ins = .InsertionSegment.IntercostalisInternusR3R4_elem_sternum;
      AnyMuscleModel MusMdl = {
        F0=..MuscleModel.F0/..NumberOfElements;
        Lf0=..MuscleModel.F0;
        Vol0=..MuscleModel.Vol0/..NumberOfElements;
      };
      viewMuscle = {#include "../DrawSettings/MusDrawSettings3.any"};
      // AnyDrawPLine drwLine = {AnyFloat RGB_Red= {1,0,0};AnyFloat RGB_Green= {0,1,0};RGB=iffun(gtfun(.LmtDot,0),RGB_Red,RGB_Green);Thickness=0.005;};

    };
  };

  SplineMuscle_CreateMuscle IntercostalisInternusR4R5 (
  CREATE_ELEMENTS=IC_MULTIPLIER*(IC_SIZE+1),
  OriginSegment=....Segments.Left.R4Seg,
  ORIGIN_POINTS=....Data.unscaled.ModelParameters.R4.Left.IC_R4_Int_Inf.Points,
  InsertionSegment=....Segments.Left.R5Seg,
  INSERTION_POINTS=....Data.unscaled.ModelParameters.R5.Left.IC_R5_Int_Sup.Points,
  MUSCLE_MODEL_PARAMETERS=....MuscleModels.Left.IntercostalisInternus.IntercostalisInternusR4R5,
  )= {
    NumberOfElements =  IC_MULTIPLIER*(IC_SIZE+1)+1;
    AnyMuscleViaPoint elem_sternum= {
      AnyRefNode &Org = .....Segments.SternalBodySeg.Left_IntercostalisInternusR4R5_elem_sternum;
      AnyRefNode &Ins = .InsertionSegment.IntercostalisInternusR4R5_elem_sternum;
      AnyMuscleModel MusMdl = {
        F0=..MuscleModel.F0/..NumberOfElements;
        Lf0=..MuscleModel.F0;
        Vol0=..MuscleModel.Vol0/..NumberOfElements;
      };
      viewMuscle = {#include "../DrawSettings/MusDrawSettings3.any"};
      // AnyDrawPLine drwLine = {AnyFloat RGB_Red= {1,0,0};AnyFloat RGB_Green= {0,1,0};RGB=iffun(gtfun(.LmtDot,0),RGB_Red,RGB_Green);Thickness=0.005;};

    };
  };

  SplineMuscle_CreateMuscle IntercostalisInternusR5R6 (
  CREATE_ELEMENTS=IC_MULTIPLIER*(IC_SIZE+1),
  OriginSegment=....Segments.Left.R5Seg,
  ORIGIN_POINTS=....Data.unscaled.ModelParameters.R5.Left.IC_R5_Int_Inf.Points,
  InsertionSegment=....Segments.Left.R6Seg,
  INSERTION_POINTS=....Data.unscaled.ModelParameters.R6.Left.IC_R6_Int_Sup.Points,
  MUSCLE_MODEL_PARAMETERS=....MuscleModels.Left.IntercostalisInternus.IntercostalisInternusR5R6,
  )= {
    NumberOfElements =  IC_MULTIPLIER*(IC_SIZE+1)+1;
    AnyMuscleViaPoint elem_sternum= {
      AnyRefNode &Org = .....Segments.SternalBodySeg.Left_IntercostalisInternusR5R6_elem_sternum;
      AnyRefNode &Ins = .InsertionSegment.IntercostalisInternusR5R6_elem_sternum;
      AnyMuscleModel MusMdl = {
        F0=..MuscleModel.F0/..NumberOfElements;
        Lf0=..MuscleModel.F0;
        Vol0=..MuscleModel.Vol0/..NumberOfElements;
      };
      viewMuscle = {#include "../DrawSettings/MusDrawSettings3.any"};
      // AnyDrawPLine drwLine = {AnyFloat RGB_Red= {1,0,0};AnyFloat RGB_Green= {0,1,0};RGB=iffun(gtfun(.LmtDot,0),RGB_Red,RGB_Green);Thickness=0.005;};

    };
  };

  SplineMuscle_CreateMuscle IntercostalisInternusR6R7 (
  CREATE_ELEMENTS=IC_MULTIPLIER*(IC_SIZE+1),
  OriginSegment=....Segments.Left.R6Seg,
  ORIGIN_POINTS=....Data.unscaled.ModelParameters.R6.Left.IC_R6_Int_Inf.Points,
  InsertionSegment=....Segments.Left.R7Seg,
  INSERTION_POINTS=....Data.unscaled.ModelParameters.R7.Left.IC_R7_Int_Sup.Points,
  MUSCLE_MODEL_PARAMETERS=....MuscleModels.Left.IntercostalisInternus.IntercostalisInternusR6R7,
  )= {
    NumberOfElements =  IC_MULTIPLIER*(IC_SIZE+1)+1;
    AnyMuscleViaPoint elem_sternum= {
      AnyRefNode &Org = .....Segments.SternalBodySeg.Left_IntercostalisInternusR6R7_elem_sternum;
      AnyRefNode &Ins = .InsertionSegment.IntercostalisInternusR6R7_elem_sternum;
      AnyMuscleModel MusMdl = {
        F0=..MuscleModel.F0/..NumberOfElements;
        Lf0=..MuscleModel.F0;
        Vol0=..MuscleModel.Vol0/..NumberOfElements;
      };
      viewMuscle = {#include "../DrawSettings/MusDrawSettings3.any"};
      // AnyDrawPLine drwLine = {AnyFloat RGB_Red= {1,0,0};AnyFloat RGB_Green= {0,1,0};RGB=iffun(gtfun(.LmtDot,0),RGB_Red,RGB_Green);Thickness=0.005;};

    };
  };

  SplineMuscle_CreateMuscle IntercostalisInternusR7R8 (
  CREATE_ELEMENTS=IC_MULTIPLIER*(IC_SIZE+1),
  OriginSegment=....Segments.Left.R7Seg,
  ORIGIN_POINTS=....Data.unscaled.ModelParameters.R7.Left.IC_R7_Int_Inf.Points,
  InsertionSegment=....Segments.Left.R8Seg,
  INSERTION_POINTS=....Data.unscaled.ModelParameters.R8.Left.IC_R8_Int_Sup.Points,
  MUSCLE_MODEL_PARAMETERS=....MuscleModels.Left.IntercostalisInternus.IntercostalisInternusR7R8,
  )= {
    NumberOfElements =  IC_MULTIPLIER*(IC_SIZE+1)+1;
    AnyMuscleViaPoint elem_sternum= {
      #if BM_TRUNK_THORACIC_STERNUM_TOPOLOGY == 4
      AnyRefNode &Org = .....Segments.Left.CostalCartilageSeg.Left_IntercostalisInternusR7R8_elem_sternum;
      #else
      AnyRefNode &Org = .....Segments.SternalBodySeg.Left_IntercostalisInternusR7R8_elem_sternum;
      #endif
      AnyRefNode &Ins = .InsertionSegment.IntercostalisInternusR7R8_elem_sternum;
      AnyMuscleModel MusMdl = {
        F0=..MuscleModel.F0/..NumberOfElements;
        Lf0=..MuscleModel.F0;
        Vol0=..MuscleModel.Vol0/..NumberOfElements;
      };
      viewMuscle = {#include "../DrawSettings/MusDrawSettings3.any"};
      // AnyDrawPLine drwLine = {AnyFloat RGB_Red= {1,0,0};AnyFloat RGB_Green= {0,1,0};RGB=iffun(gtfun(.LmtDot,0),RGB_Red,RGB_Green);Thickness=0.005;};

    };
  };

  SplineMuscle_CreateMuscle IntercostalisInternusR8R9 (
  CREATE_ELEMENTS=IC_MULTIPLIER*(IC_SIZE+1),
  OriginSegment=....Segments.Left.R8Seg,
  ORIGIN_POINTS=....Data.unscaled.ModelParameters.R8.Left.IC_R8_Int_Inf.Points,
  InsertionSegment=....Segments.Left.R9Seg,
  INSERTION_POINTS=....Data.unscaled.ModelParameters.R9.Left.IC_R9_Int_Sup.Points,
  MUSCLE_MODEL_PARAMETERS=....MuscleModels.Left.IntercostalisInternus.IntercostalisInternusR8R9,
  )= {
    NumberOfElements =  IC_MULTIPLIER*(IC_SIZE+1)+1;
    AnyMuscleViaPoint elem_sternum= {
      #if BM_TRUNK_THORACIC_STERNUM_TOPOLOGY == 4
      AnyRefNode &Org = .....Segments.Left.CostalCartilageSeg.Left_IntercostalisInternusR8R9_elem_sternum;
      #else
      AnyRefNode &Org = .....Segments.SternalBodySeg.Left_IntercostalisInternusR8R9_elem_sternum;
      #endif
      AnyRefNode &Ins = .InsertionSegment.IntercostalisInternusR8R9_elem_sternum;
      AnyMuscleModel MusMdl = {
        F0=..MuscleModel.F0/..NumberOfElements;
        Lf0=..MuscleModel.F0;
        Vol0=..MuscleModel.Vol0/..NumberOfElements;
      };
      viewMuscle = {#include "../DrawSettings/MusDrawSettings3.any"};
    };
  };

  SplineMuscle_CreateMuscle IntercostalisInternusR9R10 (
  CREATE_ELEMENTS=IC_MULTIPLIER*(IC_SIZE+1),
  OriginSegment=....Segments.Left.R9Seg,
  ORIGIN_POINTS=....Data.unscaled.ModelParameters.R9.Left.IC_R9_Int_Inf.Points,
  InsertionSegment=....Segments.Left.R10Seg,
  INSERTION_POINTS=....Data.unscaled.ModelParameters.R10.Left.IC_R10_Int_Sup.Points,
  MUSCLE_MODEL_PARAMETERS=....MuscleModels.Left.IntercostalisInternus.IntercostalisInternusR9R10,
  )= {
    NumberOfElements =  IC_MULTIPLIER*(IC_SIZE+1)+1;
    AnyMuscleViaPoint elem_sternum= {
      #if BM_TRUNK_THORACIC_STERNUM_TOPOLOGY == 4
      AnyRefNode &Org = .....Segments.Left.CostalCartilageSeg.Left_IntercostalisInternusR9R10_elem_sternum;
      #else
      AnyRefNode &Org = .....Segments.SternalBodySeg.Left_IntercostalisInternusR9R10_elem_sternum;
      #endif
      AnyRefNode &Ins = .InsertionSegment.IntercostalisInternusR9R10_elem_sternum;
      AnyMuscleModel MusMdl = {
        F0=..MuscleModel.F0/..NumberOfElements;
        Lf0=..MuscleModel.F0;
        Vol0=..MuscleModel.Vol0/..NumberOfElements;
      };
      viewMuscle = {#include "../DrawSettings/MusDrawSettings3.any"};
    };
  };

  SplineMuscle_CreateMuscle IntercostalisInternusR10R11 (
  CREATE_ELEMENTS=IC_MULTIPLIER*(IC_SIZE),
  OriginSegment=....Segments.Left.R10Seg,
  ORIGIN_POINTS=....Data.unscaled.ModelParameters.R10.Left.IC_R10_Int_Inf.Points,
  InsertionSegment=....Segments.Left.R11Seg,
  INSERTION_POINTS=....Data.unscaled.ModelParameters.R11.Left.IC_R11_Int_Sup.Points,
  MUSCLE_MODEL_PARAMETERS=....MuscleModels.Left.IntercostalisInternus.IntercostalisInternusR10R11,
  )= {};

  SplineMuscle_CreateMuscle IntercostalisInternusR11R12 (
  CREATE_ELEMENTS=IC_MULTIPLIER*(IC_SIZE-1),
  OriginSegment=....Segments.Left.R11Seg,
  ORIGIN_POINTS=....Data.unscaled.ModelParameters.R11.Left.IC_R11_Int_Inf.Points,
  InsertionSegment=....Segments.Left.R12Seg,
  INSERTION_POINTS=....Data.unscaled.ModelParameters.R12.Left.IC_R12_Int_Sup.Points,
  MUSCLE_MODEL_PARAMETERS=....MuscleModels.Left.IntercostalisInternus.IntercostalisInternusR11R12,
  )= {};
};

MuscleGroup Intercostalisintimus(searchString="*.*") = {

  SplineMuscle_CreateMuscle IntercostalisIntimusR1R2(
  CREATE_ELEMENTS=IC_MULTIPLIER*(IC_SIZE),
  OriginSegment=....Segments.Left.R1Seg,
  ORIGIN_POINTS=....Data.unscaled.ModelParameters.R1.Left.IC_R1_Inn_Inf.Points,
  InsertionSegment=....Segments.Left.R2Seg,
  INSERTION_POINTS=....Data.unscaled.ModelParameters.R2.Left.IC_R2_Inn_Sup.Points,
  MUSCLE_MODEL_PARAMETERS=....MuscleModels.Left.IntercostalisIntimus.IntercostalisIntimusR1R2,
  )= {};

  SplineMuscle_CreateMuscle IntercostalisIntimusR2R3 (
  CREATE_ELEMENTS=IC_MULTIPLIER*(IC_SIZE+1),
  OriginSegment=....Segments.Left.R2Seg,
  ORIGIN_POINTS=....Data.unscaled.ModelParameters.R2.Left.IC_R2_Inn_Inf.Points,
  InsertionSegment=....Segments.Left.R5Seg,
  INSERTION_POINTS=....Data.unscaled.ModelParameters.R3.Left.IC_R3_Inn_Sup.Points,
  MUSCLE_MODEL_PARAMETERS=....MuscleModels.Left.IntercostalisIntimus.IntercostalisIntimusR2R3,
  )= {};

  SplineMuscle_CreateMuscle IntercostalisIntimusR3R4 (
  CREATE_ELEMENTS=IC_MULTIPLIER*(IC_SIZE+1),
  OriginSegment=....Segments.Left.R3Seg,
  ORIGIN_POINTS=....Data.unscaled.ModelParameters.R3.Left.IC_R3_Inn_Inf.Points,
  InsertionSegment=....Segments.Left.R4Seg,
  INSERTION_POINTS=....Data.unscaled.ModelParameters.R4.Left.IC_R4_Inn_Sup.Points,
  MUSCLE_MODEL_PARAMETERS=....MuscleModels.Left.IntercostalisIntimus.IntercostalisIntimusR3R4,
  )= {};

  SplineMuscle_CreateMuscle IntercostalisIntimusR4R5 (
  CREATE_ELEMENTS=IC_MULTIPLIER*(IC_SIZE+1),
  OriginSegment=....Segments.Left.R4Seg,
  ORIGIN_POINTS=....Data.unscaled.ModelParameters.R4.Left.IC_R4_Inn_Inf.Points,
  InsertionSegment=....Segments.Left.R5Seg,
  INSERTION_POINTS=....Data.unscaled.ModelParameters.R5.Left.IC_R5_Inn_Sup.Points,
  MUSCLE_MODEL_PARAMETERS=....MuscleModels.Left.IntercostalisIntimus.IntercostalisIntimusR4R5,
  )= {};

  SplineMuscle_CreateMuscle IntercostalisIntimusR5R6 (
  CREATE_ELEMENTS=IC_MULTIPLIER*(IC_SIZE+1),
  OriginSegment=....Segments.Left.R5Seg,
  ORIGIN_POINTS=....Data.unscaled.ModelParameters.R5.Left.IC_R5_Inn_Inf.Points,
  InsertionSegment=....Segments.Left.R6Seg,
  INSERTION_POINTS=....Data.unscaled.ModelParameters.R6.Left.IC_R6_Inn_Sup.Points,
  MUSCLE_MODEL_PARAMETERS=....MuscleModels.Left.IntercostalisIntimus.IntercostalisIntimusR5R6,
  )= {};

  SplineMuscle_CreateMuscle IntercostalisIntimusR6R7 (
  CREATE_ELEMENTS=IC_MULTIPLIER*(IC_SIZE+1),
  OriginSegment=....Segments.Left.R6Seg,
  ORIGIN_POINTS=....Data.unscaled.ModelParameters.R6.Left.IC_R6_Inn_Inf.Points,
  InsertionSegment=....Segments.Left.R7Seg,
  INSERTION_POINTS=....Data.unscaled.ModelParameters.R7.Left.IC_R7_Inn_Sup.Points,
  MUSCLE_MODEL_PARAMETERS=....MuscleModels.Left.IntercostalisIntimus.IntercostalisIntimusR6R7,
  )= {};

  SplineMuscle_CreateMuscle IntercostalisIntimusR7R8 (
  CREATE_ELEMENTS=IC_MULTIPLIER*(IC_SIZE+1),
  OriginSegment=....Segments.Left.R7Seg,
  ORIGIN_POINTS=....Data.unscaled.ModelParameters.R7.Left.IC_R7_Inn_Inf.Points,
  InsertionSegment=....Segments.Left.R8Seg,
  INSERTION_POINTS=....Data.unscaled.ModelParameters.R8.Left.IC_R8_Inn_Sup.Points,
  MUSCLE_MODEL_PARAMETERS=....MuscleModels.Left.IntercostalisIntimus.IntercostalisIntimusR7R8,
  )= {};

  SplineMuscle_CreateMuscle IntercostalisIntimusR8R9 (
  CREATE_ELEMENTS=IC_MULTIPLIER*(IC_SIZE+1),
  OriginSegment=....Segments.Left.R8Seg,
  ORIGIN_POINTS=....Data.unscaled.ModelParameters.R8.Left.IC_R8_Inn_Inf.Points,
  InsertionSegment=....Segments.Left.R9Seg,
  INSERTION_POINTS=....Data.unscaled.ModelParameters.R9.Left.IC_R9_Inn_Sup.Points,
  MUSCLE_MODEL_PARAMETERS=....MuscleModels.Left.IntercostalisIntimus.IntercostalisIntimusR8R9,
  )= {};

  SplineMuscle_CreateMuscle IntercostalisIntimusR9R10 (
  CREATE_ELEMENTS=IC_MULTIPLIER*(IC_SIZE+1),
  OriginSegment=....Segments.Left.R9Seg,
  ORIGIN_POINTS=....Data.unscaled.ModelParameters.R9.Left.IC_R9_Inn_Inf.Points,
  InsertionSegment=....Segments.Left.R10Seg,
  INSERTION_POINTS=....Data.unscaled.ModelParameters.R10.Left.IC_R10_Inn_Sup.Points,
  MUSCLE_MODEL_PARAMETERS=....MuscleModels.Left.IntercostalisIntimus.IntercostalisIntimusR9R10,
  )= {};

  SplineMuscle_CreateMuscle IntercostalisIntimusR10R11 (
  CREATE_ELEMENTS=IC_MULTIPLIER*(IC_SIZE),
  OriginSegment=....Segments.Left.R10Seg,
  ORIGIN_POINTS=....Data.unscaled.ModelParameters.R10.Left.IC_R10_Inn_Inf.Points,
  InsertionSegment=....Segments.Left.R11Seg,
  INSERTION_POINTS=....Data.unscaled.ModelParameters.R11.Left.IC_R11_Inn_Sup.Points,
  MUSCLE_MODEL_PARAMETERS=....MuscleModels.Left.IntercostalisIntimus.IntercostalisIntimusR10R11,
  )= {};

  SplineMuscle_CreateMuscle IntercostalisIntimusR11R12 (
  CREATE_ELEMENTS=IC_MULTIPLIER*(IC_SIZE-2),
  OriginSegment=....Segments.Left.R11Seg,
  ORIGIN_POINTS=....Data.unscaled.ModelParameters.R11.Left.IC_R11_Inn_Inf.Points,
  InsertionSegment=....Segments.Left.R12Seg,
  INSERTION_POINTS=....Data.unscaled.ModelParameters.R12.Left.IC_R12_Inn_Sup.Points,
  MUSCLE_MODEL_PARAMETERS=....MuscleModels.Left.IntercostalisIntimus.IntercostalisIntimusR11R12,
  )= {};

};
#endif

#if IC_TYPE != OLD

MuscleGroup IntercostalisExternus(searchString="*.*") = {

  SplineMuscle_CreateMuscleMultiOffset IntercostalisExternusR1R2 (
  CREATE_ELEMENTS=IC_MULTIPLIER*(IC_SIZE+1),
  OriginSegment=....Segments.Left.R1Seg,
  ORIGIN_POINTS=....Segments.Left.R1Seg.IC_points.Ext_InfPoints,
  InsertionSegment=....Segments.Left.R2Seg,
  INSERTION_POINTS=....Segments.Left.R2Seg.IC_points.Ext_SupPoints,
  MUSCLE_MODEL_PARAMETERS=....MuscleModels.Left.IntercostalisExternus.IntercostalisExternusR1R2,
  )= {DesiredAngle=45;};

  SplineMuscle_CreateMuscleMultiOffset IntercostalisExternusR2R3 (
  CREATE_ELEMENTS=IC_MULTIPLIER*(IC_SIZE+1),
  OriginSegment=....Segments.Left.R2Seg,
  ORIGIN_POINTS=....Segments.Left.R2Seg.IC_points.Ext_InfPoints,
  InsertionSegment=....Segments.Left.R3Seg,
  INSERTION_POINTS=....Segments.Left.R3Seg.IC_points.Ext_SupPoints,
  MUSCLE_MODEL_PARAMETERS=....MuscleModels.Left.IntercostalisExternus.IntercostalisExternusR2R3,
  )= {DesiredAngle=45;};


  SplineMuscle_CreateMuscleMultiOffset IntercostalisExternusR3R4 (
  CREATE_ELEMENTS=IC_MULTIPLIER*(IC_SIZE+1),
  OriginSegment=....Segments.Left.R3Seg,
  ORIGIN_POINTS=....Segments.Left.R3Seg.IC_points.Ext_InfPoints,
  InsertionSegment=....Segments.Left.R4Seg,
  INSERTION_POINTS=....Segments.Left.R4Seg.IC_points.Ext_SupPoints,
  MUSCLE_MODEL_PARAMETERS=....MuscleModels.Left.IntercostalisExternus.IntercostalisExternusR3R4,
  )= {DesiredAngle=45;};

  SplineMuscle_CreateMuscleMultiOffset IntercostalisExternusR4R5 (
  CREATE_ELEMENTS=IC_MULTIPLIER*(IC_SIZE+1),
  OriginSegment=....Segments.Left.R4Seg,
  ORIGIN_POINTS=....Segments.Left.R4Seg.IC_points.Ext_InfPoints,
  InsertionSegment=....Segments.Left.R5Seg,
  INSERTION_POINTS=....Segments.Left.R5Seg.IC_points.Ext_SupPoints,
  MUSCLE_MODEL_PARAMETERS=....MuscleModels.Left.IntercostalisExternus.IntercostalisExternusR4R5,
  )= {DesiredAngle=45;};


  SplineMuscle_CreateMuscleMultiOffset IntercostalisExternusR5R6 (
  CREATE_ELEMENTS=IC_MULTIPLIER*(IC_SIZE+1),
  OriginSegment=....Segments.Left.R5Seg,
  ORIGIN_POINTS=....Segments.Left.R5Seg.IC_points.Ext_InfPoints,
  InsertionSegment=....Segments.Left.R6Seg,
  INSERTION_POINTS=....Segments.Left.R6Seg.IC_points.Ext_SupPoints,
  MUSCLE_MODEL_PARAMETERS=....MuscleModels.Left.IntercostalisExternus.IntercostalisExternusR5R6,
  )= {DesiredAngle=45;};


  SplineMuscle_CreateMuscleMultiOffset IntercostalisExternusR6R7 (
  CREATE_ELEMENTS=IC_MULTIPLIER*(IC_SIZE+1),
  OriginSegment=....Segments.Left.R6Seg,
  ORIGIN_POINTS=....Segments.Left.R6Seg.IC_points.Ext_InfPoints,
  InsertionSegment=....Segments.Left.R7Seg,
  INSERTION_POINTS=....Segments.Left.R7Seg.IC_points.Ext_SupPoints,
  MUSCLE_MODEL_PARAMETERS=....MuscleModels.Left.IntercostalisExternus.IntercostalisExternusR6R7,
  )= {DesiredAngle=45;};

  SplineMuscle_CreateMuscleMultiOffset IntercostalisExternusR7R8 (
  CREATE_ELEMENTS=IC_MULTIPLIER*(IC_SIZE+1),
  OriginSegment=....Segments.Left.R7Seg,
  ORIGIN_POINTS=....Segments.Left.R7Seg.IC_points.Ext_InfPoints,
  InsertionSegment=....Segments.Left.R8Seg,
  INSERTION_POINTS=....Segments.Left.R8Seg.IC_points.Ext_SupPoints,
  MUSCLE_MODEL_PARAMETERS=....MuscleModels.Left.IntercostalisExternus.IntercostalisExternusR7R8,
  )= {DesiredAngle=45;};


  SplineMuscle_CreateMuscleMultiOffset IntercostalisExternusR8R9 (
  CREATE_ELEMENTS=IC_MULTIPLIER*(IC_SIZE+1),
  OriginSegment=....Segments.Left.R8Seg,
  ORIGIN_POINTS=....Segments.Left.R8Seg.IC_points.Ext_InfPoints,
  InsertionSegment=....Segments.Left.R9Seg,
  INSERTION_POINTS=....Segments.Left.R9Seg.IC_points.Ext_SupPoints,
  MUSCLE_MODEL_PARAMETERS=....MuscleModels.Left.IntercostalisExternus.IntercostalisExternusR8R9,
  )= {DesiredAngle=45;};

  SplineMuscle_CreateMuscleMultiOffset IntercostalisExternusR9R10 (
  CREATE_ELEMENTS=IC_MULTIPLIER*(IC_SIZE+1),
  OriginSegment=....Segments.Left.R9Seg,
  ORIGIN_POINTS=....Segments.Left.R9Seg.IC_points.Ext_InfPoints,
  InsertionSegment=....Segments.Left.R10Seg,
  INSERTION_POINTS=....Segments.Left.R10Seg.IC_points.Ext_SupPoints,
  MUSCLE_MODEL_PARAMETERS=....MuscleModels.Left.IntercostalisExternus.IntercostalisExternusR9R10,
  )= {DesiredAngle=45;};


  SplineMuscle_CreateMuscleMultiOffset IntercostalisExternusR10R11 (
  CREATE_ELEMENTS=IC_MULTIPLIER*(IC_SIZE),
  OriginSegment=....Segments.Left.R10Seg,
  ORIGIN_POINTS=....Segments.Left.R10Seg.IC_points.Ext_InfPoints,
  InsertionSegment=....Segments.Left.R11Seg,
  INSERTION_POINTS=....Segments.Left.R11Seg.IC_points.Ext_SupPoints,
  MUSCLE_MODEL_PARAMETERS=....MuscleModels.Left.IntercostalisExternus.IntercostalisExternusR10R11,
  )= {DesiredAngle=45;};


  SplineMuscle_CreateMuscleMultiOffset IntercostalisExternusR11R12 (
  CREATE_ELEMENTS=IC_MULTIPLIER*(IC_SIZE-4),
  OriginSegment=....Segments.Left.R11Seg,
  ORIGIN_POINTS=....Segments.Left.R11Seg.IC_points.Ext_InfPoints,
  InsertionSegment=....Segments.Left.R12Seg,
  INSERTION_POINTS=....Segments.Left.R12Seg.IC_points.Ext_SupPoints,
  MUSCLE_MODEL_PARAMETERS=....MuscleModels.Left.IntercostalisExternus.IntercostalisExternusR11R12,
  )= {DesiredAngle=45;};
};

MuscleGroup IntercostalisInternus(searchString="*.*") = {


  SplineMuscle_CreateMuscleMultiOffset IntercostalisInternusR1R2 (
  CREATE_ELEMENTS=IC_MULTIPLIER*(IC_SIZE+1-3),
  OriginSegment=....Segments.Left.R1Seg,
  ORIGIN_POINTS=....Segments.Left.R1Seg.IC_points.Int_InfPoints,
  InsertionSegment=....Segments.Left.R2Seg,
  INSERTION_POINTS=....Segments.Left.R2Seg.IC_points.Int_SupPoints,
  MUSCLE_MODEL_PARAMETERS=....MuscleModels.Left.IntercostalisInternus.IntercostalisInternusR1R2,
  )= {
    DesiredAngle =-45;
    NumberOfElements = IC_MULTIPLIER*(IC_SIZE+1-3);
    //The Last element is defined manually
    AnyMuscleViaPoint elem_sternum = {
      AnyRefNode &Org = .....Segments.SternumSeg.Left_IntercostalisInternusR1R2_elem_sternum;
      AnyRefNode &Ins = .InsertionSegment.IntercostalisInternusR1R2_elem_sternum;
      AnyMuscleModel MusMdl = {
        F0 = ..MuscleModel.F0/..NumberOfElements;
        Lf0 = ..MuscleModel.F0;
        Vol0 = ..MuscleModel.Vol0/..NumberOfElements;
      };
      viewMuscle = {#include "../DrawSettings/MusDrawSettings3.any"};
      // AnyDrawPLine drwLine = {AnyFloat RGB_Red= {1,0,0};AnyFloat RGB_Green= {0,1,0};RGB=iffun(gtfun(.LmtDot,0),RGB_Red,RGB_Green);Thickness=0.005;};
    };


  };

  SplineMuscle_CreateMuscleMultiOffset IntercostalisInternusR2R3 (
  CREATE_ELEMENTS=IC_MULTIPLIER*(IC_SIZE+1),
  OriginSegment=....Segments.Left.R2Seg,
  ORIGIN_POINTS=....Segments.Left.R2Seg.IC_points.Int_InfPoints,
  InsertionSegment=....Segments.Left.R3Seg,
  INSERTION_POINTS=....Segments.Left.R3Seg.IC_points.Int_SupPoints,
  MUSCLE_MODEL_PARAMETERS=....MuscleModels.Left.IntercostalisInternus.IntercostalisInternusR2R3,
  )= {
    DesiredAngle=-45;
    NumberOfElements =  IC_MULTIPLIER*(IC_SIZE+1);
    AnyMuscleViaPoint elem_sternum= {
      AnyRefNode &Org = .....Segments.SternalBodySeg.Left_IntercostalisInternusR2R3_elem_sternum;
      AnyRefNode &Ins = .InsertionSegment.IntercostalisInternusR2R3_elem_sternum;
      AnyMuscleModel MusMdl = {
        F0 = ..MuscleModel.F0/..NumberOfElements;
        Lf0 = ..MuscleModel.F0;
        Vol0 = ..MuscleModel.Vol0/..NumberOfElements;
      };
      viewMuscle = {#include "../DrawSettings/MusDrawSettings3.any"};
      // AnyDrawPLine drwLine = {AnyFloat RGB_Red= {1,0,0};AnyFloat RGB_Green= {0,1,0};RGB=iffun(gtfun(.LmtDot,0),RGB_Red,RGB_Green);Thickness=0.005;};
    };
  };


  SplineMuscle_CreateMuscleMultiOffset IntercostalisInternusR3R4 (
  CREATE_ELEMENTS=IC_MULTIPLIER*(IC_SIZE+1),
  OriginSegment=....Segments.Left.R3Seg,
  ORIGIN_POINTS=....Segments.Left.R3Seg.IC_points.Int_InfPoints,
  InsertionSegment=....Segments.Left.R4Seg,
  INSERTION_POINTS=....Segments.Left.R4Seg.IC_points.Int_SupPoints,
  MUSCLE_MODEL_PARAMETERS=....MuscleModels.Left.IntercostalisInternus.IntercostalisInternusR3R4,
  )= {
    DesiredAngle=-45;
    NumberOfElements =  IC_MULTIPLIER*(IC_SIZE+1);
    AnyMuscleViaPoint elem_sternum= {
      AnyRefNode &Org = .....Segments.SternalBodySeg.Left_IntercostalisInternusR3R4_elem_sternum;
      AnyRefNode &Ins = .InsertionSegment.IntercostalisInternusR3R4_elem_sternum;
      AnyMuscleModel MusMdl = {
        F0 = ..MuscleModel.F0/..NumberOfElements;
        Lf0 = ..MuscleModel.F0;
        Vol0 = ..MuscleModel.Vol0/..NumberOfElements;
      };
      viewMuscle = {#include "../DrawSettings/MusDrawSettings3.any"};
      // AnyDrawPLine drwLine = {AnyFloat RGB_Red= {1,0,0};AnyFloat RGB_Green= {0,1,0};RGB=iffun(gtfun(.LmtDot,0),RGB_Red,RGB_Green);Thickness=0.005;};
    };

  };

  SplineMuscle_CreateMuscleMultiOffset IntercostalisInternusR4R5 (
  CREATE_ELEMENTS=IC_MULTIPLIER*(IC_SIZE+1),
  OriginSegment=....Segments.Left.R4Seg,
  ORIGIN_POINTS=....Segments.Left.R4Seg.IC_points.Int_InfPoints,
  InsertionSegment=....Segments.Left.R5Seg,
  INSERTION_POINTS=....Segments.Left.R5Seg.IC_points.Int_SupPoints,
  MUSCLE_MODEL_PARAMETERS=....MuscleModels.Left.IntercostalisInternus.IntercostalisInternusR4R5,
  )= {
    DesiredAngle=-45;
    NumberOfElements =  IC_MULTIPLIER*(IC_SIZE+1);
    AnyMuscleViaPoint elem_sternum= {
      AnyRefNode &Org = .....Segments.SternalBodySeg.Left_IntercostalisInternusR4R5_elem_sternum;
      AnyRefNode &Ins = .InsertionSegment.IntercostalisInternusR4R5_elem_sternum;
      AnyMuscleModel MusMdl = {
        F0 = ..MuscleModel.F0/..NumberOfElements;
        Lf0 = ..MuscleModel.F0;
        Vol0 = ..MuscleModel.Vol0/..NumberOfElements;
      };
      viewMuscle = {#include "../DrawSettings/MusDrawSettings3.any"};
      // AnyDrawPLine drwLine = {AnyFloat RGB_Red= {1,0,0};AnyFloat RGB_Green= {0,1,0};RGB=iffun(gtfun(.LmtDot,0),RGB_Red,RGB_Green);Thickness=0.005;};
    };
  };


  SplineMuscle_CreateMuscleMultiOffset IntercostalisInternusR5R6 (
  CREATE_ELEMENTS=IC_MULTIPLIER*(IC_SIZE+1),
  OriginSegment=....Segments.Left.R5Seg,
  ORIGIN_POINTS=....Segments.Left.R5Seg.IC_points.Int_InfPoints,
  InsertionSegment=....Segments.Left.R6Seg,
  INSERTION_POINTS=....Segments.Left.R6Seg.IC_points.Int_SupPoints,
  MUSCLE_MODEL_PARAMETERS=....MuscleModels.Left.IntercostalisInternus.IntercostalisInternusR5R6,
  )= {
    DesiredAngle=-45;
    NumberOfElements =  IC_MULTIPLIER*(IC_SIZE+1);
    AnyMuscleViaPoint elem_sternum= {
      AnyRefNode &Org = .....Segments.SternalBodySeg.Left_IntercostalisInternusR5R6_elem_sternum;
      AnyRefNode &Ins = .InsertionSegment.IntercostalisInternusR5R6_elem_sternum;
      AnyMuscleModel MusMdl = {
        F0 = ..MuscleModel.F0/..NumberOfElements;
        Lf0 = ..MuscleModel.F0;
        Vol0 = ..MuscleModel.Vol0/..NumberOfElements;
      };
      viewMuscle = {#include "../DrawSettings/MusDrawSettings3.any"};
      // AnyDrawPLine drwLine = {AnyFloat RGB_Red= {1,0,0};AnyFloat RGB_Green= {0,1,0};RGB=iffun(gtfun(.LmtDot,0),RGB_Red,RGB_Green);Thickness=0.005;};
    };
  };


  SplineMuscle_CreateMuscleMultiOffset IntercostalisInternusR6R7 (
  CREATE_ELEMENTS=IC_MULTIPLIER*(IC_SIZE+1),
  OriginSegment=....Segments.Left.R6Seg,
  ORIGIN_POINTS=....Segments.Left.R6Seg.IC_points.Int_InfPoints,
  InsertionSegment=....Segments.Left.R7Seg,
  INSERTION_POINTS=....Segments.Left.R7Seg.IC_points.Int_SupPoints,
  MUSCLE_MODEL_PARAMETERS=....MuscleModels.Left.IntercostalisInternus.IntercostalisInternusR6R7,
  )= {
    DesiredAngle=-45;
    NumberOfElements =  IC_MULTIPLIER*(IC_SIZE+1);
    AnyMuscleViaPoint elem_sternum= {
      AnyRefNode &Org = .....Segments.SternalBodySeg.Left_IntercostalisInternusR6R7_elem_sternum;
      AnyRefNode &Ins = .InsertionSegment.IntercostalisInternusR6R7_elem_sternum;
      AnyMuscleModel MusMdl = {
        F0 = ..MuscleModel.F0/..NumberOfElements;
        Lf0 = ..MuscleModel.F0;
        Vol0 = ..MuscleModel.Vol0/..NumberOfElements;
      };
      viewMuscle = {#include "../DrawSettings/MusDrawSettings3.any"};
      // AnyDrawPLine drwLine = {AnyFloat RGB_Red= {1,0,0};AnyFloat RGB_Green= {0,1,0};RGB=iffun(gtfun(.LmtDot,0),RGB_Red,RGB_Green);Thickness=0.005;};

    };
  };

  SplineMuscle_CreateMuscleMultiOffset IntercostalisInternusR7R8 (
  CREATE_ELEMENTS=IC_MULTIPLIER*(IC_SIZE+1),
  OriginSegment=....Segments.Left.R7Seg,
  ORIGIN_POINTS=....Segments.Left.R7Seg.IC_points.Int_InfPoints,
  InsertionSegment=....Segments.Left.R8Seg,
  INSERTION_POINTS=....Segments.Left.R8Seg.IC_points.Int_SupPoints,
  MUSCLE_MODEL_PARAMETERS=....MuscleModels.Left.IntercostalisInternus.IntercostalisInternusR7R8,
  )= {
    DesiredAngle=-45;
    NumberOfElements =  IC_MULTIPLIER*(IC_SIZE+1);
    AnyMuscleViaPoint elem_sternum= {
      #if BM_TRUNK_THORACIC_STERNUM_TOPOLOGY == 4
      AnyRefNode &Org = .....Segments.Left.CostalCartilageSeg.Left_IntercostalisInternusR7R8_elem_sternum;
      #else
      AnyRefNode &Org = .....Segments.SternalBodySeg.Left_IntercostalisInternusR7R8_elem_sternum;
      #endif
      AnyRefNode &Ins = .InsertionSegment.IntercostalisInternusR7R8_elem_sternum;
      AnyMuscleModel MusMdl = {
        F0 = ..MuscleModel.F0/..NumberOfElements;
        Lf0 = ..MuscleModel.F0;
        Vol0 = ..MuscleModel.Vol0/..NumberOfElements;
      };
      viewMuscle = {#include "../DrawSettings/MusDrawSettings3.any"};
      // AnyDrawPLine drwLine = {AnyFloat RGB_Red= {1,0,0};AnyFloat RGB_Green= {0,1,0};RGB=iffun(gtfun(.LmtDot,0),RGB_Red,RGB_Green);Thickness=0.005;};

    };
  };


  SplineMuscle_CreateMuscleMultiOffset IntercostalisInternusR8R9 (
  CREATE_ELEMENTS=IC_MULTIPLIER*(IC_SIZE+1),
  OriginSegment=....Segments.Left.R8Seg,
  ORIGIN_POINTS=....Segments.Left.R8Seg.IC_points.Int_InfPoints,
  InsertionSegment=....Segments.Left.R9Seg,
  INSERTION_POINTS=....Segments.Left.R9Seg.IC_points.Int_SupPoints,
  MUSCLE_MODEL_PARAMETERS=....MuscleModels.Left.IntercostalisInternus.IntercostalisInternusR8R9,
  )= {
    DesiredAngle=-45;
    NumberOfElements =  IC_MULTIPLIER*(IC_SIZE+1);
    AnyMuscleViaPoint elem_sternum= {
      #if BM_TRUNK_THORACIC_STERNUM_TOPOLOGY == 4
      AnyRefNode &Org = .....Segments.Left.CostalCartilageSeg.Left_IntercostalisInternusR8R9_elem_sternum;
      #else
      AnyRefNode &Org = .....Segments.SternalBodySeg.Left_IntercostalisInternusR8R9_elem_sternum;
      #endif
      AnyRefNode &Ins = .InsertionSegment.IntercostalisInternusR8R9_elem_sternum;
      AnyMuscleModel MusMdl = {
        F0 = ..MuscleModel.F0/..NumberOfElements;
        Lf0 = ..MuscleModel.F0;
        Vol0 = ..MuscleModel.Vol0/..NumberOfElements;
      };
      viewMuscle = {#include "../DrawSettings/MusDrawSettings3.any"};
    };
  };

  SplineMuscle_CreateMuscleMultiOffset IntercostalisInternusR9R10 (
  CREATE_ELEMENTS=IC_MULTIPLIER*(IC_SIZE+1),
  OriginSegment=....Segments.Left.R9Seg,
  ORIGIN_POINTS=....Segments.Left.R9Seg.IC_points.Int_InfPoints,
  InsertionSegment=....Segments.Left.R10Seg,
  INSERTION_POINTS=....Segments.Left.R10Seg.IC_points.Int_SupPoints,
  MUSCLE_MODEL_PARAMETERS=....MuscleModels.Left.IntercostalisInternus.IntercostalisInternusR9R10,
  )= {
    DesiredAngle=-45;
    NumberOfElements =  IC_MULTIPLIER*(IC_SIZE+1);
    AnyMuscleViaPoint elem_sternum= {
      #if BM_TRUNK_THORACIC_STERNUM_TOPOLOGY == 4
      AnyRefNode &Org = .....Segments.Left.CostalCartilageSeg.Left_IntercostalisInternusR9R10_elem_sternum;
      #else
      AnyRefNode &Org = .....Segments.SternalBodySeg.Left_IntercostalisInternusR9R10_elem_sternum;
      #endif
      AnyRefNode &Ins = .InsertionSegment.IntercostalisInternusR9R10_elem_sternum;
      AnyMuscleModel MusMdl = {
        F0 = ..MuscleModel.F0/..NumberOfElements;
        Lf0 = ..MuscleModel.F0;
        Vol0 = ..MuscleModel.Vol0/..NumberOfElements;
      };
      viewMuscle = {#include "../DrawSettings/MusDrawSettings3.any"};
    };
  };


  SplineMuscle_CreateMuscleMultiOffset IntercostalisInternusR10R11 (
  CREATE_ELEMENTS=IC_MULTIPLIER*(IC_SIZE),
  OriginSegment=....Segments.Left.R10Seg,
  ORIGIN_POINTS=....Segments.Left.R10Seg.IC_points.Int_InfPoints,
  InsertionSegment=....Segments.Left.R11Seg,
  INSERTION_POINTS=....Segments.Left.R11Seg.IC_points.Int_SupPoints,
  MUSCLE_MODEL_PARAMETERS=....MuscleModels.Left.IntercostalisInternus.IntercostalisInternusR10R11,
  )= {DesiredAngle=-45;};


  SplineMuscle_CreateMuscleMultiOffset IntercostalisInternusR11R12 (
  CREATE_ELEMENTS=IC_MULTIPLIER*(IC_SIZE-4),
  OriginSegment=....Segments.Left.R11Seg,
  ORIGIN_POINTS=....Segments.Left.R11Seg.IC_points.Int_InfPoints,
  InsertionSegment=....Segments.Left.R12Seg,
  INSERTION_POINTS=....Segments.Left.R12Seg.IC_points.Int_SupPoints,
  MUSCLE_MODEL_PARAMETERS=....MuscleModels.Left.IntercostalisInternus.IntercostalisInternusR11R12,
  )= {DesiredAngle=-45;};
};

MuscleGroup IntercostalisIntimus(searchString="*.*") = {

  SplineMuscle_CreateMuscleMultiOffset IntercostalisIntimusR1R2 (
  CREATE_ELEMENTS= IC_MULTIPLIER*IC_SIZE,
  OriginSegment=....Segments.Left.R1Seg,
  ORIGIN_POINTS=....Segments.Left.R1Seg.IC_points.Inn_InfPoints,
  InsertionSegment=....Segments.Left.R2Seg,
  INSERTION_POINTS=....Segments.Left.R2Seg.IC_points.Inn_SupPoints,
  MUSCLE_MODEL_PARAMETERS=....MuscleModels.Left.IntercostalisIntimus.IntercostalisIntimusR1R2,
  )= {DesiredAngle = 0;};

  SplineMuscle_CreateMuscleMultiOffset IntercostalisIntimusR2R3 (
  CREATE_ELEMENTS=IC_MULTIPLIER*(IC_SIZE+3),
  OriginSegment=....Segments.Left.R2Seg,
  ORIGIN_POINTS=....Segments.Left.R2Seg.IC_points.Inn_InfPoints,
  InsertionSegment=....Segments.Left.R3Seg,
  INSERTION_POINTS=....Segments.Left.R3Seg.IC_points.Inn_SupPoints,
  MUSCLE_MODEL_PARAMETERS=....MuscleModels.Left.IntercostalisIntimus.IntercostalisIntimusR2R3,
  )= {DesiredAngle = 0;};


  SplineMuscle_CreateMuscleMultiOffset IntercostalisIntimusR3R4 (
  CREATE_ELEMENTS=IC_MULTIPLIER*(IC_SIZE+3),
  OriginSegment=....Segments.Left.R3Seg,
  ORIGIN_POINTS=....Segments.Left.R3Seg.IC_points.Inn_InfPoints,
  InsertionSegment=....Segments.Left.R4Seg,
  INSERTION_POINTS=....Segments.Left.R4Seg.IC_points.Inn_SupPoints,
  MUSCLE_MODEL_PARAMETERS=....MuscleModels.Left.IntercostalisIntimus.IntercostalisIntimusR3R4,
  )= {DesiredAngle = 0;};

  SplineMuscle_CreateMuscleMultiOffset IntercostalisIntimusR4R5 (
  CREATE_ELEMENTS=IC_MULTIPLIER*(IC_SIZE+3),
  OriginSegment=....Segments.Left.R4Seg,
  ORIGIN_POINTS=....Segments.Left.R4Seg.IC_points.Inn_InfPoints,
  InsertionSegment=....Segments.Left.R5Seg,
  INSERTION_POINTS=....Segments.Left.R5Seg.IC_points.Inn_SupPoints,
  MUSCLE_MODEL_PARAMETERS=....MuscleModels.Left.IntercostalisIntimus.IntercostalisIntimusR4R5,
  )= {DesiredAngle = 0;};


  SplineMuscle_CreateMuscleMultiOffset IntercostalisIntimusR5R6 (
  CREATE_ELEMENTS=IC_MULTIPLIER*(IC_SIZE+3),
  OriginSegment=....Segments.Left.R5Seg,
  ORIGIN_POINTS=....Segments.Left.R5Seg.IC_points.Inn_InfPoints,
  InsertionSegment=....Segments.Left.R6Seg,
  INSERTION_POINTS=....Segments.Left.R6Seg.IC_points.Inn_SupPoints,
  MUSCLE_MODEL_PARAMETERS=....MuscleModels.Left.IntercostalisIntimus.IntercostalisIntimusR5R6,
  )= {DesiredAngle = 0;};


  SplineMuscle_CreateMuscleMultiOffset IntercostalisIntimusR6R7 (
  CREATE_ELEMENTS=IC_MULTIPLIER*(IC_SIZE+3),
  OriginSegment=....Segments.Left.R6Seg,
  ORIGIN_POINTS=....Segments.Left.R6Seg.IC_points.Inn_InfPoints,
  InsertionSegment=....Segments.Left.R7Seg,
  INSERTION_POINTS=....Segments.Left.R7Seg.IC_points.Inn_SupPoints,
  MUSCLE_MODEL_PARAMETERS=....MuscleModels.Left.IntercostalisIntimus.IntercostalisIntimusR6R7,
  )= {DesiredAngle = 0;};

  SplineMuscle_CreateMuscleMultiOffset IntercostalisIntimusR7R8 (
  CREATE_ELEMENTS=IC_MULTIPLIER*(IC_SIZE+3),
  OriginSegment=....Segments.Left.R7Seg,
  ORIGIN_POINTS=....Segments.Left.R7Seg.IC_points.Inn_InfPoints,
  InsertionSegment=....Segments.Left.R8Seg,
  INSERTION_POINTS=....Segments.Left.R8Seg.IC_points.Inn_SupPoints,
  MUSCLE_MODEL_PARAMETERS=....MuscleModels.Left.IntercostalisIntimus.IntercostalisIntimusR7R8,
  )= {DesiredAngle = 0;};


  SplineMuscle_CreateMuscleMultiOffset IntercostalisIntimusR8R9 (
  CREATE_ELEMENTS=IC_MULTIPLIER*(IC_SIZE+3),
  OriginSegment=....Segments.Left.R8Seg,
  ORIGIN_POINTS=....Segments.Left.R8Seg.IC_points.Inn_InfPoints,
  InsertionSegment=....Segments.Left.R9Seg,
  INSERTION_POINTS=....Segments.Left.R9Seg.IC_points.Inn_SupPoints,
  MUSCLE_MODEL_PARAMETERS=....MuscleModels.Left.IntercostalisIntimus.IntercostalisIntimusR8R9,
  )= {DesiredAngle = 0;};

  SplineMuscle_CreateMuscleMultiOffset IntercostalisIntimusR9R10 (
  CREATE_ELEMENTS=IC_MULTIPLIER*(IC_SIZE+3),
  OriginSegment=....Segments.Left.R9Seg,
  ORIGIN_POINTS=....Segments.Left.R9Seg.IC_points.Inn_InfPoints,
  InsertionSegment=....Segments.Left.R10Seg,
  INSERTION_POINTS=....Segments.Left.R10Seg.IC_points.Inn_SupPoints,
  MUSCLE_MODEL_PARAMETERS=....MuscleModels.Left.IntercostalisIntimus.IntercostalisIntimusR9R10,
  )= {DesiredAngle = 0;};

  SplineMuscle_CreateMuscleMultiOffset IntercostalisIntimusR10R11 (
  CREATE_ELEMENTS=IC_MULTIPLIER*(IC_SIZE),
  OriginSegment=....Segments.Left.R10Seg,
  ORIGIN_POINTS=....Segments.Left.R10Seg.IC_points.Inn_InfPoints,
  InsertionSegment=....Segments.Left.R11Seg,
  INSERTION_POINTS=....Segments.Left.R11Seg.IC_points.Inn_SupPoints,
  MUSCLE_MODEL_PARAMETERS=....MuscleModels.Left.IntercostalisIntimus.IntercostalisIntimusR10R11,
  )= {DesiredAngle = 0;};


  SplineMuscle_CreateMuscleMultiOffset IntercostalisIntimusR11R12 (
  CREATE_ELEMENTS=IC_MULTIPLIER*(IC_SIZE-4),
  OriginSegment=....Segments.Left.R11Seg,
  ORIGIN_POINTS=....Segments.Left.R11Seg.IC_points.Inn_InfPoints,
  InsertionSegment=....Segments.Left.R12Seg,
  INSERTION_POINTS=....Segments.Left.R12Seg.IC_points.Inn_SupPoints,
  MUSCLE_MODEL_PARAMETERS=....MuscleModels.Left.IntercostalisIntimus.IntercostalisIntimusR11R12,
  )= {DesiredAngle = 0;};

};

#endif

#endif

MuscleGroup LevatorCostarum = {

  AnyMuscleViaPoint LevatorCostarumC7R1 = {
    AnyMuscleModel &MusMdl = ....MuscleModels.Left.LevatorCostarum.LevatorCostarumC7R1;
    AnyRefNode &S4 = ....Segments.C7Seg.LevatorCostarumC7R1LOrg;
    AnyRefNode &R1 = ....Segments.Left.R1Seg.LevatorCostarumC7R1_L_Ins;
    viewMuscle = {#include "../DrawSettings/MusDrawSettings.any"};
    viewForce.Visible ??= Off;
  };
  #if BM_TRUNK_THORACIC_MODEL == _THORACIC_MODEL_FLEXIBLE_
  AnyMuscleViaPoint LevatorCostarumT1R2 = {
    AnyMuscleModel &MusMdl = ....MuscleModels.Left.LevatorCostarum.LevatorCostarumT1R2;
    AnyRefNode &S4 = ....Segments.T1Seg.LevatorCostarumT1R2LOrg;
    AnyRefNode &R1 = ....Segments.Left.R2Seg.LevatorCostarumT1R2_L_Ins;
    viewMuscle = {#include "../DrawSettings/MusDrawSettings.any"};
    viewForce.Visible ??= Off;
  };

  AnyMuscleViaPoint LevatorCostarumT2R3 = {
    AnyMuscleModel &MusMdl = ....MuscleModels.Left.LevatorCostarum.LevatorCostarumT2R3;
    AnyRefNode &S4 = ....Segments.T2Seg.LevatorCostarumT2R3LOrg;
    AnyRefNode &R1 = ....Segments.Left.R3Seg.LevatorCostarumT2R3_L_Ins;
    viewMuscle = {#include "../DrawSettings/MusDrawSettings.any"};
    viewForce.Visible ??= Off;
  };

  AnyMuscleViaPoint LevatorCostarumT3R4 = {
    AnyMuscleModel &MusMdl = ....MuscleModels.Left.LevatorCostarum.LevatorCostarumT3R4;
    AnyRefNode &S4 = ....Segments.T3Seg.LevatorCostarumT3R4LOrg;
    AnyRefNode &R1 = ....Segments.Left.R4Seg.LevatorCostarumT3R4_L_Ins;
    viewMuscle = {#include "../DrawSettings/MusDrawSettings.any"};
    viewForce.Visible ??= Off;
  };

  AnyMuscleViaPoint LevatorCostarumT4R5 = {
    AnyMuscleModel &MusMdl = ....MuscleModels.Left.LevatorCostarum.LevatorCostarumT4R5;
    AnyRefNode &S4 = ....Segments.T4Seg.LevatorCostarumT4R5LOrg;
    AnyRefNode &R1 = ....Segments.Left.R5Seg.LevatorCostarumT4R5_L_Ins;
    viewMuscle = {#include "../DrawSettings/MusDrawSettings.any"};
    viewForce.Visible ??= Off;
  };

  AnyMuscleViaPoint LevatorCostarumT5R6 = {
    AnyMuscleModel &MusMdl = ....MuscleModels.Left.LevatorCostarum.LevatorCostarumT5R6;
    AnyRefNode &S4 = ....Segments.T5Seg.LevatorCostarumT5R6LOrg;
    AnyRefNode &R1 = ....Segments.Left.R6Seg.LevatorCostarumT5R6_L_Ins;
    viewMuscle = {#include "../DrawSettings/MusDrawSettings.any"};
    viewForce.Visible ??= Off;
  };

  AnyMuscleViaPoint LevatorCostarumT6R7 = {
    AnyMuscleModel &MusMdl = ....MuscleModels.Left.LevatorCostarum.LevatorCostarumT6R7;
    AnyRefNode &S4 = ....Segments.T6Seg.LevatorCostarumT6R7LOrg;
    AnyRefNode &R1 = ....Segments.Left.R7Seg.LevatorCostarumT6R7_L_Ins;
    viewMuscle = {#include "../DrawSettings/MusDrawSettings.any"};
    viewForce.Visible ??= Off;
  };

  AnyMuscleViaPoint LevatorCostarumT7R8 = {
    AnyMuscleModel &MusMdl = ....MuscleModels.Left.LevatorCostarum.LevatorCostarumT7R8;
    AnyRefNode &S4 = ....Segments.T7Seg.LevatorCostarumT7R8LOrg;
    AnyRefNode &R1 = ....Segments.Left.R8Seg.LevatorCostarumT7R8_L_Ins;
    viewMuscle = {#include "../DrawSettings/MusDrawSettings.any"};
    viewForce.Visible ??= Off;
  };

  AnyMuscleViaPoint LevatorCostarumT8R9 = {
    AnyMuscleModel &MusMdl = ....MuscleModels.Left.LevatorCostarum.LevatorCostarumT8R9;
    AnyRefNode &S4 = ....Segments.T8Seg.LevatorCostarumT8R9LOrg;
    AnyRefNode &R1 = ....Segments.Left.R9Seg.LevatorCostarumT8R9_L_Ins;
    viewMuscle = {#include "../DrawSettings/MusDrawSettings.any"};
    viewForce.Visible ??= Off;
  };

  AnyMuscleViaPoint LevatorCostarumT9R10 = {
    AnyMuscleModel &MusMdl = ....MuscleModels.Left.LevatorCostarum.LevatorCostarumT9R10;
    AnyRefNode &S4 = ....Segments.T9Seg.LevatorCostarumT9R10LOrg;
    AnyRefNode &R1 = ....Segments.Left.R10Seg.LevatorCostarumT9R10_L_Ins;
    viewMuscle = {#include "../DrawSettings/MusDrawSettings.any"};
    viewForce.Visible ??= Off;
  };

  AnyMuscleViaPoint LevatorCostarumT10R11 = {
    AnyMuscleModel &MusMdl = ....MuscleModels.Left.LevatorCostarum.LevatorCostarumT10R11;
    AnyRefNode &S4 = ....Segments.T10Seg.LevatorCostarumT10R11LOrg;
    AnyRefNode &R1 = ....Segments.Left.R11Seg.LevatorCostarumT10R11_L_Ins;
    viewMuscle = {#include "../DrawSettings/MusDrawSettings.any"};
    viewForce.Visible ??= Off;
  };

  AnyMuscleViaPoint LevatorCostarumT11R12 = {
    AnyMuscleModel &MusMdl = ....MuscleModels.Left.LevatorCostarum.LevatorCostarumT11R12;
    AnyRefNode &S4 = ....Segments.T11Seg.LevatorCostarumT11R12LOrg;
    AnyRefNode &R1 = ....Segments.Left.R12Seg.LevatorCostarumT11R12_L_Ins;
    viewMuscle = {#include "../DrawSettings/MusDrawSettings.any"};
    viewForce.Visible ??= Off;
  };

  // LONGUS
  AnyMuscleViaPoint LevatorCostarumT5R7 = {
    AnyMuscleModel &MusMdl = ....MuscleModels.Left.LevatorCostarum.LevatorCostarumT5R7;
    AnyRefNode &S4 = ....Segments.T5Seg.LevatorCostarumT5R7LOrg;
    AnyRefNode &R1 = ....Segments.Left.R7Seg.LevatorCostarumT5R7_L_Ins;
    viewMuscle = {#include "../DrawSettings/MusDrawSettings.any"};
    viewForce.Visible ??= Off;
  };

  AnyMuscleViaPoint LevatorCostarumT6R8 = {
    AnyMuscleModel &MusMdl = ....MuscleModels.Left.LevatorCostarum.LevatorCostarumT6R8;
    AnyRefNode &S4 = ....Segments.T6Seg.LevatorCostarumT6R8LOrg;
    AnyRefNode &R1 = ....Segments.Left.R8Seg.LevatorCostarumT6R8_L_Ins;
    viewMuscle = {#include "../DrawSettings/MusDrawSettings.any"};
    viewForce.Visible ??= Off;
  };

  AnyMuscleViaPoint LevatorCostarumT7R9 = {
    AnyMuscleModel &MusMdl = ....MuscleModels.Left.LevatorCostarum.LevatorCostarumT7R9;
    AnyRefNode &S4 = ....Segments.T7Seg.LevatorCostarumT7R9LOrg;
    AnyRefNode &R1 = ....Segments.Left.R9Seg.LevatorCostarumT7R9_L_Ins;
    viewMuscle = {#include "../DrawSettings/MusDrawSettings.any"};
    viewForce.Visible ??= Off;
  };

  AnyMuscleViaPoint LevatorCostarumT8R10 = {
    AnyMuscleModel &MusMdl = ....MuscleModels.Left.LevatorCostarum.LevatorCostarumT8R10;
    AnyRefNode &S4 = ....Segments.T8Seg.LevatorCostarumT8R10LOrg;
    AnyRefNode &R1 = ....Segments.Left.R10Seg.LevatorCostarumT8R10_L_Ins;
    viewMuscle = {#include "../DrawSettings/MusDrawSettings.any"};
    viewForce.Visible ??= Off;
  };

  AnyMuscleViaPoint LevatorCostarumT9R11 = {
    AnyMuscleModel &MusMdl = ....MuscleModels.Left.LevatorCostarum.LevatorCostarumT9R11;
    AnyRefNode &S4 = ....Segments.T9Seg.LevatorCostarumT9R11LOrg;
    AnyRefNode &R1 = ....Segments.Left.R11Seg.LevatorCostarumT9R11_L_Ins;
    viewMuscle = {#include "../DrawSettings/MusDrawSettings.any"};
    viewForce.Visible ??= Off;
  };

  AnyMuscleViaPoint LevatorCostarumT10R12 = {
    AnyMuscleModel &MusMdl = ....MuscleModels.Left.LevatorCostarum.LevatorCostarumT10R12;
    AnyRefNode &S4 = ....Segments.T10Seg.LevatorCostarumT10R12LOrg;
    AnyRefNode &R1 = ....Segments.Left.R12Seg.LevatorCostarumT10R12_L_Ins;
    viewMuscle = {#include "../DrawSettings/MusDrawSettings.any"};
    viewForce.Visible ??= Off;
  };
  #endif
};

MuscleGroup LongissimusCapitis = {
  AnyMuscleViaPoint LongissimusCapitisC3 = {
    AnyMuscleModel &MusMdl = ....MuscleModels.Left.LongissimusCapitis.LongissimusCapitisC3;
    AnyRefNode &Org = ....Segments.C3Seg.LongissimusCapitisC3NodeL;
    AnyRefNode &Ins = ....Segments.SkullSeg.LongissimusCapitisNodeL;
    viewMuscle = {#include "../DrawSettings/MusDrawSettings.any"};
    viewForce.Visible ??= Off;
  };
  AnyMuscleViaPoint LongissimusCapitisC4 = {
    AnyMuscleModel &MusMdl = ....MuscleModels.Left.LongissimusCapitis.LongissimusCapitisC4;
    AnyRefNode &Org = ....Segments.C4Seg.LongissimusCapitisC4NodeL;
    AnyRefNode &Ins = ....Segments.SkullSeg.LongissimusCapitisNodeL;
    viewMuscle = {#include "../DrawSettings/MusDrawSettings.any"};
    viewForce.Visible ??= Off;
  };
  AnyMuscleViaPoint LongissimusCapitisC5 = {
    AnyMuscleModel &MusMdl = ....MuscleModels.Left.LongissimusCapitis.LongissimusCapitisC5;
    AnyRefNode &Org = ....Segments.C5Seg.LongissimusCapitisC5NodeL;
    AnyRefNode &Ins = ....Segments.SkullSeg.LongissimusCapitisNodeL;
    viewMuscle = {#include "../DrawSettings/MusDrawSettings.any"};
    viewForce.Visible ??= Off;
  };
  AnyMuscleViaPoint LongissimusCapitisC6 = {
    AnyMuscleModel &MusMdl = ....MuscleModels.Left.LongissimusCapitis.LongissimusCapitisC6;
    AnyRefNode &Org = ....Segments.C6Seg.LongissimusCapitisC6NodeL;
    AnyRefNode &Ins = ....Segments.SkullSeg.LongissimusCapitisNodeL;
    viewMuscle = {#include "../DrawSettings/MusDrawSettings.any"};
    viewForce.Visible ??= Off;
  };
  AnyMuscleViaPoint LongissimusCapitisC7 = {
    AnyMuscleModel &MusMdl = ....MuscleModels.Left.LongissimusCapitis.LongissimusCapitisC7;
    AnyRefNode &Org = ....Segments.C7Seg.LongissimusCapitisC7NodeL;
    AnyRefNode &Ins = ....Segments.SkullSeg.LongissimusCapitisNodeL;
    viewMuscle = {#include "../DrawSettings/MusDrawSettings.any"};
    viewForce.Visible ??= Off;
  };
  AnyMuscleViaPoint LongissimusCapitisT1 = {
    AnyMuscleModel &MusMdl = ....MuscleModels.Left.LongissimusCapitis.LongissimusCapitisT1;
    AnyRefNode &Org = ....Segments.T1Seg.Left.LongissimusCapitisT1Node;
    AnyRefNode &Ins = ....Segments.SkullSeg.LongissimusCapitisNodeL;
    viewMuscle = {#include "../DrawSettings/MusDrawSettings.any"};
    viewForce.Visible ??= Off;
  };
  AnyMuscleViaPoint LongissimusCapitisT2 = {
    AnyMuscleModel &MusMdl = ....MuscleModels.Left.LongissimusCapitis.LongissimusCapitisT2;
    AnyRefNode &Org = ....Segments.T2Seg.Left.LongissimusCapitisT2Node;
    AnyRefNode &Ins = ....Segments.SkullSeg.LongissimusCapitisNodeL;
    viewMuscle = {#include "../DrawSettings/MusDrawSettings.any"};
    viewForce.Visible ??= Off;
  };
  AnyMuscleViaPoint LongissimusCapitisT3 = {
    AnyMuscleModel &MusMdl = ....MuscleModels.Left.LongissimusCapitis.LongissimusCapitisT3;
    AnyRefNode &Org = ....Segments.T3Seg.Left.LongissimusCapitisT3Node;
    AnyRefNode &Ins = ....Segments.SkullSeg.LongissimusCapitisNodeL;
    viewMuscle = {#include "../DrawSettings/MusDrawSettings.any"};
    viewForce.Visible ??= Off;
  };
  AnyMuscleViaPoint LongissimusCapitisT4 = {
    AnyMuscleModel &MusMdl = ....MuscleModels.Left.LongissimusCapitis.LongissimusCapitisT4;
    AnyRefNode &Org = ....Segments.T4Seg.Left.LongissimusCapitisT4Node;
    AnyRefNode &Ins = ....Segments.SkullSeg.LongissimusCapitisNodeL;
    viewMuscle = {#include "../DrawSettings/MusDrawSettings.any"};
    viewForce.Visible ??= Off;
  };
  AnyMuscleViaPoint LongissimusCapitisT5 = {
    AnyMuscleModel &MusMdl = ....MuscleModels.Left.LongissimusCapitis.LongissimusCapitisT5;
    AnyRefNode &Org = ....Segments.T5Seg.Left.LongissimusCapitisT5Node;
    AnyRefNode &Ins = ....Segments.SkullSeg.LongissimusCapitisNodeL;
    viewMuscle = {#include "../DrawSettings/MusDrawSettings.any"};
    viewForce.Visible ??= Off;
  };
};

MuscleGroup LongissimusCervicis = {
  AnyMuscleViaPoint LongissimusCervicisT1C2 = {
    AnyMuscleModel &MusMdl = ....MuscleModels.Left.LongissimusCervicis.LongissimusCervicisT1C2;
    AnyRefNode &Org = ....Segments.T1Seg.Left.LongissimusCervicisT1Node;
    AnyRefNode &Ins = ....Segments.C2Seg.Left.LongissimusCervicisT1C2Node;
    viewMuscle = {#include "../DrawSettings/MusDrawSettings.any"};
    viewForce.Visible ??= Off;
  };

  AnyMuscleViaPoint LongissimusCervicisT2C3 = {
    AnyMuscleModel &MusMdl = ....MuscleModels.Left.LongissimusCervicis.LongissimusCervicisT2C3;
    AnyRefNode &Org = ....Segments.T2Seg.Left.LongissimusCervicisT2Node;
    AnyRefNode &Ins = ....Segments.C3Seg.Left.LongissimusCervicisT2C3Node;
    viewMuscle = {#include "../DrawSettings/MusDrawSettings.any"};
    viewForce.Visible ??= Off;
  };

  AnyMuscleViaPoint LongissimusCervicisT3C4 = {
    AnyMuscleModel &MusMdl = ....MuscleModels.Left.LongissimusCervicis.LongissimusCervicisT3C4;
    AnyRefNode &Org = ....Segments.T3Seg.Left.LongissimusCervicisT3Node;
    AnyRefNode &Ins = ....Segments.C4Seg.Left.LongissimusCervicisT3C4Node;
    viewMuscle = {#include "../DrawSettings/MusDrawSettings.any"};
    viewForce.Visible ??= Off;
  };

  AnyMuscleViaPoint LongissimusCervicisT4C5 = {
    AnyMuscleModel &MusMdl = ....MuscleModels.Left.LongissimusCervicis.LongissimusCervicisT4C5;
    AnyRefNode &Org = ....Segments.T4Seg.Left.LongissimusCervicisT4Node;
    AnyRefNode &Ins = ....Segments.C5Seg.Left.LongissimusCervicisT4C5Node;
    viewMuscle = {#include "../DrawSettings/MusDrawSettings.any"};
    viewForce.Visible ??= Off;
  };

  AnyMuscleViaPoint LongissimusCervicisT5C6 = {
    AnyMuscleModel &MusMdl = ....MuscleModels.Left.LongissimusCervicis.LongissimusCervicisT5C6;
    AnyRefNode &Org = ....Segments.T5Seg.Left.LongissimusCervicisT5Node;
    AnyRefNode &Ins = ....Segments.C6Seg.Left.LongissimusCervicisT5C6Node;
    viewMuscle = {#include "../DrawSettings/MusDrawSettings.any"};
    viewForce.Visible ??= Off;
  };
};
///The longissimus thoracis is a component of the erector spinae muscle group. It consists of two parts: lumbar and thoracic.
///The thoracic part inserts into the transverse processes of vertebrae T1 - T12 and the angles of ribs 3 - 12.
/// Refrence: Bakkum, B.W., Cramer, G.D.: Muscles That Influence the Spine. In: Clinical Anatomy of the Spine, Spinal Cord, and Ans. pp. 98 - 134. Elsevier (2014) (DOI: 10.1016/B978-0-323-07954-9.00004-9)
MuscleGroup LongissimusThoracis = {
  // Longissimus thoracis part lumbar
  AnyMuscleViaPoint LongissimusThoracisL1IC = {
    AnyMuscleModel &MusMdl = ....MuscleModels.Left.LongissimusThoracis.LongissimusThoracisL1IC;
    AnyRefNode &Org = ....Segments.L1Seg.LongissimusThoracisL1ICNodeL;
    #if BM_TRUNK_CAVITY_MODEL == _CAVITY_MODEL_VOLUME_
    AnyRefNode &Via1 = ....Abdominal.Layer_L3.BaseSegPosterior.LongissimusThoracisL1ICViaNodeL;
    #else
    AnyRefNode &Via1 = ....Segments.L2Seg.LongissimusThoracisL1ICViaNodeL;
    #endif
    AnyRefNode &Ins = ....Segments.PelvisSeg.LongissimusThoracisL1ICNodeL;
    viewMuscle = {#include "../DrawSettings/MusDrawSettings.any"};
    viewForce.Visible ??= Off;
  };
  AnyMuscleViaPoint LongissimusThoracisL2IC = {
    AnyMuscleModel &MusMdl = ....MuscleModels.Left.LongissimusThoracis.LongissimusThoracisL2IC;
    AnyRefNode &Org = ....Segments.L2Seg.LongissimusThoracisL2ICNodeL;
    AnyRefNode &Ins = ....Segments.PelvisSeg.LongissimusThoracisL2ICNodeL;
    viewMuscle = {#include "../DrawSettings/MusDrawSettings.any"};
    viewForce.Visible ??= Off;
  };
  AnyMuscleViaPoint LongissimusThoracisL3IC = {
    AnyMuscleModel &MusMdl = ....MuscleModels.Left.LongissimusThoracis.LongissimusThoracisL3IC;
    AnyRefNode &Org = ....Segments.L3Seg.LongissimusThoracisL3ICNodeL;
    AnyRefNode &Ins = ....Segments.PelvisSeg.LongissimusThoracisL3ICNodeL;
    viewMuscle = {#include "../DrawSettings/MusDrawSettings.any"};
    viewForce.Visible ??= Off;
  };
  AnyMuscleViaPoint LongissimusThoracisL4IC = {
    AnyMuscleModel &MusMdl = ....MuscleModels.Left.LongissimusThoracis.LongissimusThoracisL4IC;
    AnyRefNode &Org = ....Segments.L4Seg.LongissimusThoracisL4ICNodeL;
    AnyRefNode &Ins = ....Segments.PelvisSeg.LongissimusThoracisL4ICNodeL;
    viewMuscle = {#include "../DrawSettings/MusDrawSettings.any"};
    viewForce.Visible ??= Off;
  };
  AnyMuscleViaPoint LongissimusThoracisL5Ilium = {
    AnyMuscleModel &MusMdl = ....MuscleModels.Left.LongissimusThoracis.LongissimusThoracisL5Ilium;
    AnyRefNode &Org = ....Segments.L5Seg.LongissimusThoracisL5IliumNodeL;
    AnyRefNode &Ins = ....Segments.SacrumSeg.LongissimusThoracisL5IliumNodeL;
    viewMuscle = {#include "../DrawSettings/MusDrawSettings.any"};
    viewForce.Visible ??= Off;
  };
    // End of Longissimus thoracis part lumbar

    // Longissimus thoracis part thoracis
  AnyMuscleViaPoint LongissimusThoracisT1L1 = {
    AnyMuscleModel &MusMdl = ....MuscleModels.Left.LongissimusThoracis.LongissimusThoracisT1L1;
    AnyRefNode &Org = ....Segments.T1Seg.LongissimusThoracisT1L1NodeL;
    AnyRefNode &Via1 = ....Segments.T2Seg.LongissimusThoracisT1L1Via1NodeL;
    AnyRefNode &Via2 = ....Segments.T3Seg.LongissimusThoracisT1L1Via2NodeL;
    AnyRefNode &Via3 = ....Segments.T4Seg.LongissimusThoracisT1L1Via3NodeL;
    AnyRefNode &Via4 = ....Segments.T5Seg.LongissimusThoracisT1L1Via4NodeL;
    AnyRefNode &Via5 = ....Segments.T6Seg.LongissimusThoracisT1L1Via5NodeL;
    AnyRefNode &Via6 = ....Segments.T7Seg.LongissimusThoracisT1L1Via6NodeL;
    AnyRefNode &Via7 = ....Segments.T8Seg.LongissimusThoracisT1L1Via7NodeL;
    AnyRefNode &Via8 = ....Segments.T9Seg.LongissimusThoracisT1L1Via8NodeL;
    AnyRefNode &Via9 = ....Segments.T10Seg.LongissimusThoracisT1L1Via9NodeL;
    AnyRefNode &Via10 = ....Segments.T11Seg.LongissimusThoracisT1L1Via10NodeL;
    AnyRefNode &Via11 = ....Segments.T12Seg.LongissimusThoracisT1L1Via11NodeL;
    AnyRefNode &Ins = ....Segments.L1Seg.LongissimusThoracisT1L1NodeL;
    viewMuscle = {#include "../DrawSettings/MusDrawSettings.any"};
    viewForce.Visible ??= Off;
  };
  AnyMuscleViaPoint LongissimusThoracisT2L2 = {
    AnyMuscleModel &MusMdl = ....MuscleModels.Left.LongissimusThoracis.LongissimusThoracisT2L2;
    AnyRefNode &Org = ....Segments.T2Seg.LongissimusThoracisT2L2NodeL;
    AnyRefNode &Via1 = ....Segments.T3Seg.LongissimusThoracisT2L2Via1NodeL;
    AnyRefNode &Via2 = ....Segments.T4Seg.LongissimusThoracisT2L2Via2NodeL;
    AnyRefNode &Via3 = ....Segments.T5Seg.LongissimusThoracisT2L2Via3NodeL;
    AnyRefNode &Via4 = ....Segments.T6Seg.LongissimusThoracisT2L2Via4NodeL;
    AnyRefNode &Via5 = ....Segments.T7Seg.LongissimusThoracisT2L2Via5NodeL;
    AnyRefNode &Via6 = ....Segments.T8Seg.LongissimusThoracisT2L2Via6NodeL;
    AnyRefNode &Via7 = ....Segments.T9Seg.LongissimusThoracisT2L2Via7NodeL;
    AnyRefNode &Via8 = ....Segments.T10Seg.LongissimusThoracisT2L2Via8NodeL;
    AnyRefNode &Via9 = ....Segments.T11Seg.LongissimusThoracisT2L2Via9NodeL;
    AnyRefNode &Via10 = ....Segments.T12Seg.LongissimusThoracisT2L2Via10NodeL;
    AnyRefNode &Via11 = ....Segments.L1Seg.LongissimusThoracisT2L2Via11NodeL;
    AnyRefNode &Ins = ....Segments.L2Seg.LongissimusThoracisT2L2NodeL;
    viewMuscle = {#include "../DrawSettings/MusDrawSettings.any"};
    viewForce.Visible ??= Off;
  };
  AnyMuscleViaPoint LongissimusThoracisT3L3 = {
    AnyMuscleModel &MusMdl = ....MuscleModels.Left.LongissimusThoracis.LongissimusThoracisT3L3;
    AnyRefNode &Org = ....Segments.T3Seg.LongissimusThoracisT3L3NodeL;
    AnyRefNode &Via1 = ....Segments.T4Seg.LongissimusThoracisT3L3Via1NodeL;
    AnyRefNode &Via2 = ....Segments.T5Seg.LongissimusThoracisT3L3Via2NodeL;
    AnyRefNode &Via3 = ....Segments.T6Seg.LongissimusThoracisT3L3Via3NodeL;
    AnyRefNode &Via4 = ....Segments.T7Seg.LongissimusThoracisT3L3Via4NodeL;
    AnyRefNode &Via5 = ....Segments.T8Seg.LongissimusThoracisT3L3Via5NodeL;
    AnyRefNode &Via6 = ....Segments.T9Seg.LongissimusThoracisT3L3Via6NodeL;
    AnyRefNode &Via7 = ....Segments.T10Seg.LongissimusThoracisT3L3Via7NodeL;
    AnyRefNode &Via8 = ....Segments.T11Seg.LongissimusThoracisT3L3Via8NodeL;
    AnyRefNode &Via9 = ....Segments.T12Seg.LongissimusThoracisT3L3Via9NodeL;
    AnyRefNode &Via10 = ....Segments.L1Seg.LongissimusThoracisT3L3Via10NodeL;
    AnyRefNode &Via11 = ....Segments.L2Seg.LongissimusThoracisT3L3Via11NodeL;
    AnyRefNode &Ins = ....Segments.L3Seg.LongissimusThoracisT3L3NodeL;
    viewMuscle = {#include "../DrawSettings/MusDrawSettings.any"};
    viewForce.Visible ??= Off;
  };
  AnyMuscleViaPoint LongissimusThoracisT4L4 = {
    AnyMuscleModel &MusMdl = ....MuscleModels.Left.LongissimusThoracis.LongissimusThoracisT4L4;
    AnyRefNode &Org = ....Segments.T4Seg.LongissimusThoracisT4L4NodeL;
    AnyRefNode &Via1 = ....Segments.T5Seg.LongissimusThoracisT4L4Via1NodeL;
    AnyRefNode &Via2 = ....Segments.T6Seg.LongissimusThoracisT4L4Via2NodeL;
    AnyRefNode &Via3 = ....Segments.T7Seg.LongissimusThoracisT4L4Via3NodeL;
    AnyRefNode &Via4 = ....Segments.T8Seg.LongissimusThoracisT4L4Via4NodeL;
    AnyRefNode &Via5 = ....Segments.T9Seg.LongissimusThoracisT4L4Via5NodeL;
    AnyRefNode &Via6 = ....Segments.T10Seg.LongissimusThoracisT4L4Via6NodeL;
    AnyRefNode &Via7 = ....Segments.T11Seg.LongissimusThoracisT4L4Via7NodeL;
    AnyRefNode &Via8 = ....Segments.T12Seg.LongissimusThoracisT4L4Via8NodeL;
    AnyRefNode &Via9 = ....Segments.L1Seg.LongissimusThoracisT4L4Via9NodeL;
    AnyRefNode &Via10 = ....Segments.L2Seg.LongissimusThoracisT4L4Via10NodeL;
    AnyRefNode &Via11 = ....Segments.L3Seg.LongissimusThoracisT4L4Via11NodeL;
    AnyRefNode &Ins = ....Segments.L4Seg.LongissimusThoracisT4L4NodeL;
    viewMuscle = {#include "../DrawSettings/MusDrawSettings.any"};
    viewForce.Visible ??= Off;
  };
  AnyMuscleViaPoint LongissimusThoracisT5L5 = {
    AnyMuscleModel &MusMdl = ....MuscleModels.Left.LongissimusThoracis.LongissimusThoracisT5L5;
    AnyRefNode &Org = ....Segments.T5Seg.LongissimusThoracisT5L5NodeL;
    AnyRefNode &Via1 = ....Segments.T6Seg.LongissimusThoracisT5L5Via1NodeL;
    AnyRefNode &Via2 = ....Segments.T7Seg.LongissimusThoracisT5L5Via2NodeL;
    AnyRefNode &Via3 = ....Segments.T8Seg.LongissimusThoracisT5L5Via3NodeL;
    AnyRefNode &Via4 = ....Segments.T9Seg.LongissimusThoracisT5L5Via4NodeL;
    AnyRefNode &Via5 = ....Segments.T10Seg.LongissimusThoracisT5L5Via5NodeL;
    AnyRefNode &Via6 = ....Segments.T11Seg.LongissimusThoracisT5L5Via6NodeL;
    AnyRefNode &Via7 = ....Segments.T12Seg.LongissimusThoracisT5L5Via7NodeL;
    AnyRefNode &Via8 = ....Segments.L1Seg.LongissimusThoracisT5L5Via8NodeL;
    AnyRefNode &Via9 = ....Segments.L2Seg.LongissimusThoracisT5L5Via9NodeL;
    AnyRefNode &Via10 = ....Segments.L3Seg.LongissimusThoracisT5L5Via10NodeL;
    AnyRefNode &Via11 = ....Segments.L4Seg.LongissimusThoracisT5L5Via11NodeL;
    AnyRefNode &Ins = ....Segments.L5Seg.LongissimusThoracisT5L5NodeL;
    viewMuscle = {#include "../DrawSettings/MusDrawSettings.any"};
    viewForce.Visible ??= Off;
  };
  AnyMuscleViaPoint LongissimusThoracisT6S1 = {
    AnyMuscleModel &MusMdl = ....MuscleModels.Left.LongissimusThoracis.LongissimusThoracisT6S1;
    AnyRefNode &Org = ....Segments.T6Seg.LongissimusThoracisT6S1NodeL;
    AnyRefNode &Via1 = ....Segments.T7Seg.LongissimusThoracisT6S1Via1NodeL;
    AnyRefNode &Via2 = ....Segments.T8Seg.LongissimusThoracisT6S1Via2NodeL;
    AnyRefNode &Via3 = ....Segments.T9Seg.LongissimusThoracisT6S1Via3NodeL;
    AnyRefNode &Via4 = ....Segments.T10Seg.LongissimusThoracisT6S1Via4NodeL;
    AnyRefNode &Via5 = ....Segments.T11Seg.LongissimusThoracisT6S1Via5NodeL;
    AnyRefNode &Via6 = ....Segments.T12Seg.LongissimusThoracisT6S1Via6NodeL;
    AnyRefNode &Via7 = ....Segments.L1Seg.LongissimusThoracisT6S1Via7NodeL;
    AnyRefNode &Via8 = ....Segments.L2Seg.LongissimusThoracisT6S1Via8NodeL;
    AnyRefNode &Via9 = ....Segments.L3Seg.LongissimusThoracisT6S1Via9NodeL;
    AnyRefNode &Via10 = ....Segments.L4Seg.LongissimusThoracisT6S1Via10NodeL;
    AnyRefNode &Via11 = ....Segments.L5Seg.LongissimusThoracisT6S1Via11NodeL;
    AnyRefNode &Ins = ....Segments.SacrumSeg.LongissimusThoracisT6S1NodeL;
    viewMuscle = {#include "../DrawSettings/MusDrawSettings.any"};
    viewForce.Visible ??= Off;
  };
  AnyMuscleViaPoint LongissimusThoracisT7S2 = {
    AnyMuscleModel &MusMdl = ....MuscleModels.Left.LongissimusThoracis.LongissimusThoracisT7S2;
    AnyRefNode &Org = ....Segments.T7Seg.LongissimusThoracisT7S2NodeL;
    AnyRefNode &Via1 = ....Segments.T8Seg.LongissimusThoracisT7S2Via1NodeL;
    AnyRefNode &Via2 = ....Segments.T9Seg.LongissimusThoracisT7S2Via2NodeL;
    AnyRefNode &Via3 = ....Segments.T10Seg.LongissimusThoracisT7S2Via3NodeL;
    AnyRefNode &Via4 = ....Segments.T11Seg.LongissimusThoracisT7S2Via4NodeL;
    AnyRefNode &Via5 = ....Segments.T12Seg.LongissimusThoracisT7S2Via5NodeL;
    AnyRefNode &Via6 = ....Segments.L1Seg.LongissimusThoracisT7S2Via6NodeL;
    AnyRefNode &Via7 = ....Segments.L2Seg.LongissimusThoracisT7S2Via7NodeL;
    AnyRefNode &Via8 = ....Segments.L3Seg.LongissimusThoracisT7S2Via8NodeL;
    AnyRefNode &Via9 = ....Segments.L4Seg.LongissimusThoracisT7S2Via9NodeL;
    AnyRefNode &Via10 = ....Segments.L5Seg.LongissimusThoracisT7S2Via10NodeL;
    AnyRefNode &Ins = ....Segments.SacrumSeg.LongissimusThoracisT7S2NodeL;
    viewMuscle = {#include "../DrawSettings/MusDrawSettings.any"};
    viewForce.Visible ??= Off;
  };
  AnyMuscleViaPoint LongissimusThoracisT8S3 = {
    AnyMuscleModel &MusMdl = ....MuscleModels.Left.LongissimusThoracis.LongissimusThoracisT8S3;
    AnyRefNode &Org = ....Segments.T8Seg.LongissimusThoracisT8S3NodeL;
    AnyRefNode &Via1 = ....Segments.T9Seg.LongissimusThoracisT8S3Via1NodeL;
    AnyRefNode &Via2 = ....Segments.T10Seg.LongissimusThoracisT8S3Via2NodeL;
    AnyRefNode &Via3 = ....Segments.T11Seg.LongissimusThoracisT8S3Via3NodeL;
    AnyRefNode &Via4 = ....Segments.T12Seg.LongissimusThoracisT8S3Via4NodeL;
    AnyRefNode &Via5 = ....Segments.L1Seg.LongissimusThoracisT8S3Via5NodeL;
    AnyRefNode &Via6 = ....Segments.L2Seg.LongissimusThoracisT8S3Via6NodeL;
    AnyRefNode &Via7 = ....Segments.L3Seg.LongissimusThoracisT8S3Via7NodeL;
    AnyRefNode &Via8 = ....Segments.L4Seg.LongissimusThoracisT8S3Via8NodeL;
    AnyRefNode &Via9 = ....Segments.L5Seg.LongissimusThoracisT8S3Via9NodeL;
    AnyRefNode &Ins = ....Segments.SacrumSeg.LongissimusThoracisT8S3NodeL;
    viewMuscle = {#include "../DrawSettings/MusDrawSettings.any"};
    viewForce.Visible ??= Off;
  };
  AnyMuscleViaPoint LongissimusThoracisT9S4 = {
    AnyMuscleModel &MusMdl = ....MuscleModels.Left.LongissimusThoracis.LongissimusThoracisT9S4;
    AnyRefNode &Org = ....Segments.T9Seg.LongissimusThoracisT9S4NodeL;
    AnyRefNode &Via1 = ....Segments.T10Seg.LongissimusThoracisT9S4Via1NodeL;
    AnyRefNode &Via2 = ....Segments.T11Seg.LongissimusThoracisT9S4Via2NodeL;
    AnyRefNode &Via3 = ....Segments.T12Seg.LongissimusThoracisT9S4Via3NodeL;
    AnyRefNode &Via4 = ....Segments.L1Seg.LongissimusThoracisT9S4Via4NodeL;
    AnyRefNode &Via5 = ....Segments.L2Seg.LongissimusThoracisT9S4Via5NodeL;
    AnyRefNode &Via6 = ....Segments.L3Seg.LongissimusThoracisT9S4Via6NodeL;
    AnyRefNode &Via7 = ....Segments.L4Seg.LongissimusThoracisT9S4Via7NodeL;
    AnyRefNode &Via8 = ....Segments.L5Seg.LongissimusThoracisT9S4Via8NodeL;
    AnyRefNode &Ins = ....Segments.SacrumSeg.LongissimusThoracisT9S4NodeL;
    viewMuscle = {#include "../DrawSettings/MusDrawSettings.any"};
    viewForce.Visible ??= Off;
  };
  AnyMuscleViaPoint LongissimusThoracisT10S3 = {
    AnyMuscleModel &MusMdl = ....MuscleModels.Left.LongissimusThoracis.LongissimusThoracisT10S3;
    AnyRefNode &Org = ....Segments.T10Seg.LongissimusThoracisT10S3NodeL;
    AnyRefNode &Via1 = ....Segments.T11Seg.LongissimusThoracisT10S3Via1NodeL;
    #if BM_TRUNK_CAVITY_MODEL == _CAVITY_MODEL_VOLUME_
    AnyRefNode &Via2 = ....Abdominal.Layer_L1.BaseSegPosterior.LongissimusThoracisT10S3Via2NodeL;
    AnyRefNode &Via3 = ....Abdominal.Layer_L2.BaseSegPosterior.LongissimusThoracisT10S3Via3NodeL;
    AnyRefNode &Via4 = ....Abdominal.Layer_L3.BaseSegPosterior.LongissimusThoracisT10S3Via4NodeL;
    AnyRefNode &Via5 = ....Abdominal.Layer_L4.BaseSegPosterior.LongissimusThoracisT10S3Via5NodeL;
    AnyRefNode &Via6 = ....Abdominal.Layer_L5.BaseSegPosterior.LongissimusThoracisT10S3Via6NodeL;
//    AnyRefNode &Via7 = ....Abdominal.Layer_L5.BaseSegPosterior.LongissimusThoracisT10S3Via7NodeL;
    #else
    AnyRefNode &Via2 = ....Segments.T12Seg.LongissimusThoracisT10S3Via2NodeL;
    AnyRefNode &Via3 = ....Segments.L1Seg.LongissimusThoracisT10S3Via3NodeL;
    AnyRefNode &Via4 = ....Segments.L2Seg.LongissimusThoracisT10S3Via4NodeL;
    AnyRefNode &Via5 = ....Segments.L3Seg.LongissimusThoracisT10S3Via5NodeL;
    AnyRefNode &Via6 = ....Segments.L4Seg.LongissimusThoracisT10S3Via6NodeL;
    AnyRefNode &Via7 = ....Segments.L5Seg.LongissimusThoracisT10S3Via7NodeL;
    #endif
    AnyRefNode &Ins = ....Segments.SacrumSeg.LongissimusThoracisT10S3NodeL;
    viewMuscle = {#include "../DrawSettings/MusDrawSettings.any"};
    viewForce.Visible ??= Off;
  };
    AnyMuscleViaPoint LongissimusThoracisT11S3 = {
    AnyMuscleModel &MusMdl = ....MuscleModels.Left.LongissimusThoracis.LongissimusThoracisT11S3;
    AnyRefNode &Org = ....Segments.T11Seg.LongissimusThoracisT11S3NodeL;
    #if BM_TRUNK_CAVITY_MODEL == _CAVITY_MODEL_VOLUME_
    AnyRefNode &Via1 = ....Abdominal.Layer_L1.BaseSegPosterior.LongissimusThoracisT11S3Via1NodeL;
    AnyRefNode &Via2 = ....Abdominal.Layer_L2.BaseSegPosterior.LongissimusThoracisT11S3Via2NodeL;
    AnyRefNode &Via3 = ....Abdominal.Layer_L3.BaseSegPosterior.LongissimusThoracisT11S3Via3NodeL;
    AnyRefNode &Via4 = ....Abdominal.Layer_L4.BaseSegPosterior.LongissimusThoracisT11S3Via4NodeL;
    AnyRefNode &Via5 = ....Abdominal.Layer_L5.BaseSegPosterior.LongissimusThoracisT11S3Via5NodeL;
//    AnyRefNode &Via6 = ....Abdominal.Layer_L5.BaseSegPosterior.LongissimusThoracisT11S3Via6NodeL;
    #else
    AnyRefNode &Via1 = ....Segments.T12Seg.LongissimusThoracisT11S3Via1NodeL;
    AnyRefNode &Via2 = ....Segments.L1Seg.LongissimusThoracisT11S3Via2NodeL;
    AnyRefNode &Via3 = ....Segments.L2Seg.LongissimusThoracisT11S3Via3NodeL;
    AnyRefNode &Via4 = ....Segments.L3Seg.LongissimusThoracisT11S3Via4NodeL;
    AnyRefNode &Via5 = ....Segments.L4Seg.LongissimusThoracisT11S3Via5NodeL;
    AnyRefNode &Via6 = ....Segments.L5Seg.LongissimusThoracisT11S3Via6NodeL;
    #endif
    AnyRefNode &Ins = ....Segments.SacrumSeg.LongissimusThoracisT11S3NodeL;
    viewMuscle = {#include "../DrawSettings/MusDrawSettings.any"};
    viewForce.Visible ??= Off;
  };
  AnyMuscleViaPoint LongissimusThoracisT12S3 = {
    AnyMuscleModel &MusMdl = ....MuscleModels.Left.LongissimusThoracis.LongissimusThoracisT12S3;
    AnyRefNode &Org = ....Segments.T12Seg.LongissimusThoracisT12S3NodeL;
    #if BM_TRUNK_CAVITY_MODEL == _CAVITY_MODEL_VOLUME_
    AnyRefNode &Via1 = ....Abdominal.Layer_L2.BaseSegPosterior.LongissimusThoracisT12S3Via1NodeL;
    AnyRefNode &Via2 = ....Abdominal.Layer_L3.BaseSegPosterior.LongissimusThoracisT12S3Via2NodeL;
    AnyRefNode &Via3 = ....Abdominal.Layer_L4.BaseSegPosterior.LongissimusThoracisT12S3Via3NodeL;
    AnyRefNode &Via4 = ....Abdominal.Layer_L5.BaseSegPosterior.LongissimusThoracisT12S3Via4NodeL;
//    AnyRefNode &Via5 = ....Abdominal.Layer_L5.BaseSegPosterior.LongissimusThoracisT12S3Via5NodeL;
    #else
    AnyRefNode &Via1 = ....Segments.L1Seg.LongissimusThoracisT12S3Via1NodeL;
    AnyRefNode &Via2 = ....Segments.L2Seg.LongissimusThoracisT12S3Via2NodeL;
    AnyRefNode &Via3 = ....Segments.L3Seg.LongissimusThoracisT12S3Via3NodeL;
    AnyRefNode &Via4 = ....Segments.L4Seg.LongissimusThoracisT12S3Via4NodeL;
    AnyRefNode &Via5 = ....Segments.L5Seg.LongissimusThoracisT12S3Via5NodeL;
    #endif
    AnyRefNode &Ins = ....Segments.SacrumSeg.LongissimusThoracisT12S3NodeL;
    viewMuscle = {#include "../DrawSettings/MusDrawSettings.any"};
    viewForce.Visible ??= Off;
  };

  // Longissimus Thoracis - lateral part (attaching to ribs)
  AnyMuscleViaPoint LongissimusThoracisR3L3 = {
    AnyMuscleModel &MusMdl = ....MuscleModels.Left.LongissimusThoracis.LongissimusThoracisR3L3;
    AnyRefNode &Org = ....Segments.Left.R3Seg.LongissimusThoracisR3L3NodeL;
    AnyRefNode &Via1 = ....Segments.Left.R4Seg.LongissimusThoracisR3L3Via1NodeL;
    #ifndef LongissimusThoracis_ViaNodes_Ribs
    AnyRefNode &Via2 = ....Segments.T5Seg.LongissimusThoracisR3L3Via2NodeL;
    AnyRefNode &Via3 = ....Segments.T6Seg.LongissimusThoracisR3L3Via3NodeL;
    AnyRefNode &Via4 = ....Segments.T7Seg.LongissimusThoracisR3L3Via4NodeL;
    AnyRefNode &Via5 = ....Segments.T8Seg.LongissimusThoracisR3L3Via5NodeL;
    AnyRefNode &Via6 = ....Segments.T9Seg.LongissimusThoracisR3L3Via6NodeL;
    AnyRefNode &Via7 = ....Segments.T10Seg.LongissimusThoracisR3L3Via7NodeL;
    #else
    AnyRefNode &Via2 = ....Segments.Left.R5Seg.LongissimusThoracisR3L3Via2NodeL;
    AnyRefNode &Via3 = ....Segments.Left.R6Seg.LongissimusThoracisR3L3Via3NodeL;
    AnyRefNode &Via4 = ....Segments.Left.R7Seg.LongissimusThoracisR3L3Via4NodeL;
    AnyRefNode &Via5 = ....Segments.Left.R8Seg.LongissimusThoracisR3L3Via5NodeL;
    AnyRefNode &Via6 = ....Segments.Left.R9Seg.LongissimusThoracisR3L3Via6NodeL;
    AnyRefNode &Via7 = ....Segments.Left.R10Seg.LongissimusThoracisR3L3Via7NodeL;
    #endif
    AnyRefNode &Via8 = ....Segments.T11Seg.LongissimusThoracisR3L3Via8NodeL;
    AnyRefNode &Via9 = ....Segments.T12Seg.LongissimusThoracisR3L3Via9NodeL;
    AnyRefNode &Via10 = ....Segments.L1Seg.LongissimusThoracisR3L3Via10NodeL;
    AnyRefNode &Via11 = ....Segments.L2Seg.LongissimusThoracisR3L3Via11NodeL;
    AnyRefNode &Ins = ....Segments.L3Seg.LongissimusThoracisR3L3NodeL;
    viewMuscle = {#include "../DrawSettings/MusDrawSettings.any"};
    viewForce.Visible ??= Off;
  };
  AnyMuscleViaPoint LongissimusThoracisR4L4 = {
    AnyMuscleModel &MusMdl = ....MuscleModels.Left.LongissimusThoracis.LongissimusThoracisR4L4;
    AnyRefNode &Org = ....Segments.Left.R4Seg.LongissimusThoracisR4L4NodeL;
    AnyRefNode &Via1 = ....Segments.Left.R5Seg.LongissimusThoracisR4L4Via1NodeL;
    #ifndef LongissimusThoracis_ViaNodes_Ribs
    AnyRefNode &Via2 = ....Segments.T6Seg.LongissimusThoracisR4L4Via2NodeL;
    AnyRefNode &Via3 = ....Segments.T7Seg.LongissimusThoracisR4L4Via3NodeL;
    AnyRefNode &Via4 = ....Segments.T8Seg.LongissimusThoracisR4L4Via4NodeL;
    AnyRefNode &Via5 = ....Segments.T9Seg.LongissimusThoracisR4L4Via5NodeL;
    AnyRefNode &Via6 = ....Segments.T10Seg.LongissimusThoracisR4L4Via6NodeL;
    #else
    AnyRefNode &Via2 = ....Segments.Left.R6Seg.LongissimusThoracisR4L4Via2NodeL;
    AnyRefNode &Via3 = ....Segments.Left.R7Seg.LongissimusThoracisR4L4Via3NodeL;
    AnyRefNode &Via4 = ....Segments.Left.R8Seg.LongissimusThoracisR4L4Via4NodeL;
    AnyRefNode &Via5 = ....Segments.Left.R9Seg.LongissimusThoracisR4L4Via5NodeL;
    AnyRefNode &Via6 = ....Segments.Left.R10Seg.LongissimusThoracisR4L4Via6NodeL;
    #endif
    AnyRefNode &Via7 = ....Segments.T11Seg.LongissimusThoracisR4L4Via7NodeL;
    AnyRefNode &Via8 = ....Segments.T12Seg.LongissimusThoracisR4L4Via8NodeL;
    AnyRefNode &Via9 = ....Segments.L1Seg.LongissimusThoracisR4L4Via9NodeL;
    AnyRefNode &Via10 = ....Segments.L2Seg.LongissimusThoracisR4L4Via10NodeL;
    AnyRefNode &Via11 = ....Segments.L3Seg.LongissimusThoracisR4L4Via11NodeL;
    AnyRefNode &Ins = ....Segments.L4Seg.LongissimusThoracisR4L4NodeL;
    viewMuscle = {#include "../DrawSettings/MusDrawSettings.any"};
    viewForce.Visible ??= Off;
  };
  AnyMuscleViaPoint LongissimusThoracisR5L5 = {
    AnyMuscleModel &MusMdl = ....MuscleModels.Left.LongissimusThoracis.LongissimusThoracisR5L5;
    AnyRefNode &Org = ....Segments.Left.R5Seg.LongissimusThoracisR5L5NodeL;
    AnyRefNode &Via1 = ....Segments.Left.R6Seg.LongissimusThoracisR5L5Via1NodeL;
    #ifndef LongissimusThoracis_ViaNodes_Ribs
    AnyRefNode &Via2 = ....Segments.T7Seg.LongissimusThoracisR5L5Via2NodeL;
    AnyRefNode &Via3 = ....Segments.T8Seg.LongissimusThoracisR5L5Via3NodeL;
    AnyRefNode &Via4 = ....Segments.T9Seg.LongissimusThoracisR5L5Via4NodeL;
    AnyRefNode &Via5 = ....Segments.T10Seg.LongissimusThoracisR5L5Via5NodeL;
    #else
    AnyRefNode &Via2 = ....Segments.Left.R7Seg.LongissimusThoracisR5L5Via2NodeL;
    AnyRefNode &Via3 = ....Segments.Left.R8Seg.LongissimusThoracisR5L5Via3NodeL;
    AnyRefNode &Via4 = ....Segments.Left.R9Seg.LongissimusThoracisR5L5Via4NodeL;
    AnyRefNode &Via5 = ....Segments.Left.R10Seg.LongissimusThoracisR5L5Via5NodeL;
    #endif
    AnyRefNode &Via6 = ....Segments.T11Seg.LongissimusThoracisR5L5Via6NodeL;
    AnyRefNode &Via7 = ....Segments.T12Seg.LongissimusThoracisR5L5Via7NodeL;
    AnyRefNode &Via8 = ....Segments.L1Seg.LongissimusThoracisR5L5Via8NodeL;
    AnyRefNode &Via9 = ....Segments.L2Seg.LongissimusThoracisR5L5Via9NodeL;
    AnyRefNode &Via10 = ....Segments.L3Seg.LongissimusThoracisR5L5Via10NodeL;
    AnyRefNode &Via11 = ....Segments.L4Seg.LongissimusThoracisR5L5Via11NodeL;
    AnyRefNode &Ins = ....Segments.L5Seg.LongissimusThoracisR5L5NodeL;
    viewMuscle = {#include "../DrawSettings/MusDrawSettings.any"};
    viewForce.Visible ??= Off;
  };
  AnyMuscleViaPoint LongissimusThoracisR6S1 = {
    AnyMuscleModel &MusMdl = ....MuscleModels.Left.LongissimusThoracis.LongissimusThoracisR6S1;
    AnyRefNode &Org = ....Segments.Left.R6Seg.LongissimusThoracisR6S1NodeL;
    AnyRefNode &Via1 = ....Segments.Left.R7Seg.LongissimusThoracisR6S1Via1NodeL;
    #ifndef LongissimusThoracis_ViaNodes_Ribs
    AnyRefNode &Via2 = ....Segments.T8Seg.LongissimusThoracisR6S1Via2NodeL;
    AnyRefNode &Via3 = ....Segments.T9Seg.LongissimusThoracisR6S1Via3NodeL;
    AnyRefNode &Via4 = ....Segments.T10Seg.LongissimusThoracisR6S1Via4NodeL;
    #else
    AnyRefNode &Via2 = ....Segments.Left.R8Seg.LongissimusThoracisR6S1Via2NodeL;
    AnyRefNode &Via3 = ....Segments.Left.R9Seg.LongissimusThoracisR6S1Via3NodeL;
    AnyRefNode &Via4 = ....Segments.Left.R10Seg.LongissimusThoracisR6S1Via4NodeL;
    #endif
    AnyRefNode &Via5 = ....Segments.T11Seg.LongissimusThoracisR6S1Via5NodeL;
    AnyRefNode &Via6 = ....Segments.T12Seg.LongissimusThoracisR6S1Via6NodeL;
    AnyRefNode &Via7 = ....Segments.L1Seg.LongissimusThoracisR6S1Via7NodeL;
    AnyRefNode &Via8 = ....Segments.L2Seg.LongissimusThoracisR6S1Via8NodeL;
    AnyRefNode &Via9 = ....Segments.L3Seg.LongissimusThoracisR6S1Via9NodeL;
    AnyRefNode &Via10 = ....Segments.L4Seg.LongissimusThoracisR6S1Via10NodeL;
    AnyRefNode &Via11 = ....Segments.L5Seg.LongissimusThoracisR6S1Via11NodeL;
    AnyRefNode &Ins = ....Segments.SacrumSeg.LongissimusThoracisR6S1NodeL;
    viewMuscle = {#include "../DrawSettings/MusDrawSettings.any"};
    viewForce.Visible ??= Off;
  };
  AnyMuscleViaPoint LongissimusThoracisR7S2 = {
    AnyMuscleModel &MusMdl = ....MuscleModels.Left.LongissimusThoracis.LongissimusThoracisR7S2;
    AnyRefNode &Org = ....Segments.Left.R7Seg.LongissimusThoracisR7S2NodeL;
    AnyRefNode &Via1 = ....Segments.Left.R8Seg.LongissimusThoracisR7S2Via1NodeL;
    AnyRefNode &Via2 = ....Segments.Left.R9Seg.LongissimusThoracisR7S2Via2NodeL;
    AnyRefNode &Via3 = ....Segments.Left.R10Seg.LongissimusThoracisR7S2Via3NodeL;
   #ifndef LongissimusThoracis_ViaNodes_Ribs
    AnyRefNode &Via4 = ....Segments.T11Seg.LongissimusThoracisR7S2Via4NodeL;
    #else
    AnyRefNode &Via4 = ....Segments.Left.R11Seg.LongissimusThoracisR7S2Via4NodeL;
    #endif
    AnyRefNode &Via5 = ....Segments.T12Seg.LongissimusThoracisR7S2Via5NodeL;
    AnyRefNode &Via6 = ....Segments.L1Seg.LongissimusThoracisR7S2Via6NodeL;
    AnyRefNode &Via7 = ....Segments.L2Seg.LongissimusThoracisR7S2Via7NodeL;
    AnyRefNode &Via8 = ....Segments.L3Seg.LongissimusThoracisR7S2Via8NodeL;
    AnyRefNode &Via9 = ....Segments.L4Seg.LongissimusThoracisR7S2Via9NodeL;
    AnyRefNode &Via10 = ....Segments.L5Seg.LongissimusThoracisR7S2Via10NodeL;
    AnyRefNode &Ins = ....Segments.SacrumSeg.LongissimusThoracisR7S2NodeL;
    viewMuscle = {#include "../DrawSettings/MusDrawSettings.any"};
    viewForce.Visible ??= Off;
  };
  AnyMuscleViaPoint LongissimusThoracisR8S3 = {
    AnyMuscleModel &MusMdl = ....MuscleModels.Left.LongissimusThoracis.LongissimusThoracisR8S3;
    AnyRefNode &Org = ....Segments.Left.R8Seg.LongissimusThoracisR8S3NodeL;
    AnyRefNode &Via1 = ....Segments.Left.R9Seg.LongissimusThoracisR8S3Via1NodeL;
    AnyRefNode &Via2 = ....Segments.Left.R10Seg.LongissimusThoracisR8S3Via2NodeL;
    AnyRefNode &Via3 = ....Segments.Left.R11Seg.LongissimusThoracisR8S3Via3NodeL;
    #ifndef LongissimusThoracis_ViaNodes_Ribs
    AnyRefNode &Via4 = ....Segments.T12Seg.LongissimusThoracisR8S3Via4NodeL;
    #else
    AnyRefNode &Via4 = ....Segments.Left.R12Seg.LongissimusThoracisR8S3Via4NodeL;
    #endif
    AnyRefNode &Via5 = ....Segments.L1Seg.LongissimusThoracisR8S3Via5NodeL;
    AnyRefNode &Via6 = ....Segments.L2Seg.LongissimusThoracisR8S3Via6NodeL;
    AnyRefNode &Via7 = ....Segments.L3Seg.LongissimusThoracisR8S3Via7NodeL;
    AnyRefNode &Via8 = ....Segments.L4Seg.LongissimusThoracisR8S3Via8NodeL;
    AnyRefNode &Via9 = ....Segments.L5Seg.LongissimusThoracisR8S3Via9NodeL;
    AnyRefNode &Ins = ....Segments.SacrumSeg.LongissimusThoracisR8S3NodeL;
    viewMuscle = {#include "../DrawSettings/MusDrawSettings.any"};
    viewForce.Visible ??= Off;
  };
  AnyMuscleViaPoint LongissimusThoracisR9S4 = {
    AnyMuscleModel &MusMdl = ....MuscleModels.Left.LongissimusThoracis.LongissimusThoracisR9S4;
    AnyRefNode &Org = ....Segments.Left.R9Seg.LongissimusThoracisR9S4NodeL;
    AnyRefNode &Via1 = ....Segments.Left.R10Seg.LongissimusThoracisR9S4Via1NodeL;
    AnyRefNode &Via2 = ....Segments.Left.R11Seg.LongissimusThoracisR9S4Via2NodeL;
    #ifndef LongissimusThoracis_ViaNodes_Ribs
    AnyRefNode &Via3 = ....Segments.T12Seg.LongissimusThoracisR9S4Via3NodeL;
    #else
    AnyRefNode &Via3 = ....Segments.Left.R12Seg.LongissimusThoracisR9S4Via3NodeL;
    #endif
    AnyRefNode &Via4 = ....Segments.L1Seg.LongissimusThoracisR9S4Via4NodeL;
    AnyRefNode &Via5 = ....Segments.L2Seg.LongissimusThoracisR9S4Via5NodeL;
    AnyRefNode &Via6 = ....Segments.L3Seg.LongissimusThoracisR9S4Via6NodeL;
    AnyRefNode &Via7 = ....Segments.L4Seg.LongissimusThoracisR9S4Via7NodeL;
    AnyRefNode &Via8 = ....Segments.L5Seg.LongissimusThoracisR9S4Via8NodeL;
    AnyRefNode &Ins = ....Segments.SacrumSeg.LongissimusThoracisR9S4NodeL;
    viewMuscle = {#include "../DrawSettings/MusDrawSettings.any"};
    viewForce.Visible ??= Off;
  };
  AnyMuscleViaPoint LongissimusThoracisR10S3 = {
    AnyMuscleModel &MusMdl = ....MuscleModels.Left.LongissimusThoracis.LongissimusThoracisR10S3;
    AnyRefNode &Org = ....Segments.Left.R10Seg.LongissimusThoracisR10S3NodeL;
    AnyRefNode &Via1 = ....Segments.Left.R11Seg.LongissimusThoracisR10S3Via1NodeL;
    #if BM_TRUNK_CAVITY_MODEL == _CAVITY_MODEL_VOLUME_
    AnyRefNode &Via2 = ....Abdominal.Layer_L1.BaseSegPosterior.LongissimusThoracisR10S3Via2NodeL;
    AnyRefNode &Via3 = ....Abdominal.Layer_L2.BaseSegPosterior.LongissimusThoracisR10S3Via3NodeL;
    AnyRefNode &Via4 = ....Abdominal.Layer_L3.BaseSegPosterior.LongissimusThoracisR10S3Via4NodeL;
    AnyRefNode &Via5 = ....Abdominal.Layer_L4.BaseSegPosterior.LongissimusThoracisR10S3Via5NodeL;
    AnyRefNode &Via6 = ....Abdominal.Layer_L5.BaseSegPosterior.LongissimusThoracisR10S3Via6NodeL;
//    AnyRefNode &Via7 = ....Abdominal.Layer_L5.BaseSegPosterior.LongissimusThoracisR10S3Via7NodeL;
    #else
    AnyRefNode &Via2 = ....Segments.Left.R12Seg.LongissimusThoracisR10S3Via2NodeL;
    AnyRefNode &Via3 = ....Segments.L1Seg.LongissimusThoracisR10S3Via3NodeL;
    AnyRefNode &Via4 = ....Segments.L2Seg.LongissimusThoracisR10S3Via4NodeL;
    AnyRefNode &Via5 = ....Segments.L3Seg.LongissimusThoracisR10S3Via5NodeL;
    AnyRefNode &Via6 = ....Segments.L4Seg.LongissimusThoracisR10S3Via6NodeL;
    AnyRefNode &Via7 = ....Segments.L5Seg.LongissimusThoracisR10S3Via7NodeL;
    #endif
    AnyRefNode &Ins = ....Segments.SacrumSeg.LongissimusThoracisR10S3NodeL;
    viewMuscle = {#include "../DrawSettings/MusDrawSettings.any"};
    viewForce.Visible ??= Off;
  };
  AnyMuscleViaPoint LongissimusThoracisR11S3 = {
    AnyMuscleModel &MusMdl = ....MuscleModels.Left.LongissimusThoracis.LongissimusThoracisR11S3;
    AnyRefNode &Org = ....Segments.Left.R11Seg.LongissimusThoracisR11S3NodeL;
    #if BM_TRUNK_CAVITY_MODEL == _CAVITY_MODEL_VOLUME_
    AnyRefNode &Via1 = ....Abdominal.Layer_L1.BaseSegPosterior.LongissimusThoracisR11S3Via1NodeL;
    AnyRefNode &Via2 = ....Abdominal.Layer_L2.BaseSegPosterior.LongissimusThoracisR11S3Via2NodeL;
    AnyRefNode &Via3 = ....Abdominal.Layer_L3.BaseSegPosterior.LongissimusThoracisR11S3Via3NodeL;
    AnyRefNode &Via4 = ....Abdominal.Layer_L4.BaseSegPosterior.LongissimusThoracisR11S3Via4NodeL;
    AnyRefNode &Via5 = ....Abdominal.Layer_L5.BaseSegPosterior.LongissimusThoracisR11S3Via5NodeL;
//    AnyRefNode &Via6 = ....Abdominal.Layer_L5.BaseSegPosterior.LongissimusThoracisR11S3Via6NodeL;
    #else
    AnyRefNode &Via1 = ....Segments.Left.R12Seg.LongissimusThoracisR11S3Via1NodeL;
    AnyRefNode &Via2 = ....Segments.L1Seg.LongissimusThoracisR11S3Via2NodeL;
    AnyRefNode &Via3 = ....Segments.L2Seg.LongissimusThoracisR11S3Via3NodeL;
    AnyRefNode &Via4 = ....Segments.L3Seg.LongissimusThoracisR11S3Via4NodeL;
    AnyRefNode &Via5 = ....Segments.L4Seg.LongissimusThoracisR11S3Via5NodeL;
    AnyRefNode &Via6 = ....Segments.L5Seg.LongissimusThoracisR11S3Via6NodeL;
    #endif
    AnyRefNode &Ins = ....Segments.SacrumSeg.LongissimusThoracisR11S3NodeL;
    viewMuscle = {#include "../DrawSettings/MusDrawSettings.any"};
    viewForce.Visible ??= Off;
  };
  AnyMuscleViaPoint LongissimusThoracisR12S3 = {
    AnyMuscleModel &MusMdl = ....MuscleModels.Left.LongissimusThoracis.LongissimusThoracisR12S3;
    AnyRefNode &Org = ....Segments.Left.R12Seg.LongissimusThoracisR12S3NodeL;
    #if BM_TRUNK_CAVITY_MODEL == _CAVITY_MODEL_VOLUME_
    AnyRefNode &Via1 = ....Abdominal.Layer_L2.BaseSegPosterior.LongissimusThoracisR12S3Via1NodeL;
    AnyRefNode &Via2 = ....Abdominal.Layer_L3.BaseSegPosterior.LongissimusThoracisR12S3Via2NodeL;
    AnyRefNode &Via3 = ....Abdominal.Layer_L4.BaseSegPosterior.LongissimusThoracisR12S3Via3NodeL;
    AnyRefNode &Via4 = ....Abdominal.Layer_L5.BaseSegPosterior.LongissimusThoracisR12S3Via4NodeL;
//    AnyRefNode &Via5 = ....Abdominal.Layer_L5.BaseSegPosterior.LongissimusThoracisR12S3Via5NodeL;
    #else
    AnyRefNode &Via1 = ....Segments.L1Seg.LongissimusThoracisR12S3Via1NodeL;
    AnyRefNode &Via2 = ....Segments.L2Seg.LongissimusThoracisR12S3Via2NodeL;
    AnyRefNode &Via3 = ....Segments.L3Seg.LongissimusThoracisR12S3Via3NodeL;
    AnyRefNode &Via4 = ....Segments.L4Seg.LongissimusThoracisR12S3Via4NodeL;
    AnyRefNode &Via5 = ....Segments.L5Seg.LongissimusThoracisR12S3Via5NodeL;
    #endif
    AnyRefNode &Ins = ....Segments.SacrumSeg.LongissimusThoracisR12S3NodeL;
    viewMuscle = {#include "../DrawSettings/MusDrawSettings.any"};
    viewForce.Visible ??= Off;
  };
  // End of Longissimus thoracis part thoracis
};

MuscleGroup LongusCapitis = {
  AnyMuscleViaPoint LongusCapitisC6 = {
    AnyMuscleModel &MusMdl = ....MuscleModels.Left.LongusCapitis.LongusCapitisC6;
    AnyRefNode &Org = ....Segments.C6Seg.LongusCapitisC6NodeL;
    AnyRefNode &Ins = ....Segments.SkullSeg.LongusCapitisC0NodeL;
    viewMuscle = {#include "../DrawSettings/MusDrawSettings.any"};
    viewForce.Visible ??= Off;
  };

  AnyMuscleViaPoint LongusCapitisC5 = {
    AnyMuscleModel &MusMdl = ....MuscleModels.Left.LongusCapitis.LongusCapitisC5;
    AnyRefNode &Org = ....Segments.C5Seg.LongusCapitisC5NodeL;
    AnyRefNode &Ins = ....Segments.SkullSeg.LongusCapitisC0NodeL;
    viewMuscle = {#include "../DrawSettings/MusDrawSettings.any"};
    viewForce.Visible ??= Off;
  };

  AnyMuscleViaPoint LongusCapitisC4 = {
    AnyMuscleModel &MusMdl = ....MuscleModels.Left.LongusCapitis.LongusCapitisC4;
    AnyRefNode &Org = ....Segments.C4Seg.LongusCapitisC4NodeL;
    AnyRefNode &Ins = ....Segments.SkullSeg.LongusCapitisC0NodeL;
    viewMuscle = {#include "../DrawSettings/MusDrawSettings.any"};
    viewForce.Visible ??= Off;
  };

  AnyMuscleViaPoint LongusCapitisC3 = {
    AnyMuscleModel &MusMdl = ....MuscleModels.Left.LongusCapitis.LongusCapitisC3;
    AnyRefNode &Org = ....Segments.C3Seg.LongusCapitisC3NodeL;
    AnyRefNode &Ins = ....Segments.SkullSeg.LongusCapitisC0NodeL;
    viewMuscle = {#include "../DrawSettings/MusDrawSettings.any"};
    viewForce.Visible ??= Off;
  };
};

MuscleGroup LongusColli = {
  // LongusColliVertical
  AnyMuscleViaPoint LongusColliT3C6 = {
    AnyMuscleModel &MusMdl = ....MuscleModels.Left.LongusColli.LongusColliT3C6;
    AnyRefNode &Org = ....Segments.T3Seg.Left.LongusColliT3C6Node;
    AnyRefNode &Via1 = ....Segments.T2Seg.Left.LongusColliT3C6Node;
    AnyRefNode &Via2 = ....Segments.T1Seg.Left.LongusColliT3C6Node;
    AnyRefNode &Via3 = ....Segments.C7Seg.Left.LongusColliT3C6Node;
    AnyRefNode &Ins = ....Segments.C6Seg.Left.LongusColliT3C6Node;
    viewMuscle = {#include "../DrawSettings/MusDrawSettings.any"};
    viewForce.Visible ??= Off;
  };
  AnyMuscleViaPoint LongusColliT2C5_1 = {
    AnyMuscleModel &MusMdl = ....MuscleModels.Left.LongusColli.LongusColliT2C5_1;
    AnyRefNode &Org = ....Segments.T2Seg.Left.LongusColliT2C5Node;
    AnyRefNode &Via1 = ....Segments.T1Seg.Left.LongusColliT2C5Node;
    AnyRefNode &Via2 = ....Segments.C7Seg.Left.LongusColliT2C5Node;
    AnyRefNode &Via3 = ....Segments.C6Seg.Left.LongusColliT2C5Node;
    AnyRefNode &Ins = ....Segments.C5Seg.Left.LongusColliT2C5Node;
    viewMuscle = {#include "../DrawSettings/MusDrawSettings.any"};
    viewForce.Visible ??= Off;
  };
  AnyMuscleViaPoint LongusColliT2C3 = {
    AnyMuscleModel &MusMdl = ....MuscleModels.Left.LongusColli.LongusColliT2C3;
    AnyRefNode &Org = ....Segments.T2Seg.Left.LongusColliT2C5Node;
    AnyRefNode &Via1 = ....Segments.T1Seg.Left.LongusColliT1C4Node;
    AnyRefNode &Via2 = ....Segments.C7Seg.Left.LongusColliT1C4Node;
    AnyRefNode &Via3 = ....Segments.C6Seg.Left.LongusColliT1C4Node;
    AnyRefNode &Via4 = ....Segments.C5Seg.Left.LongusColliT1C4Node;
    AnyRefNode &Via5 = ....Segments.C4Seg.Left.LongusColliC7C3Node;
    AnyRefNode &Ins = ....Segments.C3Seg.Left.LongusColliC7C3Node;
    viewMuscle = {#include "<ANYBODY_PATH_BODY>/drawSettings/MusDrawSettings.any"};
    viewForce.Visible ??= Off;
  };
  AnyMuscleViaPoint LongusColliT2C2 = {
    AnyMuscleModel &MusMdl = ....MuscleModels.Left.LongusColli.LongusColliT2C2;
    AnyRefNode &Org = ....Segments.T2Seg.Left.LongusColliT2C5Node;
    AnyRefNode &Via1 = ....Segments.T1Seg.Left.LongusColliT1C4Node;
    AnyRefNode &Via2 = ....Segments.C7Seg.Left.LongusColliT1C4Node;
    AnyRefNode &Via3 = ....Segments.C6Seg.Left.LongusColliT1C4Node;
    AnyRefNode &Via4 = ....Segments.C5Seg.Left.LongusColliT1C4Node;
    AnyRefNode &Via5 = ....Segments.C4Seg.Left.LongusColliC7C3Node;
    AnyRefNode &Via6 = ....Segments.C3Seg.Left.LongusColliC7C3Node;
    AnyRefNode &Ins = ....Segments.C2Seg.Left.LongusColliC6C2Node;
    viewMuscle = {#include "<ANYBODY_PATH_BODY>/drawSettings/MusDrawSettings.any"};
    viewForce.Visible ??= Off;
  };
  AnyMuscleViaPoint LongusColliT1C4 = {
    AnyMuscleModel &MusMdl = ....MuscleModels.Left.LongusColli.LongusColliT1C4;
    AnyRefNode &Org = ....Segments.T1Seg.Left.LongusColliT1C4Node;
    AnyRefNode &Via1 = ....Segments.C7Seg.Left.LongusColliT1C4Node;
    AnyRefNode &Via2 = ....Segments.C6Seg.Left.LongusColliT1C4Node;
    AnyRefNode &Via3 = ....Segments.C5Seg.Left.LongusColliT1C4Node;
    AnyRefNode &Ins = ....Segments.C4Seg.Left.LongusColliT1C4Node;
    viewMuscle = {#include "../DrawSettings/MusDrawSettings.any"};
    viewForce.Visible ??= Off;
  };
  AnyMuscleViaPoint LongusColliT1C3 = {
    AnyMuscleModel &MusMdl = ....MuscleModels.Left.LongusColli.LongusColliT1C3;
    AnyRefNode &Org = ....Segments.T1Seg.Left.LongusColliT1C4Node;
    AnyRefNode &Via1 = ....Segments.C7Seg.Left.LongusColliT1C4Node;
    AnyRefNode &Via2 = ....Segments.C6Seg.Left.LongusColliT1C4Node;
    AnyRefNode &Via3 = ....Segments.C5Seg.Left.LongusColliT1C4Node;
    AnyRefNode &Via4 = ....Segments.C4Seg.Left.LongusColliC7C3Node;
    AnyRefNode &Ins = ....Segments.C3Seg.Left.LongusColliC7C3Node;
    viewMuscle = {#include "<ANYBODY_PATH_BODY>/drawSettings/MusDrawSettings.any"};
    viewForce.Visible ??= Off;
  };
  AnyMuscleViaPoint LongusColliT1C2 = {
    AnyMuscleModel &MusMdl = ....MuscleModels.Left.LongusColli.LongusColliT1C2;
    AnyRefNode &Org = ....Segments.T1Seg.Left.LongusColliT1C4Node;
    AnyRefNode &Via1 = ....Segments.C7Seg.Left.LongusColliT1C4Node;
    AnyRefNode &Via2 = ....Segments.C6Seg.Left.LongusColliT1C4Node;
    AnyRefNode &Via3 = ....Segments.C5Seg.Left.LongusColliT1C4Node;
    AnyRefNode &Via4 = ....Segments.C4Seg.Left.LongusColliC7C3Node;
    AnyRefNode &Via5 = ....Segments.C3Seg.Left.LongusColliC7C3Node;
    AnyRefNode &Ins = ....Segments.C2Seg.Left.LongusColliC6C2Node;
    viewMuscle = {#include "<ANYBODY_PATH_BODY>/drawSettings/MusDrawSettings.any"};
    viewForce.Visible ??= Off;
  };
  AnyMuscleViaPoint LongusColliC7C3 = {
    AnyMuscleModel &MusMdl = ....MuscleModels.Left.LongusColli.LongusColliC7C3;
    AnyRefNode &Org = ....Segments.C7Seg.Left.LongusColliC7C3Node;
    AnyRefNode &Via1 = ....Segments.C6Seg.Left.LongusColliC7C3Node;
    AnyRefNode &Via2 = ....Segments.C5Seg.Left.LongusColliC7C3Node;
    AnyRefNode &Via3 = ....Segments.C4Seg.Left.LongusColliC7C3Node;
    AnyRefNode &Ins = ....Segments.C3Seg.Left.LongusColliC7C3Node;
    viewMuscle = {#include "../DrawSettings/MusDrawSettings.any"};
    viewForce.Visible ??= Off;
  };
  AnyMuscleViaPoint LongusColliC6C2_1 = {
    AnyMuscleModel &MusMdl = ....MuscleModels.Left.LongusColli.LongusColliC6C2_1;
    AnyRefNode &Org = ....Segments.C6Seg.Left.LongusColliC6C2Node;
    AnyRefNode &Via1 = ....Segments.C5Seg.Left.LongusColliC6C2Node;
    AnyRefNode &Via2 = ....Segments.C4Seg.Left.LongusColliC6C2Node;
    AnyRefNode &Via3 = ....Segments.C3Seg.Left.LongusColliC6C2Node;
    AnyRefNode &Ins = ....Segments.C2Seg.Left.LongusColliC6C2Node;
    viewMuscle = {#include "../DrawSettings/MusDrawSettings.any"};
    viewForce.Visible ??= Off;
  };
  AnyMuscleViaPoint LongusColliC5C1_1 = {
    AnyMuscleModel &MusMdl = ....MuscleModels.Left.LongusColli.LongusColliC5C1_1;
    AnyRefNode &Org = ....Segments.C5Seg.Left.LongusColliC5C1Node;
    AnyRefNode &Via1 = ....Segments.C4Seg.Left.LongusColliC5C1Node;
    AnyRefNode &Via2 = ....Segments.C3Seg.Left.LongusColliC5C1Node;
    AnyRefNode &Via3 = ....Segments.C2Seg.Left.LongusColliC5C1Node;
    AnyRefNode &Ins = ....Segments.C1Seg.Left.LongusColliC5C1Node;
    viewMuscle = {#include "../DrawSettings/MusDrawSettings.any"};
    viewForce.Visible ??= Off;
  };
  // LongusColliSuperiorOblique
  AnyMuscleViaPoint LongusColliC3C1 = {
    AnyMuscleModel &MusMdl = ....MuscleModels.Left.LongusColli.LongusColliC3C1;
    AnyRefNode &Org = ....Segments.C3Seg.LongusCapitisC3NodeL;
    AnyRefNode &Ins = ....Segments.C1Seg.Left.LongusColliC5C1Node;
    viewMuscle = {#include "<ANYBODY_PATH_BODY>/drawSettings/MusDrawSettings.any"};
    viewForce.Visible ??= Off;
  };
  AnyMuscleViaPoint LongusColliC4C1 = {
    AnyMuscleModel &MusMdl = ....MuscleModels.Left.LongusColli.LongusColliC4C1;
    AnyRefNode &Org = ....Segments.C4Seg.LongusCapitisC4NodeL;
    AnyRefNode &Ins = ....Segments.C1Seg.Left.LongusColliC5C1Node;
    viewMuscle = {#include "<ANYBODY_PATH_BODY>/drawSettings/MusDrawSettings.any"};
    viewForce.Visible ??= Off;
  };
  AnyMuscleViaPoint LongusColliC5C1_2 = {
    AnyMuscleModel &MusMdl = ....MuscleModels.Left.LongusColli.LongusColliC5C1_2;
    AnyRefNode &Org = ....Segments.C5Seg.LongusCapitisC5NodeL;
    AnyRefNode &Ins = ....Segments.C1Seg.Left.LongusColliC5C1Node;
    viewMuscle = {#include "<ANYBODY_PATH_BODY>/drawSettings/MusDrawSettings.any"};
    viewForce.Visible ??= Off;
  };
  AnyMuscleViaPoint LongusColliC4C2 = {
    AnyMuscleModel &MusMdl = ....MuscleModels.Left.LongusColli.LongusColliC4C2;
    AnyRefNode &Org = ....Segments.C4Seg.LongusCapitisC4NodeL;
    AnyRefNode &Ins = ....Segments.C2Seg.Left.LongusColliC6C2Node;
    viewMuscle = {#include "<ANYBODY_PATH_BODY>/drawSettings/MusDrawSettings.any"};
    viewForce.Visible ??= Off;
  };
  AnyMuscleViaPoint LongusColliC5C2 = {
    AnyMuscleModel &MusMdl = ....MuscleModels.Left.LongusColli.LongusColliC5C2;
    AnyRefNode &Org = ....Segments.C5Seg.LongusCapitisC5NodeL;
    AnyRefNode &Ins = ....Segments.C2Seg.Left.LongusColliC6C2Node;
    viewMuscle = {#include "<ANYBODY_PATH_BODY>/drawSettings/MusDrawSettings.any"};
    viewForce.Visible ??= Off;
  };
  AnyMuscleViaPoint LongusColliC6C2_2 = {
    AnyMuscleModel &MusMdl = ....MuscleModels.Left.LongusColli.LongusColliC6C2_2;
    AnyRefNode &Org = ....Segments.C6Seg.LongusCapitisC6NodeL;
    AnyRefNode &Ins = ....Segments.C2Seg.Left.LongusColliC6C2Node;
    viewMuscle = {#include "<ANYBODY_PATH_BODY>/drawSettings/MusDrawSettings.any"};
    viewForce.Visible ??= Off;
  };
  AnyMuscleViaPoint LongusColliC6C3 = {
    AnyMuscleModel &MusMdl = ....MuscleModels.Left.LongusColli.LongusColliC6C3;
    AnyRefNode &Org = ....Segments.C6Seg.LongusCapitisC6NodeL;
    AnyRefNode &Ins = ....Segments.C3Seg.Left.LongusColliC7C3Node;
    viewMuscle = {#include "<ANYBODY_PATH_BODY>/drawSettings/MusDrawSettings.any"};
    viewForce.Visible ??= Off;
  };

  // LongusColliInferiorOblique
  AnyMuscleViaPoint LongusColliT1C6 = {
    AnyMuscleModel &MusMdl = ....MuscleModels.Left.LongusColli.LongusColliT1C6;
    AnyRefNode &Org = ....Segments.T1Seg.Left.LongusColliT1C4Node;
    AnyRefNode &Ins = ....Segments.C6Seg.LongusCapitisC6NodeL;
    viewMuscle = {#include "<ANYBODY_PATH_BODY>/drawSettings/MusDrawSettings.any"};
    viewForce.Visible ??= Off;
  };
  AnyMuscleViaPoint LongusColliT2C6 = {
    AnyMuscleModel &MusMdl = ....MuscleModels.Left.LongusColli.LongusColliT2C6;
    AnyRefNode &Org = ....Segments.T2Seg.Left.LongusColliT2C5Node;
    AnyRefNode &Ins = ....Segments.C6Seg.LongusCapitisC6NodeL;
    viewMuscle = {#include "<ANYBODY_PATH_BODY>/drawSettings/MusDrawSettings.any"};
    viewForce.Visible ??= Off;
  };
  AnyMuscleViaPoint LongusColliT2C5_2 = {
    AnyMuscleModel &MusMdl = ....MuscleModels.Left.LongusColli.LongusColliT2C5_2;
    AnyRefNode &Org = ....Segments.T2Seg.Left.LongusColliT2C5Node;
    AnyRefNode &Ins = ....Segments.C5Seg.LongusCapitisC5NodeL;
    viewMuscle = {#include "<ANYBODY_PATH_BODY>/drawSettings/MusDrawSettings.any"};
    viewForce.Visible ??= Off;
  };
};

MuscleGroup MultifidusCervicis = {
  AnyMuscleViaPoint MultifidusCervicisC5C2 = {
    AnyMuscleModel &MusMdl = ....MuscleModels.Left.MultifidusCervicis.MultifidusCervicisC5C2;
    AnyRefNode &Org = ....Segments.C5Seg.MultifidusCervicisC5C2NodeL;
    AnyRefNode &Ins = ....Segments.C2Seg.MultifidusCervicisC2NodeL;
    viewMuscle = {#include "../DrawSettings/MusDrawSettings.any"};
    viewForce.Visible ??= Off;
  };

  AnyMuscleViaPoint MultifidusCervicisC6C2 = {
    AnyMuscleModel &MusMdl = ....MuscleModels.Left.MultifidusCervicis.MultifidusCervicisC6C2;
    AnyRefNode &Org = ....Segments.C6Seg.MultifidusCervicisC6C2NodeL;
    AnyRefNode &Ins = ....Segments.C2Seg.MultifidusCervicisC2NodeL;
    viewMuscle = {#include "../DrawSettings/MusDrawSettings.any"};
    viewForce.Visible ??= Off;
  };

  AnyMuscleViaPoint MultifidusCervicisC6C3 = {
    AnyMuscleModel &MusMdl = ....MuscleModels.Left.MultifidusCervicis.MultifidusCervicisC6C3;
    AnyRefNode &Org = ....Segments.C6Seg.MultifidusCervicisC6C2NodeL;
    AnyRefNode &Ins = ....Segments.C3Seg.MultifidusCervicisC3NodeL;
    viewMuscle = {#include "../DrawSettings/MusDrawSettings.any"};
    viewForce.Visible ??= Off;
  };

  AnyMuscleViaPoint MultifidusCervicisC7C3 = {
    AnyMuscleModel &MusMdl = ....MuscleModels.Left.MultifidusCervicis.MultifidusCervicisC7C3;
    AnyRefNode &Org = ....Segments.C7Seg.MultifidusCervicisC7C3NodeL;
    AnyRefNode &Ins = ....Segments.C3Seg.MultifidusCervicisC3NodeL;
    viewMuscle = {#include "../DrawSettings/MusDrawSettings.any"};
    viewForce.Visible ??= Off;
  };

  AnyMuscleViaPoint MultifidusCervicisC7C4 = {
    AnyMuscleModel &MusMdl = ....MuscleModels.Left.MultifidusCervicis.MultifidusCervicisC7C4;
    AnyRefNode &Org = ....Segments.C7Seg.MultifidusCervicisC7C4NodeL;
    AnyRefNode &Ins = ....Segments.C4Seg.MultifidusCervicisC4NodeL;
    viewMuscle = {#include "../DrawSettings/MusDrawSettings.any"};
    viewForce.Visible ??= Off;
  };

  AnyMuscleViaPoint MultifidusCervicisT1C4 = {
    AnyMuscleModel &MusMdl = ....MuscleModels.Left.MultifidusCervicis.MultifidusCervicisT1C4;
    AnyRefNode &Org = ....Segments.T1Seg.MultifidusCervicisT1C4NodeL;
    AnyRefNode &Ins = ....Segments.C4Seg.MultifidusCervicisC4NodeL;
    viewMuscle = {#include "../DrawSettings/MusDrawSettings.any"};
    viewForce.Visible ??= Off;
  };

  AnyMuscleViaPoint MultifidusCervicisT1C5 = {
    AnyMuscleModel &MusMdl = ....MuscleModels.Left.MultifidusCervicis.MultifidusCervicisT1C5;
    AnyRefNode &Org = ....Segments.T1Seg.MultifidusCervicisT1C5NodeL;
    AnyRefNode &Ins = ....Segments.C5Seg.MultifidusCervicisC5NodeL;
    viewMuscle = {#include "../DrawSettings/MusDrawSettings.any"};
    viewForce.Visible ??= Off;
  };

  AnyMuscleViaPoint MultifidusCervicisT2C5 = {
    AnyMuscleModel &MusMdl = ....MuscleModels.Left.MultifidusCervicis.MultifidusCervicisT2C5;
    AnyRefNode &Org = ....Segments.T2Seg.MultifidusCervicisT2C5NodeL;
    AnyRefNode &Ins = ....Segments.C5Seg.MultifidusCervicisC5NodeL;
    viewMuscle = {#include "../DrawSettings/MusDrawSettings.any"};
    viewForce.Visible ??= Off;
  };

  AnyMuscleViaPoint MultifidusCervicisT2C6 = {
    AnyMuscleModel &MusMdl = ....MuscleModels.Left.MultifidusCervicis.MultifidusCervicisT2C6;
    AnyRefNode &Org = ....Segments.T2Seg.MultifidusCervicisT2C6NodeL;
    AnyRefNode &Ins = ....Segments.C6Seg.MultifidusCervicisC6NodeL;
    viewMuscle = {#include "../DrawSettings/MusDrawSettings.any"};
    viewForce.Visible ??= Off;
  };

  AnyMuscleViaPoint MultifidusCervicisT3C6 = {
    AnyMuscleModel &MusMdl = ....MuscleModels.Left.MultifidusCervicis.MultifidusCervicisT3C6;
    AnyRefNode &Org = ....Segments.T3Seg.MultifidusCervicisT3C6NodeL;
    AnyRefNode &Ins = ....Segments.C6Seg.MultifidusCervicisC6NodeL;
    viewMuscle = {#include "../DrawSettings/MusDrawSettings.any"};
    viewForce.Visible ??= Off;
  };

  AnyMuscleViaPoint MultifidusCervicisT3C7 = {
    AnyMuscleModel &MusMdl = ....MuscleModels.Left.MultifidusCervicis.MultifidusCervicisT3C7;
    AnyRefNode &Org = ....Segments.T3Seg.MultifidusCervicisT3C7NodeL;
    AnyRefNode &Ins = ....Segments.C7Seg.MultifidusCervicisC7NodeL;
    viewMuscle = {#include "../DrawSettings/MusDrawSettings.any"};
    viewForce.Visible ??= Off;
  };

  AnyMuscleViaPoint MultifidusCervicisT4C7 = {
    AnyMuscleModel &MusMdl = ....MuscleModels.Left.MultifidusCervicis.MultifidusCervicisT4C7;
    AnyRefNode &Org = ....Segments.T4Seg.MultifidusCervicisT4C7NodeL;
    AnyRefNode &Ins = ....Segments.C7Seg.MultifidusCervicisC7NodeL;
    viewMuscle = {#include "../DrawSettings/MusDrawSettings.any"};
    viewForce.Visible ??= Off;
  };
};

MuscleGroup MultifidusLumborum = {
  AnyMuscleViaPoint MultifidusLumborumL1L3 = {
    AnyMuscleModel &MusMdl = ....MuscleModels.Left.MultifidusLumborum.MultifidusLumborumL1L3;
    AnyRefNode &Org = ....Segments.L1Seg.MultifidusLumborumL1L3NodeL;
    AnyRefNode &Ins = ....Segments.L3Seg.MultifidusLumborumL1L3NodeL;
    viewMuscle = {#include "../DrawSettings/MusDrawSettings.any"};
    viewForce.Visible ??= Off;
  };

  AnyMuscleViaPoint MultifidusLumborumL2L4 = {
    AnyMuscleModel &MusMdl = ....MuscleModels.Left.MultifidusLumborum.MultifidusLumborumL2L4;
    AnyRefNode &Org = ....Segments.L2Seg.MultifidusLumborumL2L4NodeL;
    AnyRefNode &Ins = ....Segments.L4Seg.MultifidusLumborumL2L4NodeL;
    viewMuscle = {#include "../DrawSettings/MusDrawSettings.any"};
    viewForce.Visible ??= Off;
  };

  AnyMuscleViaPoint MultifidusLumborumL3L5 = {
    AnyMuscleModel &MusMdl = ....MuscleModels.Left.MultifidusLumborum.MultifidusLumborumL3L5;
    AnyRefNode &Org = ....Segments.L3Seg.MultifidusLumborumL3L5NodeL;
    AnyRefNode &Ins = ....Segments.L5Seg.MultifidusLumborumL3L5NodeL;
    viewMuscle = {#include "../DrawSettings/MusDrawSettings.any"};
    viewForce.Visible ??= Off;
  };

  AnyMuscleViaPoint MultifidusLumborumL4S1_1 = {
    AnyMuscleModel &MusMdl = ....MuscleModels.Left.MultifidusLumborum.MultifidusLumborumL4S1_1;
    AnyRefNode &Org = ....Segments.L4Seg.MultifidusLumborumL4S1_1NodeL;
    AnyRefNode &Ins = ....Segments.SacrumSeg.MultifidusLumborumL4S1_1NodeL;
    viewMuscle = {#include "../DrawSettings/MusDrawSettings.any"};
    viewForce.Visible ??= Off;
  };

  AnyMuscleViaPoint MultifidusLumborumL5S1_1 = {
    AnyMuscleModel &MusMdl = ....MuscleModels.Left.MultifidusLumborum.MultifidusLumborumL5S1_1;
    AnyRefNode &Org = ....Segments.L5Seg.MultifidusLumborumL5S1_1NodeL;
    AnyRefNode &Ins = ....Segments.SacrumSeg.MultifidusLumborumL5S1_1NodeL;
    viewMuscle = {#include "../DrawSettings/MusDrawSettings.any"};
    viewForce.Visible ??= Off;
  };

  AnyMuscleViaPoint MultifidusLumborumL1L4 = {
    AnyMuscleModel &MusMdl = ....MuscleModels.Left.MultifidusLumborum.MultifidusLumborumL1L4;
    AnyRefNode &Org = ....Segments.L1Seg.MultifidusLumborumL1L4NodeL;
    AnyRefNode &Ins = ....Segments.L4Seg.MultifidusLumborumL1L4NodeL;
    viewMuscle = {#include "../DrawSettings/MusDrawSettings.any"};
    viewForce.Visible ??= Off;
  };

  AnyMuscleViaPoint MultifidusLumborumL2L5_1 = {
    AnyMuscleModel &MusMdl = ....MuscleModels.Left.MultifidusLumborum.MultifidusLumborumL2L5_1;
    AnyRefNode &Org = ....Segments.L2Seg.MultifidusLumborumL2L5_1NodeL;
    AnyRefNode &Ins = ....Segments.L5Seg.MultifidusLumborumL2L5_1NodeL;
    viewMuscle = {#include "../DrawSettings/MusDrawSettings.any"};
    viewForce.Visible ??= Off;
  };

  AnyMuscleViaPoint MultifidusLumborumL3S1 = {
    AnyMuscleModel &MusMdl = ....MuscleModels.Left.MultifidusLumborum.MultifidusLumborumL3S1;
    AnyRefNode &Org = ....Segments.L3Seg.MultifidusLumborumL3S1NodeL;
    AnyRefNode &Ins = ....Segments.SacrumSeg.MultifidusLumborumL3S1NodeL;
    viewMuscle = {#include "../DrawSettings/MusDrawSettings.any"};
    viewForce.Visible ??= Off;
  };

  AnyMuscleViaPoint MultifidusLumborumL4S1_2 = {
    AnyMuscleModel &MusMdl = ....MuscleModels.Left.MultifidusLumborum.MultifidusLumborumL4S1_2;
    AnyRefNode &Org = ....Segments.L4Seg.MultifidusLumborumL4S1_2NodeL;
    AnyRefNode &Ins = ....Segments.SacrumSeg.MultifidusLumborumL4S1_2NodeL;
    viewMuscle = {#include "../DrawSettings/MusDrawSettings.any"};
    viewForce.Visible ??= Off;
  };

  AnyMuscleViaPoint MultifidusLumborumL5S1_2 = {
    AnyMuscleModel &MusMdl = ....MuscleModels.Left.MultifidusLumborum.MultifidusLumborumL5S1_2;
    AnyRefNode &Org = ....Segments.L5Seg.MultifidusLumborumL5S1_2NodeL;
    AnyRefNode &Ins = ....Segments.SacrumSeg.MultifidusLumborumL5S1_2NodeL;
    viewMuscle = {#include "../DrawSettings/MusDrawSettings.any"};
    viewForce.Visible ??= Off;
  };

  AnyMuscleViaPoint MultifidusLumborumL1L5 = {
    AnyMuscleModel &MusMdl = ....MuscleModels.Left.MultifidusLumborum.MultifidusLumborumL1L5;
    AnyRefNode &Org = ....Segments.L1Seg.MultifidusLumborumL1L5NodeL;
    AnyRefNode &Ins = ....Segments.L5Seg.MultifidusLumborumL1L5NodeL;
    viewMuscle = {#include "../DrawSettings/MusDrawSettings.any"};
    viewForce.Visible ??= Off;
  };

  AnyMuscleViaPoint MultifidusLumborumL1S1 = {
    AnyMuscleModel &MusMdl = ....MuscleModels.Left.MultifidusLumborum.MultifidusLumborumL1S1;
    AnyRefNode &Org = ....Segments.L1Seg.MultifidusLumborumL1S1NodeL;
    AnyRefNode &Ins = ....Segments.SacrumSeg.MultifidusLumborumL1S1NodeL;
    viewMuscle = {#include "../DrawSettings/MusDrawSettings.any"};
    viewForce.Visible ??= Off;
  };

  AnyMuscleViaPoint MultifidusLumborumL2L5_2 = {
    AnyMuscleModel &MusMdl = ....MuscleModels.Left.MultifidusLumborum.MultifidusLumborumL2L5_2;
    AnyRefNode &Org = ....Segments.L2Seg.MultifidusLumborumL2L5_2NodeL;
    AnyRefNode &Ins = ....Segments.L5Seg.MultifidusLumborumL2L5_2NodeL;
    viewMuscle = {#include "../DrawSettings/MusDrawSettings.any"};
    viewForce.Visible ??= Off;
  };

  AnyMuscleViaPoint MultifidusLumborumL2S1 = {
    AnyMuscleModel &MusMdl = ....MuscleModels.Left.MultifidusLumborum.MultifidusLumborumL2S1;
    AnyRefNode &Org = ....Segments.L2Seg.MultifidusLumborumL2S1NodeL;
    AnyRefNode &Ins = ....Segments.SacrumSeg.MultifidusLumborumL2S1NodeL;
    viewMuscle = {#include "../DrawSettings/MusDrawSettings.any"};
    viewForce.Visible ??= Off;
  };

  AnyMuscleViaPoint MultifidusLumborumL3S2 = {
    AnyMuscleModel &MusMdl = ....MuscleModels.Left.MultifidusLumborum.MultifidusLumborumL3S2;
    AnyRefNode &Org = ....Segments.L3Seg.MultifidusLumborumL3S2NodeL;
    AnyRefNode &Via = ....Segments.SacrumSeg.MultifidusLumborumL3S2NodeViaL;
    AnyRefNode &Ins = ....Segments.SacrumSeg.MultifidusLumborumL3S2NodeL;
    viewMuscle = {#include "../DrawSettings/MusDrawSettings.any"};
    viewForce.Visible ??= Off;
  };

  AnyMuscleViaPoint MultifidusLumborumL4S2 = {
    AnyMuscleModel &MusMdl = ....MuscleModels.Left.MultifidusLumborum.MultifidusLumborumL4S2;
    AnyRefNode &Org = ....Segments.L4Seg.MultifidusLumborumL4S2NodeL;
    AnyRefNode &Via = ....Segments.SacrumSeg.MultifidusLumborumL4S2ViaNodeL;
    AnyRefNode &Ins = ....Segments.SacrumSeg.MultifidusLumborumL4S2NodeL;
    viewMuscle = {#include "../DrawSettings/MusDrawSettings.any"};
    viewForce.Visible ??= Off;
  };

  AnyMuscleViaPoint MultifidusLumborumL5S3 = {
    AnyMuscleModel &MusMdl = ....MuscleModels.Left.MultifidusLumborum.MultifidusLumborumL5S3;
    AnyRefNode &Org = ....Segments.L5Seg.MultifidusLumborumL5S3NodeL;
    AnyRefNode &Via = ....Segments.SacrumSeg.MultifidusLumborumL5S3ViaNodeL;
    AnyRefNode &Ins = ....Segments.SacrumSeg.MultifidusLumborumL5S3NodeL;
    viewMuscle = {#include "../DrawSettings/MusDrawSettings.any"};
    viewForce.Visible ??= Off;
  };

  AnyMuscleViaPoint MultifidusLumborumtL1IC = {
    AnyMuscleModel &MusMdl = ....MuscleModels.Left.MultifidusLumborum.MultifidusLumborumtL1IC;
    AnyRefNode &Org = ....Segments.L1Seg.MultifidusLumborumtL1ICNodeL;
    AnyRefNode &Via = ....Segments.PelvisSeg.MultifidusLumborumtL1ICViaNodeL;
    AnyRefNode &Ins = ....Segments.PelvisSeg.MultifidusLumborumtL1ICNodeL;
    viewMuscle = {#include "../DrawSettings/MusDrawSettings.any"};
    viewForce.Visible ??= Off;
  };

  AnyMuscleViaPoint MultifidusLumborumtL2IC = {
    AnyMuscleModel &MusMdl = ....MuscleModels.Left.MultifidusLumborum.MultifidusLumborumtL2IC;
    AnyRefNode &Org = ....Segments.L2Seg.MultifidusLumborumtL2ICNodeL;
    AnyRefNode &Via = ....Segments.PelvisSeg.MultifidusLumborumtL2ICViaNodeL;
    AnyRefNode &Ins = ....Segments.PelvisSeg.MultifidusLumborumtL2ICNodeL;
    viewMuscle = {#include "../DrawSettings/MusDrawSettings.any"};
    viewForce.Visible ??= Off;
  };
};

MuscleGroup MultifidusThoracis = {
  #if BM_TRUNK_THORACIC_MODEL == _THORACIC_MODEL_FLEXIBLE_
  AnyMuscleViaPoint MultifidusThoracisT4T1 =   {
    AnyMuscleModel &MusMdl = ....MuscleModels.Left.MultifidusThoracis.MultifidusThoracisT4T1;
    AnyRefFrame &Org = ....Segments.T4Seg.MultifidusThoracisT4T1NodeLOrg;
    AnyRefFrame &Ins = ....Segments.T1Seg.MultifidusThoracisT4T1NodeLIns;
    viewMuscle = {#include "../DrawSettings/MusDrawSettings.any"};
    viewForce.Visible ??= Off;
  };

  AnyMuscleViaPoint MultifidusThoracisT5T1 =   {
    AnyMuscleModel &MusMdl = ....MuscleModels.Left.MultifidusThoracis.MultifidusThoracisT5T1;
    AnyRefFrame &Org = ....Segments.T5Seg.MultifidusThoracisT5T1NodeLOrg;
    AnyRefFrame &Ins = ....Segments.T1Seg.MultifidusThoracisT5T1NodeLIns;
    viewMuscle = {#include "../DrawSettings/MusDrawSettings.any"};
    viewForce.Visible ??= Off;
  };

  AnyMuscleViaPoint MultifidusThoracisT5T2 =   {
    AnyMuscleModel &MusMdl = ....MuscleModels.Left.MultifidusThoracis.MultifidusThoracisT5T2;
    AnyRefFrame &Org = ....Segments.T5Seg.MultifidusThoracisT5T2NodeLOrg;
    AnyRefFrame &Ins = ....Segments.T2Seg.MultifidusThoracisT5T2NodeLIns;
    viewMuscle = {#include "../DrawSettings/MusDrawSettings.any"};
    viewForce.Visible ??= Off;
  };

  AnyMuscleViaPoint MultifidusThoracisT6T1 =   {
    AnyMuscleModel &MusMdl = ....MuscleModels.Left.MultifidusThoracis.MultifidusThoracisT6T1;
    AnyRefFrame &Org = ....Segments.T6Seg.MultifidusThoracisT6T1NodeLOrg;
    AnyRefFrame &Ins = ....Segments.T1Seg.MultifidusThoracisT6T1NodeLIns;
    viewMuscle = {#include "../DrawSettings/MusDrawSettings.any"};
    viewForce.Visible ??= Off;
  };

  AnyMuscleViaPoint MultifidusThoracisT6T2 =   {
    AnyMuscleModel &MusMdl = ....MuscleModels.Left.MultifidusThoracis.MultifidusThoracisT6T2;
    AnyRefFrame &Org = ....Segments.T6Seg.MultifidusThoracisT6T2NodeLOrg;
    AnyRefFrame &Ins = ....Segments.T2Seg.MultifidusThoracisT6T2NodeLIns;
    viewMuscle = {#include "../DrawSettings/MusDrawSettings.any"};
    viewForce.Visible ??= Off;
  };

  AnyMuscleViaPoint MultifidusThoracisT6T3 =   {
    AnyMuscleModel &MusMdl = ....MuscleModels.Left.MultifidusThoracis.MultifidusThoracisT6T3;
    AnyRefFrame &Org = ....Segments.T6Seg.MultifidusThoracisT6T3NodeLOrg;
    AnyRefFrame &Ins = ....Segments.T3Seg.MultifidusThoracisT6T3NodeLIns;
    viewMuscle = {#include "../DrawSettings/MusDrawSettings.any"};
    viewForce.Visible ??= Off;
  };

  AnyMuscleViaPoint MultifidusThoracisT7T2 =   {
    AnyMuscleModel &MusMdl = ....MuscleModels.Left.MultifidusThoracis.MultifidusThoracisT7T2;
    AnyRefFrame &Org = ....Segments.T7Seg.MultifidusThoracisT7T2NodeLOrg;
    AnyRefFrame &Ins = ....Segments.T2Seg.MultifidusThoracisT7T2NodeLIns;
    viewMuscle = {#include "../DrawSettings/MusDrawSettings.any"};
    viewForce.Visible ??= Off;
  };

  AnyMuscleViaPoint MultifidusThoracisT7T3 =   {
    AnyMuscleModel &MusMdl = ....MuscleModels.Left.MultifidusThoracis.MultifidusThoracisT7T3;
    AnyRefFrame &Org = ....Segments.T7Seg.MultifidusThoracisT7T3NodeLOrg;
    AnyRefFrame &Ins = ....Segments.T3Seg.MultifidusThoracisT7T3NodeLIns;
    viewMuscle = {#include "../DrawSettings/MusDrawSettings.any"};
    viewForce.Visible ??= Off;
  };

  AnyMuscleViaPoint MultifidusThoracisT7T4 =   {
    AnyMuscleModel &MusMdl = ....MuscleModels.Left.MultifidusThoracis.MultifidusThoracisT7T4;
    AnyRefFrame &Org = ....Segments.T7Seg.MultifidusThoracisT7T4NodeLOrg;
    AnyRefFrame &Ins = ....Segments.T4Seg.MultifidusThoracisT7T4NodeLIns;
    viewMuscle = {#include "../DrawSettings/MusDrawSettings.any"};
    viewForce.Visible ??= Off;
  };

  AnyMuscleViaPoint MultifidusThoracisT8T3 =   {
    AnyMuscleModel &MusMdl = ....MuscleModels.Left.MultifidusThoracis.MultifidusThoracisT8T3;
    AnyRefFrame &Org = ....Segments.T8Seg.MultifidusThoracisT8T3NodeLOrg;
    AnyRefFrame &Ins = ....Segments.T3Seg.MultifidusThoracisT8T3NodeLIns;
    viewMuscle = {#include "../DrawSettings/MusDrawSettings.any"};
    viewForce.Visible ??= Off;
  };

  AnyMuscleViaPoint MultifidusThoracisT8T4 =   {
    AnyMuscleModel &MusMdl = ....MuscleModels.Left.MultifidusThoracis.MultifidusThoracisT8T4;
    AnyRefFrame &Org = ....Segments.T8Seg.MultifidusThoracisT8T4NodeLOrg;
    AnyRefFrame &Ins = ....Segments.T4Seg.MultifidusThoracisT8T4NodeLIns;
    viewMuscle = {#include "../DrawSettings/MusDrawSettings.any"};
    viewForce.Visible ??= Off;
  };

  AnyMuscleViaPoint MultifidusThoracisT8T5 =   {
    AnyMuscleModel &MusMdl = ....MuscleModels.Left.MultifidusThoracis.MultifidusThoracisT8T5;
    AnyRefFrame &Org = ....Segments.T8Seg.MultifidusThoracisT8T5NodeLOrg;
    AnyRefFrame &Ins = ....Segments.T5Seg.MultifidusThoracisT8T5NodeLIns;
    viewMuscle = {#include "../DrawSettings/MusDrawSettings.any"};
    viewForce.Visible ??= Off;
  };

  AnyMuscleViaPoint MultifidusThoracisT9T4 =   {
    AnyMuscleModel &MusMdl = ....MuscleModels.Left.MultifidusThoracis.MultifidusThoracisT9T4;
    AnyRefFrame &Org = ....Segments.T9Seg.MultifidusThoracisT9T4NodeLOrg;
    AnyRefFrame &Ins = ....Segments.T4Seg.MultifidusThoracisT9T4NodeLIns;
    viewMuscle = {#include "../DrawSettings/MusDrawSettings.any"};
    viewForce.Visible ??= Off;
  };

  AnyMuscleViaPoint MultifidusThoracisT9T5 =   {
    AnyMuscleModel &MusMdl = ....MuscleModels.Left.MultifidusThoracis.MultifidusThoracisT9T5;
    AnyRefFrame &Org = ....Segments.T9Seg.MultifidusThoracisT9T5NodeLOrg;
    AnyRefFrame &Ins = ....Segments.T5Seg.MultifidusThoracisT9T5NodeLIns;
    viewMuscle = {#include "../DrawSettings/MusDrawSettings.any"};
    viewForce.Visible ??= Off;
  };

  AnyMuscleViaPoint MultifidusThoracisT9T6 =   {
    AnyMuscleModel &MusMdl = ....MuscleModels.Left.MultifidusThoracis.MultifidusThoracisT9T6;
    AnyRefFrame &Org = ....Segments.T9Seg.MultifidusThoracisT9T6NodeLOrg;
    AnyRefFrame &Ins = ....Segments.T6Seg.MultifidusThoracisT9T6NodeLIns;
    viewMuscle = {#include "../DrawSettings/MusDrawSettings.any"};
    viewForce.Visible ??= Off;
  };

  AnyMuscleViaPoint MultifidusThoracisT10T5 =   {
    AnyMuscleModel &MusMdl = ....MuscleModels.Left.MultifidusThoracis.MultifidusThoracisT10T5;
    AnyRefFrame &Org = ....Segments.T10Seg.MultifidusThoracisT10T5NodeLOrg;
    AnyRefFrame &Ins = ....Segments.T5Seg.MultifidusThoracisT10T5NodeLIns;
    viewMuscle = {#include "../DrawSettings/MusDrawSettings.any"};
    viewForce.Visible ??= Off;
  };

  AnyMuscleViaPoint MultifidusThoracisT10T6 =   {
    AnyMuscleModel &MusMdl = ....MuscleModels.Left.MultifidusThoracis.MultifidusThoracisT10T6;
    AnyRefFrame &Org = ....Segments.T10Seg.MultifidusThoracisT10T6NodeLOrg;
    AnyRefFrame &Ins = ....Segments.T6Seg.MultifidusThoracisT10T6NodeLIns;
    viewMuscle = {#include "../DrawSettings/MusDrawSettings.any"};
    viewForce.Visible ??= Off;
  };

  AnyMuscleViaPoint MultifidusThoracisT10T7 =   {
    AnyMuscleModel &MusMdl = ....MuscleModels.Left.MultifidusThoracis.MultifidusThoracisT10T7;
    AnyRefFrame &Org = ....Segments.T10Seg.MultifidusThoracisT10T7NodeLOrg;
    AnyRefFrame &Ins = ....Segments.T7Seg.MultifidusThoracisT10T7NodeLIns;
    viewMuscle = {#include "../DrawSettings/MusDrawSettings.any"};
    viewForce.Visible ??= Off;
  };

  AnyMuscleViaPoint MultifidusThoracisT11T6 =   {
    AnyMuscleModel &MusMdl = ....MuscleModels.Left.MultifidusThoracis.MultifidusThoracisT11T6;
    AnyRefFrame &Org = ....Segments.T11Seg.MultifidusThoracisT11T6NodeLOrg;
    AnyRefFrame &Ins = ....Segments.T6Seg.MultifidusThoracisT11T6NodeLIns;
    viewMuscle = {#include "../DrawSettings/MusDrawSettings.any"};
    viewForce.Visible ??= Off;
  };

  AnyMuscleViaPoint MultifidusThoracisT11T7 =   {
    AnyMuscleModel &MusMdl = ....MuscleModels.Left.MultifidusThoracis.MultifidusThoracisT11T7;
    AnyRefFrame &Org = ....Segments.T11Seg.MultifidusThoracisT11T7NodeLOrg;
    AnyRefFrame &Ins = ....Segments.T7Seg.MultifidusThoracisT11T7NodeLIns;
    viewMuscle = {#include "../DrawSettings/MusDrawSettings.any"};
    viewForce.Visible ??= Off;
  };

  AnyMuscleViaPoint MultifidusThoracisT11T8 =   {
    AnyMuscleModel &MusMdl = ....MuscleModels.Left.MultifidusThoracis.MultifidusThoracisT11T8;
    AnyRefFrame &Org = ....Segments.T11Seg.MultifidusThoracisT11T8NodeLOrg;
    AnyRefFrame &Ins = ....Segments.T8Seg.MultifidusThoracisT11T8NodeLIns;
    viewMuscle = {#include "../DrawSettings/MusDrawSettings.any"};
    viewForce.Visible ??= Off;
  };

  AnyMuscleViaPoint MultifidusThoracisT12T7 =   {
    AnyMuscleModel &MusMdl = ....MuscleModels.Left.MultifidusThoracis.MultifidusThoracisT12T7;
    AnyRefFrame &Org = ....Segments.T12Seg.MultifidusThoracisT12T7NodeLOrg;
    AnyRefFrame &Ins = ....Segments.T7Seg.MultifidusThoracisT12T7NodeLIns;
    viewMuscle = {#include "../DrawSettings/MusDrawSettings.any"};
    viewForce.Visible ??= Off;
  };

  AnyMuscleViaPoint MultifidusThoracisT12T8 =   {
    AnyMuscleModel &MusMdl = ....MuscleModels.Left.MultifidusThoracis.MultifidusThoracisT12T8;
    AnyRefFrame &Org = ....Segments.T12Seg.MultifidusThoracisT12T8NodeLOrg;
    AnyRefFrame &Ins = ....Segments.T8Seg.MultifidusThoracisT12T8NodeLIns;
    viewMuscle = {#include "../DrawSettings/MusDrawSettings.any"};
    viewForce.Visible ??= Off;
  };

  AnyMuscleViaPoint MultifidusThoracisT12T9 =   {
    AnyMuscleModel &MusMdl = ....MuscleModels.Left.MultifidusThoracis.MultifidusThoracisT12T9;
    AnyRefFrame &Org = ....Segments.T12Seg.MultifidusThoracisT12T9NodeLOrg;
    AnyRefFrame &Ins = ....Segments.T9Seg.MultifidusThoracisT12T9NodeLIns;
    viewMuscle = {#include "../DrawSettings/MusDrawSettings.any"};
    viewForce.Visible ??= Off;
  };
  #endif
  AnyMuscleViaPoint MultifidusThoracisL1T8 =   {
    AnyMuscleModel &MusMdl = ....MuscleModels.Left.MultifidusThoracis.MultifidusThoracisL1T8;
    AnyRefFrame &Org = ....Segments.L1Seg.MultifidusThoracisL1T8NodeLOrg;
    AnyRefFrame &Ins = ....Segments.T8Seg.MultifidusThoracisL1T8NodeLIns;
    viewMuscle = {#include "../DrawSettings/MusDrawSettings.any"};
    viewForce.Visible ??= Off;
  };

  AnyMuscleViaPoint MultifidusThoracisL1T9 =   {
    AnyMuscleModel &MusMdl = ....MuscleModels.Left.MultifidusThoracis.MultifidusThoracisL1T9;
    AnyRefFrame &Org = ....Segments.L1Seg.MultifidusThoracisL1T9NodeLOrg;
    AnyRefFrame &Ins = ....Segments.T9Seg.MultifidusThoracisL1T9NodeLIns;
    viewMuscle = {#include "../DrawSettings/MusDrawSettings.any"};
    viewForce.Visible ??= Off;

  };

  AnyMuscleViaPoint MultifidusThoracisL1T10 =   {
    AnyMuscleModel &MusMdl = ....MuscleModels.Left.MultifidusThoracis.MultifidusThoracisL1T10;
    AnyRefFrame &Org = ....Segments.L1Seg.MultifidusThoracisL1T10NodeLOrg;
    AnyRefFrame &Ins = ....Segments.T10Seg.MultifidusThoracisL1T10NodeLIns;
    viewMuscle = {#include "../DrawSettings/MusDrawSettings.any"};
    viewForce.Visible ??= Off;

  };

  AnyMuscleViaPoint MultifidusThoracisL2T9 =   {
    AnyMuscleModel &MusMdl = ....MuscleModels.Left.MultifidusThoracis.MultifidusThoracisL2T9;
    AnyRefFrame &Org = ....Segments.L2Seg.MultifidusThoracisL2T9NodeLOrg;
    AnyRefFrame &Ins = ....Segments.T9Seg.MultifidusThoracisL2T9NodeLIns;
    viewMuscle = {#include "../DrawSettings/MusDrawSettings.any"};
    viewForce.Visible ??= Off;

  };

  AnyMuscleViaPoint MultifidusThoracisL2T10 =   {
    AnyMuscleModel &MusMdl = ....MuscleModels.Left.MultifidusThoracis.MultifidusThoracisL2T10;
    AnyRefFrame &Org = ....Segments.L2Seg.MultifidusThoracisL2T10NodeLOrg;
    AnyRefFrame &Ins = ....Segments.T10Seg.MultifidusThoracisL2T10NodeLIns;
    viewMuscle = {#include "../DrawSettings/MusDrawSettings.any"};
    viewForce.Visible ??= Off;

  };

  AnyMuscleViaPoint MultifidusThoracisL2T11 =   {
    AnyMuscleModel &MusMdl = ....MuscleModels.Left.MultifidusThoracis.MultifidusThoracisL2T11;
    AnyRefFrame &Org = ....Segments.L2Seg.MultifidusThoracisL2T11NodeLOrg;
    AnyRefFrame &Ins = ....Segments.T11Seg.MultifidusThoracisL2T11NodeLIns;
    viewMuscle = {#include "../DrawSettings/MusDrawSettings.any"};
    viewForce.Visible ??= Off;

  };

  AnyMuscleViaPoint MultifidusThoracisL3T10 =   {
    AnyMuscleModel &MusMdl = ....MuscleModels.Left.MultifidusThoracis.MultifidusThoracisL3T10;
    AnyRefFrame &Org = ....Segments.L3Seg.MultifidusThoracisL3T10NodeLOrg;
    AnyRefFrame &Ins = ....Segments.T10Seg.MultifidusThoracisL3T10NodeLIns;
    viewMuscle = {#include "../DrawSettings/MusDrawSettings.any"};
    viewForce.Visible ??= Off;

  };

  AnyMuscleViaPoint MultifidusThoracisL3T11 =   {
    AnyMuscleModel &MusMdl = ....MuscleModels.Left.MultifidusThoracis.MultifidusThoracisL3T11;
    AnyRefFrame &Org = ....Segments.L3Seg.MultifidusThoracisL3T11NodeLOrg;
    AnyRefFrame &Ins = ....Segments.T11Seg.MultifidusThoracisL3T11NodeLIns;
    viewMuscle = {#include "../DrawSettings/MusDrawSettings.any"};
    viewForce.Visible ??= Off;

  };

  AnyMuscleViaPoint MultifidusThoracisL3T12 =   {
    AnyMuscleModel &MusMdl = ....MuscleModels.Left.MultifidusThoracis.MultifidusThoracisL3T12;
    AnyRefFrame &Org = ....Segments.L3Seg.MultifidusThoracisL3T12NodeLOrg;
    AnyRefFrame &Ins = ....Segments.T12Seg.MultifidusThoracisL3T12NodeLIns;
    viewMuscle = {#include "../DrawSettings/MusDrawSettings.any"};
    viewForce.Visible ??= Off;

  };

  AnyMuscleViaPoint MultifidusThoracisL4T11 =   {
    AnyMuscleModel &MusMdl = ....MuscleModels.Left.MultifidusThoracis.MultifidusThoracisL4T11;
    AnyRefFrame &Org = ....Segments.L4Seg.MultifidusThoracisL4T11NodeLOrg;
    AnyRefFrame &Ins = ....Segments.T11Seg.MultifidusThoracisL4T11NodeLIns;
    viewMuscle = {#include "../DrawSettings/MusDrawSettings.any"};
    viewForce.Visible ??= Off;

  };

  AnyMuscleViaPoint MultifidusThoracisL4T12 =   {
    AnyMuscleModel &MusMdl = ....MuscleModels.Left.MultifidusThoracis.MultifidusThoracisL4T12;
    AnyRefFrame &Org = ....Segments.L4Seg.MultifidusThoracisL4T12NodeLOrg;
    AnyRefFrame &Ins = ....Segments.T12Seg.MultifidusThoracisL4T12NodeLIns;
    viewMuscle = {#include "../DrawSettings/MusDrawSettings.any"};
    viewForce.Visible ??= Off;

  };

  AnyMuscleViaPoint MultifidusThoracisL5T12 =   {
    AnyMuscleModel &MusMdl = ....MuscleModels.Left.MultifidusThoracis.MultifidusThoracisL5T12;
    AnyRefFrame &Org = ....Segments.L5Seg.MultifidusThoracisL5T12NodeLOrg;
    AnyRefFrame &Ins = ....Segments.T12Seg.MultifidusThoracisL5T12NodeLIns;
    viewMuscle = {#include "../DrawSettings/MusDrawSettings.any"};
    viewForce.Visible ??= Off;

  };
};

MuscleGroup ObliquusExternus = {

  #if BM_TRUNK_CAVITY_MODEL == _CAVITY_MODEL_VOLUME_


  #ifdef OBLIQUUS_WRAP_ON_CYLS
  AnyMuscleShortestPath ObliquusExternusR6Abd = {
    AnyMuscleModel &MusMdl = ....MuscleModels.Left.ObliquusExternus.ObliquusExternusR6Abd;
    AnyRefNode &Org = ....Segments.Left.R6Seg.ObliquusExternusNode;
    AnyRefNode &Ins = ....Abdominal.Layer_L1.BaseSegAnterior.mid;

    #if BM_TRUNK_THORACIC_STERNUM_TOPOLOGY == 4
    AnyParamSurf &srf1 =....Segments.Left.CostalCartilageSeg.WrappingTorusR10.Surf;
    #else
    AnyParamSurf &srf1 =....Segments.SternalBodySeg.Left.ObliquusWrapping.Surf;
    #endif

    SPLine.StringMesh=10;

    SPLine = {
      AnyMatrix InitWrapPos = {
        transf3D({0,.srf1.MajorRadius+.srf1.MinorRadius, 0}, &.srf1)
      };
      InitWrapPosVecArr = {&InitWrapPos};
    };
    viewMuscle = {#include "../DrawSettings/MusDrawSettings.any"};
    viewForce.Visible ??= Off;
  };

  AnyMuscleShortestPath ObliquusExternusR7Abd = {
    AnyMuscleModel &MusMdl = ....MuscleModels.Left.ObliquusExternus.ObliquusExternusR7Abd;
    AnyRefNode &Org = ....Segments.Left.R7Seg.ObliquusExternusNode;
    AnyRefNode &Ins = ....Abdominal.Layer_L2.BaseSegAnterior.mid;

    #if BM_TRUNK_THORACIC_STERNUM_TOPOLOGY == 4
    AnyParamSurf &srf1 =....Segments.Left.CostalCartilageSeg.WrappingTorusR10.Surf;
    #else
    AnyParamSurf &srf1 =....Segments.SternalBodySeg.Left.ObliquusWrapping.Surf;
    #endif

    SPLine.StringMesh=60;

    SPLine = {
      AnyMatrix InitWrapPos = {
        transf3D({0,.srf1.MajorRadius+.srf1.MinorRadius, 0}, &.srf1)
      };
      InitWrapPosVecArr = {&InitWrapPos};
    };
    viewMuscle = {#include "../DrawSettings/MusDrawSettings.any"};
    viewForce.Visible ??= Off;
  };


  AnyMuscleShortestPath ObliquusExternusR8Abd = {
    AnyMuscleModel &MusMdl = ....MuscleModels.Left.ObliquusExternus.ObliquusExternusR8Abd;
    AnyRefNode &Org = ....Segments.Left.R8Seg.ObliquusExternusNode;
    AnyRefNode &Ins = ....Abdominal.Layer_L3.BaseSegAnterior.mid;

    #if BM_TRUNK_THORACIC_STERNUM_TOPOLOGY == 4
    AnyParamSurf &srf1 =....Segments.Left.CostalCartilageSeg.WrappingTorusR10.Surf;
    #else
    AnyParamSurf &srf1 =....Segments.SternalBodySeg.Left.ObliquusWrapping.Surf;
    #endif

    SPLine.StringMesh=60;

    SPLine = {
      AnyMatrix InitWrapPos = {
        transf3D({0,.srf1.MajorRadius+.srf1.MinorRadius, 0}, &.srf1)
      };
      InitWrapPosVecArr = {&InitWrapPos};
    };
    viewMuscle = {#include "../DrawSettings/MusDrawSettings.any"};
    viewForce.Visible ??= Off;
  };


  AnyMuscleShortestPath ObliquusExternusR9Abd_1 = {
    AnyMuscleModel &MusMdl = ....MuscleModels.Left.ObliquusExternus.ObliquusExternusR9Abd_1;
    AnyRefNode &Org = ....Segments.Left.R9Seg.ObliquusExternusNode;
    AnyRefNode &Ins = ....Abdominal.Layer_L4.BaseSegAnterior.mid;

    #if BM_TRUNK_THORACIC_STERNUM_TOPOLOGY == 4
    AnyParamSurf &srf1 =....Segments.Left.CostalCartilageSeg.WrappingTorusR10.Surf;
    #else
    AnyParamSurf &srf1 =....Segments.SternalBodySeg.Left.ObliquusWrapping.Surf;
    #endif

    SPLine.StringMesh=60;

    SPLine = {
      AnyMatrix InitWrapPos = {
        transf3D({0,.srf1.MajorRadius+.srf1.MinorRadius, 0}, &.srf1)
      };
      InitWrapPosVecArr = {&InitWrapPos};
    };
    viewMuscle = {#include "../DrawSettings/MusDrawSettings.any"};
    viewForce.Visible ??= Off;
  };


  AnyMuscleShortestPath  ObliquusExternusR9Abd_2= {
    AnyMuscleModel &MusMdl = ....MuscleModels.Left.ObliquusExternus.ObliquusExternusR9Abd_2;
    AnyRefNode &Org = ....Segments.Left.R9Seg.ObliquusExternusNode_1;
    AnyRefNode &Ins = ....Abdominal.Layer_L5.BaseSegAnterior.mid;

    #if BM_TRUNK_THORACIC_STERNUM_TOPOLOGY == 4
    AnyParamSurf &srf0 =....Segments.Left.CostalCartilageSeg.WrappingTorusR10.Surf;
    #else
    AnyParamSurf &srf0 =....Segments.SternalBodySeg.Left.ObliquusWrapping.Surf;
    #endif
    AnyParamSurf  &srf1 =....Abdominal.ObliquusWrapping.WrappingSeg.Layer4WrappingPoints.Left.nn09.Translate.OutwardCyl;
    AnyParamSurf  &srf2 =....Abdominal.ObliquusWrapping.WrappingSeg.Layer5WrappingPoints.Left.nn10.Translate.OutwardCyl;

    SPLine.StringMesh=60;

    SPLine = {
      AnyMatrix InitWrapPos = {
        transf3D({0,-.srf1.radius, 0.5*.srf1.Length}, &.srf1),
        transf3D({0,-.srf2.radius, 0.5*.srf2.Length}, &.srf2)
      };
      InitWrapPosVecArr = {&InitWrapPos};
    };
    viewMuscle = {#include "../DrawSettings/MusDrawSettings.any"};
    viewForce.Visible ??= Off;
  };


  AnyMuscleShortestPath ObliquusExternusR10Abd_1 = {
    AnyMuscleModel &MusMdl = ....MuscleModels.Left.ObliquusExternus.ObliquusExternusR10Abd_1;
    AnyRefNode &Org = ....Segments.Left.R10Seg.ObliquusExternusNode_1;
    AnyRefNode &Ins =     ....Abdominal.Layer_Pelvic2.BaseSegAnterior.VolumePoints_Discretization28.Left.nn11;

    // AnyParamSurf &srf1 =....Abdominal.ObliquusWrapping.WrappingSeg.Layer4WrappingPoints.Left.nn09.Translate.VerticalCyl;
    AnyParamSurf &srf2 =....Abdominal.ObliquusWrapping.WrappingSeg.Layer4WrappingPoints.Left.nn10.Translate.OutwardCyl;

    SPLine.StringMesh=240;

    SPLine = {
      AnyMatrix InitWrapPos = {
        // transf3D({0,-.srf1.radius, 0.5*.srf1.Length}, &.srf1),
        transf3D({0,-1.1*.srf2.radius, 0.5*.srf2.Length}, &.srf2),
      };
      InitWrapPosVecArr = {&InitWrapPos};
    };

    viewMuscle = {#include "../DrawSettings/MusDrawSettings.any" };
    viewForce.Visible ??= Off;
  };


  AnyMuscleShortestPath ObliquusExternusR10Abd_2 = {
    AnyMuscleModel &MusMdl = ....MuscleModels.Left.ObliquusExternus.ObliquusExternusR10Abd_2;
    AnyRefNode &Org = ....Segments.Left.R10Seg.ObliquusExternusNode_2;
    AnyRefNode &Ins =     ....Abdominal.Layer_Pelvic2.BaseSegAnterior.VolumePoints_Discretization28.Left.nn10;

    // AnyParamSurf &srf1 =....Abdominal.ObliquusWrapping.WrappingSeg.Layer4WrappingPoints.Left.nn08.Translate.VerticalCyl;
    AnyParamSurf &srf2 =....Abdominal.ObliquusWrapping.WrappingSeg.Layer4WrappingPoints.Left.nn09.Translate.OutwardCyl;

    SPLine.StringMesh=240;

    SPLine = {
      AnyMatrix InitWrapPos = {
        // transf3D({0,-1.1*.srf1.radius, 0.5*.srf1.Length}, &.srf1),
        transf3D({0,-1.1*.srf2.radius, 0.5*.srf2.Length}, &.srf2),
      };
      InitWrapPosVecArr = {&InitWrapPos};
    };

    viewMuscle = {#include "../DrawSettings/MusDrawSettings.any"};
    viewForce.Visible ??= Off;
  };


  AnyMuscleViaPoint ObliquusExternusR10IC_1= {
    AnyMuscleModel &MusMdl = ....MuscleModels.Left.ObliquusExternus.ObliquusExternusR10IC_1;
    AnyRefNode &Org = ....Segments.Left.R10Seg.ObliquusExternusNode_00;
    AnyRefNode &Ins =    ....Segments.PelvisSeg.Left.ObliquusInternusNode_8;
    viewMuscle = {#include "../DrawSettings/MusDrawSettings.any"};
    viewForce.Visible ??= Off;
  };


  AnyMuscleViaPoint ObliquusExternusR10IC_2= {
    AnyMuscleModel &MusMdl = ....MuscleModels.Left.ObliquusExternus.ObliquusExternusR10IC_2;
    AnyRefNode &Org = ....Segments.Left.R10Seg.ObliquusExternusNode_0;
    AnyRefNode &Ins =    ....Segments.PelvisSeg.Left.ObliquusInternusNode_9;
    viewMuscle = {#include "../DrawSettings/MusDrawSettings.any"};
    viewForce.Visible ??= Off;
  };


  AnyMuscleViaPoint ObliquusExternusR11IC_1 = {
    AnyMuscleModel &MusMdl = ....MuscleModels.Left.ObliquusExternus.ObliquusExternusR11IC_1;
    AnyRefNode &Org = ....Segments.Left.R11Seg.ObliquusExternusNode;
    AnyRefNode &Ins =    ....Segments.PelvisSeg.Left.ObliquusInternusNode_7;
    viewMuscle = {#include "../DrawSettings/MusDrawSettings.any"};
    viewForce.Visible ??= Off;
  };


  AnyMuscleViaPoint ObliquusExternusR11IC_2 = {
    AnyMuscleModel &MusMdl = ....MuscleModels.Left.ObliquusExternus.ObliquusExternusR11IC_2;
    AnyRefNode &Org = ....Segments.Left.R11Seg.ObliquusExternusNode1;
    AnyRefNode &Ins =    ....Segments.PelvisSeg.Left.ObliquusInternusNode_5;
    viewMuscle = {#include "../DrawSettings/MusDrawSettings.any"};
    viewForce.Visible ??= Off;
  };


  AnyMuscleViaPoint ObliquusExternusR12IC = {
    AnyMuscleModel &MusMdl = ....MuscleModels.Left.ObliquusExternus.ObliquusExternusR12IC;
    AnyRefNode &Org = ....Segments.Left.R12Seg.ObliquusExternusNode;
    AnyRefNode &Ins =    ....Segments.PelvisSeg.Left.ObliquusInternusNode_4;
    viewMuscle = {#include "../DrawSettings/MusDrawSettings.any"};
    viewForce.Visible ??= Off;
  };


  #endif


  #ifndef OBLIQUUS_WRAP_ON_CYLS

  AnyMuscleShortestPath ObliquusExternusR6Abd = {
    AnyMuscleModel &MusMdl = ....MuscleModels.Left.ObliquusExternus.ObliquusExternusR6Abd;
    AnyRefNode &Org = ....Segments.Left.R6Seg.ObliquusExternusNode;
    AnyRefNode &Ins = ....Abdominal.Layer_L1.BaseSegAnterior.mid;

    #if BM_TRUNK_THORACIC_STERNUM_TOPOLOGY == 4
    AnyParamSurf &srf1 =....Segments.Left.CostalCartilageSeg.WrappingTorusR10.Surf;
    #else
    AnyParamSurf &srf1 =....Segments.SternalBodySeg.Left.ObliquusWrapping.Surf;
    #endif

    SPLine.StringMesh=60;

    SPLine = {
      AnyMatrix InitWrapPos = {
        transf3D({0,.srf1.MajorRadius+.srf1.MinorRadius, 0}, &.srf1)
      };


      InitWrapPosVecArr = {&InitWrapPos};
    };
    viewMuscle = {#include "../DrawSettings/MusDrawSettings.any"};
    viewForce.Visible ??= Off;
    #include "MusclesSharedCode_SPLine.any"
  };

  AnyMuscleShortestPath ObliquusExternusR7Abd = {
    AnyMuscleModel &MusMdl = ....MuscleModels.Left.ObliquusExternus.ObliquusExternusR7Abd;
    AnyRefNode &Org = ....Segments.Left.R7Seg.ObliquusExternusNode;
    AnyRefNode &Ins = ....Abdominal.Layer_L2.BaseSegAnterior.mid;

    #if BM_TRUNK_THORACIC_STERNUM_TOPOLOGY == 4
    AnyParamSurf &srf1 =....Segments.Left.CostalCartilageSeg.WrappingTorusR10.Surf;
    #else
    AnyParamSurf &srf1 =....Segments.SternalBodySeg.Left.ObliquusWrapping.Surf;
    #endif

    SPLine.StringMesh=60;

    SPLine = {
      AnyMatrix InitWrapPos = {
        transf3D({0,.srf1.MajorRadius+.srf1.MinorRadius, 0}, &.srf1)
      };
      InitWrapPosVecArr = {&InitWrapPos};
    };
    viewMuscle = {#include "../DrawSettings/MusDrawSettings.any"};
    viewForce.Visible ??= Off;
    #include "MusclesSharedCode_SPLine.any"
  };


  AnyMuscleShortestPath ObliquusExternusR8Abd = {
    AnyMuscleModel &MusMdl = ....MuscleModels.Left.ObliquusExternus.ObliquusExternusR8Abd;
    AnyRefNode &Org = ....Segments.Left.R8Seg.ObliquusExternusNode;
    AnyRefNode &Ins = ....Abdominal.Layer_L3.BaseSegAnterior.mid;

    #if BM_TRUNK_THORACIC_STERNUM_TOPOLOGY == 4
    AnyParamSurf &srf1 =....Segments.Left.CostalCartilageSeg.WrappingTorusR10.Surf;
    #else
    AnyParamSurf &srf1 =....Segments.SternalBodySeg.Left.ObliquusWrapping.Surf;
    #endif


    //  #if MESH_TYPE == "ELLIPSOID_SIDE"
    //  AnySurfEllipsoid &mesh2 = Main.HumanModel.BodyModel.Trunk.Abdominal.Layer_L2.BaseSegAnterior.Left.mesh;
    //  #else
    //  AnySurfTriCylMesh &mesh2 = Main.HumanModel.BodyModel.Trunk.Abdominal.Layer_L2.BaseSegAnterior.mesh;
    //  #endif
    AnySurfEllipsoid &mesh2 = Main.HumanModel.BodyModel.Trunk.Abdominal.Layer_L2.BaseSegAnterior.mesh3;


    SPLine.StringMesh=60;


    SPLine = {


      //   #if MESH_TYPE == "ELLIPSOID"
      //    AnyMatrix InitWrapPos = {
      //      transf3D({0,.srf1.MajorRadius+.srf1.MinorRadius, 0}, &.srf1),
      //      transf3D({.mesh2.Radius[0],0,0}, &.mesh2),
      //    };
      //    #endif
      //
      //    #if MESH_TYPE == "ELLIPSOID_SIDE"
      //    AnyMatrix InitWrapPos = {
      //       transf3D({0,.srf1.MajorRadius+.srf1.MinorRadius, 0}, &.srf1),
      //
      //      transf3D({0,.mesh2.Radius[1],0}, &.mesh2),
      //
      //    };
      //    #endif
      //
      //    #if MESH_TYPE == "QUAD"
      //    AnyMatrix InitWrapPos = {
      //      transf3D({0,.srf1.MajorRadius+.srf1.MinorRadius, 0}, &.srf1),
      //      transf3D(.mesh2.Points[floor(.mesh2.MeshSize*0.9)+2*.mesh2.MeshSize*6]+{0.02,0,0}, &.mesh2),
      //    };
      //    #endif

      AnyMatrix InitWrapPos = {
        transf3D({0,.srf1.MajorRadius+.srf1.MinorRadius, 0}, &.srf1),
        transf3D({.mesh2.Radius[0],0,0}, &.mesh2),
      };


      InitWrapPosVecArr = {&InitWrapPos};
    };
    viewMuscle = {#include "../DrawSettings/MusDrawSettings.any"};
    viewForce.Visible ??= Off;
    #include "MusclesSharedCode_SPLine.any"
  };


  AnyMuscleShortestPath ObliquusExternusR9Abd_1 = {
    AnyMuscleModel &MusMdl = ....MuscleModels.Left.ObliquusExternus.ObliquusExternusR9Abd_1;
    AnyRefNode &Org = ....Segments.Left.R9Seg.ObliquusExternusNode;
    AnyRefNode &Ins = ....Abdominal.Layer_L4.BaseSegAnterior.mid;


    #if BM_TRUNK_THORACIC_STERNUM_TOPOLOGY == 4
    AnyParamSurf &srf1 =....Segments.Left.CostalCartilageSeg.WrappingTorusR10.Surf;
    #else
    AnyParamSurf &srf1 =....Segments.SternalBodySeg.Left.ObliquusWrapping.Surf;
    #endif


    //  #if MESH_TYPE == "ELLIPSOID_SIDE"
    //  //AnySurfTriCylMesh &mesh2 = Main.HumanModel.BodyModel.Trunk.Abdominal.Layer_L2.BaseSegAnterior.mesh;
    //  AnySurfEllipsoid &mesh3 = Main.HumanModel.BodyModel.Trunk.Abdominal.Layer_L3.BaseSegAnterior.Left.mesh;
    //  //AnySurfTriCylMesh &mesh4 = Main.HumanModel.BodyModel.Trunk.Abdominal.Layer_L4.BaseSegAnterior.mesh;
    //  #else
    //  //AnySurfTriCylMesh &mesh2 = Main.HumanModel.BodyModel.Trunk.Abdominal.Layer_L2.BaseSegAnterior.mesh;
    //  AnySurfTriCylMesh &mesh3 = Main.HumanModel.BodyModel.Trunk.Abdominal.Layer_L3.BaseSegAnterior.mesh;
    //  //AnySurfTriCylMesh &mesh4 = Main.HumanModel.BodyModel.Trunk.Abdominal.Layer_L4.BaseSegAnterior.mesh;
    //  #endif
    AnySurfEllipsoid &mesh3 = Main.HumanModel.BodyModel.Trunk.Abdominal.Layer_L3.BaseSegAnterior.mesh3;

    SPLine.StringMesh=60;

    SPLine = {

      //    #if MESH_TYPE == "ELLIPSOID"
      //     AnyMatrix InitWrapPos = {
      //        transf3D({0,.srf1.MajorRadius+.srf1.MinorRadius, 0}, &.srf1),
      //      //transf3D({.mesh2.Radius[0],0,0}, &.mesh2),
      //        transf3D({.mesh3.Radius[0],0,0}, &.mesh3),
      //      //transf3D({.mesh4.Radius[0],0,0}, &.mesh4),
      //     };
      //    #endif
      //    #if MESH_TYPE == "ELLIPSOID_SIDE"
      //    AnyMatrix InitWrapPos = {
      //      transf3D({0,.srf1.MajorRadius+.srf1.MinorRadius, 0}, &.srf1),
      //      transf3D({0,.mesh3.Radius[1],0}, &.mesh3),
      //    };
      //    #endif
      //
      //    #if MESH_TYPE == "QUAD"
      //AnyMatrix InitWrapPos = {
      //      transf3D({0,.srf1.MajorRadius+.srf1.MinorRadius, 0}, &.srf1),
      //
      //     //  transf3D(.mesh2.Points[floor(.mesh2.MeshSize*0.85)+2*.mesh2.MeshSize*6]+{0.02,0,0}, &.mesh2),
      //     //  transf3D(.mesh3.Points[floor(.mesh3.MeshSize*0.95)+2*.mesh3.MeshSize*6]+{0.02,0,0}, &.mesh3)
      //       transf3D(.mesh4.Points[floor(.mesh4.MeshSize*0.95)+2*.mesh4.MeshSize*6]+{0.02,0,0}, &.mesh4)
      //    };
      //    #endif
      AnyMatrix InitWrapPos = {
        transf3D({0,.srf1.MajorRadius+.srf1.MinorRadius, 0}, &.srf1),
        //transf3D({.mesh2.Radius[0],0,0}, &.mesh2),
        transf3D({.mesh3.Radius[0],0,0}, &.mesh3),
        //transf3D({.mesh4.Radius[0],0,0}, &.mesh4),
      };

      InitWrapPosVecArr = {&InitWrapPos};
    };
    viewMuscle = {#include "../DrawSettings/MusDrawSettings.any"};
    viewForce.Visible ??= Off;
    #include "MusclesSharedCode_SPLine.any"
  };


  AnyMuscleShortestPath  ObliquusExternusR9Abd_2= {
    AnyMuscleModel &MusMdl = ....MuscleModels.Left.ObliquusExternus.ObliquusExternusR9Abd_2;
    AnyRefNode &Org = ....Segments.Left.R9Seg.ObliquusExternusNode_1;
    AnyRefNode &Ins = ....Abdominal.Layer_L5.BaseSegAnterior.mid;

    #if BM_TRUNK_THORACIC_STERNUM_TOPOLOGY == 4
    AnyParamSurf &srf0 =....Segments.Left.CostalCartilageSeg.WrappingTorusR10.Surf;
    #else
    AnyParamSurf &srf0 =....Segments.SternalBodySeg.Left.ObliquusWrapping.Surf;
    #endif

    //  AnySurfTriCylMesh &mesh3 = Main.HumanModel.BodyModel.Trunk.Abdominal.Layer_L3.BaseSegAnterior.mesh;


    //  #if MESH_TYPE == "ELLIPSOID_SIDE"
    //  AnySurfEllipsoid &mesh4 = Main.HumanModel.BodyModel.Trunk.Abdominal.Layer_L4.BaseSegAnterior.Left.mesh;
    //  #else
    //  AnySurfTriCylMesh &mesh4 = Main.HumanModel.BodyModel.Trunk.Abdominal.Layer_L4.BaseSegAnterior.mesh;
    //  #endif
    AnySurfEllipsoid &mesh3 = Main.HumanModel.BodyModel.Trunk.Abdominal.Layer_L3.BaseSegAnterior.mesh3;
    AnySurfEllipsoid &mesh4 = Main.HumanModel.BodyModel.Trunk.Abdominal.Layer_L4.BaseSegAnterior.mesh3;


    SPLine.StringMesh=240;

    SPLine = {

      //     #if MESH_TYPE == "ELLIPSOID"
      //    AnyMatrix InitWrapPos = {
      //     transf3D({0,.srf0.MajorRadius+.srf0.MinorRadius, 0}, &.srf0),
      //  //    transf3D({.mesh3.Radius[0],0,0}, &.mesh3),
      //        transf3D({.mesh4.Radius[0],0,0}, &.mesh4),
      //    };
      //    #endif
      //    #if MESH_TYPE == "ELLIPSOID_SIDE"
      //    AnyMatrix InitWrapPos = {
      //       transf3D({0,.srf0.MajorRadius+.srf0.MinorRadius, 0}, &.srf0),
      //
      //      transf3D({0,.mesh4.Radius[1],0}, &.mesh4),
      //
      //    };
      //    #endif
      //
      //    #if MESH_TYPE == "QUAD"
      //AnyMatrix InitWrapPos = {
      // transf3D({0,.srf0.MajorRadius+.srf0.MinorRadius, 0}, &.srf0),
      // //transf3D(.mesh3.Points[floor(.mesh3.MeshSize*0.85)+2*.mesh3.MeshSize*6]+{0.02,0,0}, &.mesh3),
      //       transf3D(.mesh4.Points[floor(.mesh4.MeshSize*0.85)+2*.mesh4.MeshSize*6]+{0.02,0,0}, &.mesh4)
      //    };
      //        #endif
      AnyMatrix InitWrapPos = {
        transf3D({0,.srf0.MajorRadius+.srf0.MinorRadius, 0}, &.srf0),
        transf3D({.mesh3.Radius[0],0,0}, &.mesh3),
        transf3D({.mesh4.Radius[0],0,0}, &.mesh4),
      };

      InitWrapPosVecArr = {&InitWrapPos};
    };
    viewMuscle = {#include "../DrawSettings/MusDrawSettings.any"};
    viewForce.Visible ??= Off;
    #include "MusclesSharedCode_SPLine.any"
  };

  //
  AnyMuscleShortestPath ObliquusExternusR10Abd_1 = {
    AnyMuscleModel &MusMdl = ....MuscleModels.Left.ObliquusExternus.ObliquusExternusR10Abd_1;
    AnyRefNode &Org = ....Segments.Left.R10Seg.ObliquusExternusNode_1;
    AnyRefNode &Ins =     ....Abdominal.Layer_Pelvic2.BaseSegAnterior.VolumePoints_Discretization28.Left.nn11;
    //AnySurfTriCylMesh &mesh4= Main.HumanModel.BodyModel.Trunk.Abdominal.Layer_L4.BaseSegAnterior.mesh;
    //  AnySurfTriCylMesh &mesh5 = Main.HumanModel.BodyModel.Trunk.Abdominal.Layer_L5.BaseSegAnterior.mesh;

    //   #if MESH_TYPE == "ELLIPSOID_SIDE"
    //  AnySurfEllipsoid &mesh5 = Main.HumanModel.BodyModel.Trunk.Abdominal.Layer_L5.BaseSegAnterior.Left.mesh;
    //  #else
    //  AnySurfTriCylMesh &mesh5 = Main.HumanModel.BodyModel.Trunk.Abdominal.Layer_L5.BaseSegAnterior.mesh;
    //  #endif
    AnySurfEllipsoid &mesh4 = Main.HumanModel.BodyModel.Trunk.Abdominal.Layer_L4.BaseSegAnterior.mesh3;
    AnySurfEllipsoid &mesh5 = Main.HumanModel.BodyModel.Trunk.Abdominal.Layer_L5.BaseSegAnterior.mesh3;


    SPLine.StringMesh=240;

    SPLine = {
      //      #if MESH_TYPE == "ELLIPSOID"
      //    AnyMatrix InitWrapPos = {
      //    //    transf3D({.mesh4.Radius[0],0,0}, &.mesh4),
      //        transf3D({.mesh5.Radius[0],0,0}, &.mesh5),
      //    };
      //    #endif
      //
      //    #if MESH_TYPE == "ELLIPSOID_SIDE"
      //    AnyMatrix InitWrapPos = {
      //               transf3D({0,.mesh5.Radius[1],0}, &.mesh5),
      //
      //    };
      //    #endif
      //
      //    #if MESH_TYPE == "QUAD"
      //
      //    AnyMatrix InitWrapPos = {
      //      // transf3D(.mesh4.Points[floor(.mesh4.MeshSize*0.8)+2*.mesh4.MeshSize*6]+{0.02,0,0}, &.mesh4),
      //       transf3D(.mesh5.Points[floor(.mesh5.MeshSize*0.85)+2*.mesh5.MeshSize*6]+{0.02,0,0}, &.mesh5)
      //
      //   };
      //        #endif
      AnyMatrix InitWrapPos = {
        transf3D({.mesh4.Radius[0],0,-.mesh4.Radius[2]}, &.mesh4),
        transf3D({.mesh5.Radius[0],0,-.mesh5.Radius[2]}, &.mesh5),
      };


      InitWrapPosVecArr = {&InitWrapPos};
    };

    viewMuscle = {#include "../DrawSettings/MusDrawSettings.any" };
    viewForce.Visible ??= Off;
    #include "MusclesSharedCode_SPLine.any"
  };


  AnyMuscleShortestPath ObliquusExternusR10Abd_2 = {
    AnyMuscleModel &MusMdl = ....MuscleModels.Left.ObliquusExternus.ObliquusExternusR10Abd_2;
    AnyRefNode &Org = ....Segments.Left.R10Seg.ObliquusExternusNode_2;
    AnyRefNode &Ins =     ....Abdominal.Layer_Pelvic2.BaseSegAnterior.VolumePoints_Discretization28.Left.nn10;
    // AnySurfTriCylMesh &mesh0 = Main.HumanModel.BodyModel.Trunk.Abdominal.Layer_L2.BaseSegAnterior.mesh;
    // AnySurfTriCylMesh &mesh1 = Main.HumanModel.BodyModel.Trunk.Abdominal.Layer_L3.BaseSegAnterior.mesh;
    //  AnySurfTriCylMesh &mesh4 = Main.HumanModel.BodyModel.Trunk.Abdominal.Layer_L4.BaseSegAnterior.mesh;
    //  AnySurfTriCylMesh &mesh5 = Main.HumanModel.BodyModel.Trunk.Abdominal.Layer_L5.BaseSegAnterior.mesh;
    //
    //   #if MESH_TYPE == "ELLIPSOID_SIDE"
    //   AnySurfEllipsoid &mesh4 = Main.HumanModel.BodyModel.Trunk.Abdominal.Layer_L4.BaseSegAnterior.Left.mesh;
    //   AnySurfEllipsoid  &mesh5 = Main.HumanModel.BodyModel.Trunk.Abdominal.Layer_L5.BaseSegAnterior.Left.mesh;
    //  #else
    //  AnySurfTriCylMesh &mesh4 = Main.HumanModel.BodyModel.Trunk.Abdominal.Layer_L4.BaseSegAnterior.mesh;
    //  AnySurfTriCylMesh &mesh5 = Main.HumanModel.BodyModel.Trunk.Abdominal.Layer_L5.BaseSegAnterior.mesh;
    //  #endif

    //   AnySurfEllipsoid &mesh3 = Main.HumanModel.BodyModel.Trunk.Abdominal.Layer_L3.BaseSegAnterior.mesh3;
    AnySurfEllipsoid &mesh4 = Main.HumanModel.BodyModel.Trunk.Abdominal.Layer_L4.BaseSegAnterior.mesh3;
    AnySurfEllipsoid  &mesh5 = Main.HumanModel.BodyModel.Trunk.Abdominal.Layer_L5.BaseSegAnterior.mesh3;


    SPLine.StringMesh=240;
    SPLine = {

      //    #if MESH_TYPE == "ELLIPSOID"
      //    AnyMatrix InitWrapPos = {
      //      transf3D({.mesh4.Radius[0],0,0}, &.mesh4),
      //      transf3D({.mesh5.Radius[0],0,0}, &.mesh5),
      //    };
      //    #endif
      //
      //   #if MESH_TYPE == "ELLIPSOID_SIDE"
      //    AnyMatrix InitWrapPos = {
      //            transf3D({0,.mesh4.Radius[1],0}, &.mesh4),
      //               transf3D({0,.mesh5.Radius[1],0}, &.mesh5),
      //
      //    };
      //    #endif
      //
      //
      //    #if MESH_TYPE == "QUAD"
      //
      //    AnyMatrix InitWrapPos = {
      //      transf3D(.mesh4.Points[floor(.mesh4.MeshSize*0.8)+2*20*4]+{0.01,0,0}, &.mesh4),
      //      transf3D(.mesh5.Points[floor(.mesh5.MeshSize*0.85)+2*20*4]+{0.01,0,0}, &.mesh5)
      //    };
      //    #endif

      AnyMatrix InitWrapPos = {
        //      transf3D({.mesh3.Radius[0],0,0}, &.mesh3),
        transf3D({.mesh4.Radius[0],0,-.mesh4.Radius[2]}, &.mesh4),
        transf3D({.mesh5.Radius[0],0,-.mesh5.Radius[2]}, &.mesh5),
      };

      InitWrapPosVecArr = {&InitWrapPos};
    };
    viewMuscle = {#include "../DrawSettings/MusDrawSettings.any"};
    viewForce.Visible ??= Off;
    #include "MusclesSharedCode_SPLine.any"
  };


  AnyMuscleViaPoint ObliquusExternusR10IC_1= {
    AnyMuscleModel &MusMdl = ....MuscleModels.Left.ObliquusExternus.ObliquusExternusR10IC_1;
    AnyRefNode &Org = ....Segments.Left.R10Seg.ObliquusExternusNode_00;
    AnyRefNode &Ins =    ....Segments.PelvisSeg.Left.ObliquusInternusNode_8;
    viewMuscle = {#include "../DrawSettings/MusDrawSettings.any"};
    viewForce.Visible ??= Off;
    #include "MusclesSharedCode.any"
  };


  AnyMuscleViaPoint ObliquusExternusR10IC_2= {
    AnyMuscleModel &MusMdl = ....MuscleModels.Left.ObliquusExternus.ObliquusExternusR10IC_2;
    AnyRefNode &Org = ....Segments.Left.R10Seg.ObliquusExternusNode_0;
    AnyRefNode &Ins =    ....Segments.PelvisSeg.Left.ObliquusInternusNode_9;
    viewMuscle = {#include "../DrawSettings/MusDrawSettings.any"};
    viewForce.Visible ??= Off;
    #include "MusclesSharedCode.any"
  };


  AnyMuscleViaPoint ObliquusExternusR11IC_1 = {
    AnyMuscleModel &MusMdl = ....MuscleModels.Left.ObliquusExternus.ObliquusExternusR11IC_1;
    AnyRefNode &Org = ....Segments.Left.R11Seg.ObliquusExternusNode;
    AnyRefNode &Ins =    ....Segments.PelvisSeg.Left.ObliquusInternusNode_7;
    viewMuscle = {#include "../DrawSettings/MusDrawSettings.any"};
    viewForce.Visible ??= Off;
    #include "MusclesSharedCode.any"
  };


  AnyMuscleViaPoint ObliquusExternusR11IC_2 = {
    AnyMuscleModel &MusMdl = ....MuscleModels.Left.ObliquusExternus.ObliquusExternusR11IC_2;
    AnyRefNode &Org = ....Segments.Left.R11Seg.ObliquusExternusNode1;
    AnyRefNode &Ins =    ....Segments.PelvisSeg.Left.ObliquusInternusNode_5;
    viewMuscle = {#include "../DrawSettings/MusDrawSettings.any"};
    viewForce.Visible ??= Off;
    #include "MusclesSharedCode.any"
  };


  AnyMuscleViaPoint ObliquusExternusR12IC = {
    AnyMuscleModel &MusMdl = ....MuscleModels.Left.ObliquusExternus.ObliquusExternusR12IC;
    AnyRefNode &Org = ....Segments.Left.R12Seg.ObliquusExternusNode;
    AnyRefNode &Ins =    ....Segments.PelvisSeg.Left.ObliquusInternusNode_4;
    viewMuscle = {#include "../DrawSettings/MusDrawSettings.any"};
    viewForce.Visible ??= Off;
    #include "MusclesSharedCode.any"
  };


  #endif

  #endif


  #if BM_TRUNK_CAVITY_MODEL == _CAVITY_MODEL_BUCKLE_
  AnyMuscleViaPoint ObliquusExternusR6Abd = {
    AnyMuscleModel &MusMdl = ....MuscleModels.Left.ObliquusExternus.ObliquusExternusR6Abd;
    AnyRefNode &Org = ....Segments.Left.R6Seg.ObliquusExternusNode;
    AnyRefNode &Ins = ....Buckle.Segments.BuckleSeg.Left.ObliquusExternusNode_1;
    viewMuscle = {#include "../DrawSettings/MusDrawSettings.any"};
    viewForce.Visible ??= Off;
  };
  AnyMuscleViaPoint ObliquusExternusR7Abd = {
    AnyMuscleModel &MusMdl = ....MuscleModels.Left.ObliquusExternus.ObliquusExternusR7Abd;
    AnyRefNode &Org = ....Segments.Left.R7Seg.ObliquusExternusNode;
    AnyRefNode &Ins = ....Buckle.Segments.BuckleSeg.Left.ObliquusExternusNode_2;
    viewMuscle = {#include "../DrawSettings/MusDrawSettings.any"};
    viewForce.Visible ??= Off;
  };
  AnyMuscleViaPoint ObliquusExternusR8Abd = {
    AnyMuscleModel &MusMdl = ....MuscleModels.Left.ObliquusExternus.ObliquusExternusR8Abd;
    AnyRefNode &Org = ....Segments.Left.R8Seg.ObliquusExternusNode;
    AnyRefNode &Ins = ....Buckle.Segments.BuckleSeg.Left.ObliquusExternusNode_3;
    viewMuscle = {#include "../DrawSettings/MusDrawSettings.any"};
    viewForce.Visible ??= Off;
  };
  AnyMuscleViaPoint ObliquusExternusR9Abd = {
    AnyMuscleModel &MusMdl = ....MuscleModels.Left.ObliquusExternus.ObliquusExternusR9Abd;
    AnyRefNode &Org = ....Segments.Left.R9Seg.ObliquusExternusNode;
    AnyRefNode &Ins = ....Buckle.Segments.BuckleSeg.Left.ObliquusExternusNode_4;
    viewMuscle = {#include "../DrawSettings/MusDrawSettings.any"};
    viewForce.Visible ??= Off;
  };
  AnyMuscleViaPoint ObliquusExternusR10Abd_1 = {
    AnyMuscleModel &MusMdl = ....MuscleModels.Left.ObliquusExternus.ObliquusExternusR10Abd_1;
    AnyRefNode &Org = ....Segments.Left.R10Seg.ObliquusExternusNode_1;
    AnyRefNode &Ins = ....Buckle.Segments.BuckleSeg.Left.ObliquusExternusNode_5;
    viewMuscle = {#include "../DrawSettings/MusDrawSettings.any"};
    viewForce.Visible ??= Off;
  };
  AnyMuscleViaPoint ObliquusExternusR10Abd_2 = {
    AnyMuscleModel &MusMdl = ....MuscleModels.Left.ObliquusExternus.ObliquusExternusR10Abd_2;
    AnyRefNode &Org = ....Segments.Left.R10Seg.ObliquusExternusNode_2;
    AnyRefNode &Ins = ....Segments.PelvisSeg.Left.ObliquusExternusNode_1;
    viewMuscle = {#include "../DrawSettings/MusDrawSettings.any"};
    viewForce.Visible ??= Off;
  };
  AnyMuscleViaPoint ObliquusExternusR11IC = {
    AnyMuscleModel &MusMdl = ....MuscleModels.Left.ObliquusExternus.ObliquusExternusR11IC;
    AnyRefNode &Org = ....Segments.Left.R11Seg.ObliquusExternusNode;
    AnyRefNode &Ins = ....Segments.PelvisSeg.Left.ObliquusExternusNode_2;
    viewMuscle = {#include "../DrawSettings/MusDrawSettings.any"};
    viewForce.Visible ??= Off;
  };
  AnyMuscleViaPoint ObliquusExternusR12IC= {
    AnyMuscleModel &MusMdl = ....MuscleModels.Left.ObliquusExternus.ObliquusExternusR12IC;
    AnyRefNode &Org = ....Segments.Left.R12Seg.ObliquusExternusNode;
    AnyRefNode &Ins = ....Segments.PelvisSeg.Left.ObliquusExternusNode_3;
    viewMuscle = {#include "../DrawSettings/MusDrawSettings.any"};
    viewForce.Visible ??= Off;
  };
  #endif
};
MuscleGroup ObliquusInternus = {

  #if BM_TRUNK_CAVITY_MODEL == _CAVITY_MODEL_VOLUME_


  #ifdef OBLIQUUS_WRAP_ON_CYLS

  AnyMuscleViaPoint ObliquusInternusR12 = {
    AnyMuscleModel &MusMdl = ....MuscleModels.Left.ObliquusInternus.ObliquusInternusR12;
    AnyRefNode &Org = ....Segments.Left.R12Seg.ObliquusExternusNode;
    AnyRefNode &Ins = ....Segments.PelvisSeg.Left.ObliquusInternusNode_1;
    viewMuscle = {#include "../DrawSettings/MusDrawSettings.any"};
    viewForce.Visible ??= Off;
  };


  AnyMuscleViaPoint ObliquusInternusR11_1 = {
    AnyMuscleModel &MusMdl = ....MuscleModels.Left.ObliquusInternus.ObliquusInternusR11_1;
    AnyRefNode &Org = ....Segments.Left.R11Seg.ObliquusExternusNode1;
    AnyRefNode &Ins = ....Segments.PelvisSeg.Left.ObliquusInternusNode_2;
    viewMuscle = {#include "../DrawSettings/MusDrawSettings.any"};
    viewForce.Visible ??= Off;
  };


  AnyMuscleViaPoint ObliquusInternusR11_2 = {
    AnyMuscleModel &MusMdl = ....MuscleModels.Left.ObliquusInternus.ObliquusInternusR11_2;
    AnyRefNode &Org = ....Segments.Left.R11Seg.ObliquusExternusNode;
    AnyRefNode &Ins = ....Segments.PelvisSeg.Left.ObliquusInternusNode_3;
    viewMuscle = {#include "../DrawSettings/MusDrawSettings.any"};
    viewForce.Visible ??= Off;
  };


  AnyMuscleViaPoint ObliquusInternusR10_1 = {
    AnyMuscleModel &MusMdl = ....MuscleModels.Left.ObliquusInternus.ObliquusInternusR10_1;
    AnyRefNode &Org = ....Segments.Left.R10Seg.ObliquusExternusNode_2;
    AnyRefNode &Ins = ....Segments.PelvisSeg.Left.ObliquusInternusNode_4;
    viewMuscle = {#include "../DrawSettings/MusDrawSettings.any"};
    viewForce.Visible ??= Off;
  };


  AnyMuscleViaPoint ObliquusInternusR10_2 = {
    AnyMuscleModel &MusMdl = ....MuscleModels.Left.ObliquusInternus.ObliquusInternusR10_2;
    AnyRefNode &Org = ....Segments.Left.R10Seg.ObliquusExternusNode_1;
    AnyRefNode &Ins = ....Segments.PelvisSeg.Left.ObliquusInternusNode_4_1;
    viewMuscle = {#include "../DrawSettings/MusDrawSettings.any"};
    viewForce.Visible ??= Off;
  };


  AnyMuscleShortestPath ObliquusInternusCC_1 = {
    AnyMuscleModel &MusMdl = ....MuscleModels.Left.ObliquusInternus.ObliquusInternusCC_1;
    #if BM_TRUNK_THORACIC_STERNUM_TOPOLOGY == 4
    AnyRefNode &Org = ....Segments.Left.CostalCartilageSeg.ObliquusInternus_1;
    #else
    AnyRefNode &Org = ....Segments.SternalBodySeg.Left.ObliquusInternusNode_1;
    #endif
    AnyRefNode &Ins = ....Segments.PelvisSeg.Left.ObliquusInternusNode_5;

    AnyParamSurf &srf4 =....Abdominal.ObliquusWrapping.WrappingSeg.Layer4WrappingPoints.Left.nn04.Translate.InwardCyl;

    SPLine.StringMesh=60;

    SPLine = {
      AnyMatrix InitWrapPos = {
        transf3D({0,-.srf4.radius, 0.5*.srf4.Length}, &.srf4)
      };
      InitWrapPosVecArr = {&InitWrapPos};
    };

    viewMuscle = {#include "../DrawSettings/MusDrawSettings.any"};
    viewForce.Visible ??= Off;
  };


  AnyMuscleShortestPath ObliquusInternusCC_2 = {
    AnyMuscleModel &MusMdl = ....MuscleModels.Left.ObliquusInternus.ObliquusInternusCC_2;
    #if BM_TRUNK_THORACIC_STERNUM_TOPOLOGY == 4
    AnyRefNode &Org = ....Segments.Left.CostalCartilageSeg.ObliquusInternus_2;
    #else
    AnyRefNode &Org = ....Segments.SternalBodySeg.Left.ObliquusInternusNode_2;
    #endif
    AnyRefNode &Ins = ....Segments.PelvisSeg.Left.ObliquusInternusNode_5;

    AnyParamSurf &srf3 =....Abdominal.ObliquusWrapping.WrappingSeg.Layer3WrappingPoints.Left.nn08.Translate.InwardCyl;

    SPLine.StringMesh=60;

    SPLine = {
      AnyMatrix InitWrapPos = {
        transf3D({0,-.srf3.radius, 0.5*.srf3.Length}, &.srf3)
      };
      InitWrapPosVecArr = {&InitWrapPos};
    };

    viewMuscle = {#include "../DrawSettings/MusDrawSettings.any"};
    viewForce.Visible ??= Off;
  };


  AnyMuscleShortestPath ObliquusInternusCC_3 = {
    AnyMuscleModel &MusMdl = ....MuscleModels.Left.ObliquusInternus.ObliquusInternusCC_3;
    AnyRefNode &Org = ....Segments.SternalBodySeg.DiaphragmXiphoidNodeL;
    AnyRefNode &Via = Main.HumanModel.BodyModel.Trunk.Abdominal.Layer_L1.BaseSegAnterior.TransversusPoints.Left.nn06;

    AnyRefNode &Ins = ....Segments.PelvisSeg.Left.ObliquusInternusNode_6;

    AnyParamSurf &srf2 =....Abdominal.ObliquusWrapping.WrappingSeg.Layer2WrappingPoints.Left.nn10.Translate.InwardCyl;
    AnyParamSurf &srf3 =....Abdominal.ObliquusWrapping.WrappingSeg.Layer3WrappingPoints.Left.nn08.Translate.InwardCyl;

    SPLine.StringMesh=240;

    SPLine = {
      AnyMatrix InitWrapPos = {
        transf3D({0,-.srf2.radius, 0.5*.srf2.Length}, &.srf2),
        transf3D({0,-.srf3.radius, 0.5*.srf3.Length}, &.srf3)
      };
      InitWrapPosVecArr = {&InitWrapPos};
    };
    viewMuscle = {#include "../DrawSettings/MusDrawSettings.any"};
    viewForce.Visible ??= Off;
  };


  AnyMuscleShortestPath ObliquusInternusCC_3_extra = {
    AnyMuscleModel &MusMdl = ....MuscleModels.Left.ObliquusInternus.ObliquusInternusCC_3;
    AnyRefNode &Org = ....Segments.SternalBodySeg.RectusAbdominisCP_Via_2_L;
    AnyRefNode &Ins = ....Segments.PelvisSeg.Left.ObliquusInternusNode_6;

    AnyParamSurf &srf2 =....Abdominal.ObliquusWrapping.WrappingSeg.Layer2WrappingPoints.Left.nn10.Translate.InwardCyl;
    AnyParamSurf &srf3 =....Abdominal.ObliquusWrapping.WrappingSeg.Layer3WrappingPoints.Left.nn08.Translate.InwardCyl;

    SPLine.StringMesh=240;

    SPLine = {
      AnyMatrix InitWrapPos = {
        transf3D({0,-.srf2.radius, 0.5*.srf2.Length}, &.srf2),
        transf3D({0,-.srf3.radius, 0.5*.srf3.Length}, &.srf3)
      };
      InitWrapPosVecArr = {&InitWrapPos};
    };
    viewMuscle = {#include "../DrawSettings/MusDrawSettings.any"};
    viewForce.Visible ??= Off;
  };

  AnyMuscleShortestPath ObliquusInternusXiphoid = {
    AnyMuscleModel &MusMdl = ....MuscleModels.Left.ObliquusInternus.ObliquusInternusXiphoid;
    AnyRefNode &Org =      ....Abdominal.Layer_L1.BaseSegAnterior.mid;
    AnyRefNode &Ins = ....Segments.PelvisSeg.Left.ObliquusInternusNode_6;

    // AnyParamSurf &srf1 =....Abdominal.ObliquusWrapping.WrappingSeg.Layer2WrappingPoints.Left.nn11.Translate.InwardCyl;
    AnyParamSurf &srf2 =....Abdominal.ObliquusWrapping.WrappingSeg.Layer3WrappingPoints.Left.nn10.Translate.InwardCyl;
    AnyParamSurf &srf3 =....Abdominal.ObliquusWrapping.WrappingSeg.Layer4WrappingPoints.Left.nn09.Translate.InwardCyl;

    SPLine.StringMesh=60;

    SPLine = {
      AnyMatrix InitWrapPos = {
        //   transf3D({0,-.srf1.radius, 0.5*.srf1.Length}, &.srf1),
        transf3D({0,-.srf2.radius, 0.5*.srf2.Length}, &.srf2),
        transf3D({0,-.srf3.radius, 0.5*.srf3.Length}, &.srf3)
      };
      InitWrapPosVecArr = {&InitWrapPos};
    };

    viewMuscle = {#include "../DrawSettings/MusDrawSettings.any"};
    viewForce.Visible ??= Off;
  };

  AnyMuscleShortestPath ObliquusInternusAbd_1 = {
    AnyMuscleModel &MusMdl = ....MuscleModels.Left.ObliquusInternus.ObliquusInternusAbd_1;
    AnyRefNode &Org =      ....Abdominal.Layer_L2.BaseSegAnterior.mid;
    AnyRefNode &Ins = ....Segments.PelvisSeg.Left.ObliquusInternusNode_6;

    AnyParamSurf &srf1 =....Abdominal.ObliquusWrapping.WrappingSeg.Layer3WrappingPoints.Left.nn11.Translate.InwardCyl;
    AnyParamSurf &srf2 =....Abdominal.ObliquusWrapping.WrappingSeg.Layer4WrappingPoints.Left.nn09.Translate.InwardCyl;

    SPLine.StringMesh=60;

    SPLine = {
      AnyMatrix InitWrapPos = {
        transf3D({0,-.srf1.radius, 0.5*.srf1.Length}, &.srf1),
        transf3D({0,-.srf2.radius, 0.5*.srf2.Length}, &.srf2)
      };
      InitWrapPosVecArr = {&InitWrapPos};
    };

    viewMuscle = {#include "../DrawSettings/MusDrawSettings.any"};
    viewForce.Visible ??= Off;
  };


  AnyMuscleShortestPath ObliquusInternusAbd_2 = {
    AnyMuscleModel &MusMdl = ....MuscleModels.Left.ObliquusInternus.ObliquusInternusAbd_2;
    AnyRefNode &Org = ....Abdominal.Layer_L3.BaseSegAnterior.mid;
    AnyRefNode &Ins = ....Segments.PelvisSeg.Left.ObliquusInternusNode_7;

    AnyParamSurf &srf1 =....Abdominal.ObliquusWrapping.WrappingSeg.Layer4WrappingPoints.Left.nn11.Translate.InwardCyl;
    AnyParamSurf &srf2 =....Abdominal.ObliquusWrapping.WrappingSeg.Layer5WrappingPoints.Left.nn08.Translate.InwardCyl;

    SPLine.StringMesh=60;

    SPLine = {
      AnyMatrix InitWrapPos = {
        transf3D({0,-.srf1.radius, 0.5*.srf1.Length}, &.srf1),
        transf3D({0,-.srf2.radius, 0.5*.srf2.Length}, &.srf2)
      };
      InitWrapPosVecArr = {&InitWrapPos};
    };

    viewMuscle = {#include "../DrawSettings/MusDrawSettings.any"};
    viewForce.Visible ??= Off;
  };


  AnyMuscleShortestPath ObliquusInternusAbd_3 = {
    AnyMuscleModel &MusMdl = ....MuscleModels.Left.ObliquusInternus.ObliquusInternusAbd_3;
    AnyRefNode &Org =      ....Abdominal.Layer_L4.BaseSegAnterior.mid;
    AnyRefNode &Ins = ....Segments.PelvisSeg.Left.ObliquusInternusNode_7;

    AnyParamSurf &srf1 =....Abdominal.ObliquusWrapping.WrappingSeg.Layer5WrappingPoints.Left.nn09.Translate.InwardCyl;

    SPLine.StringMesh=60;

    SPLine = {
      AnyMatrix InitWrapPos = {
        transf3D({0,-.srf1.radius, 0.5*.srf1.Length}, &.srf1)
      };
      InitWrapPosVecArr = {&InitWrapPos};
    };

    viewMuscle = {#include "../DrawSettings/MusDrawSettings.any"};
    viewForce.Visible ??= Off;
  };

  AnyMuscleShortestPath  ObliquusInternusAbd_4= {
    AnyMuscleModel &MusMdl = ....MuscleModels.Left.ObliquusInternus.ObliquusInternusAbd_4;
    AnyRefNode &Org = ....Abdominal.Layer_L5.BaseSegAnterior.mid;
    AnyRefNode &Ins = ....Segments.PelvisSeg.Left.ObliquusInternusNode_8;

    AnyParamSurf &srf1 =....Abdominal.ObliquusWrapping.WrappingSeg.Layer5WrappingPoints.Left.nn11.Translate.InwardCyl;

    SPLine.StringMesh=60;

    SPLine = {
      AnyMatrix InitWrapPos = {
        transf3D({0,-.srf1.radius, 0.5*.srf1.Length}, &.srf1)
      };
      InitWrapPosVecArr = {&InitWrapPos};
    };

    viewMuscle = {#include "../DrawSettings/MusDrawSettings.any"};
    viewForce.Visible ??= Off;
  };

  #endif

  #ifndef OBLIQUUS_WRAP_ON_CYLS


  AnyMuscleViaPoint ObliquusInternusR12 = {
    AnyMuscleModel &MusMdl = ....MuscleModels.Left.ObliquusInternus.ObliquusInternusR12;
    AnyRefNode &Org = ....Segments.Left.R12Seg.ObliquusExternusNode;
    AnyRefNode &Ins = ....Segments.PelvisSeg.Left.ObliquusInternusNode_1;
    viewMuscle = {#include "../DrawSettings/MusDrawSettings.any"};
    viewForce.Visible ??= Off;
    #include "MusclesSharedCode.any"
  };


  AnyMuscleViaPoint ObliquusInternusR11_1 = {
    AnyMuscleModel &MusMdl = ....MuscleModels.Left.ObliquusInternus.ObliquusInternusR11_1;
    AnyRefNode &Org = ....Segments.Left.R11Seg.ObliquusExternusNode1;
    AnyRefNode &Ins = ....Segments.PelvisSeg.Left.ObliquusInternusNode_2;
    viewMuscle = {#include "../DrawSettings/MusDrawSettings.any"};
    viewForce.Visible ??= Off;
    #include "MusclesSharedCode.any"
  };


  AnyMuscleViaPoint ObliquusInternusR11_2 = {
    AnyMuscleModel &MusMdl = ....MuscleModels.Left.ObliquusInternus.ObliquusInternusR11_2;
    AnyRefNode &Org = ....Segments.Left.R11Seg.ObliquusExternusNode;
    AnyRefNode &Ins = ....Segments.PelvisSeg.Left.ObliquusInternusNode_3;
    viewMuscle = {#include "../DrawSettings/MusDrawSettings.any"};
    viewForce.Visible ??= Off;
    #include "MusclesSharedCode.any"
  };


  AnyMuscleViaPoint ObliquusInternusR10_1 = {
    AnyMuscleModel &MusMdl = ....MuscleModels.Left.ObliquusInternus.ObliquusInternusR10_1;
    AnyRefNode &Org = ....Segments.Left.R10Seg.ObliquusExternusNode_2;
    AnyRefNode &Ins = ....Segments.PelvisSeg.Left.ObliquusInternusNode_4;
    viewMuscle = {#include "../DrawSettings/MusDrawSettings.any"};
    viewForce.Visible ??= Off;
    #include "MusclesSharedCode.any"
  };


  AnyMuscleViaPoint ObliquusInternusR10_2 = {
    AnyMuscleModel &MusMdl = ....MuscleModels.Left.ObliquusInternus.ObliquusInternusR10_2;
    AnyRefNode &Org = ....Segments.Left.R10Seg.ObliquusExternusNode_1;
    AnyRefNode &Ins = ....Segments.PelvisSeg.Left.ObliquusInternusNode_4_1;
    viewMuscle = {#include "../DrawSettings/MusDrawSettings.any"};
    viewForce.Visible ??= Off;
    #include "MusclesSharedCode.any"
  };


  AnyMuscleShortestPath ObliquusInternusCC_1 = {
    AnyMuscleModel &MusMdl = ....MuscleModels.Left.ObliquusInternus.ObliquusInternusCC_1;
    #if BM_TRUNK_THORACIC_STERNUM_TOPOLOGY == 4
    AnyRefNode &Org = ....Segments.Left.CostalCartilageSeg.ObliquusInternus_1;
    #else
    AnyRefNode &Org = ....Segments.SternalBodySeg.Left.ObliquusInternusNode_1;
    #endif
    AnyRefNode &Ins = ....Segments.PelvisSeg.Left.ObliquusInternusNode_5;
    // AnySurfTriCylMesh &mesh2 = Main.HumanModel.BodyModel.Trunk.Abdominal.Layer_L2.BaseSegAnterior.mesh;
    // AnySurfTriCylMesh &mesh3 = Main.HumanModel.BodyModel.Trunk.Abdominal.Layer_L3.BaseSegAnterior.mesh;
    //AnySurfTriCylMesh &mesh4 = Main.HumanModel.BodyModel.Trunk.Abdominal.Layer_L4.BaseSegAnterior.mesh;
    //AnySurfTriCylMesh  &mesh5 = Main.HumanModel.BodyModel.Trunk.Abdominal.Layer_L5.BaseSegAnterior.mesh;

    //    #if MESH_TYPE == "ELLIPSOID_SIDE"
    //   AnySurfEllipsoid &mesh3 = Main.HumanModel.BodyModel.Trunk.Abdominal.Layer_L3.BaseSegAnterior.Left.mesh;
    //  #else
    //  AnySurfTriCylMesh &mesh3 = Main.HumanModel.BodyModel.Trunk.Abdominal.Layer_L3.BaseSegAnterior.mesh;
    //  #endif
    AnySurfEllipsoid &mesh3 = Main.HumanModel.BodyModel.Trunk.Abdominal.Layer_L3.BaseSegAnterior.mesh3;


    SPLine.StringMesh=60;

    SPLine = {

      //  #if MESH_TYPE == "ELLIPSOID"
      //    AnyMatrix InitWrapPos = {
      //   //   transf3D({.mesh2.Radius[0],0,0}, &.mesh2),
      //      transf3D({.mesh3.Radius[0],0,0}, &.mesh3),
      //    //  transf3D({.mesh4.Radius[0],0,0}, &.mesh4),
      //     // transf3D({.mesh5.Radius[0],0,0}, &.mesh5),
      //    };
      //    #endif
      //       #if MESH_TYPE == "ELLIPSOID_SIDE"
      //    AnyMatrix InitWrapPos = {
      //
      //      transf3D({0,.mesh3.Radius[1],0}, &.mesh3),
      //      //transf3D({0,.mesh4.Radius[1],0}, &.mesh4),
      //    };
      //    #endif
      //
      //
      //    #if MESH_TYPE == "QUAD"
      //    AnyMatrix InitWrapPos = {
      //     // transf3D(.mesh2.Points[floor(.mesh2.MeshSize*0.75)+2*.mesh2.MeshSize*6]+{0.02,0,0}, &.mesh2),
      //      transf3D(.mesh3.Points[floor(.mesh3.MeshSize*0.75)+2*.mesh3.MeshSize*6]+{0.02,0,0}, &.mesh3),
      //      transf3D(.mesh4.Points[floor(.mesh4.MeshSize*0.7)+2*.mesh4.MeshSize*6]+{0.02,0,0}, &.mesh4),
      //     // transf3D(.mesh5.Points[floor(.mesh5.MeshSize*0.65)+2*.mesh5.MeshSize*6]+{0.02,0,0}, &.mesh5)
      //    };
      //    #endif
      AnyMatrix InitWrapPos = {
        transf3D({.mesh3.Radius[0],0,-.mesh3.Radius[2]}, &.mesh3),
      };

      InitWrapPosVecArr = {&InitWrapPos};
    };
    viewMuscle = {#include "../DrawSettings/MusDrawSettings.any"};
    viewForce.Visible ??= Off;
    #include "MusclesSharedCode_SPLine.any"
  };

  AnyMuscleShortestPath ObliquusInternusCC_2 = {
    AnyMuscleModel &MusMdl = ....MuscleModels.Left.ObliquusInternus.ObliquusInternusCC_2;
    #if BM_TRUNK_THORACIC_STERNUM_TOPOLOGY == 4
    AnyRefNode &Org = ....Segments.Left.CostalCartilageSeg.ObliquusInternus_2;
    #else
    AnyRefNode &Org = ....Segments.SternalBodySeg.Left.ObliquusInternusNode_2;
    #endif
    AnyRefNode &Ins = ....Segments.PelvisSeg.Left.ObliquusInternusNode_5;

    ////  AnySurfTriCylMesh &mesh2 = Main.HumanModel.BodyModel.Trunk.Abdominal.Layer_L2.BaseSegAnterior.mesh;
    ////  AnySurfTriCylMesh &mesh3 = Main.HumanModel.BodyModel.Trunk.Abdominal.Layer_L3.BaseSegAnterior.mesh;
    ////  AnySurfTriCylMesh &mesh4 = Main.HumanModel.BodyModel.Trunk.Abdominal.Layer_L4.BaseSegAnterior.mesh;
    //// AnySurfTriCylMesh &mesh5 = Main.HumanModel.BodyModel.Trunk.Abdominal.Layer_L5.BaseSegAnterior.mesh;
    // #if MESH_TYPE == "ELLIPSOID_SIDE"
    //   AnySurfEllipsoid &mesh2 = Main.HumanModel.BodyModel.Trunk.Abdominal.Layer_L2.BaseSegAnterior.Left.mesh;
    //   AnySurfEllipsoid &mesh3 = Main.HumanModel.BodyModel.Trunk.Abdominal.Layer_L3.BaseSegAnterior.Left.mesh;
    //   AnySurfEllipsoid &mesh4 = Main.HumanModel.BodyModel.Trunk.Abdominal.Layer_L4.BaseSegAnterior.Left.mesh;
    // #else
    //    AnySurfTriCylMesh &mesh2 = Main.HumanModel.BodyModel.Trunk.Abdominal.Layer_L2.BaseSegAnterior.mesh;
    //    AnySurfTriCylMesh &mesh3 = Main.HumanModel.BodyModel.Trunk.Abdominal.Layer_L3.BaseSegAnterior.mesh;
    //    AnySurfTriCylMesh &mesh4 = Main.HumanModel.BodyModel.Trunk.Abdominal.Layer_L4.BaseSegAnterior.mesh;
    //  #endif
    //   AnySurfEllipsoid &mesh2 = Main.HumanModel.BodyModel.Trunk.Abdominal.Layer_L2.BaseSegAnterior.mesh3;
    AnySurfEllipsoid &mesh3 = Main.HumanModel.BodyModel.Trunk.Abdominal.Layer_L3.BaseSegAnterior.mesh3;
    AnySurfEllipsoid &mesh4 = Main.HumanModel.BodyModel.Trunk.Abdominal.Layer_L4.BaseSegAnterior.mesh3;


    SPLine.StringMesh=240;

    SPLine = {

      //   #if MESH_TYPE == "ELLIPSOID"
      //    AnyMatrix InitWrapPos = {
      //      transf3D({.mesh2.Radius[0],0,0}, &.mesh2),
      //      transf3D({.mesh3.Radius[0],0,0}, &.mesh3),
      //      transf3D({.mesh4.Radius[0],0,0}, &.mesh4),
      //    //  transf3D({.mesh5.Radius[0],0,0}, &.mesh5),
      //    };
      //    #endif
      //
      //       #if MESH_TYPE == "ELLIPSOID_SIDE"
      //    AnyMatrix InitWrapPos = {
      //      transf3D({0,.mesh2.Radius[1],0}, &.mesh2),
      //      transf3D({0,.mesh3.Radius[1],0}, &.mesh3),
      //      transf3D({0,.mesh4.Radius[1],0}, &.mesh4),
      //    };
      //    #endif
      //
      //    #if MESH_TYPE == "QUAD"
      //    AnyMatrix InitWrapPos = {
      //      transf3D(.mesh2.Points[floor(.mesh2.MeshSize*0.75)+2*.mesh2.MeshSize*6]+{0.02,0,0}, &.mesh2),
      //      transf3D(.mesh3.Points[floor(.mesh3.MeshSize*0.75)+2*.mesh3.MeshSize*6]+{0.02,0,0}, &.mesh3),
      //      transf3D(.mesh4.Points[floor(.mesh4.MeshSize*0.7)+2*.mesh4.MeshSize*6]+{0.02,0,0}, &.mesh4),
      //     // transf3D(.mesh5.Points[floor(.mesh5.MeshSize*0.65)+2*.mesh5.MeshSize*6]+{0.02,0,0}, &.mesh5)
      //    };
      //    #endif
      AnyMatrix InitWrapPos = {
        //      transf3D({.mesh2.Radius[0],0,0}, &.mesh2),
        transf3D({.mesh3.Radius[0],0,-.mesh3.Radius[2]}, &.mesh3),
        transf3D({.mesh4.Radius[0],0,-.mesh4.Radius[2]}, &.mesh4),
        //  transf3D({.mesh5.Radius[0],0,0}, &.mesh5),
      };

      InitWrapPosVecArr = {&InitWrapPos};
    };
    viewMuscle = {#include "../DrawSettings/MusDrawSettings.any"};
    viewForce.Visible ??= Off;
    #include "MusclesSharedCode_SPLine.any"
  };


  AnyMuscleShortestPath ObliquusInternusCC_3 = {
    AnyMuscleModel &MusMdl = ....MuscleModels.Left.ObliquusInternus.ObliquusInternusCC_3;
    AnyRefNode &Org = ....Segments.SternalBodySeg.RectusAbdominisCP_Via_2_L;
    // AnyRefNode &Via = Main.HumanModel.BodyModel.Trunk.Abdominal.Layer_L1.BaseSegAnterior.TransversusPoints.Left.nn05;

    AnyRefNode &Ins = ....Segments.PelvisSeg.Left.ObliquusInternusNode_6;
    //// AnySurfTriCylMesh &mesh2 = Main.HumanModel.BodyModel.Trunk.Abdominal.Layer_L2.BaseSegAnterior.mesh;
    //// AnySurfTriCylMesh &mesh3 = Main.HumanModel.BodyModel.Trunk.Abdominal.Layer_L3.BaseSegAnterior.mesh;
    //// AnySurfTriCylMesh &mesh4 = Main.HumanModel.BodyModel.Trunk.Abdominal.Layer_L4.BaseSegAnterior.mesh;
    // #if MESH_TYPE == "ELLIPSOID_SIDE"
    //   AnySurfEllipsoid &mesh2 = Main.HumanModel.BodyModel.Trunk.Abdominal.Layer_L2.BaseSegAnterior.Left.mesh;
    //   AnySurfEllipsoid &mesh3 = Main.HumanModel.BodyModel.Trunk.Abdominal.Layer_L3.BaseSegAnterior.Left.mesh;
    //   AnySurfEllipsoid &mesh4 = Main.HumanModel.BodyModel.Trunk.Abdominal.Layer_L4.BaseSegAnterior.Left.mesh;
    // #else
    //    AnySurfTriCylMesh &mesh2 = Main.HumanModel.BodyModel.Trunk.Abdominal.Layer_L2.BaseSegAnterior.mesh;
    //    AnySurfTriCylMesh &mesh3 = Main.HumanModel.BodyModel.Trunk.Abdominal.Layer_L3.BaseSegAnterior.mesh;
    //    AnySurfTriCylMesh &mesh4 = Main.HumanModel.BodyModel.Trunk.Abdominal.Layer_L4.BaseSegAnterior.mesh;
    //  #endif

    //   AnySurfEllipsoid &mesh1 = Main.HumanModel.BodyModel.Trunk.Abdominal.Layer_L1.BaseSegAnterior.mesh3;
    //   AnySurfEllipsoid &mesh2 = Main.HumanModel.BodyModel.Trunk.Abdominal.Layer_L2.BaseSegAnterior.mesh3;
    AnySurfEllipsoid &mesh3 = Main.HumanModel.BodyModel.Trunk.Abdominal.Layer_L3.BaseSegAnterior.mesh3;
    AnySurfEllipsoid &mesh4 = Main.HumanModel.BodyModel.Trunk.Abdominal.Layer_L4.BaseSegAnterior.mesh3;


    SPLine.StringMesh=240;

    SPLine = {
      //    SolverVersion=3;
      // StringSurfaceMap= {{Off,Off,Off,Off},{On,On,On,On}};  //no wrap before after via


      //  #if MESH_TYPE == "ELLIPSOID"
      //    AnyMatrix InitWrapPos = {
      //      transf3D({.mesh2.Radius[0],0,0}, &.mesh2),
      //      transf3D({.mesh3.Radius[0],0,0}, &.mesh3),
      //      transf3D({.mesh4.Radius[0],0,0}, &.mesh4),
      //    };
      //    #endif
      //       #if MESH_TYPE == "ELLIPSOID_SIDE"
      //    AnyMatrix InitWrapPos = {
      //      transf3D({0,.mesh2.Radius[1],0}, &.mesh2),
      //      transf3D({0,.mesh3.Radius[1],0}, &.mesh3),
      //      transf3D({0,.mesh4.Radius[1],0}, &.mesh4),
      //    };
      //    #endif

      //    #if MESH_TYPE == "QUAD"
      //  AnyMatrix InitWrapPos = {
      //    //      transf3D({0.0,2*.srf1.MajorRadius,-.srf1.MajorRadius}, &.srf1),
      //    //      transf3D(.mesh1.Points[52]+{0.03,0,0}, &.mesh1),
      //    //   transf3D(.mesh1.Points[floor(.mesh2.MeshSize*0.8)+2*.mesh2.MeshSize*4]+{0.01,0,0}, &.mesh1),
      //    transf3D(.mesh2.Points[floor(.mesh2.MeshSize*0.75)+2*.mesh2.MeshSize*6]+{0.02,0,0}, &.mesh2),
      //    transf3D(.mesh3.Points[floor(.mesh3.MeshSize*0.7)+2*.mesh3.MeshSize*6]+{0.02,0,0}, &.mesh3),
      //     transf3D(.mesh4.Points[floor(.mesh4.MeshSize*0.65)+2*.mesh4.MeshSize*6]+{0.02,0,0}, &.mesh4),
      ////     transf3D(mesh.Points[floor(.mesh.MeshSize*4]+{0.01,0,0}, &.mesh),
      //
      //   //      transf3D(.mesh5.Points[floor(.mesh5.MeshSize*0.65)+2*.mesh5.MeshSize*6]+{0.02,0,0}, &.mesh5)
      //  };
      //
      //    #endif

      AnyMatrix InitWrapPos = {
        //      transf3D({.mesh1.Radius[0],0,0}, &.mesh1),
        //      transf3D({.mesh2.Radius[0],0,0}, &.mesh2),
        transf3D({.mesh3.Radius[0],0,-.mesh3.Radius[2]}, &.mesh3),
        transf3D({.mesh4.Radius[0],0,-.mesh4.Radius[2]}, &.mesh4),
      };


      InitWrapPosVecArr = {&InitWrapPos};
      //InitWrapPosVecArr = {&InitWrapPos};


    };
    viewMuscle = {#include "../DrawSettings/MusDrawSettings.any"};
    viewForce.Visible ??= Off;
    #include "MusclesSharedCode_SPLine.any"
  };

  AnyMuscleShortestPath ObliquusInternusXiphoid = {
    AnyMuscleModel &MusMdl = ....MuscleModels.Left.ObliquusInternus.ObliquusInternusXiphoid;
    AnyRefNode &Org = ....Segments.SternalBodySeg.DiaphragmXiphoidNodeL;
    AnyRefNode &Via = Main.HumanModel.BodyModel.Trunk.Abdominal.Layer_L1.BaseSegAnterior.TransversusPoints.Left.nn06;

    AnyRefNode &Ins = ....Segments.PelvisSeg.Left.ObliquusInternusNode_6;

    //AnySurfTriCylMesh &mesh2 = Main.HumanModel.BodyModel.Trunk.Abdominal.Layer_L2.BaseSegAnterior.mesh;
    //AnySurfTriCylMesh &mesh3 = Main.HumanModel.BodyModel.Trunk.Abdominal.Layer_L3.BaseSegAnterior.mesh;
    //AnySurfTriCylMesh &mesh4 = Main.HumanModel.BodyModel.Trunk.Abdominal.Layer_L4.BaseSegAnterior.mesh;
    // AnySurfTriCylMesh &mesh5 = Main.HumanModel.BodyModel.Trunk.Abdominal.Layer_L5.BaseSegAnterior.mesh;

    // #if MESH_TYPE == "ELLIPSOID_SIDE"
    //   AnySurfEllipsoid &mesh2 = Main.HumanModel.BodyModel.Trunk.Abdominal.Layer_L2.BaseSegAnterior.Left.mesh;
    //   AnySurfEllipsoid &mesh3 = Main.HumanModel.BodyModel.Trunk.Abdominal.Layer_L3.BaseSegAnterior.Left.mesh;
    //   AnySurfEllipsoid &mesh4 = Main.HumanModel.BodyModel.Trunk.Abdominal.Layer_L4.BaseSegAnterior.Left.mesh;
    // #else
    //    AnySurfTriCylMesh &mesh2 = Main.HumanModel.BodyModel.Trunk.Abdominal.Layer_L2.BaseSegAnterior.mesh;
    //    AnySurfTriCylMesh &mesh3 = Main.HumanModel.BodyModel.Trunk.Abdominal.Layer_L3.BaseSegAnterior.mesh;
    //    AnySurfTriCylMesh &mesh4 = Main.HumanModel.BodyModel.Trunk.Abdominal.Layer_L4.BaseSegAnterior.mesh;
    //  #endif

    //   AnySurfEllipsoid &mesh2 = Main.HumanModel.BodyModel.Trunk.Abdominal.Layer_L2.BaseSegAnterior.mesh3;
    AnySurfEllipsoid &mesh3 = Main.HumanModel.BodyModel.Trunk.Abdominal.Layer_L3.BaseSegAnterior.mesh3;
    AnySurfEllipsoid &mesh4 = Main.HumanModel.BodyModel.Trunk.Abdominal.Layer_L4.BaseSegAnterior.mesh3;


    SPLine.StringMesh=240;

    SPLine = {
      //    StringSurfaceMap= {{Off,Off,Off},{On,On,On}};  //no wrap before after via
      StringSurfaceMap= {{Off,Off},{On,On}};  //no wrap before after via

      //   #if MESH_TYPE == "ELLIPSOID"
      //    AnyMatrix InitWrapPos = {
      //      transf3D({.mesh2.Radius[0],0,0}, &.mesh2),
      //      transf3D({.mesh3.Radius[0],0,0}, &.mesh3),
      //      transf3D({.mesh4.Radius[0],0,0}, &.mesh4),
      //  //    transf3D({.mesh5.Radius[0],0,0}, &.mesh5),
      //    };
      //    #endif
      //       #if MESH_TYPE == "ELLIPSOID_SIDE"
      //    AnyMatrix InitWrapPos = {
      //      transf3D({0,.mesh2.Radius[1],0}, &.mesh2),
      //      transf3D({0,.mesh3.Radius[1],0}, &.mesh3),
      //      transf3D({0,.mesh4.Radius[1],0}, &.mesh4),
      //    };
      //    #endif
      //
      //    #if MESH_TYPE == "QUAD"
      //    AnyMatrix InitWrapPos = {
      //       transf3D(.mesh2.Points[floor(.mesh2.MeshSize*0.8)+2*.mesh2.MeshSize*6]+{0.02,0,0}, &.mesh2),
      //       transf3D(.mesh3.Points[floor(.mesh3.MeshSize*0.7)+2*.mesh3.MeshSize*6]+{0.02,0,0}, &.mesh3),
      //      transf3D(.mesh4.Points[floor(.mesh4.MeshSize*0.6)+2*.mesh4.MeshSize*6]+{0.02,0,0}, &.mesh4),
      //  //    transf3D(.mesh5.Points[floor(.mesh5.MeshSize*0.6)+2*.mesh5.MeshSize*6]+{0.02,0,0}, &.mesh5)
      //    };
      //
      //    #endif
      AnyMatrix InitWrapPos = {
        //      transf3D({.mesh2.Radius[0],0,0}, &.mesh2),
        transf3D({.mesh3.Radius[0],0,-.mesh3.Radius[2]}, &.mesh3),
        transf3D({.mesh4.Radius[0],0,-.mesh4.Radius[2]}, &.mesh4),
        //    transf3D({.mesh5.Radius[0],0,0}, &.mesh5),
      };

      InitWrapPosVecArr = {None,&InitWrapPos};
    };
    viewMuscle = {#include "../DrawSettings/MusDrawSettings.any"};
    viewForce.Visible ??= Off;
    #include "MusclesSharedCode_SPLine.any"
  };

  AnyMuscleShortestPath ObliquusInternusAbd_1 = {
    AnyMuscleModel &MusMdl = ....MuscleModels.Left.ObliquusInternus.ObliquusInternusAbd_1;
    AnyRefNode &Org =      ....Abdominal.Layer_L1.BaseSegAnterior.mid;
    AnyRefNode &Ins = ....Segments.PelvisSeg.Left.ObliquusInternusNode_6;

    ////  AnySurfTriCylMesh &mesh2 = Main.HumanModel.BodyModel.Trunk.Abdominal.Layer_L2.BaseSegAnterior.mesh;
    ////  AnySurfTriCylMesh &mesh3 = Main.HumanModel.BodyModel.Trunk.Abdominal.Layer_L3.BaseSegAnterior.mesh;
    // // AnySurfTriCylMesh &mesh4 = Main.HumanModel.BodyModel.Trunk.Abdominal.Layer_L4.BaseSegAnterior.mesh;
    //  //AnySurfTriCylMesh &mesh5 = Main.HumanModel.BodyModel.Trunk.Abdominal.Layer_L5.BaseSegAnterior.mesh;
    //
    //
    //   #if MESH_TYPE == "ELLIPSOID_SIDE"
    //   AnySurfEllipsoid &mesh2 = Main.HumanModel.BodyModel.Trunk.Abdominal.Layer_L2.BaseSegAnterior.Left.mesh;
    //   AnySurfEllipsoid &mesh3 = Main.HumanModel.BodyModel.Trunk.Abdominal.Layer_L3.BaseSegAnterior.Left.mesh;
    //   AnySurfEllipsoid &mesh4 = Main.HumanModel.BodyModel.Trunk.Abdominal.Layer_L4.BaseSegAnterior.Left.mesh;
    //   AnySurfEllipsoid &meshpelvis = Main.HumanModel.BodyModel.Trunk.Abdominal.Layer_Pelvic1.BaseSegAnterior.mesh;
    // #else
    //    AnySurfTriCylMesh &mesh2 = Main.HumanModel.BodyModel.Trunk.Abdominal.Layer_L2.BaseSegAnterior.mesh;
    //    AnySurfTriCylMesh &mesh3 = Main.HumanModel.BodyModel.Trunk.Abdominal.Layer_L3.BaseSegAnterior.mesh;
    //    AnySurfTriCylMesh &mesh4 = Main.HumanModel.BodyModel.Trunk.Abdominal.Layer_L4.BaseSegAnterior.mesh;
    //  #endif

    AnySurfEllipsoid &mesh2 = Main.HumanModel.BodyModel.Trunk.Abdominal.Layer_L2.BaseSegAnterior.mesh3;
    AnySurfEllipsoid &mesh3 = Main.HumanModel.BodyModel.Trunk.Abdominal.Layer_L3.BaseSegAnterior.mesh3;
    AnySurfEllipsoid &mesh4 = Main.HumanModel.BodyModel.Trunk.Abdominal.Layer_L4.BaseSegAnterior.mesh3;


    SPLine.StringMesh=240;

    SPLine = {


      //    #if MESH_TYPE == "ELLIPSOID"
      //    AnyMatrix InitWrapPos = {
      //      transf3D({.mesh2.Radius[0],0,0}, &.mesh2),
      //      transf3D({.mesh3.Radius[0],0,0}, &.mesh3),
      //      transf3D({.mesh4.Radius[0],0,0}, &.mesh4),
      //   //   transf3D({.mesh5.Radius[0],0,0}, &.mesh5),
      //
      //    };
      //    #endif
      //
      //
      //   #if MESH_TYPE == "ELLIPSOID_SIDE"
      //    AnyMatrix InitWrapPos = {
      //      transf3D({0,.mesh2.Radius[1],0}, &.mesh2),
      //      transf3D({0,.mesh3.Radius[1],0}, &.mesh3),
      //      transf3D({0,.mesh4.Radius[1],0}, &.mesh4),
      //    };
      //    #endif
      //
      //
      //
      //    #if MESH_TYPE == "QUAD"
      //    AnyMatrix InitWrapPos = {
      //      transf3D(.mesh2.Points[floor(.mesh2.MeshSize*0.75)+2*.mesh2.MeshSize*6]+{0.02,0,0}, &.mesh2),
      //      transf3D(.mesh3.Points[floor(.mesh3.MeshSize*0.7) +2*.mesh3.MeshSize*6]+{0.02,0,0}, &.mesh3),
      //      transf3D(.mesh4.Points[floor(.mesh4.MeshSize*0.65)+2*.mesh4.MeshSize*6]+{0.02,0,0}, &.mesh4),
      //   //   transf3D(.mesh5.Points[floor(.mesh5.MeshSize*0.6) +2*.mesh5.MeshSize*6]+{0.02,0,0}, &.mesh5)
      //    };
      //    #endif
      AnyMatrix InitWrapPos = {
        transf3D({.mesh2.Radius[0],0,-.mesh2.Radius[2]}, &.mesh2),
        transf3D({.mesh3.Radius[0],0,-.mesh3.Radius[2]}, &.mesh3),
        transf3D({.mesh4.Radius[0],0,-.mesh4.Radius[2]}, &.mesh4),
        //   transf3D({.mesh5.Radius[0],0,0}, &.mesh5),

      };

      InitWrapPosVecArr = {&InitWrapPos};
    };

    viewMuscle = {#include "../DrawSettings/MusDrawSettings.any"};
    viewForce.Visible ??= Off;
    #include "MusclesSharedCode_SPLine.any"
  };


  AnyMuscleShortestPath ObliquusInternusAbd_2 = {
    AnyMuscleModel &MusMdl = ....MuscleModels.Left.ObliquusInternus.ObliquusInternusAbd_2;
    AnyRefNode &Org =      ....Abdominal.Layer_L2.BaseSegAnterior.mid;
    AnyRefNode &Ins = ....Segments.PelvisSeg.Left.ObliquusInternusNode_6;

    ////  AnySurfTriCylMesh &mesh3 = Main.HumanModel.BodyModel.Trunk.Abdominal.Layer_L3.BaseSegAnterior.mesh;
    ////  AnySurfTriCylMesh &mesh4 = Main.HumanModel.BodyModel.Trunk.Abdominal.Layer_L4.BaseSegAnterior.mesh;
    ////  AnySurfTriCylMesh &mesh5 = Main.HumanModel.BodyModel.Trunk.Abdominal.Layer_L5.BaseSegAnterior.mesh;
    //
    //   #if MESH_TYPE == "ELLIPSOID_SIDE"
    //   AnySurfEllipsoid &mesh3 = Main.HumanModel.BodyModel.Trunk.Abdominal.Layer_L3.BaseSegAnterior.Left.mesh;
    //   AnySurfEllipsoid &mesh4 = Main.HumanModel.BodyModel.Trunk.Abdominal.Layer_L4.BaseSegAnterior.Left.mesh;
    //   AnySurfEllipsoid &mesh5 = Main.HumanModel.BodyModel.Trunk.Abdominal.Layer_L5.BaseSegAnterior.Left.mesh;
    //   AnySurfEllipsoid &meshpelvis = Main.HumanModel.BodyModel.Trunk.Abdominal.Layer_Pelvic1.BaseSegAnterior.mesh;
    //
    //   #else
    //    AnySurfTriCylMesh &mesh3 = Main.HumanModel.BodyModel.Trunk.Abdominal.Layer_L3.BaseSegAnterior.mesh;
    //    AnySurfTriCylMesh &mesh4 = Main.HumanModel.BodyModel.Trunk.Abdominal.Layer_L4.BaseSegAnterior.mesh;
    //    AnySurfTriCylMesh &mesh5 = Main.HumanModel.BodyModel.Trunk.Abdominal.Layer_L5.BaseSegAnterior.mesh;
    //
    //    #endif

    AnySurfEllipsoid &mesh3 = Main.HumanModel.BodyModel.Trunk.Abdominal.Layer_L3.BaseSegAnterior.mesh3;
    AnySurfEllipsoid &mesh4 = Main.HumanModel.BodyModel.Trunk.Abdominal.Layer_L4.BaseSegAnterior.mesh3;
    //   AnySurfEllipsoid &mesh5 = Main.HumanModel.BodyModel.Trunk.Abdominal.Layer_L5.BaseSegAnterior.mesh3;


    SPLine.StringMesh=300;


    SPLine = {


      //    #if MESH_TYPE == "ELLIPSOID"
      //    AnyMatrix InitWrapPos = {
      //
      //      transf3D({.mesh3.Radius[0],0,0}, &.mesh3),
      //      transf3D({.mesh4.Radius[0],0,0}, &.mesh4),
      //      transf3D({.mesh5.Radius[0],0,0}, &.mesh5),
      //
      //    };
      //    #endif
      //
      //
      //
      //  #if MESH_TYPE == "ELLIPSOID_SIDE"
      //    AnyMatrix InitWrapPos = {
      //           transf3D({0,.mesh3.Radius[1],0}, &.mesh3),
      //            transf3D({0,.mesh4.Radius[1],0}, &.mesh4),
      //            transf3D({0,.mesh5.Radius[1],0}, &.mesh5),
      //
      //          };
      //    #endif
      //
      //
      //
      //    #if MESH_TYPE == "QUAD"
      //    AnyMatrix InitWrapPos = {
      //
      //      transf3D(.mesh3.Points[floor(.mesh3.MeshSize*0.75)+2*.mesh3.MeshSize*6]+{0.02,0,0}, &.mesh3),
      //      transf3D(.mesh4.Points[floor(.mesh4.MeshSize*0.7)+2*.mesh4.MeshSize*6]+{0.02,0,0}, &.mesh4),
      //      transf3D(.mesh5.Points[floor(.mesh5.MeshSize*0.65)+2*.mesh5.MeshSize*6]+{0.02,0,0}, &.mesh5)
      //    };
      //    #endif

      AnyMatrix InitWrapPos = {

        transf3D({.mesh3.Radius[0],0,-.mesh3.Radius[2]}, &.mesh3),
        transf3D({.mesh4.Radius[0],0,-.mesh4.Radius[2]}, &.mesh4),
        //      transf3D({.mesh5.Radius[0],0,0}, &.mesh5),

      };


      InitWrapPosVecArr = {&InitWrapPos};
    };

    viewMuscle = {#include "../DrawSettings/MusDrawSettings.any"};
    viewForce.Visible ??= Off;
    #include "MusclesSharedCode_SPLine.any"
  };


  //

  AnyMuscleShortestPath ObliquusInternusAbd_3 = {
    AnyMuscleModel &MusMdl = ....MuscleModels.Left.ObliquusInternus.ObliquusInternusAbd_3;
    AnyRefNode &Org = ....Abdominal.Layer_L3.BaseSegAnterior.mid;
    AnyRefNode &Ins = ....Segments.PelvisSeg.Left.ObliquusInternusNode_7;

    //  //  AnyParamSurf &srf1 =....Abdominal.ObliquusWrapping.WrappingSeg.Layer4WrappingPoints.Left.nn11.Translate.InwardCyl;
    //  //  AnyParamSurf &srf2 =....Abdominal.ObliquusWrapping.WrappingSeg.Layer5WrappingPoints.Left.nn08.Translate.InwardCyl;
    ////  AnySurfTriCylMesh &mesh4 = Main.HumanModel.BodyModel.Trunk.Abdominal.Layer_L4.BaseSegAnterior.mesh;
    ////  AnySurfTriCylMesh &mesh5 = Main.HumanModel.BodyModel.Trunk.Abdominal.Layer_L5.BaseSegAnterior.mesh;
    //
    // #if MESH_TYPE == "ELLIPSOID_SIDE"
    //   AnySurfEllipsoid &mesh4 = Main.HumanModel.BodyModel.Trunk.Abdominal.Layer_L4.BaseSegAnterior.Left.mesh;
    //   AnySurfEllipsoid &mesh5 = Main.HumanModel.BodyModel.Trunk.Abdominal.Layer_L5.BaseSegAnterior.Left.mesh;
    //   AnySurfEllipsoid &meshpelvis = Main.HumanModel.BodyModel.Trunk.Abdominal.Layer_Pelvic1.BaseSegAnterior.mesh;
    //
    //   #else
    //    AnySurfTriCylMesh &mesh4 = Main.HumanModel.BodyModel.Trunk.Abdominal.Layer_L4.BaseSegAnterior.mesh;
    //    AnySurfTriCylMesh &mesh5 = Main.HumanModel.BodyModel.Trunk.Abdominal.Layer_L5.BaseSegAnterior.mesh;
    //
    //    #endif

    AnySurfEllipsoid &mesh4 = Main.HumanModel.BodyModel.Trunk.Abdominal.Layer_L4.BaseSegAnterior.mesh3;
    AnySurfEllipsoid &mesh5 = Main.HumanModel.BodyModel.Trunk.Abdominal.Layer_L5.BaseSegAnterior.mesh3;


    SPLine.StringMesh=240;

    SPLine = {


      //    #if MESH_TYPE == "ELLIPSOID"
      //    AnyMatrix InitWrapPos = {
      //
      //      transf3D({.mesh4.Radius[0],0,0}, &.mesh4),
      //      transf3D({.mesh5.Radius[0],0,0}, &.mesh5),
      //
      //    };
      //    #endif
      //
      //       #if MESH_TYPE == "ELLIPSOID_SIDE"
      //    AnyMatrix InitWrapPos = {
      //           transf3D({0,.mesh4.Radius[1],0}, &.mesh4),
      //            transf3D({0,.mesh5.Radius[1],0}, &.mesh5),
      //    };
      //    #endif
      //
      //    #if MESH_TYPE == "QUAD"
      //    AnyMatrix InitWrapPos = {
      //
      //      transf3D(.mesh4.Points[floor(.mesh4.MeshSize*0.75)+2*.mesh4.MeshSize*6]+{0.02,0,0}, &.mesh4),
      //      transf3D(.mesh5.Points[floor(.mesh5.MeshSize*0.65)+2*.mesh5.MeshSize*6]+{0.02,0,0}, &.mesh5)
      //    };
      //
      //    #endif
      AnyMatrix InitWrapPos = {

        transf3D({.mesh4.Radius[0],0,-.mesh4.Radius[2]}, &.mesh4),
        transf3D({.mesh5.Radius[0],0,-.mesh5.Radius[2]}, &.mesh5),

      };


      InitWrapPosVecArr = {&InitWrapPos};
    };
    viewMuscle = {#include "../DrawSettings/MusDrawSettings.any"};
    viewForce.Visible ??= Off;
    #include "MusclesSharedCode_SPLine.any"
  };


  AnyMuscleShortestPath ObliquusInternusAbd_4 = {
    AnyMuscleModel &MusMdl = ....MuscleModels.Left.ObliquusInternus.ObliquusInternusAbd_4;
    AnyRefNode &Org =      ....Abdominal.Layer_L4.BaseSegAnterior.mid;
    AnyRefNode &Ins = ....Segments.PelvisSeg.Left.ObliquusInternusNode_7;


    ////  AnySurfTriCylMesh &mesh5 = Main.HumanModel.BodyModel.Trunk.Abdominal.Layer_L5.BaseSegAnterior.mesh;
    //
    //   #if MESH_TYPE == "ELLIPSOID_SIDE"
    //   AnySurfEllipsoid &mesh5 = Main.HumanModel.BodyModel.Trunk.Abdominal.Layer_L5.BaseSegAnterior.Left.mesh;
    //   AnySurfEllipsoid &meshpelvis = Main.HumanModel.BodyModel.Trunk.Abdominal.Layer_Pelvic1.BaseSegAnterior.mesh;
    //
    //   #else
    //    AnySurfTriCylMesh &mesh5 = Main.HumanModel.BodyModel.Trunk.Abdominal.Layer_L5.BaseSegAnterior.mesh;
    //
    //    #endif
    AnySurfEllipsoid &mesh5 = Main.HumanModel.BodyModel.Trunk.Abdominal.Layer_L5.BaseSegAnterior.mesh3;


    SPLine.StringMesh=60;

    SPLine = {


      //    #if MESH_TYPE == "ELLIPSOID"
      //    AnyMatrix InitWrapPos = {
      //      transf3D({.mesh5.Radius[0],0,0}, &.mesh5),
      //    };
      //    #endif
      //       #if MESH_TYPE == "ELLIPSOID_SIDE"
      //    AnyMatrix InitWrapPos = {
      //      transf3D({0,.mesh5.Radius[1],0}, &.mesh5),
      //    };
      //    #endif
      //
      //
      //    #if MESH_TYPE == "QUAD"
      //    AnyMatrix InitWrapPos = {
      //
      //      transf3D(.mesh5.Points[floor(.mesh5.MeshSize*0.65)+2*.mesh5.MeshSize*6]+{0.02,0,0}, &.mesh5)
      //    };
      //
      //    #endif
      AnyMatrix InitWrapPos = {
        transf3D({.mesh5.Radius[0],0,-.mesh5.Radius[2]}, &.mesh5),
      };


      InitWrapPosVecArr = {&InitWrapPos};
    };

    viewMuscle = {#include "../DrawSettings/MusDrawSettings.any"};
    viewForce.Visible ??= Off;
    #include "MusclesSharedCode_SPLine.any"
  };

  AnyMuscleViaPoint  ObliquusInternusAbd_5= {
    AnyMuscleModel &MusMdl = ....MuscleModels.Left.ObliquusInternus.ObliquusInternusAbd_5;
    AnyRefNode &Org = ....Abdominal.Layer_L5.BaseSegAnterior.mid;
    AnyRefNode &Ins = ....Segments.PelvisSeg.Left.ObliquusInternusNode_8;

    //  AnySurfTriCylMesh &mesh5 = Main.HumanModel.BodyModel.Trunk.Abdominal.Layer_L5.BaseSegAnterior.mesh;
    //
    //  SPLine.StringMesh=60;
    //
    //  SPLine = {
    //    AnyMatrix InitWrapPos = {
    //      transf3D(.mesh5.Points[floor(.mesh5.MeshSize*0.65)+2*.mesh5.MeshSize*4]+{0.01,0,0}, &.mesh5)
    //
    //    };
    //    InitWrapPosVecArr = {&InitWrapPos};
    //  };
    //
    viewMuscle = {#include "../DrawSettings/MusDrawSettings.any"};
    viewForce.Visible ??= Off;
    #include "MusclesSharedCode.any"
  };
  #endif

  #endif

  #if BM_TRUNK_CAVITY_MODEL == _CAVITY_MODEL_BUCKLE_
  AnyMuscleViaPoint ObliquusInternusR11 = {
    AnyMuscleModel &MusMdl = ....MuscleModels.Left.ObliquusInternus.ObliquusInternusR11;
    AnyRefNode &Org = ....Segments.Left.R11Seg.ObliquusInternusNode;
    AnyRefNode &Ins = ....Segments.PelvisSeg.Left.ObliquusInternusNode_1;
    viewMuscle = {#include "../DrawSettings/MusDrawSettings.any"};
    viewForce.Visible ??= Off;
  };

  AnyMuscleViaPoint ObliquusInternusR10_1 = {
    AnyMuscleModel &MusMdl = ....MuscleModels.Left.ObliquusInternus.ObliquusInternusR10_1;
    AnyRefNode &Org = ....Segments.Left.R10Seg.ObliquusInternusNode_2;
    AnyRefNode &Ins = ....Segments.PelvisSeg.Left.ObliquusInternusNode_2;
    viewMuscle = {#include "../DrawSettings/MusDrawSettings.any"};
    viewForce.Visible ??= Off;
  };

  AnyMuscleViaPoint ObliquusInternusR10_2 = {
    AnyMuscleModel &MusMdl = ....MuscleModels.Left.ObliquusInternus.ObliquusInternusR10_2;
    AnyRefNode &Org = ....Segments.Left.R10Seg.ObliquusInternusNode_1;
    AnyRefNode &Ins = ....Segments.PelvisSeg.Left.ObliquusInternusNode_3;
    viewMuscle = {#include "../DrawSettings/MusDrawSettings.any"};
    viewForce.Visible ??= Off;
  };

  AnyMuscleViaPoint ObliquusInternusCC_1 = {
    AnyMuscleModel &MusMdl = ....MuscleModels.Left.ObliquusInternus.ObliquusInternusCC_1;
    AnyRefNode &Org = ....Segments.SternalBodySeg.Left.ObliquusInternusNode_1;
    AnyRefNode &Ins = ....Segments.PelvisSeg.Left.ObliquusInternusNode_4;
    viewMuscle = {#include "../DrawSettings/MusDrawSettings.any"};
    viewForce.Visible ??= Off;
  };

  AnyMuscleViaPoint ObliquusInternusCC_2 = {
    AnyMuscleModel &MusMdl = ....MuscleModels.Left.ObliquusInternus.ObliquusInternusCC_2;
    AnyRefNode &Org = ....Segments.SternalBodySeg.Left.ObliquusInternusNode_2;
    AnyRefNode &Ins = ....Segments.PelvisSeg.Left.ObliquusInternusNode_5;
    viewMuscle = {#include "../DrawSettings/MusDrawSettings.any"};
    viewForce.Visible ??= Off;
  };

  AnyMuscleViaPoint ObliquusInternusAbd_1 = {
    AnyMuscleModel &MusMdl = ....MuscleModels.Left.ObliquusInternus.ObliquusInternusAbd_1;
    AnyRefNode &Org = ....Buckle.Segments.BuckleSeg.Left.ObliquusInternusNode_1;
    AnyRefNode &Ins = ....Segments.PelvisSeg.Left.ObliquusInternusNode_6;
    viewMuscle = {#include "../DrawSettings/MusDrawSettings.any"};
    viewForce.Visible ??= Off;
  };

  AnyMuscleViaPoint ObliquusInternusAbd_2 = {
    AnyMuscleModel &MusMdl = ....MuscleModels.Left.ObliquusInternus.ObliquusInternusAbd_2;
    AnyRefNode &Org = ....Buckle.Segments.BuckleSeg.Left.ObliquusInternusNode_2;
    AnyRefNode &Ins = ....Segments.PelvisSeg.Left.ObliquusInternusNode_7;
    viewMuscle = {#include "../DrawSettings/MusDrawSettings.any"};
    viewForce.Visible ??= Off;
  };

  AnyMuscleViaPoint ObliquusInternusAbd_3 = {
    AnyMuscleModel &MusMdl = ....MuscleModels.Left.ObliquusInternus.ObliquusInternusAbd_3;
    AnyRefNode &Org = ....Buckle.Segments.BuckleSeg.Left.ObliquusInternusNode_3;
    AnyRefNode &Ins = ....Segments.PelvisSeg.Left.ObliquusInternusNode_8;
    viewMuscle = {#include "../DrawSettings/MusDrawSettings.any"};
    viewForce.Visible ??= Off;
  };

  AnyMuscleViaPoint ObliquusInternusAbd_4 = {
    AnyMuscleModel &MusMdl = ....MuscleModels.Left.ObliquusInternus.ObliquusInternusAbd_4;
    AnyRefNode &Org = ....Buckle.Segments.BuckleSeg.Left.ObliquusInternusNode_4;
    AnyRefNode &Ins = ....Segments.PelvisSeg.Left.ObliquusInternusNode_9;
    viewMuscle = {#include "../DrawSettings/MusDrawSettings.any"};
    viewForce.Visible ??= Off;
  };

  AnyMuscleViaPoint ObliquusInternusAbd_5 = {
    AnyMuscleModel &MusMdl = ....MuscleModels.Left.ObliquusInternus.ObliquusInternusAbd_5;
    AnyRefNode &Org = ....Buckle.Segments.BuckleSeg.Left.ObliquusInternusNode_5;
    AnyRefNode &Ins = ....Segments.PelvisSeg.Left.ObliquusInternusNode_10;
    viewMuscle = {#include "../DrawSettings/MusDrawSettings.any"};
    viewForce.Visible ??= Off;
  };
  #endif
};

// Psoas is separated since it is used by the legs in certain BM configurations
#include "PsoasMajorLeft.any"

#if BM_TRUNK_MUSCLES & BM_TRUNK_CAVITY_MODEL == _CAVITY_MODEL_VOLUME_
MuscleGroup Pubococcygeus = {
  AnyMuscleViaPoint Pubococcygeus_1= {
    AnyMuscleModel &MusMdl = ....MuscleModels.Left.Pubococcygeus.Pubococcygeus_1;
    AnyRefNode &Org = ....Segments.PelvisSeg.Pubococcygeus_1NodeL;
    AnyRefNode &Ins = ....Segments.SacrumSeg.Pubococcygeus_1NodeL;
    viewMuscle = {#include "../DrawSettings/MusDrawSettings.any"};
    viewForce.Visible ??= Off;
  };
  AnyMuscleViaPoint Pubococcygeus_2= {
    AnyMuscleModel &MusMdl = ....MuscleModels.Left.Pubococcygeus.Pubococcygeus_2;
    AnyRefNode &Org = ....Segments.PelvisSeg.Pubococcygeus_2NodeL;
    AnyRefNode &Ins = ....Segments.SacrumSeg.Pubococcygeus_2NodeL;
    viewMuscle = {#include "../DrawSettings/MusDrawSettings.any"};
    viewForce.Visible ??= Off;
  };
};

MuscleGroup Puborectalis = {
  AnyMuscleViaPoint Puborectalis_1= {
    AnyMuscleModel &MusMdl = ....MuscleModels.Left.Puborectalis.Puborectalis_1;
    AnyRefNode &Org = ....Segments.PelvisSeg.Puborectalis_1NodeL;
    AnyRefNode &Ins = ....Segments.SacrumSeg.Puborectalis_1NodeL;
    viewMuscle = {#include "../DrawSettings/MusDrawSettings.any"};
    viewForce.Visible ??= Off;
  };
  AnyMuscleViaPoint Puborectalis_2= {
    AnyMuscleModel &MusMdl = ....MuscleModels.Left.Puborectalis.Puborectalis_2;
    AnyRefNode &Org = ....Segments.PelvisSeg.Puborectalis_2NodeL;
    AnyRefNode &Ins = ....Segments.SacrumSeg.Puborectalis_2NodeL;
    viewMuscle = {#include "../DrawSettings/MusDrawSettings.any"};
    viewForce.Visible ??= Off;
  };
};


#endif


MuscleGroup QuadratusLumborum = {
  AnyMuscleViaPoint QuadratusLumborumR12IC_1 = {
    AnyMuscleModel &MusMdl = ....MuscleModels.Left.QuadratusLumborum.QuadratusLumborumR12IC_1;
    AnyRefNode &Org = ....Segments.Left.R12Seg.QuadratusLumborumR12LateralNode1L;
    AnyRefNode &Ins = ....Segments.PelvisSeg.QuadratusLumborumLateralNode1L;
    viewMuscle = {#include "../DrawSettings/MusDrawSettings.any"};
    viewForce.Visible ??= Off;
  };
  AnyMuscleViaPoint QuadratusLumborumR12IC_2 = {
    AnyMuscleModel &MusMdl = ....MuscleModels.Left.QuadratusLumborum.QuadratusLumborumR12IC_2;
    AnyRefNode &Org = ....Segments.Left.R12Seg.QuadratusLumborumR12LateralNode3L;
    AnyRefNode &Ins = ....Segments.PelvisSeg.QuadratusLumborumLateralNode2L;
    viewMuscle = {#include "../DrawSettings/MusDrawSettings.any"};


  };
  AnyMuscleViaPoint QuadratusLumborumR12IC_3 = {
    AnyMuscleModel &MusMdl = ....MuscleModels.Left.QuadratusLumborum.QuadratusLumborumR12IC_3;
    AnyRefNode &Org = ....Segments.Left.R12Seg.QuadratusLumborumR12InterMedianNode1L;
    AnyRefNode &Ins = ....Segments.PelvisSeg.QuadratusLumborumLateralNode3L;
    viewMuscle = {#include "../DrawSettings/MusDrawSettings.any"};


  };

  AnyMuscleViaPoint QuadratusLumborumR12IC_4 = {
    AnyMuscleModel &MusMdl = ....MuscleModels.Left.QuadratusLumborum.QuadratusLumborumR12IC_4;
    AnyRefNode &Org = ....Segments.Left.R12Seg.QuadratusLumborumR12InterMedianNode3L;
    AnyRefNode &Ins = ....Segments.PelvisSeg.QuadratusLumborumLateralNode5L;
    viewMuscle = {#include "../DrawSettings/MusDrawSettings.any"};


  };
  AnyMuscleViaPoint QuadratusLumborumR12IC_5 = {
    AnyMuscleModel &MusMdl = ....MuscleModels.Left.QuadratusLumborum.QuadratusLumborumR12IC_5;
    AnyRefNode &Org = ....Segments.Left.R12Seg.QuadratusLumborumR12MedianNode1L;
    AnyRefNode &Ins = ....Segments.PelvisSeg.QuadratusLumborumInterMedianNode1L;
    viewMuscle = {#include "../DrawSettings/MusDrawSettings.any"};


  };

  AnyMuscleViaPoint QuadratusLumborumT12IC_1 = {
    AnyMuscleModel &MusMdl = ....MuscleModels.Left.QuadratusLumborum.QuadratusLumborumT12IC_1;
    AnyRefNode &Org = ....Segments.T12Seg.QuadratusLumborumT12NodeL;
    AnyRefNode &Ins = ....Segments.PelvisSeg.QuadratusLumborumLateralNode3L;
    viewMuscle = {#include "../DrawSettings/MusDrawSettings.any"};


  };

  AnyMuscleViaPoint QuadratusLumborumL1IC_1 = {
    AnyMuscleModel &MusMdl = ....MuscleModels.Left.QuadratusLumborum.QuadratusLumborumL1IC_1;
    AnyRefNode &Org = ....Segments.L1Seg.QuadratusLumborumL1NodeL;
    AnyRefNode &Ins = ....Segments.PelvisSeg.QuadratusLumborumLateralNode4L;
    viewMuscle = {#include "../DrawSettings/MusDrawSettings.any"};
    viewForce.Visible ??= Off;
  };

  AnyMuscleViaPoint QuadratusLumborumL2IC_1 = {
    AnyMuscleModel &MusMdl = ....MuscleModels.Left.QuadratusLumborum.QuadratusLumborumL2IC_1;
    AnyRefNode &Org = ....Segments.L2Seg.QuadratusLumborumL2NodeL;
    AnyRefNode &Ins = ....Segments.PelvisSeg.QuadratusLumborumLateralNode4L;
    viewMuscle = {#include "../DrawSettings/MusDrawSettings.any"};
    viewForce.Visible ??= Off;
  };

  AnyMuscleViaPoint QuadratusLumborumL3IC_1 = {
    AnyMuscleModel &MusMdl = ....MuscleModels.Left.QuadratusLumborum.QuadratusLumborumL3IC_1;
    AnyRefNode &Org = ....Segments.L3Seg.QuadratusLumborumL3NodeL;
    AnyRefNode &Ins = ....Segments.PelvisSeg.QuadratusLumborumLateralNode5L;
    viewMuscle = {#include "../DrawSettings/MusDrawSettings.any"};
    viewForce.Visible ??= Off;
  };

  AnyMuscleViaPoint QuadratusLumborumT12IC_2 = {
    AnyMuscleModel &MusMdl = ....MuscleModels.Left.QuadratusLumborum.QuadratusLumborumT12IC_2;
    AnyRefNode &Org = ....Segments.T12Seg.QuadratusLumborumT12NodeL;
    AnyRefNode &Ins = ....Segments.PelvisSeg.QuadratusLumborumInterMedianNode1L;
    viewMuscle = {#include "../DrawSettings/MusDrawSettings.any"};


  };

  AnyMuscleViaPoint QuadratusLumborumL1IC_2 = {
    AnyMuscleModel &MusMdl = ....MuscleModels.Left.QuadratusLumborum.QuadratusLumborumL1IC_2;
    AnyRefNode &Org = ....Segments.L1Seg.QuadratusLumborumL1NodeL;
    AnyRefNode &Ins = ....Segments.PelvisSeg.QuadratusLumborumInterMedianNode2L;
    viewMuscle = {#include "../DrawSettings/MusDrawSettings.any"};


  };

  AnyMuscleViaPoint QuadratusLumborumL2IC_2 = {
    AnyMuscleModel &MusMdl = ....MuscleModels.Left.QuadratusLumborum.QuadratusLumborumL2IC_2;
    AnyRefNode &Org = ....Segments.L2Seg.QuadratusLumborumL2NodeL;
    AnyRefNode &Ins = ....Segments.PelvisSeg.QuadratusLumborumInterMedianNode2L;
    viewMuscle = {#include "../DrawSettings/MusDrawSettings.any"};


  };

  AnyMuscleViaPoint QuadratusLumborumL3IC_2 = {
    AnyMuscleModel &MusMdl = ....MuscleModels.Left.QuadratusLumborum.QuadratusLumborumL3IC_2;
    AnyRefNode &Org = ....Segments.L3Seg.QuadratusLumborumL3NodeL;
    AnyRefNode &Ins = ....Segments.PelvisSeg.QuadratusLumborumInterMedianNode3L;
    viewMuscle = {#include "../DrawSettings/MusDrawSettings.any"};


  };

  AnyMuscleViaPoint QuadratusLumborumL4IC_1 = {
    AnyMuscleModel &MusMdl = ....MuscleModels.Left.QuadratusLumborum.QuadratusLumborumL4IC_1;
    AnyRefNode &Org = ....Segments.L4Seg.QuadratusLumborumL4NodeL;
    AnyRefNode &Ins = ....Segments.PelvisSeg.QuadratusLumborumInterMedianNode3L;
    viewMuscle = {#include "../DrawSettings/MusDrawSettings.any"};
    viewForce.Visible ??= Off;
  };

  AnyMuscleViaPoint QuadratusLumborumT12IC_3 = {
    AnyMuscleModel &MusMdl = ....MuscleModels.Left.QuadratusLumborum.QuadratusLumborumT12IC_3;
    AnyRefNode &Org = ....Segments.T12Seg.QuadratusLumborumT12NodeL;
    AnyRefNode &Ins = ....Segments.PelvisSeg.QuadratusLumborumInterMedianNode4L;
    viewMuscle = {#include "../DrawSettings/MusDrawSettings.any"};


  };

  AnyMuscleViaPoint QuadratusLumborumL1IC_3 = {
    AnyMuscleModel &MusMdl = ....MuscleModels.Left.QuadratusLumborum.QuadratusLumborumL1IC_3;
    AnyRefNode &Org = ....Segments.L1Seg.QuadratusLumborumL1NodeL;
    AnyRefNode &Ins = ....Segments.PelvisSeg.QuadratusLumborumInterMedianNode4L;
    viewMuscle = {#include "../DrawSettings/MusDrawSettings.any"};


  };

  AnyMuscleViaPoint QuadratusLumborumL2IC_3 = {
    AnyMuscleModel &MusMdl = ....MuscleModels.Left.QuadratusLumborum.QuadratusLumborumL2IC_3;
    AnyRefNode &Org = ....Segments.L2Seg.QuadratusLumborumL2NodeL;
    AnyRefNode &Ins = ....Segments.PelvisSeg.QuadratusLumborumInterMedianNode5L;
    viewMuscle = {#include "../DrawSettings/MusDrawSettings.any"};


  };

  AnyMuscleViaPoint QuadratusLumborumL3IC_3 = {
    AnyMuscleModel &MusMdl = ....MuscleModels.Left.QuadratusLumborum.QuadratusLumborumL3IC_3;
    AnyRefNode &Org = ....Segments.L3Seg.QuadratusLumborumL3NodeL;
    AnyRefNode &Ins = ....Segments.PelvisSeg.QuadratusLumborumInterMedianNode5L;
    viewMuscle = {#include "../DrawSettings/MusDrawSettings.any"};


  };

  AnyMuscleViaPoint QuadratusLumborumL4IC_2 = {
    AnyMuscleModel &MusMdl = ....MuscleModels.Left.QuadratusLumborum.QuadratusLumborumL4IC_2;
    AnyRefNode &Org = ....Segments.L4Seg.QuadratusLumborumL4NodeL;
    AnyRefNode &Ins = ....Segments.PelvisSeg.QuadratusLumborumMedianNodeL;
    viewMuscle = {#include "../DrawSettings/MusDrawSettings.any"};


  };

  AnyMuscleViaPoint QuadratusLumborumR12L4_1 = {
    AnyMuscleModel &MusMdl = ....MuscleModels.Left.QuadratusLumborum.QuadratusLumborumR12L4_1;
    AnyRefNode &Org = ....Segments.L4Seg.QuadratusLumborumL4NodeL;
    AnyRefNode &Ins = ....Segments.Left.R12Seg.QuadratusLumborumR12LateralNode2L;
    viewMuscle = {#include "../DrawSettings/MusDrawSettings.any"};


  };
  AnyMuscleViaPoint QuadratusLumborumR12L3_1 = {
    AnyMuscleModel &MusMdl = ....MuscleModels.Left.QuadratusLumborum.QuadratusLumborumR12L3_1;
    AnyRefNode &Org = ....Segments.L3Seg.QuadratusLumborumL3NodeL;
    AnyRefNode &Ins = ....Segments.Left.R12Seg.QuadratusLumborumR12LateralNode4L;
    viewMuscle = {#include "../DrawSettings/MusDrawSettings.any"};


  };
  AnyMuscleViaPoint QuadratusLumborumR12L2_1 = {
    AnyMuscleModel &MusMdl = ....MuscleModels.Left.QuadratusLumborum.QuadratusLumborumR12L2_1;
    AnyRefNode &Org = ....Segments.L2Seg.QuadratusLumborumL2NodeL;
    AnyRefNode &Ins = ....Segments.Left.R12Seg.QuadratusLumborumR12LateralNode5L;
    viewMuscle = {#include "../DrawSettings/MusDrawSettings.any"};


  };

  AnyMuscleViaPoint QuadratusLumborumR12L4_2 = {
    AnyMuscleModel &MusMdl = ....MuscleModels.Left.QuadratusLumborum.QuadratusLumborumR12L4_2;
    AnyRefNode &Org = ....Segments.L4Seg.QuadratusLumborumL4NodeL;
    AnyRefNode &Ins = ....Segments.Left.R12Seg.QuadratusLumborumR12InterMedianNode2L;
    viewMuscle = {#include "../DrawSettings/MusDrawSettings.any"};


  };
  AnyMuscleViaPoint QuadratusLumborumR12L3_2 = {
    AnyMuscleModel &MusMdl = ....MuscleModels.Left.QuadratusLumborum.QuadratusLumborumR12L3_2;
    AnyRefNode &Org = ....Segments.L3Seg.QuadratusLumborumL3NodeL;
    AnyRefNode &Ins = ....Segments.Left.R12Seg.QuadratusLumborumR12InterMedianNode4L;
    viewMuscle = {#include "../DrawSettings/MusDrawSettings.any"};


  };
  AnyMuscleViaPoint QuadratusLumborumR12L2_2 = {
    AnyMuscleModel &MusMdl = ....MuscleModels.Left.QuadratusLumborum.QuadratusLumborumR12L2_2;
    AnyRefNode &Org = ....Segments.L2Seg.QuadratusLumborumL2NodeL;
    AnyRefNode &Ins = ....Segments.Left.R12Seg.QuadratusLumborumR12InterMedianNode5L;
    viewMuscle = {#include "../DrawSettings/MusDrawSettings.any"};


  };

  AnyMuscleViaPoint QuadratusLumborumR12L4_3 = {
    AnyMuscleModel &MusMdl = ....MuscleModels.Left.QuadratusLumborum.QuadratusLumborumR12L4_3;
    AnyRefNode &Org = ....Segments.L4Seg.QuadratusLumborumL4NodeL;
    AnyRefNode &Ins = ....Segments.Left.R12Seg.QuadratusLumborumR12MedianNode2L;
    viewMuscle = {#include "../DrawSettings/MusDrawSettings.any"};


  };
  AnyMuscleViaPoint QuadratusLumborumR12L3_3 = {
    AnyMuscleModel &MusMdl = ....MuscleModels.Left.QuadratusLumborum.QuadratusLumborumR12L3_3;
    AnyRefNode &Org = ....Segments.L3Seg.QuadratusLumborumL3NodeL;
    AnyRefNode &Ins = ....Segments.Left.R12Seg.QuadratusLumborumR12MedianNode3L;
    viewMuscle = {#include "../DrawSettings/MusDrawSettings.any"};


  };
  AnyMuscleViaPoint QuadratusLumborumR12L2_3 = {
    AnyMuscleModel &MusMdl = ....MuscleModels.Left.QuadratusLumborum.QuadratusLumborumR12L2_3;
    AnyRefNode &Org = ....Segments.L2Seg.QuadratusLumborumL2NodeL;
    AnyRefNode &Ins = ....Segments.Left.R12Seg.QuadratusLumborumR12MedianNode4L;
    viewMuscle = {#include "../DrawSettings/MusDrawSettings.any"};


  };

};

MuscleGroup RectusAbdominis = {

  #if BM_TRUNK_CAVITY_MODEL == _CAVITY_MODEL_BUCKLE_

  AnyMuscleViaPoint RectusAbdominis_1= {
    AnyMuscleModel &MusMdl = ....MuscleModels.Left.RectusAbdominis.RectusAbdominis_1;
    AnyRefNode &Org = ....Segments.SternalBodySeg.RectusAbdominisCP_CO6_2_L;
    AnyRefNode& Via3 = ....Segments.PelvisSeg.RectusAbdominis_1_ViaL;
    AnyRefNode &Ins = ....Segments.PelvisSeg.RectusAbdominis_1_L;
    viewMuscle = {#include "../DrawSettings/MusDrawSettings.any"};
    viewForce.Visible ??= Off;
  };

  AnyMuscleViaPoint RectusAbdominis_2 = {
    AnyMuscleModel &MusMdl = ....MuscleModels.Left.RectusAbdominis.RectusAbdominis_2;
    AnyRefNode &Org = ....Segments.SternalBodySeg.RectusAbdominisCP_CO5_2_L;
    AnyRefNode &Via1 = ....Segments.SternalBodySeg.RectusAbdominisCP_Via_2_L;
    AnyRefNode& Via3 = ....Segments.PelvisSeg.RectusAbdominis_2_ViaL;
    AnyRefNode &Ins = ....Segments.PelvisSeg.RectusAbdominis_2_L;
    viewMuscle = {#include "../DrawSettings/MusDrawSettings.any"};
    viewForce.Visible ??= Off;
  };
  #endif

  #if BM_TRUNK_CAVITY_MODEL == _CAVITY_MODEL_VOLUME_

  #if BM_TRUNK_EXPERIMENTAL_RECTUS_ABDOMINIS == ON


  #if RECTUS_MUSCLE_LINE == SP

  AnyMuscleShortestPath RectusAbdominis_1 = {
    AnyRefNode &Org = ....Segments.SternalBodySeg.RectusAbdominisCP_CO6_2_L;

    AnySurfEllipsoid &mesh1 = Main.HumanModel.BodyModel.Trunk.Abdominal.Layer_L1.BaseSegAnterior.mesh;
    AnySurfEllipsoid &mesh2 = Main.HumanModel.BodyModel.Trunk.Abdominal.Layer_L2.BaseSegAnterior.mesh;
    AnySurfEllipsoid &mesh3 = Main.HumanModel.BodyModel.Trunk.Abdominal.Layer_L3.BaseSegAnterior.mesh;
    AnySurfEllipsoid &mesh4 = Main.HumanModel.BodyModel.Trunk.Abdominal.Layer_L4.BaseSegAnterior.mesh;
    AnySurfEllipsoid &mesh5 = Main.HumanModel.BodyModel.Trunk.Abdominal.Layer_L5.BaseSegAnterior.mesh;


    SPLine.StringMesh=100;
    SPLine = {
      AnyMatrix InitWrapPos = {
        transf3D({.mesh1.Radius,0,0}, &.mesh1),
        transf3D({.mesh2.Radius,0,0}, &.mesh2),
        transf3D({.mesh3.Radius,0,0}, &.mesh3),
        transf3D({.mesh4.Radius,0,0}, &.mesh4),
        transf3D({.mesh5.Radius,0,0}, &.mesh5),
      };
    };


    AnyRefNode &Ins = ....Segments.PelvisSeg.RectusAbdominis_1_L;
    viewMuscle = {#include "../DrawSettings/MusDrawSettings.any"};
    viewForce.Visible ??= Off;
    AnyMuscleModel& MusMdl = ....MuscleModels.Left.RectusAbdominis.RectusAbdominis_1;
  };
  AnyMuscleViaPoint RectusAbdominis_2_1 = {
    AnyRefNode &Org = ....Segments.SternalBodySeg.RectusAbdominisCP_CO5_2_L;
    #if BM_TRUNK_THORACIC_STERNUM_TOPOLOGY == 4
    AnyRefNode &Via1 = ....Segments.Left.CostalCartilageSeg.RectusAbdominisCP_Via_2_L;
    #else
    AnyRefNode &Via1 = ....Segments.SternalBodySeg.RectusAbdominisCP_Via_2_L;
    #endif
    AnyRefNode &Ins = ....Abdominal.Layer_L1.BaseSegAnterior.rectus2L;
    viewMuscle = {#include "../DrawSettings/MusDrawSettings.any"};
    viewForce.Visible ??= Off;
    /// The rectus abdominis in the cavity model needs use simple muscle models
    /// since the muscle is attached between the abdominal layers which leads to
    /// short muscle length.
    AnyMuscleModel MusMdl = {
      Lf0 = .....MuscleModels.Left.RectusAbdominis.RectusAbdominis_2.Lf0/6;
      Vol0 = .....MuscleModels.Left.RectusAbdominis.RectusAbdominis_2.Vol0/6;
      F0 =  .....MuscleModels.Left.RectusAbdominis.RectusAbdominis_2.F0;
    };
  };

  AnyMuscleViaPoint RectusAbdominis_2_2 = {
    AnyRefNode &Org = ....Abdominal.Layer_L1.BaseSegAnterior.rectus2L;
    AnyRefNode &Ins = ....Abdominal.Layer_L2.BaseSegAnterior.rectus2L;
    viewMuscle = {#include "../DrawSettings/MusDrawSettings.any"};
    viewForce.Visible ??= Off;
    /// The rectus abdominis in the cavity model needs use simple muscle models
    /// since the muscle is attached between the abdominal layers which leads to
    /// short muscle length.
    AnyMuscleModel MusMdl = {
      Lf0 = .....MuscleModels.Left.RectusAbdominis.RectusAbdominis_2.Lf0/6;
      Vol0 = .....MuscleModels.Left.RectusAbdominis.RectusAbdominis_2.Vol0/6;
      F0 =  .....MuscleModels.Left.RectusAbdominis.RectusAbdominis_2.F0;
    };
  };

  AnyMuscleViaPoint RectusAbdominis_2_3 = {
    AnyRefNode &Org = ....Abdominal.Layer_L2.BaseSegAnterior.rectus2L;
    AnyRefNode &Ins = ....Abdominal.Layer_L3.BaseSegAnterior.rectus2L;
    viewMuscle = {#include "../DrawSettings/MusDrawSettings.any"};
    viewForce.Visible ??= Off;
    /// The rectus abdominis in the cavity model needs use simple muscle models
    /// since the muscle is attached between the abdominal layers which leads to
    /// short muscle length.
    AnyMuscleModel MusMdl = {
      Lf0 = .....MuscleModels.Left.RectusAbdominis.RectusAbdominis_2.Lf0/6;
      Vol0 = .....MuscleModels.Left.RectusAbdominis.RectusAbdominis_2.Vol0/6;
      F0 =  .....MuscleModels.Left.RectusAbdominis.RectusAbdominis_2.F0;
    };
  };

  AnyMuscleViaPoint RectusAbdominis_2_4 = {
    AnyRefNode &Org = ....Abdominal.Layer_L3.BaseSegAnterior.rectus2L;
    AnyRefNode &Ins = ....Abdominal.Layer_L4.BaseSegAnterior.rectus2L;
    viewMuscle = {#include "../DrawSettings/MusDrawSettings.any"};
    viewForce.Visible ??= Off;
    /// The rectus abdominis in the cavity model needs use simple muscle models
    /// since the muscle is attached between the abdominal layers which leads to
    /// short muscle length.
    AnyMuscleModel MusMdl = {
      Lf0 = .....MuscleModels.Left.RectusAbdominis.RectusAbdominis_2.Lf0/6;
      Vol0 = .....MuscleModels.Left.RectusAbdominis.RectusAbdominis_2.Vol0/6;
      F0 =  .....MuscleModels.Left.RectusAbdominis.RectusAbdominis_2.F0;
    };
  };

  AnyMuscleViaPoint RectusAbdominis_2_5 = {
    AnyRefNode &Org = ....Abdominal.Layer_L4.BaseSegAnterior.rectus2L;
    AnyRefNode &Ins = ....Abdominal.Layer_L5.BaseSegAnterior.rectus2L;
    viewMuscle = {#include "../DrawSettings/MusDrawSettings.any"};
    viewForce.Visible ??= Off;
    /// The rectus abdominis in the cavity model needs use simple muscle models
    /// since the muscle is attached between the abdominal layers which leads to
    /// short muscle length.
    AnyMuscleModel MusMdl = {
      Lf0 = .....MuscleModels.Left.RectusAbdominis.RectusAbdominis_2.Lf0/6;
      Vol0 = .....MuscleModels.Left.RectusAbdominis.RectusAbdominis_2.Vol0/6;
      F0 =  .....MuscleModels.Left.RectusAbdominis.RectusAbdominis_2.F0;
    };
  };

  AnyMuscleViaPoint RectusAbdominis_2_6 = {
    AnyRefNode &Org = ....Abdominal.Layer_L5.BaseSegAnterior.rectus2L;
    AnyRefNode &Ins = ....Segments.PelvisSeg.RectusAbdominis_2_L;
    viewMuscle = {#include "../DrawSettings/MusDrawSettings.any"};
    viewForce.Visible ??= Off;
    /// The rectus abdominis in the cavity model needs use simple muscle models
    /// since the muscle is attached between the abdominal layers which leads to
    /// short muscle length.
    AnyMuscleModel MusMdl = {
      Lf0 = .....MuscleModels.Left.RectusAbdominis.RectusAbdominis_2.Lf0/6;
      Vol0 = .....MuscleModels.Left.RectusAbdominis.RectusAbdominis_2.Vol0/6;
      F0 =  .....MuscleModels.Left.RectusAbdominis.RectusAbdominis_2.F0;
    };
  };

  #else

  //    #if RECTUS_MUSCLE_LINE == VIA

  AnyMuscleViaPoint RectusAbdominis_1 = {
    viewMuscle = {#include "../DrawSettings/MusDrawSettings.any"};
    viewForce.Visible ??= Off;
    AnyMuscleModel& MusMdl = ....MuscleModels.Left.RectusAbdominis.RectusAbdominis_1;

    AnyRefNode &Org = ....Segments.SternalBodySeg.RectusAbdominisCP_CO6_2_L;
    AnyRefNode &Via2 = ....Abdominal.Layer_L1.BaseSegAnterior.rectus1L;
    AnyRefNode &Via3 = ....Abdominal.Layer_L2.BaseSegAnterior.rectus1L;
    AnyRefNode &Via4 = ....Abdominal.Layer_L3.BaseSegAnterior.rectus1L;
    AnyRefNode &Via5 = ....Abdominal.Layer_L4.BaseSegAnterior.rectus1L;
    AnyRefNode &Via6 = ....Abdominal.Layer_L5.BaseSegAnterior.rectus1L;
    AnyRefNode &Ins = ....Segments.PelvisSeg.RectusAbdominis_1_L;
  };

  AnyMuscleViaPoint RectusAbdominis_2 = {
    viewMuscle = {#include "../DrawSettings/MusDrawSettings.any"};
    viewForce.Visible ??= Off;
    AnyMuscleModel& MusMdl = ....MuscleModels.Left.RectusAbdominis.RectusAbdominis_2;

    AnyRefNode &Org = ....Segments.SternalBodySeg.RectusAbdominisCP_CO5_2_L;
    AnyRefNode &Via2 = ....Abdominal.Layer_L1.BaseSegAnterior.rectus2L;
    AnyRefNode &Via3 = ....Abdominal.Layer_L2.BaseSegAnterior.rectus2L;
    AnyRefNode &Via4 = ....Abdominal.Layer_L3.BaseSegAnterior.rectus2L;
    AnyRefNode &Via5 = ....Abdominal.Layer_L4.BaseSegAnterior.rectus2L;
    AnyRefNode &Via6 = ....Abdominal.Layer_L5.BaseSegAnterior.rectus2L;
    AnyRefNode &Ins = ....Segments.PelvisSeg.RectusAbdominis_2_L;
  };
  #endif

  #endif


  #if BM_TRUNK_EXPERIMENTAL_RECTUS_ABDOMINIS == OFF

  AnyMuscleViaPoint RectusAbdominis_1_1 = {
    AnyRefNode &Org = ....Segments.SternalBodySeg.RectusAbdominisCP_CO6_2_L;
    //      #if BM_TRUNK_THORACIC_STERNUM_TOPOLOGY == 4
    //        AnyRefNode &Via1 = ....Segments.Left.CostalCartilageSeg.RectusAbdominisCP_Via_2_L;
    //      #else
    //        AnyRefNode &Via1 = ....Segments.SternalBodySeg.RectusAbdominisCP_Via_2_L;
    //      #endif

    AnyRefNode &Ins = ....Abdominal.Layer_L1.BaseSegAnterior.rectus1L;
    viewMuscle = {#include "../DrawSettings/MusDrawSettings.any"};
    viewForce.Visible ??= Off;

    /// The rectus abdominis in the cavity model needs use simple muscle models
    /// since the muscle is attached between the abdominal layers which leads to
    /// short muscle length.
    AnyMuscleModel MusMdl = {
      Lf0 = .....MuscleModels.Left.RectusAbdominis.RectusAbdominis_1.Lf0/6;
      Vol0 = .....MuscleModels.Left.RectusAbdominis.RectusAbdominis_1.Vol0/6;
      F0 =  .....MuscleModels.Left.RectusAbdominis.RectusAbdominis_1.F0;
    };
  };

  AnyMuscleViaPoint RectusAbdominis_1_2 = {
    AnyRefNode &Org = ....Abdominal.Layer_L1.BaseSegAnterior.rectus1L;
    AnyRefNode &Ins = ....Abdominal.Layer_L2.BaseSegAnterior.rectus1L;
    viewMuscle = {#include "../DrawSettings/MusDrawSettings.any"};
    viewForce.Visible ??= Off;
    /// The rectus abdominis in the cavity model needs use simple muscle models
    /// since the muscle is attached between the abdominal layers which leads to
    /// short muscle length.
    AnyMuscleModel MusMdl = {
      Lf0 = .....MuscleModels.Left.RectusAbdominis.RectusAbdominis_1.Lf0/6;
      Vol0 = .....MuscleModels.Left.RectusAbdominis.RectusAbdominis_1.Vol0/6;
      F0 =  .....MuscleModels.Left.RectusAbdominis.RectusAbdominis_1.F0;
    };
  };

  AnyMuscleViaPoint RectusAbdominis_1_3 = {
    AnyRefNode &Org = ....Abdominal.Layer_L2.BaseSegAnterior.rectus1L;
    AnyRefNode &Ins = ....Abdominal.Layer_L3.BaseSegAnterior.rectus1L;
    viewMuscle = {#include "../DrawSettings/MusDrawSettings.any"};
    viewForce.Visible ??= Off;
    /// The rectus abdominis in the cavity model needs use simple muscle models
    /// since the muscle is attached between the abdominal layers which leads to
    /// short muscle length.
    AnyMuscleModel MusMdl = {
      Lf0 = .....MuscleModels.Left.RectusAbdominis.RectusAbdominis_1.Lf0/6;
      Vol0 = .....MuscleModels.Left.RectusAbdominis.RectusAbdominis_1.Vol0/6;
      F0 =  .....MuscleModels.Left.RectusAbdominis.RectusAbdominis_1.F0;
    };
  };

  AnyMuscleViaPoint RectusAbdominis_1_4 = {
    AnyRefNode &Org = ....Abdominal.Layer_L3.BaseSegAnterior.rectus1L;
    AnyRefNode &Ins = ....Abdominal.Layer_L4.BaseSegAnterior.rectus1L;
    viewMuscle = {#include "../DrawSettings/MusDrawSettings.any"};
    viewForce.Visible ??= Off;
    /// The rectus abdominis in the cavity model needs use simple muscle models
    /// since the muscle is attached between the abdominal layers which leads to
    /// short muscle length.
    AnyMuscleModel MusMdl = {
      Lf0 = .....MuscleModels.Left.RectusAbdominis.RectusAbdominis_1.Lf0/6;
      Vol0 = .....MuscleModels.Left.RectusAbdominis.RectusAbdominis_1.Vol0/6;
      F0 =  .....MuscleModels.Left.RectusAbdominis.RectusAbdominis_1.F0;
    };
  };

  AnyMuscleViaPoint RectusAbdominis_1_5 = {
    AnyRefNode &Org = ....Abdominal.Layer_L4.BaseSegAnterior.rectus1L;
    AnyRefNode &Ins = ....Abdominal.Layer_L5.BaseSegAnterior.rectus1L;
    viewMuscle = {#include "../DrawSettings/MusDrawSettings.any"};
    viewForce.Visible ??= Off;
    /// The rectus abdominis in the cavity model needs use simple muscle models
    /// since the muscle is attached between the abdominal layers which leads to
    /// short muscle length.
    AnyMuscleModel MusMdl = {
      Lf0 = .....MuscleModels.Left.RectusAbdominis.RectusAbdominis_1.Lf0/6;
      Vol0 = .....MuscleModels.Left.RectusAbdominis.RectusAbdominis_1.Vol0/6;
      F0 =  .....MuscleModels.Left.RectusAbdominis.RectusAbdominis_1.F0;
    };
  };

  AnyMuscleViaPoint RectusAbdominis_1_6 = {
    AnyRefNode &Org = ....Abdominal.Layer_L5.BaseSegAnterior.rectus1L;
    AnyRefNode &Ins = ....Segments.PelvisSeg.RectusAbdominis_1_L;
    viewMuscle = {#include "../DrawSettings/MusDrawSettings.any"};
    viewForce.Visible ??= Off;
    /// The rectus abdominis in the cavity model needs use simple muscle models
    /// since the muscle is attached between the abdominal layers which leads to
    /// short muscle length.
    AnyMuscleModel MusMdl = {
      Lf0 = .....MuscleModels.Left.RectusAbdominis.RectusAbdominis_1.Lf0/6;
      Vol0 = .....MuscleModels.Left.RectusAbdominis.RectusAbdominis_1.Vol0/6;
      F0 =  .....MuscleModels.Left.RectusAbdominis.RectusAbdominis_1.F0;
    };
  };

  AnyMuscleViaPoint RectusAbdominis_2_1 = {
    AnyRefNode &Org = ....Segments.SternalBodySeg.RectusAbdominisCP_CO5_2_L;
    #if BM_TRUNK_THORACIC_STERNUM_TOPOLOGY == 4
    AnyRefNode &Via1 = ....Segments.Left.CostalCartilageSeg.RectusAbdominisCP_Via_2_L;
    #else
    AnyRefNode &Via1 = ....Segments.SternalBodySeg.RectusAbdominisCP_Via_2_L;
    #endif
    AnyRefNode &Ins = ....Abdominal.Layer_L1.BaseSegAnterior.rectus2L;
    viewMuscle = {#include "../DrawSettings/MusDrawSettings.any"};
    viewForce.Visible ??= Off;
    /// The rectus abdominis in the cavity model needs use simple muscle models
    /// since the muscle is attached between the abdominal layers which leads to
    /// short muscle length.
    AnyMuscleModel MusMdl = {
      Lf0 = .....MuscleModels.Left.RectusAbdominis.RectusAbdominis_2.Lf0/6;
      Vol0 = .....MuscleModels.Left.RectusAbdominis.RectusAbdominis_2.Vol0/6;
      F0 =  .....MuscleModels.Left.RectusAbdominis.RectusAbdominis_2.F0;
    };
  };

  AnyMuscleViaPoint RectusAbdominis_2_2 = {
    AnyRefNode &Org = ....Abdominal.Layer_L1.BaseSegAnterior.rectus2L;
    AnyRefNode &Ins = ....Abdominal.Layer_L2.BaseSegAnterior.rectus2L;
    viewMuscle = {#include "../DrawSettings/MusDrawSettings.any"};
    viewForce.Visible ??= Off;
    /// The rectus abdominis in the cavity model needs use simple muscle models
    /// since the muscle is attached between the abdominal layers which leads to
    /// short muscle length.
    AnyMuscleModel MusMdl = {
      Lf0 = .....MuscleModels.Left.RectusAbdominis.RectusAbdominis_2.Lf0/6;
      Vol0 = .....MuscleModels.Left.RectusAbdominis.RectusAbdominis_2.Vol0/6;
      F0 =  .....MuscleModels.Left.RectusAbdominis.RectusAbdominis_2.F0;
    };
  };

  AnyMuscleViaPoint RectusAbdominis_2_3 = {
    AnyRefNode &Org = ....Abdominal.Layer_L2.BaseSegAnterior.rectus2L;
    AnyRefNode &Ins = ....Abdominal.Layer_L3.BaseSegAnterior.rectus2L;
    viewMuscle = {#include "../DrawSettings/MusDrawSettings.any"};
    viewForce.Visible ??= Off;
    /// The rectus abdominis in the cavity model needs use simple muscle models
    /// since the muscle is attached between the abdominal layers which leads to
    /// short muscle length.
    AnyMuscleModel MusMdl = {
      Lf0 = .....MuscleModels.Left.RectusAbdominis.RectusAbdominis_2.Lf0/6;
      Vol0 = .....MuscleModels.Left.RectusAbdominis.RectusAbdominis_2.Vol0/6;
      F0 =  .....MuscleModels.Left.RectusAbdominis.RectusAbdominis_2.F0;
    };
  };

  AnyMuscleViaPoint RectusAbdominis_2_4 = {
    AnyRefNode &Org = ....Abdominal.Layer_L3.BaseSegAnterior.rectus2L;
    AnyRefNode &Ins = ....Abdominal.Layer_L4.BaseSegAnterior.rectus2L;
    viewMuscle = {#include "../DrawSettings/MusDrawSettings.any"};
    viewForce.Visible ??= Off;
    /// The rectus abdominis in the cavity model needs use simple muscle models
    /// since the muscle is attached between the abdominal layers which leads to
    /// short muscle length.
    AnyMuscleModel MusMdl = {
      Lf0 = .....MuscleModels.Left.RectusAbdominis.RectusAbdominis_2.Lf0/6;
      Vol0 = .....MuscleModels.Left.RectusAbdominis.RectusAbdominis_2.Vol0/6;
      F0 =  .....MuscleModels.Left.RectusAbdominis.RectusAbdominis_2.F0;
    };
  };

  AnyMuscleViaPoint RectusAbdominis_2_5 = {
    AnyRefNode &Org = ....Abdominal.Layer_L4.BaseSegAnterior.rectus2L;
    AnyRefNode &Ins = ....Abdominal.Layer_L5.BaseSegAnterior.rectus2L;
    viewMuscle = {#include "../DrawSettings/MusDrawSettings.any"};
    viewForce.Visible ??= Off;
    /// The rectus abdominis in the cavity model needs use simple muscle models
    /// since the muscle is attached between the abdominal layers which leads to
    /// short muscle length.
    AnyMuscleModel MusMdl = {
      Lf0 = .....MuscleModels.Left.RectusAbdominis.RectusAbdominis_2.Lf0/6;
      Vol0 = .....MuscleModels.Left.RectusAbdominis.RectusAbdominis_2.Vol0/6;
      F0 =  .....MuscleModels.Left.RectusAbdominis.RectusAbdominis_2.F0;
    };
  };

  AnyMuscleViaPoint RectusAbdominis_2_6 = {
    AnyRefNode &Org = ....Abdominal.Layer_L5.BaseSegAnterior.rectus2L;
    AnyRefNode &Ins = ....Segments.PelvisSeg.RectusAbdominis_2_L;
    viewMuscle = {#include "../DrawSettings/MusDrawSettings.any"};
    viewForce.Visible ??= Off;
    /// The rectus abdominis in the cavity model needs use simple muscle models
    /// since the muscle is attached between the abdominal layers which leads to
    /// short muscle length.
    AnyMuscleModel MusMdl = {
      Lf0 = .....MuscleModels.Left.RectusAbdominis.RectusAbdominis_2.Lf0/6;
      Vol0 = .....MuscleModels.Left.RectusAbdominis.RectusAbdominis_2.Vol0/6;
      F0 =  .....MuscleModels.Left.RectusAbdominis.RectusAbdominis_2.F0;
    };
  };
  #endif

  #endif
};

MuscleGroup RotatoresBrevis = {
  AnyMuscleViaPoint RotatoresBrevisT1C7 =   {
    AnyMuscleModel &MusMdl = ....MuscleModels.Left.RotatoresBrevis.RotatoresBrevisT1C7;
    AnyRefFrame &Org = ....Segments.T1Seg.Left.RotatoresBrevisT1C7Node;
    AnyRefFrame &Ins = ....Segments.C7Seg.Left.RotatoresBrevisT1C7Node;
    viewMuscle = {#include "../DrawSettings/MusDrawSettings.any"};
    viewForce.Visible ??= Off;
  };
  #if BM_TRUNK_THORACIC_MODEL == _THORACIC_MODEL_FLEXIBLE_
  AnyMuscleViaPoint RotatoresBrevisT2T1 =   {
    AnyMuscleModel &MusMdl = ....MuscleModels.Left.RotatoresBrevis.RotatoresBrevisT2T1;
    AnyRefFrame &Org = ....Segments.T2Seg.Left.RotatoresBrevisT2T1Node;
    AnyRefFrame &Ins = ....Segments.T1Seg.Left.RotatoresBrevisT2T1Node;
    viewMuscle = {#include "../DrawSettings/MusDrawSettings.any"};
    viewForce.Visible ??= Off;
  };
  AnyMuscleViaPoint RotatoresBrevisT3T2 =   {
    AnyMuscleModel &MusMdl = ....MuscleModels.Left.RotatoresBrevis.RotatoresBrevisT3T2;
    AnyRefFrame &Org = ....Segments.T3Seg.Left.RotatoresBrevisT3T2Node;
    AnyRefFrame &Ins = ....Segments.T2Seg.Left.RotatoresBrevisT3T2Node;
    viewMuscle = {#include "../DrawSettings/MusDrawSettings.any"};
    viewForce.Visible ??= Off;
  };
  AnyMuscleViaPoint RotatoresBrevisT4T3 =   {
    AnyMuscleModel &MusMdl = ....MuscleModels.Left.RotatoresBrevis.RotatoresBrevisT4T3;
    AnyRefFrame &Org = ....Segments.T4Seg.Left.RotatoresBrevisT4T3Node;
    AnyRefFrame &Ins = ....Segments.T3Seg.Left.RotatoresBrevisT4T3Node;
    viewMuscle = {#include "../DrawSettings/MusDrawSettings.any"};
    viewForce.Visible ??= Off;
  };
  AnyMuscleViaPoint RotatoresBrevisT5T4 =   {
    AnyMuscleModel &MusMdl = ....MuscleModels.Left.RotatoresBrevis.RotatoresBrevisT5T4;
    AnyRefFrame &Org = ....Segments.T5Seg.Left.RotatoresBrevisT5T4Node;
    AnyRefFrame &Ins = ....Segments.T4Seg.Left.RotatoresBrevisT5T4Node;
    viewMuscle = {#include "../DrawSettings/MusDrawSettings.any"};
    viewForce.Visible ??= Off;
  };
  AnyMuscleViaPoint RotatoresBrevisT6T5 =   {
    AnyMuscleModel &MusMdl = ....MuscleModels.Left.RotatoresBrevis.RotatoresBrevisT6T5;
    AnyRefFrame &Org = ....Segments.T6Seg.Left.RotatoresBrevisT6T5Node;
    AnyRefFrame &Ins = ....Segments.T5Seg.Left.RotatoresBrevisT6T5Node;
    viewMuscle = {#include "../DrawSettings/MusDrawSettings.any"};
    viewForce.Visible ??= Off;
  };
  AnyMuscleViaPoint RotatoresBrevisT7T6 =   {
    AnyMuscleModel &MusMdl = ....MuscleModels.Left.RotatoresBrevis.RotatoresBrevisT7T6;
    AnyRefFrame &Org = ....Segments.T7Seg.Left.RotatoresBrevisT7T6Node;
    AnyRefFrame &Ins = ....Segments.T6Seg.Left.RotatoresBrevisT7T6Node;
    viewMuscle = {#include "../DrawSettings/MusDrawSettings.any"};
    viewForce.Visible ??= Off;
  };
  AnyMuscleViaPoint RotatoresBrevisT8T7 =   {
    AnyMuscleModel &MusMdl = ....MuscleModels.Left.RotatoresBrevis.RotatoresBrevisT8T7;
    AnyRefFrame &Org = ....Segments.T8Seg.Left.RotatoresBrevisT8T7Node;
    AnyRefFrame &Ins = ....Segments.T7Seg.Left.RotatoresBrevisT8T7Node;
    viewMuscle = {#include "../DrawSettings/MusDrawSettings.any"};
    viewForce.Visible ??= Off;
  };
  AnyMuscleViaPoint RotatoresBrevisT9T8 =   {
    AnyMuscleModel &MusMdl = ....MuscleModels.Left.RotatoresBrevis.RotatoresBrevisT9T8;
    AnyRefFrame &Org = ....Segments.T9Seg.Left.RotatoresBrevisT9T8Node;
    AnyRefFrame &Ins = ....Segments.T8Seg.Left.RotatoresBrevisT9T8Node;
    viewMuscle = {#include "../DrawSettings/MusDrawSettings.any"};
    viewForce.Visible ??= Off;
  };
  AnyMuscleViaPoint RotatoresBrevisT10T9 =   {
    AnyMuscleModel &MusMdl = ....MuscleModels.Left.RotatoresBrevis.RotatoresBrevisT10T9;
    AnyRefFrame &Org = ....Segments.T10Seg.Left.RotatoresBrevisT10T9Node;
    AnyRefFrame &Ins = ....Segments.T9Seg.Left.RotatoresBrevisT10T9Node;
    viewMuscle = {#include "../DrawSettings/MusDrawSettings.any"};
    viewForce.Visible ??= Off;
  };
  AnyMuscleViaPoint RotatoresBrevisT11T10 =   {
    AnyMuscleModel &MusMdl = ....MuscleModels.Left.RotatoresBrevis.RotatoresBrevisT11T10;
    AnyRefFrame &Org = ....Segments.T11Seg.Left.RotatoresBrevisT11T10Node;
    AnyRefFrame &Ins = ....Segments.T10Seg.Left.RotatoresBrevisT11T10Node;
    viewMuscle = {#include "../DrawSettings/MusDrawSettings.any"};
    viewForce.Visible ??= Off;
  };
  AnyMuscleViaPoint RotatoresBrevisT12T11 =   {
    AnyMuscleModel &MusMdl = ....MuscleModels.Left.RotatoresBrevis.RotatoresBrevisT12T11;
    AnyRefFrame &Org = ....Segments.T12Seg.Left.RotatoresBrevisT12T11Node;
    AnyRefFrame &Ins = ....Segments.T11Seg.Left.RotatoresBrevisT12T11Node;
    viewMuscle = {#include "../DrawSettings/MusDrawSettings.any"};
    viewForce.Visible ??= Off;
  };
  #endif
};

MuscleGroup RotatoresLongus = {
  AnyMuscleViaPoint RotatoresLongusT2C7 =   {
    AnyMuscleModel &MusMdl = ....MuscleModels.Left.RotatoresLongus.RotatoresLongusT2C7;
    AnyRefFrame &Org = ....Segments.T2Seg.Left.RotatoresLongusT2C7Node;
    AnyRefFrame &Ins = ....Segments.C7Seg.Left.RotatoresLongusT2C7Node;
    viewMuscle = {#include "../DrawSettings/MusDrawSettings.any"};
    viewForce.Visible ??= Off;
  };
  #if BM_TRUNK_THORACIC_MODEL == _THORACIC_MODEL_FLEXIBLE_
  AnyMuscleViaPoint RotatoresLongusT3T1 =   {
    AnyMuscleModel &MusMdl = ....MuscleModels.Left.RotatoresLongus.RotatoresLongusT3T1;
    AnyRefFrame &Org = ....Segments.T3Seg.Left.RotatoresLongusT3T1Node;
    AnyRefFrame &Ins = ....Segments.T1Seg.Left.RotatoresLongusT3T1Node;
    viewMuscle = {#include "../DrawSettings/MusDrawSettings.any"};
    viewForce.Visible ??= Off;
  };
  AnyMuscleViaPoint RotatoresLongusT4T2 =   {
    AnyMuscleModel &MusMdl = ....MuscleModels.Left.RotatoresLongus.RotatoresLongusT4T2;
    AnyRefFrame &Org = ....Segments.T4Seg.Left.RotatoresLongusT4T2Node;
    AnyRefFrame &Ins = ....Segments.T2Seg.Left.RotatoresLongusT4T2Node;
    viewMuscle = {#include "../DrawSettings/MusDrawSettings.any"};
    viewForce.Visible ??= Off;
  };
  AnyMuscleViaPoint RotatoresLongusT5T3 =   {
    AnyMuscleModel &MusMdl = ....MuscleModels.Left.RotatoresLongus.RotatoresLongusT5T3;
    AnyRefFrame &Org = ....Segments.T5Seg.Left.RotatoresLongusT5T3Node;
    AnyRefFrame &Ins = ....Segments.T3Seg.Left.RotatoresLongusT5T3Node;
    viewMuscle = {#include "../DrawSettings/MusDrawSettings.any"};
    viewForce.Visible ??= Off;
  };
  AnyMuscleViaPoint RotatoresLongusT6T4 =   {
    AnyMuscleModel &MusMdl = ....MuscleModels.Left.RotatoresLongus.RotatoresLongusT6T4;
    AnyRefFrame &Org = ....Segments.T6Seg.Left.RotatoresLongusT6T4Node;
    AnyRefFrame &Ins = ....Segments.T4Seg.Left.RotatoresLongusT6T4Node;
    viewMuscle = {#include "../DrawSettings/MusDrawSettings.any"};
    viewForce.Visible ??= Off;
  };
  AnyMuscleViaPoint RotatoresLongusT7T5 =   {
    AnyMuscleModel &MusMdl = ....MuscleModels.Left.RotatoresLongus.RotatoresLongusT7T5;
    AnyRefFrame &Org = ....Segments.T7Seg.Left.RotatoresLongusT7T5Node;
    AnyRefFrame &Ins = ....Segments.T5Seg.Left.RotatoresLongusT7T5Node;
    viewMuscle = {#include "../DrawSettings/MusDrawSettings.any"};
    viewForce.Visible ??= Off;
  };
  AnyMuscleViaPoint RotatoresLongusT8T6 =   {
    AnyMuscleModel &MusMdl = ....MuscleModels.Left.RotatoresLongus.RotatoresLongusT8T6;
    AnyRefFrame &Org = ....Segments.T8Seg.Left.RotatoresLongusT8T6Node;
    AnyRefFrame &Ins = ....Segments.T6Seg.Left.RotatoresLongusT8T6Node;
    viewMuscle = {#include "../DrawSettings/MusDrawSettings.any"};
    viewForce.Visible ??= Off;
  };
  AnyMuscleViaPoint RotatoresLongusT9T7 =   {
    AnyMuscleModel &MusMdl = ....MuscleModels.Left.RotatoresLongus.RotatoresLongusT9T7;
    AnyRefFrame &Org = ....Segments.T9Seg.Left.RotatoresLongusT9T7Node;
    AnyRefFrame &Ins = ....Segments.T7Seg.Left.RotatoresLongusT9T7Node;
    viewMuscle = {#include "../DrawSettings/MusDrawSettings.any"};
    viewForce.Visible ??= Off;
  };
  AnyMuscleViaPoint RotatoresLongusT10T8 =   {
    AnyMuscleModel &MusMdl = ....MuscleModels.Left.RotatoresLongus.RotatoresLongusT10T8;
    AnyRefFrame &Org = ....Segments.T10Seg.Left.RotatoresLongusT10T8Node;
    AnyRefFrame &Ins = ....Segments.T8Seg.Left.RotatoresLongusT10T8Node;
    viewMuscle = {#include "../DrawSettings/MusDrawSettings.any"};
    viewForce.Visible ??= Off;
  };
  AnyMuscleViaPoint RotatoresLongusT11T9 =   {
    AnyMuscleModel &MusMdl = ....MuscleModels.Left.RotatoresLongus.RotatoresLongusT11T9;
    AnyRefFrame &Org = ....Segments.T11Seg.Left.RotatoresLongusT11T9Node;
    AnyRefFrame &Ins = ....Segments.T9Seg.Left.RotatoresLongusT11T9Node;
    viewMuscle = {#include "../DrawSettings/MusDrawSettings.any"};
    viewForce.Visible ??= Off;
  };
  AnyMuscleViaPoint RotatoresLongusT12T10 =   {
    AnyMuscleModel &MusMdl = ....MuscleModels.Left.RotatoresLongus.RotatoresLongusT12T10;
    AnyRefFrame &Org = ....Segments.T12Seg.Left.RotatoresLongusT12T10Node;
    AnyRefFrame &Ins = ....Segments.T10Seg.Left.RotatoresLongusT12T10Node;
    viewMuscle = {#include "../DrawSettings/MusDrawSettings.any"};
    viewForce.Visible ??= Off;
  };
  #endif
};

MuscleGroup ScalenusAnterior = {
  AnyMuscleViaPoint ScalenusAnteriorR1C6 = {
    AnyMuscleModel &MusMdl= ....MuscleModels.Left.ScalenusAnterior.ScalenusAnteriorR1C6;
    AnyRefNode &Org = ....Segments.C6Seg.Left.ScalenusAnteriorR1C6Node;
    AnyRefNode &Ins = ....Segments.Left.R1Seg.ScalenusAnteriorR1C6Node;
    viewMuscle = {#include "../DrawSettings/MusDrawSettings.any"};
    viewForce.Visible ??= Off;
  };
  AnyMuscleViaPoint ScalenusAnteriorR1C5 = {
    AnyMuscleModel &MusMdl= ....MuscleModels.Left.ScalenusAnterior.ScalenusAnteriorR1C5;
    AnyRefNode &Org = ....Segments.C5Seg.Left.ScalenusAnteriorR1C5Node;
    AnyRefNode &Ins = ....Segments.Left.R1Seg.ScalenusAnteriorR1C5Node;
    viewMuscle = {#include "../DrawSettings/MusDrawSettings.any"};
    viewForce.Visible ??= Off;
  };
  AnyMuscleViaPoint ScalenusAnteriorR1C4 = {
    AnyMuscleModel &MusMdl= ....MuscleModels.Left.ScalenusAnterior.ScalenusAnteriorR1C4;
    AnyRefNode &Org = ....Segments.C4Seg.Left.ScalenusAnteriorR1C4Node;
    AnyRefNode &Ins = ....Segments.Left.R1Seg.ScalenusAnteriorR1C4Node;
    viewMuscle = {#include "../DrawSettings/MusDrawSettings.any"};
    viewForce.Visible ??= Off;
  };
  AnyMuscleViaPoint ScalenusAnteriorR1C3 = {
    AnyMuscleModel &MusMdl= ....MuscleModels.Left.ScalenusAnterior.ScalenusAnteriorR1C3;
    AnyRefNode &Org = ....Segments.C3Seg.Left.ScalenusAnteriorR1C3Node;
    AnyRefNode &Ins = ....Segments.Left.R1Seg.ScalenusAnteriorR1C3Node;
    viewMuscle = {#include "../DrawSettings/MusDrawSettings.any"};
    viewForce.Visible ??= Off;
  };
};
MuscleGroup ScalenusMedius = {
  AnyMuscleViaPoint ScalenusMediusR1C7 = {
    AnyMuscleModel &MusMdl =....MuscleModels.Left.ScalenusMedius.ScalenusMediusR1C7;
    AnyRefNode &Org = ....Segments.C7Seg.Left.ScalenusMediusR1C7Node;
    AnyRefNode &Ins = ....Segments.Left.R1Seg.ScalenusMediusR1C7Node;
    viewMuscle = {#include "../DrawSettings/MusDrawSettings.any"};
    viewForce.Visible ??= Off;
  };
  AnyMuscleViaPoint ScalenusMediusR1C6 = {
    AnyMuscleModel &MusMdl =....MuscleModels.Left.ScalenusMedius.ScalenusMediusR1C6;
    AnyRefNode &Org = ....Segments.C6Seg.Left.ScalenusMediusR1C6Node;
    AnyRefNode &Ins = ....Segments.Left.R1Seg.ScalenusMediusR1C6Node;
    viewMuscle = {#include "../DrawSettings/MusDrawSettings.any"};
    viewForce.Visible ??= Off;
  };
  AnyMuscleViaPoint ScalenusMediusR1C5 = {
    AnyMuscleModel &MusMdl =....MuscleModels.Left.ScalenusMedius.ScalenusMediusR1C5;
    AnyRefNode &Org = ....Segments.C5Seg.Left.ScalenusMediusR1C5Node;
    AnyRefNode &Ins = ....Segments.Left.R1Seg.ScalenusMediusR1C5Node;
    viewMuscle = {#include "../DrawSettings/MusDrawSettings.any"};
    viewForce.Visible ??= Off;
  };
  AnyMuscleViaPoint ScalenusMediusR1C4 = {
    AnyMuscleModel &MusMdl =....MuscleModels.Left.ScalenusMedius.ScalenusMediusR1C4;
    AnyRefNode &Org = ....Segments.C4Seg.Left.ScalenusMediusR1C4Node;
    AnyRefNode &Ins = ....Segments.Left.R1Seg.ScalenusMediusR1C4Node;
    viewMuscle = {#include "../DrawSettings/MusDrawSettings.any"};
    viewForce.Visible ??= Off;
  };
  AnyMuscleViaPoint ScalenusMediusR1C3 = {
    AnyMuscleModel &MusMdl =....MuscleModels.Left.ScalenusMedius.ScalenusMediusR1C3;
    AnyRefNode &Org = ....Segments.C3Seg.Left.ScalenusMediusR1C3Node;
    AnyRefNode &Ins = ....Segments.Left.R1Seg.ScalenusMediusR1C3Node;
    viewMuscle = {#include "../DrawSettings/MusDrawSettings.any"};
    viewForce.Visible ??= Off;
  };
  AnyMuscleViaPoint ScalenusMediusR1C2 = {
    AnyMuscleModel &MusMdl =....MuscleModels.Left.ScalenusMedius.ScalenusMediusR1C2;
    AnyRefNode &Org = ....Segments.C2Seg.Left.ScalenusMediusR1C2Node;
    AnyRefNode &Ins = ....Segments.Left.R1Seg.ScalenusMediusR1C2Node;
    viewMuscle = {#include "../DrawSettings/MusDrawSettings.any"};
    viewForce.Visible ??= Off;
  };
};
MuscleGroup ScalenusPosterior = {
  AnyMuscleViaPoint ScalenusPosteriorR2C7 = {
    AnyMuscleModel &MusMdl =....MuscleModels.Left.ScalenusPosterior.ScalenusPosteriorR2C7;
    AnyRefNode &Org = ....Segments.C7Seg.Left.ScalenusPosteriorR2C7Node;
    AnyRefNode &Ins = ....Segments.Left.R2Seg.ScalenusPosteriorR2C7Node;
    viewMuscle = {#include "../DrawSettings/MusDrawSettings.any"};
    viewForce.Visible ??= Off;
  };
  AnyMuscleViaPoint ScalenusPosteriorR2C6 = {
    AnyMuscleModel &MusMdl =....MuscleModels.Left.ScalenusPosterior.ScalenusPosteriorR2C6;
    AnyRefNode &Org = ....Segments.C6Seg.Left.ScalenusPosteriorR2C6Node;
    AnyRefNode &Ins = ....Segments.Left.R2Seg.ScalenusPosteriorR2C6Node;
    viewMuscle = {#include "../DrawSettings/MusDrawSettings.any"};
    viewForce.Visible ??= Off;
  };
  AnyMuscleViaPoint ScalenusPosteriorR2C5 = {
    AnyMuscleModel &MusMdl =....MuscleModels.Left.ScalenusPosterior.ScalenusPosteriorR2C5;
    AnyRefNode &Org = ....Segments.C5Seg.Left.ScalenusPosteriorR2C5Node;
    AnyRefNode &Ins = ....Segments.Left.R2Seg.ScalenusPosteriorR2C5Node;
    viewMuscle = {#include "../DrawSettings/MusDrawSettings.any"};
    viewForce.Visible ??= Off;
  };
};

MuscleGroup SemispinalisCapitis = {
  AnyMuscleViaPoint SemispinalisCapitisC4C0 = {
    AnyMuscleModel &MusMdl = ....MuscleModels.Left.SemispinalisCapitis.SemispinalisCapitisC4C0;
    AnyRefNode &Org = ....Segments.C4Seg.SemispinalisCapitisC4C0NodeL;
    AnyRefNode &Ins = ....Segments.SkullSeg.SemispinalisCapitisNodeL;
    viewMuscle = {#include "../DrawSettings/MusDrawSettings.any"};
    viewForce.Visible ??= Off;
  };

  AnyMuscleViaPoint SemispinalisCapitisC5C0 = {
    AnyMuscleModel &MusMdl = ....MuscleModels.Left.SemispinalisCapitis.SemispinalisCapitisC5C0;
    AnyRefNode &Org = ....Segments.C5Seg.SemispinalisCapitisC5C0NodeL;
    AnyRefNode &Ins = ....Segments.SkullSeg.SemispinalisCapitisNodeL;
    viewMuscle = {#include "../DrawSettings/MusDrawSettings.any"};
    viewForce.Visible ??= Off;
  };

  AnyMuscleViaPoint SemispinalisCapitisC6C0 = {
    AnyMuscleModel &MusMdl = ....MuscleModels.Left.SemispinalisCapitis.SemispinalisCapitisC6C0;
    AnyRefNode &Org = ....Segments.C6Seg.SemispinalisCapitisC6C0NodeL;
    AnyRefNode &Ins = ....Segments.SkullSeg.SemispinalisCapitisNodeL;
    viewMuscle = {#include "../DrawSettings/MusDrawSettings.any"};
    viewForce.Visible ??= Off;
  };

  AnyMuscleViaPoint SemispinalisCapitisC7C0 = {
    AnyMuscleModel &MusMdl = ....MuscleModels.Left.SemispinalisCapitis.SemispinalisCapitisC7C0;
    AnyRefNode &Org = ....Segments.C7Seg.SemispinalisCapitisC7C0NodeL;
    AnyRefNode &Ins = ....Segments.SkullSeg.SemispinalisCapitisNodeL;
    viewMuscle = {#include "../DrawSettings/MusDrawSettings.any"};
    viewForce.Visible ??= Off;
  };

  AnyMuscleViaPoint SemispinalisCapitisT1C0 = {
    AnyMuscleModel &MusMdl = ....MuscleModels.Left.SemispinalisCapitis.SemispinalisCapitisT1C0;
    AnyRefNode &Org = ....Segments.T1Seg.Left.SemispinalisCapitisT1C0Node;
    AnyRefNode &Ins = ....Segments.SkullSeg.SemispinalisCapitisNodeL;
    viewMuscle = {#include "../DrawSettings/MusDrawSettings.any"};
    viewForce.Visible ??= Off;
  };
  AnyMuscleViaPoint SemispinalisCapitisT2C0 = {
    AnyMuscleModel &MusMdl = ....MuscleModels.Left.SemispinalisCapitis.SemispinalisCapitisT2C0;
    AnyRefNode &Org = ....Segments.T2Seg.Left.SemispinalisCapitisT2C0Node;
    AnyRefNode &Ins = ....Segments.SkullSeg.SemispinalisCapitisNodeL;
    viewMuscle = {#include "../DrawSettings/MusDrawSettings.any"};
    viewForce.Visible ??= Off;
  };
  AnyMuscleViaPoint SemispinalisCapitisT3C0 = {
    AnyMuscleModel &MusMdl = ....MuscleModels.Left.SemispinalisCapitis.SemispinalisCapitisT3C0;
    AnyRefNode &Org = ....Segments.T3Seg.Left.SemispinalisCapitisT3C0Node;
    AnyRefNode &Ins = ....Segments.SkullSeg.SemispinalisCapitisNodeL;
    viewMuscle = {#include "../DrawSettings/MusDrawSettings.any"};
    viewForce.Visible ??= Off;
  };
  AnyMuscleViaPoint SemispinalisCapitisT4C0 = {
    AnyMuscleModel &MusMdl = ....MuscleModels.Left.SemispinalisCapitis.SemispinalisCapitisT4C0;
    AnyRefNode &Org = ....Segments.T4Seg.Left.SemispinalisCapitisT4C0Node;
    AnyRefNode &Ins = ....Segments.SkullSeg.SemispinalisCapitisNodeL;
    viewMuscle = {#include "../DrawSettings/MusDrawSettings.any"};
    viewForce.Visible ??= Off;
  };
  AnyMuscleViaPoint SemispinalisCapitisT5C0 = {
    AnyMuscleModel &MusMdl = ....MuscleModels.Left.SemispinalisCapitis.SemispinalisCapitisT5C0;
    AnyRefNode &Org = ....Segments.T5Seg.Left.SemispinalisCapitisT5C0Node;
    AnyRefNode &Ins = ....Segments.SkullSeg.SemispinalisCapitisNodeL;
    viewMuscle = {#include "../DrawSettings/MusDrawSettings.any"};
    viewForce.Visible ??= Off;
  };
  AnyMuscleViaPoint SemispinalisCapitisT6C0 = {
    AnyMuscleModel &MusMdl = ....MuscleModels.Left.SemispinalisCapitis.SemispinalisCapitisT6C0;
    AnyRefNode &Org = ....Segments.T6Seg.Left.SemispinalisCapitisT6C0Node;
    AnyRefNode &Ins = ....Segments.SkullSeg.SemispinalisCapitisNodeL;
    viewMuscle = {#include "../DrawSettings/MusDrawSettings.any"};
    viewForce.Visible ??= Off;
  };
};

MuscleGroup SemispinalisCervicis = {
  AnyMuscleViaPoint SemispinalisCervicisT1C2 = {
    AnyMuscleModel &MusMdl = ....MuscleModels.Left.SemispinalisCervicis.SemispinalisCervicisT1C2;
    AnyRefNode &Org = ....Segments.T1Seg.SemispinalisCervicisT1C2NodeL;
    AnyRefNode &Ins = ....Segments.C2Seg.SemispinalisCervicisT1C2NodeL;
    viewMuscle = {#include "../DrawSettings/MusDrawSettings.any"};
    viewForce.Visible ??= Off;
  };

  AnyMuscleViaPoint SemispinalisCervicisT2C3 = {
    AnyMuscleModel &MusMdl = ....MuscleModels.Left.SemispinalisCervicis.SemispinalisCervicisT2C3;
    AnyRefNode &Org = ....Segments.T2Seg.SemispinalisCervicisT2C3NodeL;
    AnyRefNode &Ins = ....Segments.C3Seg.SemispinalisCervicisT2C3NodeL;
    viewMuscle = {#include "../DrawSettings/MusDrawSettings.any"};
    viewForce.Visible ??= Off;
  };

  AnyMuscleViaPoint SemispinalisCervicisT3C4 = {
    AnyMuscleModel &MusMdl = ....MuscleModels.Left.SemispinalisCervicis.SemispinalisCervicisT3C4;
    AnyRefNode &Org = ....Segments.T3Seg.SemispinalisCervicisT3C4NodeL;
    AnyRefNode &Ins = ....Segments.C4Seg.SemispinalisCervicisT3C4NodeL;
    viewMuscle = {#include "../DrawSettings/MusDrawSettings.any"};
    viewForce.Visible ??= Off;
  };

  AnyMuscleViaPoint SemispinalisCervicisT4C5 = {
    AnyMuscleModel &MusMdl = ....MuscleModels.Left.SemispinalisCervicis.SemispinalisCervicisT4C5;
    AnyRefNode &Org = ....Segments.T4Seg.SemispinalisCervicisT4C5NodeL;
    AnyRefNode &Ins = ....Segments.C5Seg.SemispinalisCervicisT4C5NodeL;
    viewMuscle = {#include "../DrawSettings/MusDrawSettings.any"};
    viewForce.Visible ??= Off;
  };

  AnyMuscleViaPoint SemispinalisCervicisT5C6 = {
    AnyMuscleModel &MusMdl = ....MuscleModels.Left.SemispinalisCervicis.SemispinalisCervicisT5C6;
    AnyRefNode &Org = ....Segments.T5Seg.SemispinalisCervicisT5C6NodeL;
    AnyRefNode &Ins = ....Segments.C6Seg.SemispinalisCervicisT5C6NodeL;
    viewMuscle = {#include "../DrawSettings/MusDrawSettings.any"};
    viewForce.Visible ??= Off;
  };

  AnyMuscleViaPoint SemispinalisCervicisT6C7 = {
    AnyMuscleModel &MusMdl = ....MuscleModels.Left.SemispinalisCervicis.SemispinalisCervicisT6C7;
    AnyRefNode &Org = ....Segments.T6Seg.SemispinalisCervicisT6C7NodeL;
    AnyRefNode &Ins = ....Segments.C7Seg.SemispinalisCervicisT6C7NodeL;
    viewMuscle = {#include "../DrawSettings/MusDrawSettings.any"};
    viewForce.Visible ??= Off;
  };
};

MuscleGroup SemispinalisThoracis = {
  #if BM_TRUNK_THORACIC_MODEL == _THORACIC_MODEL_FLEXIBLE_
  AnyMuscleViaPoint SemispinalisThoracisT12T4 =
  {
    AnyMuscleModel &MusMdl = ....MuscleModels.Left.SemispinalisThoracis.SemispinalisThoracisT12T4;
    AnyRefFrame &Org = ....Segments.T12Seg.SemispinalisThoracisT12TransversusL;
    AnyRefNode &Via1 = ....Segments.T11Seg.SemispinalisThoracisT11ViaNodeL;
    AnyRefNode &Via2 = ....Segments.T10Seg.SemispinalisThoracisT10ViaNodeL;
    AnyRefNode &Via3 = ....Segments.T9Seg.SemispinalisThoracisT9ViaNodeL;
    AnyRefNode &Via4 = ....Segments.T8Seg.SemispinalisThoracisT8ViaNodeL;
    AnyRefNode &Via5 = ....Segments.T7Seg.SemispinalisThoracisT4ViaNodeL;
    AnyRefFrame &Ins = ....Segments.T4Seg.SemispinalisThoracisT4Spinous;
    viewMuscle = {#include "../DrawSettings/MusDrawSettings.any"};
    viewForce.Visible ??= Off;
  };

  AnyMuscleViaPoint SemispinalisThoracisT11T3 =
  {
    AnyMuscleModel &MusMdl = ....MuscleModels.Left.SemispinalisThoracis.SemispinalisThoracisT11T3;
    AnyRefFrame &Org = ....Segments.T11Seg.SemispinalisThoracisT11TransversusL;
    AnyRefNode &Via2 = ....Segments.T10Seg.SemispinalisThoracisT10ViaNodeL;
    AnyRefNode &Via3 = ....Segments.T9Seg.SemispinalisThoracisT9ViaNodeL;
    AnyRefNode &Via4 = ....Segments.T8Seg.SemispinalisThoracisT8ViaNodeL;
    AnyRefNode &Via5 = ....Segments.T7Seg.SemispinalisThoracisT3ViaNodeL;
    AnyRefFrame &Ins = ....Segments.T3Seg.SemispinalisThoracisT3Spinous;
    viewMuscle = {#include "../DrawSettings/MusDrawSettings.any"};
    viewForce.Visible ??= Off;
  };

  AnyMuscleViaPoint SemispinalisThoracisT10T2 =
  {
    AnyMuscleModel &MusMdl = ....MuscleModels.Left.SemispinalisThoracis.SemispinalisThoracisT10T2;
    AnyRefFrame &Org = ....Segments.T10Seg.SemispinalisThoracisT10TransversusL;
    AnyRefNode &Via3 = ....Segments.T9Seg.SemispinalisThoracisT9ViaNodeL;
    AnyRefNode &Via4 = ....Segments.T8Seg.SemispinalisThoracisT8ViaNodeL;
    AnyRefNode &Via5 = ....Segments.T7Seg.SemispinalisThoracisT2ViaNodeL;
    AnyRefFrame &Ins = ....Segments.T2Seg.SemispinalisThoracisT2Spinous;
    viewMuscle = {#include "../DrawSettings/MusDrawSettings.any"};
    viewForce.Visible ??= Off;
  };

  AnyMuscleViaPoint SemispinalisThoracisT9T1 =
  {
    AnyMuscleModel &MusMdl = ....MuscleModels.Left.SemispinalisThoracis.SemispinalisThoracisT9T1;
    AnyRefFrame &Org = ....Segments.T9Seg.SemispinalisThoracisT9TransversusL;
    AnyRefNode &Via4 = ....Segments.T8Seg.SemispinalisThoracisT9T4ViaNodeL;
    AnyRefNode &Via5 = ....Segments.T7Seg.SemispinalisThoracisT9T1ViaNodeL;
    AnyRefFrame &Ins = ....Segments.T1Seg.SemispinalisThoracisT1Spinous;
    viewMuscle = {#include "../DrawSettings/MusDrawSettings.any"};
    viewForce.Visible ??= Off;
  };
  #endif
  AnyMuscleViaPoint SemispinalisThoracisT8C7 =
  {
    AnyMuscleModel &MusMdl = ....MuscleModels.Left.SemispinalisThoracis.SemispinalisThoracisT8C7;
    AnyRefFrame &Org = ....Segments.T8Seg.SemispinalisThoracisT8TransversusL;
    AnyRefNode &Via5 = ....Segments.T7Seg.SemispinalisThoracisT8T4ViaNodeL;
    AnyRefFrame &Ins = ....Segments.C7Seg.SemispinalisThoracisC7Spinous;
    viewMuscle = {#include "../DrawSettings/MusDrawSettings.any"};
    viewForce.Visible ??= Off;
  };

  AnyMuscleViaPoint SemispinalisThoracisT7C6 =
  {
    AnyMuscleModel &MusMdl = ....MuscleModels.Left.SemispinalisThoracis.SemispinalisThoracisT7C6;
    AnyRefFrame &Org = ....Segments.T7Seg.SemispinalisThoracisT7TransversusL;
    AnyRefFrame &Ins = ....Segments.C6Seg.SemispinalisThoracisC6Spinous;
    viewMuscle = {#include "../DrawSettings/MusDrawSettings.any"};
    viewForce.Visible ??= Off;
  };
};

MuscleGroup SerratusPosteriorInferior = {

  AnyMuscleViaPoint SerratusPosteriorInferiorL2R12 = {
    AnyMuscleModel &MusMdl = ....MuscleModels.Left.SerratusPosteriorInferior.SerratusPosteriorInferiorL2R12;
    AnyRefNode &L2 = ....Segments.L2Seg.O_serratus_posterior_inferior_L;
    AnyRefNode &Via1 = ....Segments.L2Seg.O_serratus_posterior_inferior_L2R12ViaNode_L;
    AnyRefNode &R12 = ....Segments.Left.R12Seg.O_serratus_posterior_inferior_R12L;
    viewMuscle = {#include "../DrawSettings/MusDrawSettings.any"};
    viewForce.Visible ??= Off;
  };

  AnyMuscleViaPoint SerratusPosteriorInferiorL1R11 = {
    AnyMuscleModel &MusMdl = ....MuscleModels.Left.SerratusPosteriorInferior.SerratusPosteriorInferiorL1R11;
    AnyRefNode &L1 = ....Segments.L1Seg.O_serratus_posterior_inferior_L;
    AnyRefNode &Via1 = ....Segments.L1Seg.O_serratus_posterior_inferior_L1R11ViaNode_L;
    AnyRefNode &R11 = ....Segments.Left.R11Seg.O_serratus_posterior_inferior_R11L;
    viewMuscle = {#include "../DrawSettings/MusDrawSettings.any"};
    viewForce.Visible ??= Off;
  };
  #if BM_TRUNK_THORACIC_MODEL == _THORACIC_MODEL_FLEXIBLE_
  AnyMuscleViaPoint SerratusPosteriorInferiorT12R10 = {
    AnyMuscleModel &MusMdl = ....MuscleModels.Left.SerratusPosteriorInferior.SerratusPosteriorInferiorT12R10;
    AnyRefNode &T12 = ....Segments.T12Seg.O_serratus_posterior_inferior_T12L;
    AnyRefNode &Via1 = ....Segments.T12Seg.O_serratus_posterior_inferior_T12R10ViaNodeL;
    AnyRefNode &R10 = ....Segments.Left.R10Seg.O_serratus_posterior_inferior_R10L;
    viewMuscle = {#include "../DrawSettings/MusDrawSettings.any"};
    viewForce.Visible ??= Off;
  };

  AnyMuscleViaPoint SerratusPosteriorInferiorT11R9 = {
    AnyMuscleModel &MusMdl = ....MuscleModels.Left.SerratusPosteriorInferior.SerratusPosteriorInferiorT11R9;
    AnyRefNode &T11 = ....Segments.T11Seg.O_serratus_posterior_inferior_T11L;
    AnyRefNode &Via1 = ....Segments.T11Seg.O_serratus_posterior_inferior_T11R9ViaNodeL;
    AnyRefNode &R9 = ....Segments.Left.R9Seg.O_serratus_posterior_inferior_R9L;
    viewMuscle = {#include "../DrawSettings/MusDrawSettings.any"};
    viewForce.Visible ??= Off;
  };
  #endif
};
MuscleGroup SerratusPosteriorSuperior = {

  AnyMuscleViaPoint SerratusPosteriorSuperiorR2C7 = {
    AnyMuscleModel &MusMdl = ....MuscleModels.Left.SerratusPosteriorSuperior.SerratusPosteriorSuperiorR2C7;
    AnyRefNode &C7 = ....Segments.C7Seg.O_serratus_posterior_superior_1C7NodeL;
    AnyRefNode &R2 = ....Segments.Left.R2Seg.O_serratus_posterior_superior_1L;
    viewMuscle = {#include "../DrawSettings/MusDrawSettings.any"};
    viewForce.Visible ??= Off;
  };

  #if BM_TRUNK_THORACIC_MODEL == _THORACIC_MODEL_FLEXIBLE_
  AnyMuscleViaPoint SerratusPosteriorSuperiorR3T1 = {
    AnyMuscleModel &MusMdl = ....MuscleModels.Left.SerratusPosteriorSuperior.SerratusPosteriorSuperiorR3T1;
    AnyRefNode &T1 = ....Segments.T1Seg.O_serratus_posterior_superior_T1L;
    AnyRefNode &R3 = ....Segments.Left.R3Seg.O_serratus_posterior_superior_2L;
    viewMuscle = {#include "../DrawSettings/MusDrawSettings.any"};
    viewForce.Visible ??= Off;
  };

  AnyMuscleViaPoint SerratusPosteriorSuperiorR4T2 = {
    AnyMuscleModel &MusMdl = ....MuscleModels.Left.SerratusPosteriorSuperior.SerratusPosteriorSuperiorR4T2;
    AnyRefNode &T2 = ....Segments.T2Seg.O_serratus_posterior_superior_T2L;
    AnyRefNode &R4 = ....Segments.Left.R4Seg.O_serratus_posterior_superior_3L;
    viewMuscle = {#include "../DrawSettings/MusDrawSettings.any"};
    viewForce.Visible ??= Off;
  };

  AnyMuscleViaPoint SerratusPosteriorSuperiorR5T3 = {
    AnyMuscleModel &MusMdl = ....MuscleModels.Left.SerratusPosteriorSuperior.SerratusPosteriorSuperiorR5T3;
    AnyRefNode &T3 = ....Segments.T3Seg.O_serratus_posterior_superior_T3L;
    AnyRefNode &R5 = ....Segments.Left.R5Seg.O_serratus_posterior_superior_4L;
    viewMuscle = {#include "../DrawSettings/MusDrawSettings.any"};
    viewForce.Visible ??= Off;
  };
  #endif
};

MuscleGroup SpleniusCapitis = {
  AnyMuscleViaPoint SpleniusCapitisC7 = {
    AnyMuscleModel &MusMdl = ....MuscleModels.Left.SpleniusCapitis.SpleniusCapitisC7;
    AnyRefNode &Org = ....Segments.SkullSeg.SpleniusCapitisNodeL;
    AnyRefNode &Ins = ....Segments.C7Seg.SpleniusCapitisC7NodeL;
    viewMuscle = {#include "../DrawSettings/MusDrawSettings.any"};
    viewForce.Visible ??= Off;
  };
  AnyMuscleViaPoint SpleniusCapitisT1 = {
    AnyMuscleModel &MusMdl = ....MuscleModels.Left.SpleniusCapitis.SpleniusCapitisT1;
    AnyRefNode &Org = ....Segments.SkullSeg.SpleniusCapitisNodeL;
    AnyRefNode &Ins = ....Segments.T1Seg.Left.SpleniusCapitisT1Node;
    viewMuscle = {#include "../DrawSettings/MusDrawSettings.any"};
    viewForce.Visible ??= Off;
  };
  AnyMuscleViaPoint SpleniusCapitisT2 = {
    AnyMuscleModel &MusMdl = ....MuscleModels.Left.SpleniusCapitis.SpleniusCapitisT2;
    AnyRefNode &Org = ....Segments.SkullSeg.SpleniusCapitisNodeL;
    AnyRefNode &Ins = ....Segments.T2Seg.Left.SpleniusCapitisT2Node;
    viewMuscle = {#include "../DrawSettings/MusDrawSettings.any"};
    viewForce.Visible ??= Off;
  };
  AnyMuscleViaPoint SpleniusCapitisT3 = {
    AnyMuscleModel &MusMdl = ....MuscleModels.Left.SpleniusCapitis.SpleniusCapitisT3;
    AnyRefNode &Org = ....Segments.SkullSeg.SpleniusCapitisNodeL;
    AnyRefNode &Ins = ....Segments.T3Seg.Left.SpleniusCapitisT3Node;
    viewMuscle = {#include "../DrawSettings/MusDrawSettings.any"};
    viewForce.Visible ??= Off;
  };
};

MuscleGroup SpleniusCervicis = {
  AnyMuscleViaPoint SpleniusCervicisT3C1 = {
    AnyMuscleModel &MusMdl = ....MuscleModels.Left.SpleniusCervicis.SpleniusCervicisT3C1;
    AnyRefNode &Org = ....Segments.T3Seg.Left.SpleniusCervicisNode;
    AnyRefNode &Ins = ....Segments.C1Seg.Left.SpleniusCervicisT3C1Node;
    viewMuscle = {#include "../DrawSettings/MusDrawSettings.any"};
    viewForce.Visible ??= Off;
  };
  AnyMuscleViaPoint SpleniusCervicisT4C2 = {
    AnyMuscleModel &MusMdl = ....MuscleModels.Left.SpleniusCervicis.SpleniusCervicisT4C2;
    AnyRefNode &Org = ....Segments.T4Seg.Left.SpleniusCervicisNode;
    AnyRefNode &Ins = ....Segments.C2Seg.Left.SpleniusCervicisT4C2Node;
    viewMuscle = {#include "../DrawSettings/MusDrawSettings.any"};
    viewForce.Visible ??= Off;
  };

  AnyMuscleViaPoint SpleniusCervicisT5C3 = {
    AnyMuscleModel &MusMdl = ....MuscleModels.Left.SpleniusCervicis.SpleniusCervicisT5C3;
    AnyRefNode &Org = ....Segments.T5Seg.Left.SpleniusCervicisNode;
    AnyRefNode &Ins = ....Segments.C3Seg.Left.SpleniusCervicisT5C3Node;
    viewMuscle = {#include "../DrawSettings/MusDrawSettings.any"};
    viewForce.Visible ??= Off;
  };
  AnyMuscleViaPoint SpleniusCervicisT6C3 = {
    AnyMuscleModel &MusMdl = ....MuscleModels.Left.SpleniusCervicis.SpleniusCervicisT6C3;
    AnyRefNode &Org = ....Segments.T6Seg.Left.SpleniusCervicisNode;
    AnyRefNode &Ins = ....Segments.C3Seg.Left.SpleniusCervicisT6C3Node;
    viewMuscle = {#include "../DrawSettings/MusDrawSettings.any"};
    viewForce.Visible ??= Off;
  };
};

#if BM_TRUNK_THORACIC_MODEL == _THORACIC_MODEL_FLEXIBLE_
MuscleGroup Subcostalis = {
  AnyMuscleViaPoint SubcostalisR1R3 = {
    AnyMuscleModel &MusMdl = ....MuscleModels.Left.Subcostalis.SubcostalisR1R3;
    AnyRefNode &R1 = ....Segments.Left.R1Seg.SubcostalisR1R3_L_Org;
    AnyRefNode &R3 = ....Segments.Left.R3Seg.SubcostalisR1R3_L_Ins;
    viewMuscle = {#include "../DrawSettings/MusDrawSettings.any"};
    viewForce.Visible ??= Off;
  };

  AnyMuscleViaPoint SubcostalisR1R4 = {
    AnyMuscleModel &MusMdl = ....MuscleModels.Left.Subcostalis.SubcostalisR1R4;
    AnyRefNode &R1 = ....Segments.Left.R1Seg.SubcostalisR1R4_L_Org;
    AnyRefNode &R3 = ....Segments.Left.R4Seg.SubcostalisR1R4_L_Ins;
    viewMuscle = {#include "../DrawSettings/MusDrawSettings.any"};
    viewForce.Visible ??= Off;
  };

  AnyMuscleViaPoint SubcostalisR2R4 = {
    AnyMuscleModel &MusMdl = ....MuscleModels.Left.Subcostalis.SubcostalisR2R4;
    AnyRefNode &R2 = ....Segments.Left.R2Seg.SubcostalisR2R4_L_Org;
    AnyRefNode &R4 = ....Segments.Left.R4Seg.SubcostalisR2R4_L_Ins;
    viewMuscle = {#include "../DrawSettings/MusDrawSettings.any"};
    viewForce.Visible ??= Off;
  };

  AnyMuscleViaPoint SubcostalisR2R5 = {
    AnyMuscleModel &MusMdl = ....MuscleModels.Left.Subcostalis.SubcostalisR2R5;
    AnyRefNode &R2 = ....Segments.Left.R2Seg.SubcostalisR2R5_L_Org;
    AnyRefNode &R4 = ....Segments.Left.R5Seg.SubcostalisR2R5_L_Ins;
    viewMuscle = {#include "../DrawSettings/MusDrawSettings.any"};
    viewForce.Visible ??= Off;
  };

  AnyMuscleViaPoint SubcostalisR3R5 = {
    AnyMuscleModel &MusMdl = ....MuscleModels.Left.Subcostalis.SubcostalisR3R5;
    AnyRefNode &R3 = ....Segments.Left.R3Seg.SubcostalisR3R5_L_Org;
    AnyRefNode &R5 = ....Segments.Left.R5Seg.SubcostalisR3R5_L_Ins;
    viewMuscle = {#include "../DrawSettings/MusDrawSettings.any"};
    viewForce.Visible ??= Off;
  };

  AnyMuscleViaPoint SubcostalisR3R6 = {
    AnyMuscleModel &MusMdl = ....MuscleModels.Left.Subcostalis.SubcostalisR3R6;
    AnyRefNode &R3 = ....Segments.Left.R3Seg.SubcostalisR3R6_L_Org;
    AnyRefNode &R5 = ....Segments.Left.R6Seg.SubcostalisR3R6_L_Ins;
    viewMuscle = {#include "../DrawSettings/MusDrawSettings.any"};
    viewForce.Visible ??= Off;
  };

  AnyMuscleViaPoint SubcostalisR4R6 = {
    AnyMuscleModel &MusMdl = ....MuscleModels.Left.Subcostalis.SubcostalisR4R6;
    AnyRefNode &R4 = ....Segments.Left.R4Seg.SubcostalisR4R6_L_Org;
    AnyRefNode &R6 = ....Segments.Left.R6Seg.SubcostalisR4R6_L_Ins;
    viewMuscle = {#include "../DrawSettings/MusDrawSettings.any"};
    viewForce.Visible ??= Off;
  };

  AnyMuscleViaPoint SubcostalisR4R7 = {
    AnyMuscleModel &MusMdl = ....MuscleModels.Left.Subcostalis.SubcostalisR4R7;
    AnyRefNode &R4 = ....Segments.Left.R4Seg.SubcostalisR4R7_L_Org;
    AnyRefNode &R6 = ....Segments.Left.R7Seg.SubcostalisR4R7_L_Ins;
    viewMuscle = {#include "../DrawSettings/MusDrawSettings.any"};
    viewForce.Visible ??= Off;
  };

  AnyMuscleViaPoint SubcostalisR5R7 = {
    AnyMuscleModel &MusMdl = ....MuscleModels.Left.Subcostalis.SubcostalisR5R7;
    AnyRefNode &R5 = ....Segments.Left.R5Seg.SubcostalisR5R7_L_Org;
    AnyRefNode &R7 = ....Segments.Left.R7Seg.SubcostalisR5R7_L_Ins;
    viewMuscle = {#include "../DrawSettings/MusDrawSettings.any"};
    viewForce.Visible ??= Off;
  };

  AnyMuscleViaPoint SubcostalisR5R8 = {
    AnyMuscleModel &MusMdl = ....MuscleModels.Left.Subcostalis.SubcostalisR5R8;
    AnyRefNode &R5 = ....Segments.Left.R5Seg.SubcostalisR5R8_L_Org;
    AnyRefNode &R7 = ....Segments.Left.R8Seg.SubcostalisR5R8_L_Ins;
    viewMuscle = {#include "../DrawSettings/MusDrawSettings.any"};
    viewForce.Visible ??= Off;
  };

  AnyMuscleViaPoint SubcostalisR6R8 = {
    AnyMuscleModel &MusMdl = ....MuscleModels.Left.Subcostalis.SubcostalisR6R8;
    AnyRefNode &R6 = ....Segments.Left.R6Seg.SubcostalisR6R8_L_Org;
    AnyRefNode &R8 = ....Segments.Left.R8Seg.SubcostalisR6R8_L_Ins;
    viewMuscle = {#include "../DrawSettings/MusDrawSettings.any"};
    viewForce.Visible ??= Off;
  };

  AnyMuscleViaPoint SubcostalisR6R9 = {
    AnyMuscleModel &MusMdl = ....MuscleModels.Left.Subcostalis.SubcostalisR6R9;
    AnyRefNode &R6 = ....Segments.Left.R6Seg.SubcostalisR6R9_L_Org;
    AnyRefNode &R8 = ....Segments.Left.R9Seg.SubcostalisR6R9_L_Ins;
    viewMuscle = {#include "../DrawSettings/MusDrawSettings.any"};
    viewForce.Visible ??= Off;
  };

  AnyMuscleViaPoint SubcostalisR7R9 = {
    AnyMuscleModel &MusMdl = ....MuscleModels.Left.Subcostalis.SubcostalisR7R9;
    AnyRefNode &R7 = ....Segments.Left.R7Seg.SubcostalisR7R9_L_Org;
    AnyRefNode &R9 = ....Segments.Left.R9Seg.SubcostalisR7R9_L_Ins;
    viewMuscle = {#include "../DrawSettings/MusDrawSettings.any"};
    viewForce.Visible ??= Off;
  };

  AnyMuscleViaPoint SubcostalisR7R10 = {
    AnyMuscleModel &MusMdl = ....MuscleModels.Left.Subcostalis.SubcostalisR7R10;
    AnyRefNode &R7 = ....Segments.Left.R7Seg.SubcostalisR7R10_L_Org;
    AnyRefNode &R9 = ....Segments.Left.R10Seg.SubcostalisR7R10_L_Ins;
    viewMuscle = {#include "../DrawSettings/MusDrawSettings.any"};
    viewForce.Visible ??= Off;
  };

  AnyMuscleViaPoint SubcostalisR8R10 = {
    AnyMuscleModel &MusMdl = ....MuscleModels.Left.Subcostalis.SubcostalisR8R10;
    AnyRefNode &R8 = ....Segments.Left.R8Seg.SubcostalisR8R10_L_Org;
    AnyRefNode &R10 = ....Segments.Left.R10Seg.SubcostalisR8R10_L_Ins;
    viewMuscle = {#include "../DrawSettings/MusDrawSettings.any"};
    viewForce.Visible ??= Off;
  };

  AnyMuscleViaPoint SubcostalisR8R11 = {
    AnyMuscleModel &MusMdl = ....MuscleModels.Left.Subcostalis.SubcostalisR8R11;
    AnyRefNode &R8 = ....Segments.Left.R8Seg.SubcostalisR8R11_L_Ins;
    AnyRefNode &R11 = ....Segments.Left.R11Seg.SubcostalisR8R11_L_Org;
    viewMuscle = {#include "../DrawSettings/MusDrawSettings.any"};
    viewForce.Visible ??= Off;
  };

  AnyMuscleViaPoint SubcostalisR9R11 = {
    AnyMuscleModel &MusMdl = ....MuscleModels.Left.Subcostalis.SubcostalisR9R11;
    AnyRefNode &R9 = ....Segments.Left.R9Seg.SubcostalisR9R11_L_Ins;
    AnyRefNode &R11 = ....Segments.Left.R11Seg.SubcostalisR9R11_L_Org;
    viewMuscle = {#include "../DrawSettings/MusDrawSettings.any"};
    viewForce.Visible ??= Off;
  };
};
#endif

#if BM_TRUNK_CAVITY_MODEL == _CAVITY_MODEL_VOLUME_
MuscleGroup TransversusAbdominis = {
  AnyMuscleViaPoint TransversusAbdominisL1 = {
    AnyMuscleModel &MusMdl = ....MuscleModels.Left.TransversusAbdominis.TransversusAbdominisL1;
    AnyRefNode &Org = ....Segments.L1Seg.TransversusInsNode_L;
    AnyRefNode &Via01 = ....Abdominal.Layer_L1.BaseSegPosterior.TransversusPoints.Left.nn03;
    AnyRefNode &Via02 = ....Abdominal.Layer_L1.BaseSegAnterior.TransversusPoints.Left.nn01;
    AnyRefNode &Via03 = ....Abdominal.Layer_L1.BaseSegAnterior.TransversusPoints.Left.nn02;
    AnyRefNode &Via04 = ....Abdominal.Layer_L1.BaseSegAnterior.TransversusPoints.Left.nn03;
    AnyRefNode &Via05 = ....Abdominal.Layer_L1.BaseSegAnterior.TransversusPoints.Left.nn04;
    AnyRefNode &Via06 = ....Abdominal.Layer_L1.BaseSegAnterior.TransversusPoints.Left.nn05;
    AnyRefNode &Via07 = ....Abdominal.Layer_L1.BaseSegAnterior.TransversusPoints.Left.nn06;
    AnyRefNode &Ins = ....Abdominal.Layer_L1.BaseSegAnterior.TransversusPoints.Center;
    viewMuscle = {#include "../DrawSettings/MusDrawSettings.any"};
  };

  AnyMuscleViaPoint TransversusAbdominisL2 = {
    AnyMuscleModel &MusMdl = ....MuscleModels.Left.TransversusAbdominis.TransversusAbdominisL2;
    AnyRefNode &Org = ....Segments.L2Seg.TransversusInsNode_L;
    AnyRefNode &Via01 = ....Abdominal.Layer_L2.BaseSegPosterior.TransversusPoints.Left.nn03;
    AnyRefNode &Via02 = ....Abdominal.Layer_L2.BaseSegAnterior.TransversusPoints.Left.nn01;
    AnyRefNode &Via03 = ....Abdominal.Layer_L2.BaseSegAnterior.TransversusPoints.Left.nn02;
    AnyRefNode &Via04 = ....Abdominal.Layer_L2.BaseSegAnterior.TransversusPoints.Left.nn03;
    AnyRefNode &Via05 = ....Abdominal.Layer_L2.BaseSegAnterior.TransversusPoints.Left.nn04;
    AnyRefNode &Via06 = ....Abdominal.Layer_L2.BaseSegAnterior.TransversusPoints.Left.nn05;
    AnyRefNode &Via07 = ....Abdominal.Layer_L2.BaseSegAnterior.TransversusPoints.Left.nn06;
    viewMuscle = {#include "../DrawSettings/MusDrawSettings.any"};
  };

  AnyMuscleViaPoint TransversusAbdominisL3 = {
    AnyMuscleModel &MusMdl = ....MuscleModels.Left.TransversusAbdominis.TransversusAbdominisL3;
    AnyRefNode &Org = ....Segments.L3Seg.TransversusInsNode_L;
    AnyRefNode &Via01 = ....Abdominal.Layer_L3.BaseSegPosterior.TransversusPoints.Left.nn03;
    AnyRefNode &Via02 = ....Abdominal.Layer_L3.BaseSegAnterior.TransversusPoints.Left.nn01;
    AnyRefNode &Via03 = ....Abdominal.Layer_L3.BaseSegAnterior.TransversusPoints.Left.nn02;
    AnyRefNode &Via04 = ....Abdominal.Layer_L3.BaseSegAnterior.TransversusPoints.Left.nn03;
    AnyRefNode &Via05 = ....Abdominal.Layer_L3.BaseSegAnterior.TransversusPoints.Left.nn04;
    AnyRefNode &Via06 = ....Abdominal.Layer_L3.BaseSegAnterior.TransversusPoints.Left.nn05;
    AnyRefNode &Via07 = ....Abdominal.Layer_L3.BaseSegAnterior.TransversusPoints.Left.nn06;
    viewMuscle = {#include "../DrawSettings/MusDrawSettings.any"};
  };

  AnyMuscleViaPoint TransversusAbdominisL4 = {
    AnyMuscleModel &MusMdl = ....MuscleModels.Left.TransversusAbdominis.TransversusAbdominisL4;
    AnyRefNode &Org = ....Segments.L4Seg.TransversusInsNode_L;
    AnyRefNode &Via01 = ....Abdominal.Layer_L4.BaseSegPosterior.TransversusPoints.Left.nn03;
    AnyRefNode &Via02 = ....Abdominal.Layer_L4.BaseSegAnterior.TransversusPoints.Left.nn01;
    AnyRefNode &Via03 = ....Abdominal.Layer_L4.BaseSegAnterior.TransversusPoints.Left.nn02;
    AnyRefNode &Via04 = ....Abdominal.Layer_L4.BaseSegAnterior.TransversusPoints.Left.nn03;
    AnyRefNode &Via05 = ....Abdominal.Layer_L4.BaseSegAnterior.TransversusPoints.Left.nn04;
    AnyRefNode &Via06 = ....Abdominal.Layer_L4.BaseSegAnterior.TransversusPoints.Left.nn05;
    AnyRefNode &Via07 = ....Abdominal.Layer_L4.BaseSegAnterior.TransversusPoints.Left.nn06;
    viewMuscle = {#include "../DrawSettings/MusDrawSettings.any"};
  };

  AnyMuscleViaPoint TransversusAbdominisL5 = {
    AnyMuscleModel &MusMdl = ....MuscleModels.Left.TransversusAbdominis.TransversusAbdominisL5;
    AnyRefNode &Org = ....Segments.L5Seg.TransversusInsNode_L;
    AnyRefNode &Via01 = ....Abdominal.Layer_L5.BaseSegPosterior.TransversusPoints.Left.nn03;
    AnyRefNode &Via02 = ....Abdominal.Layer_L5.BaseSegAnterior.TransversusPoints.Left.nn01;
    AnyRefNode &Via03 = ....Abdominal.Layer_L5.BaseSegAnterior.TransversusPoints.Left.nn02;
    AnyRefNode &Via04 = ....Abdominal.Layer_L5.BaseSegAnterior.TransversusPoints.Left.nn03;
    AnyRefNode &Via05 = ....Abdominal.Layer_L5.BaseSegAnterior.TransversusPoints.Left.nn04;
    AnyRefNode &Via06 = ....Abdominal.Layer_L5.BaseSegAnterior.TransversusPoints.Left.nn05;
    AnyRefNode &Via07 = ....Abdominal.Layer_L5.BaseSegAnterior.TransversusPoints.Left.nn06;
    viewMuscle = {#include "../DrawSettings/MusDrawSettings.any"};
  };
};
#endif

#if BM_TRUNK_THORACIC_MODEL == _THORACIC_MODEL_FLEXIBLE_
MuscleGroup TransversusThoracis = {
  AnyMuscleViaPoint TransversusThoracisR2St = {
    AnyMuscleModel &MusMdl = ....MuscleModels.Left.TransversusThoracis.TransversusThoracisR2St;
    AnyRefNode &R2 = ....Segments.Left.R2Seg.TransversusThoracisR2StNodeLOrg;
    AnyRefNode &S = ....Segments.SternalBodySeg.TransversusThoracisR2StNodeLIns;
    viewMuscle = {#include "../DrawSettings/MusDrawSettings.any"};
    viewForce.Visible ??= Off;
  };

  AnyMuscleViaPoint TransversusThoracisR2R4 = {
    AnyMuscleModel &MusMdl = ....MuscleModels.Left.TransversusThoracis.TransversusThoracisR2R4;
    AnyRefNode &R4 = ....Segments.Left.R2Seg.TransversusThoracisR2R4NodeLOrg;
    AnyRefNode &S = ....Segments.Left.R4Seg.TransversusThoracisR2R4NodeLIns;
    viewMuscle = {#include "../DrawSettings/MusDrawSettings.any"};
    viewForce.Visible ??= Off;
  };

  AnyMuscleViaPoint TransversusThoracisR3St = {
    AnyMuscleModel &MusMdl = ....MuscleModels.Left.TransversusThoracis.TransversusThoracisR3St;
    AnyRefNode &R3 = ....Segments.Left.R3Seg.TransversusThoracisR3StNodeLOrg;
    AnyRefNode &S = ....Segments.SternalBodySeg.TransversusThoracisR3StNodeLIns;
    viewMuscle = {#include "../DrawSettings/MusDrawSettings.any"};
    viewForce.Visible ??= Off;
  };

  AnyMuscleViaPoint TransversusThoracisR3R5 = {
    AnyMuscleModel &MusMdl = ....MuscleModels.Left.TransversusThoracis.TransversusThoracisR3R5;
    AnyRefNode &R3 = ....Segments.Left.R3Seg.TransversusThoracisR3R5NodeLOrg;
    AnyRefNode &S = ....Segments.Left.R5Seg.TransversusThoracisR3R5NodeLIns;
    viewMuscle = {#include "../DrawSettings/MusDrawSettings.any"};
    viewForce.Visible ??= Off;
  };

  AnyMuscleViaPoint TransversusThoracisR4St = {
    AnyMuscleModel &MusMdl = ....MuscleModels.Left.TransversusThoracis.TransversusThoracisR4St;
    AnyRefNode &R4 = ....Segments.Left.R4Seg.TransversusThoracisR4StNodeLOrg;
    AnyRefNode &S = ....Segments.SternalBodySeg.TransversusThoracisR4StNodeLIns;
    viewMuscle = {#include "../DrawSettings/MusDrawSettings.any"};
    viewForce.Visible ??= Off;
  };

  AnyMuscleViaPoint TransversusThoracisR4R6 = {
    AnyMuscleModel &MusMdl = ....MuscleModels.Left.TransversusThoracis.TransversusThoracisR4R6;
    AnyRefNode &R4 = ....Segments.Left.R4Seg.TransversusThoracisR4R6NodeLOrg;
    AnyRefNode &S = ....Segments.Left.R6Seg.TransversusThoracisR4R6NodeLIns;
    viewMuscle = {#include "../DrawSettings/MusDrawSettings.any"};
    viewForce.Visible ??= Off;
  };

  AnyMuscleViaPoint TransversusThoracisR5St = {
    AnyMuscleModel &MusMdl = ....MuscleModels.Left.TransversusThoracis.TransversusThoracisR5St;
    AnyRefNode &R5 = ....Segments.Left.R5Seg.TransversusThoracisR5StNodeLOrg;
    AnyRefNode &S = ....Segments.SternalBodySeg.TransversusThoracisR5StNodeLIns;
    viewMuscle = {#include "../DrawSettings/MusDrawSettings.any"};
    viewForce.Visible ??= Off;
  };

  AnyMuscleViaPoint TransversusThoracisR5R7 = {
    AnyMuscleModel &MusMdl = ....MuscleModels.Left.TransversusThoracis.TransversusThoracisR5R7;
    AnyRefNode &R4 = ....Segments.Left.R5Seg.TransversusThoracisR5R7NodeLOrg;
    AnyRefNode &S56 = ....Segments.Left.R7Seg.TransversusThoracisR5R7NodeLIns;
    viewMuscle = {#include "../DrawSettings/MusDrawSettings.any"};
    viewForce.Visible ??= Off;
  };

  AnyMuscleViaPoint TransversusThoracisR6St = {
    AnyMuscleModel &MusMdl = ....MuscleModels.Left.TransversusThoracis.TransversusThoracisR6St;
    AnyRefNode &R4 = ....Segments.Left.R6Seg.TransversusThoracisR6StNodeLOrg;
    AnyRefNode &S56 = ....Segments.SternalBodySeg.TransversusThoracisR6StNodeLIns;
    viewMuscle = {#include "../DrawSettings/MusDrawSettings.any"};
    viewForce.Visible ??= Off;
  };

  AnyMuscleViaPoint TransversusThoracisR7St = {
    AnyMuscleModel &MusMdl = ....MuscleModels.Left.TransversusThoracis.TransversusThoracisR7St;
    AnyRefNode &R7 = ....Segments.Left.R7Seg.TransversusThoracisR7StNodeLOrg;
    AnyRefNode &S8 = ....Segments.SternalBodySeg.TransversusThoracisNodeLIns;
    viewMuscle = {#include "../DrawSettings/MusDrawSettings.any"};
    viewForce.Visible ??= Off;
  };

  AnyMuscleViaPoint TransversusThoracisR8St = {
    AnyMuscleModel &MusMdl = ....MuscleModels.Left.TransversusThoracis.TransversusThoracisR8St;
    AnyRefNode &R8 = ....Segments.Left.R8Seg.TransversusThoracisR8StNodeLOrg;
    AnyRefNode &S8 = ....Segments.SternalBodySeg.TransversusThoracisNodeLIns;
    viewMuscle = {#include "../DrawSettings/MusDrawSettings.any"};
    viewForce.Visible ??= Off;
  };

  AnyMuscleViaPoint TransversusThoracisR9St = {
    AnyMuscleModel &MusMdl = ....MuscleModels.Left.TransversusThoracis.TransversusThoracisR9St;
    AnyRefNode &R9 = ....Segments.Left.R9Seg.TransversusThoracisR9StNodeLOrg;
    AnyRefNode &S8 = ....Segments.SternalBodySeg.TransversusThoracisNodeLIns;
    viewMuscle = {#include "../DrawSettings/MusDrawSettings.any"};
    viewForce.Visible ??= Off;
  };

  AnyMuscleViaPoint TransversusThoracisR10St = {
    AnyMuscleModel &MusMdl = ....MuscleModels.Left.TransversusThoracis.TransversusThoracisR10St;
    AnyRefNode &R10 = ....Segments.Left.R10Seg.TransversusThoracisR10StNodeLOrg;
    AnyRefNode &S8 = ....Segments.SternalBodySeg.TransversusThoracisNodeLIns;
    viewMuscle = {#include "../DrawSettings/MusDrawSettings.any"};
    viewForce.Visible ??= Off;
  };
};
#endif

#endif
