//#define  OBLIQUUS_WRAP_ON_CYLS    //with this statement it will use wrapping on cylinders


#if BM_TRUNK_MUSCLES

#if BM_TRUNK_CAVITY_MODEL == _CAVITY_MODEL_VOLUME_
MuscleGroup Diaphragm = {

  AnyMuscleShortestPath DiaphragmL1_1 = {
    AnyMuscleModel &MusMdl = ....MuscleModels.Right.Diaphragm.DiaphragmL1_1;
    AnyRefNode &Org = ....Segments.L1Seg.DiaphragmL1_1NodeR;
    AnyRefNode &Ins = ....Abdominal.Diaphragm.CavitySegSuperoanterior.Layer_T10.Right.DiaphragmL1_1Node;
    viewMuscle = {#include "../DrawSettings/MusDrawSettings.any"};
    viewForce.Visible ??= Off;
    AnyParamSurf &Srf = ....Abdominal.Diaphragm.CavitySegSuperoposterior.Layer_T10.Right.DiaphragmL1_1;
    SPLine = {
      StringMesh=35;
      AnyMatrix InitWrapPos = {transf3D({0,-.Srf.Radius[0],0}, &.Srf)};
      InitWrapPosVecArr = {&InitWrapPos};
    };
  };

  AnyMuscleShortestPath DiaphragmL1_2 = {
    AnyMuscleModel &MusMdl = ....MuscleModels.Right.Diaphragm.DiaphragmL1_2;
    AnyRefNode &Org = ....Segments.L1Seg.DiaphragmL1_2NodeR;
    AnyRefNode &Ins = ....Abdominal.Diaphragm.CavitySegSuperoanterior.Layer_T10.Right.DiaphragmL1_2Node;
    viewMuscle = {#include "../DrawSettings/MusDrawSettings.any"};
    viewForce.Visible ??= Off;
    AnyParamSurf &Srf = ....Abdominal.Diaphragm.CavitySegSuperoposterior.Layer_T10.Right.DiaphragmL1_2;
    SPLine = {
      StringMesh=35;
      AnyMatrix InitWrapPos = {transf3D({0,-.Srf.Radius[0],0}, &.Srf)};
      InitWrapPosVecArr = {&InitWrapPos};
    };
  };

  AnyMuscleShortestPath DiaphragmL2_1 = {
    AnyMuscleModel &MusMdl = ....MuscleModels.Right.Diaphragm.DiaphragmL2_1;
    AnyRefNode &Org = ....Segments.L2Seg.DiaphragmL2_1NodeR;
    AnyRefNode &Ins = ....Abdominal.Diaphragm.CavitySegSuperoanterior.Layer_T10.Right.DiaphragmL2_1Node;
    viewMuscle = {#include "../DrawSettings/MusDrawSettings.any"};
    viewForce.Visible ??= Off;
    AnyParamSurf &Srf = ....Abdominal.Diaphragm.CavitySegSuperoposterior.Layer_T10.Right.DiaphragmL2_1;
    SPLine = {
      StringMesh=35;
      AnyMatrix InitWrapPos = {transf3D({0,-.Srf.Radius[0],0}, &.Srf)};
      InitWrapPosVecArr = {&InitWrapPos};
    };
  };

  AnyMuscleShortestPath DiaphragmL2_2 = {
    AnyMuscleModel &MusMdl = ....MuscleModels.Right.Diaphragm.DiaphragmL2_2;
    AnyRefNode &Org = ....Segments.L2Seg.DiaphragmL2_2NodeR;
    AnyRefNode &Ins = ....Abdominal.Diaphragm.CavitySegSuperoanterior.Layer_T10.Right.DiaphragmL2_2Node;
    viewMuscle = {#include "../DrawSettings/MusDrawSettings.any"};
    viewForce.Visible ??= Off;
    AnyParamSurf &Srf = ....Abdominal.Diaphragm.CavitySegSuperoposterior.Layer_T10.Right.DiaphragmL2_2;
    SPLine = {
      StringMesh=35;
      AnyMatrix InitWrapPos = {transf3D({0,-.Srf.Radius[0],0}, &.Srf)};
      InitWrapPosVecArr = {&InitWrapPos};
    };
  };

  AnyMuscleShortestPath DiaphragmL1_3 = {
    AnyMuscleModel &MusMdl = ....MuscleModels.Right.Diaphragm.DiaphragmL1_3;
    AnyRefNode &Org = ....Segments.L1Seg.DiaphragmL1_3NodeR;
    AnyRefNode &Ins = ....Abdominal.Diaphragm.CavitySegSuperoanterior.Layer_T10.Right.DiaphragmL1_3Node;
    viewMuscle = {#include "../DrawSettings/MusDrawSettings.any"};
    viewForce.Visible ??= Off;
    AnyParamSurf &Srf = ....Abdominal.Diaphragm.CavitySegSuperoposterior.Layer_T10.Right.DiaphragmL1_3;
    SPLine = {
      StringMesh=35;
      AnyMatrix InitWrapPos = {transf3D({0,-.Srf.Radius[0],0}, &.Srf)};
      InitWrapPosVecArr = {&InitWrapPos};
    };
  };
  AnyMuscleShortestPath DiaphragmR12_2 = {
    AnyMuscleModel &MusMdl = ....MuscleModels.Right.Diaphragm.DiaphragmR12_2;
    AnyRefNode &Org = ....Segments.Right.R12Seg.DiaphragmR12_2NodeR;
    AnyRefNode &Ins = ....Abdominal.Diaphragm.CavitySegSuperoanterior.Layer_T10.Right.DiaphragmR12_2Node;
    viewMuscle = {#include "../DrawSettings/MusDrawSettings.any"};
    viewForce.Visible ??= Off;
    AnyParamSurf &Srf = ....Abdominal.Diaphragm.CavitySegSuperoposterior.Layer_T10.Right.DiaphragmR12_2;
    SPLine = {
      StringMesh=35;
      AnyMatrix InitWrapPos = {transf3D({0,-.Srf.Radius[0],0}, &.Srf)};
      InitWrapPosVecArr = {&InitWrapPos};
    };
  };
  AnyMuscleShortestPath DiaphragmR12_1 = {
    AnyMuscleModel &MusMdl = ....MuscleModels.Right.Diaphragm.DiaphragmR12_1;
    AnyRefNode &Org = ....Segments.Right.R12Seg.DiaphragmR12_1NodeR;
    AnyRefNode &Ins = ....Abdominal.Diaphragm.CavitySegSuperoanterior.Layer_T10.Right.DiaphragmR12_1Node;
    viewMuscle = {#include "../DrawSettings/MusDrawSettings.any"};
    viewForce.Visible ??= Off;
    AnyParamSurf &Srf = ....Abdominal.Diaphragm.CavitySegSuperoposterior.Layer_T10.Right.DiaphragmR12_1;
    SPLine = {
      StringMesh=35;
      AnyMatrix InitWrapPos = {transf3D({0,-.Srf.Radius[0],0}, &.Srf)};
      InitWrapPosVecArr = {&InitWrapPos};
    };
  };
  AnyMuscleShortestPath DiaphragmR11_3 = {
    AnyMuscleModel &MusMdl = ....MuscleModels.Right.Diaphragm.DiaphragmR11_3;
    AnyRefNode &Org = ....Segments.Right.R11Seg.DiaphragmR11_3NodeR;
    AnyRefNode &Ins = ....Abdominal.Diaphragm.CavitySegSuperoanterior.Layer_T10.Right.DiaphragmR11_3Node;
    viewMuscle = {#include "../DrawSettings/MusDrawSettings.any"};
    viewForce.Visible ??= Off;
    AnyParamSurf &Srf = ....Abdominal.Diaphragm.CavitySegSuperoanterior.Layer_T10.Right.DiaphragmR11_3;
    SPLine = {
      StringMesh=35;
      AnyMatrix InitWrapPos = {transf3D({0,-.Srf.Radius[0],0}, &.Srf)};
      InitWrapPosVecArr = {&InitWrapPos};
    };
  };
  AnyMuscleShortestPath DiaphragmR11_2 = {
    AnyMuscleModel &MusMdl = ....MuscleModels.Right.Diaphragm.DiaphragmR11_2;
    AnyRefNode &Org = ....Segments.Right.R11Seg.DiaphragmR11_2NodeR;
    AnyRefNode &Ins = ....Abdominal.Diaphragm.CavitySegSuperoanterior.Layer_T10.Right.DiaphragmR11_2Node;
    viewMuscle = {#include "../DrawSettings/MusDrawSettings.any"};
    viewForce.Visible ??= Off;
    AnyParamSurf &Srf = ....Abdominal.Diaphragm.CavitySegSuperoanterior.Layer_T10.Right.DiaphragmR11_2;
    SPLine = {
      StringMesh=35;
      AnyMatrix InitWrapPos = {transf3D({0,-.Srf.Radius[0],0}, &.Srf)};
      InitWrapPosVecArr = {&InitWrapPos};
    };
  };
  AnyMuscleShortestPath DiaphragmR11_1 = {
    AnyMuscleModel &MusMdl = ....MuscleModels.Right.Diaphragm.DiaphragmR11_1;
    AnyRefNode &Org = ....Segments.Right.R11Seg.DiaphragmR11_1NodeR;
    AnyRefNode &Ins = ....Abdominal.Diaphragm.CavitySegSuperoanterior.Layer_T10.Right.DiaphragmR11_1Node;
    viewMuscle = {#include "../DrawSettings/MusDrawSettings.any"};
    viewForce.Visible ??= Off;
    AnyParamSurf &Srf = ....Abdominal.Diaphragm.CavitySegSuperoanterior.Layer_T10.Right.DiaphragmR11_1;
    SPLine = {
      StringMesh=35;
      AnyMatrix InitWrapPos = {transf3D({0,-.Srf.Radius[0],0}, &.Srf)};
      InitWrapPosVecArr = {&InitWrapPos};
    };
  };
  AnyMuscleShortestPath DiaphragmR10_1 = {
    AnyMuscleModel &MusMdl = ....MuscleModels.Right.Diaphragm.DiaphragmR10_1;
    AnyRefNode &Org = ....Segments.Right.R10Seg.DiaphragmR10_1NodeR;
    AnyRefNode &Ins = ....Abdominal.Diaphragm.CavitySegSuperoanterior.Layer_T10.Right.DiaphragmR10_1Node;
    viewMuscle = {#include "../DrawSettings/MusDrawSettings.any"};
    viewForce.Visible ??= Off;
    AnyParamSurf &Srf = ....Abdominal.Diaphragm.CavitySegSuperoanterior.Layer_T10.Right.DiaphragmR10_1;
    SPLine = {
      StringMesh=35;
      AnyMatrix InitWrapPos = {transf3D({0,-.Srf.Radius[0],0}, &.Srf)};
      InitWrapPosVecArr = {&InitWrapPos};
    };
  };
  AnyMuscleShortestPath DiaphragmR10_2 = {
    AnyMuscleModel &MusMdl = ....MuscleModels.Right.Diaphragm.DiaphragmR10_2;
    AnyRefNode &Org = ....Segments.Right.R10Seg.DiaphragmR10_2NodeR;
    AnyRefNode &Ins = ....Abdominal.Diaphragm.CavitySegSuperoanterior.Layer_T10.Right.DiaphragmR10_2Node;
    viewMuscle = {#include "../DrawSettings/MusDrawSettings.any"};
    viewForce.Visible ??= Off;
    AnyParamSurf &Srf = ....Abdominal.Diaphragm.CavitySegSuperoanterior.Layer_T10.Right.DiaphragmR10_2;
    SPLine = {
      StringMesh=35;
      AnyMatrix InitWrapPos = {transf3D({0,-.Srf.Radius[0],0}, &.Srf)};
      InitWrapPosVecArr = {&InitWrapPos};
    };
  };
  AnyMuscleShortestPath DiaphragmR10_3 = {
    AnyMuscleModel &MusMdl = ....MuscleModels.Right.Diaphragm.DiaphragmR10_3;
    AnyRefNode &Org = ....Segments.Right.R10Seg.DiaphragmR10_3NodeR;
    AnyRefNode &Ins = ....Abdominal.Diaphragm.CavitySegSuperoanterior.Layer_T10.Right.DiaphragmR10_3Node;
    viewMuscle = {#include "../DrawSettings/MusDrawSettings.any"};
    viewForce.Visible ??= Off;
    AnyParamSurf &Srf = ....Abdominal.Diaphragm.CavitySegSuperoanterior.Layer_T10.Right.DiaphragmR10_3;
    SPLine = {
      StringMesh=35;
      AnyMatrix InitWrapPos = {transf3D({0,-.Srf.Radius[0],0}, &.Srf)};
      InitWrapPosVecArr = {&InitWrapPos};
    };
  };
  AnyMuscleShortestPath DiaphragmCC_7 = {
    AnyMuscleModel &MusMdl = ....MuscleModels.Right.Diaphragm.DiaphragmCC_7;
    #if BM_TRUNK_THORACIC_STERNUM_TOPOLOGY == 4
    AnyRefNode &Org = ....Segments.Right.CostalCartilageSeg.DiaphragmCC_7R;
    #else
    AnyRefNode &Org = ....Segments.SternalBodySeg.DiaphragmCC_7R;
    #endif
    AnyRefNode &Ins = ....Abdominal.Diaphragm.CavitySegSuperoanterior.Layer_T10.Right.DiaphragmCC_7Node;
    viewMuscle = {#include "../DrawSettings/MusDrawSettings.any"};
    viewForce.Visible ??= Off;
    AnyParamSurf &Srf = ....Abdominal.Diaphragm.CavitySegSuperoanterior.Layer_T10.Right.DiaphragmCC_7;
    SPLine = {
      StringMesh=35;
      AnyMatrix InitWrapPos = {transf3D({0,-.Srf.Radius[0],0}, &.Srf)};
      InitWrapPosVecArr = {&InitWrapPos};
    };
  };
  AnyMuscleShortestPath DiaphragmCC_6 = {
    AnyMuscleModel &MusMdl = ....MuscleModels.Right.Diaphragm.DiaphragmCC_6;
    #if BM_TRUNK_THORACIC_STERNUM_TOPOLOGY == 4
    AnyRefNode &Org = ....Segments.Right.CostalCartilageSeg.DiaphragmCC_6R;
    #else
    AnyRefNode &Org = ....Segments.SternalBodySeg.DiaphragmCC_6R;
    #endif
    AnyRefNode &Ins = ....Abdominal.Diaphragm.CavitySegSuperoanterior.Layer_T10.Right.DiaphragmCC_6Node;
    viewMuscle = {#include "../DrawSettings/MusDrawSettings.any"};
    viewForce.Visible ??= Off;
    AnyParamSurf &Srf = ....Abdominal.Diaphragm.CavitySegSuperoanterior.Layer_T10.Right.DiaphragmCC_6;
    SPLine = {
      StringMesh=35;
      AnyMatrix InitWrapPos = {transf3D({0,-.Srf.Radius[0],0}, &.Srf)};
      InitWrapPosVecArr = {&InitWrapPos};
    };
  };
  AnyMuscleShortestPath DiaphragmCC_5 = {
    AnyMuscleModel &MusMdl = ....MuscleModels.Right.Diaphragm.DiaphragmCC_5;
    #if BM_TRUNK_THORACIC_STERNUM_TOPOLOGY == 4
    AnyRefNode &Org = ....Segments.Right.CostalCartilageSeg.DiaphragmCC_5R;
    #else
    AnyRefNode &Org = ....Segments.SternalBodySeg.DiaphragmCC_5R;
    #endif
    AnyRefNode &Ins = ....Abdominal.Diaphragm.CavitySegSuperoanterior.Layer_T10.Right.DiaphragmCC_5Node;
    viewMuscle = {#include "../DrawSettings/MusDrawSettings.any"};
    viewForce.Visible ??= Off;
    AnyParamSurf &Srf = ....Abdominal.Diaphragm.CavitySegSuperoanterior.Layer_T10.Right.DiaphragmCC_5;
    SPLine = {
      StringMesh=35;
      AnyMatrix InitWrapPos = {transf3D({0,-.Srf.Radius[0],0}, &.Srf)};
      InitWrapPosVecArr = {&InitWrapPos};
    };
  };
  AnyMuscleShortestPath DiaphragmCC_4 = {
    AnyMuscleModel &MusMdl = ....MuscleModels.Right.Diaphragm.DiaphragmCC_4;
    #if BM_TRUNK_THORACIC_STERNUM_TOPOLOGY == 4
    AnyRefNode &Org = ....Segments.Right.CostalCartilageSeg.DiaphragmCC_4R;
    #else
    AnyRefNode &Org = ....Segments.SternalBodySeg.DiaphragmCC_4R;
    #endif
    AnyRefNode &Ins = ....Abdominal.Diaphragm.CavitySegSuperoanterior.Layer_T10.Right.DiaphragmCC_4Node;
    viewMuscle = {#include "../DrawSettings/MusDrawSettings.any"};
    viewForce.Visible ??= Off;
    AnyParamSurf &Srf = ....Abdominal.Diaphragm.CavitySegSuperoanterior.Layer_T10.Right.DiaphragmCC_4;
    SPLine = {
      StringMesh=35;
      AnyMatrix InitWrapPos = {transf3D({0,-.Srf.Radius[0],0}, &.Srf)};
      InitWrapPosVecArr = {&InitWrapPos};
    };
  };
  AnyMuscleShortestPath DiaphragmCC_3 = {
    AnyMuscleModel &MusMdl = ....MuscleModels.Right.Diaphragm.DiaphragmCC_3;
    #if BM_TRUNK_THORACIC_STERNUM_TOPOLOGY == 4
    AnyRefNode &Org = ....Segments.Right.CostalCartilageSeg.DiaphragmCC_3R;
    #else
    AnyRefNode &Org = ....Segments.SternalBodySeg.DiaphragmCC_3R;
    #endif
    AnyRefNode &Ins = ....Abdominal.Diaphragm.CavitySegSuperoanterior.Layer_T10.Right.DiaphragmCC_3Node;
    viewMuscle = {#include "../DrawSettings/MusDrawSettings.any"};
    viewForce.Visible ??= Off;
    AnyParamSurf &Srf = ....Abdominal.Diaphragm.CavitySegSuperoanterior.Layer_T10.Right.DiaphragmCC_3;
    SPLine = {
      StringMesh=35;
      AnyMatrix InitWrapPos = {transf3D({0,-.Srf.Radius[0],0}, &.Srf)};
      InitWrapPosVecArr = {&InitWrapPos};
    };
  };
  AnyMuscleShortestPath DiaphragmCC_2 = {
    AnyMuscleModel &MusMdl = ....MuscleModels.Right.Diaphragm.DiaphragmCC_2;
    #if BM_TRUNK_THORACIC_STERNUM_TOPOLOGY == 4
    AnyRefNode &Org = ....Segments.Right.CostalCartilageSeg.DiaphragmCC_2R;
    #else
    AnyRefNode &Org = ....Segments.SternalBodySeg.DiaphragmCC_2R;
    #endif
    AnyRefNode &Ins = ....Abdominal.Diaphragm.CavitySegSuperoanterior.Layer_T10.Right.DiaphragmCC_2Node;
    viewMuscle = {#include "../DrawSettings/MusDrawSettings.any"};
    viewForce.Visible ??= Off;
    AnyParamSurf &Srf = ....Abdominal.Diaphragm.CavitySegSuperoanterior.Layer_T10.Right.DiaphragmCC_2;
    SPLine = {
      StringMesh=35;
      AnyMatrix InitWrapPos = {transf3D({0,-.Srf.Radius[0],0}, &.Srf)};
      InitWrapPosVecArr = {&InitWrapPos};
    };
  };
  AnyMuscleShortestPath DiaphragmCC_1 = {
    AnyMuscleModel &MusMdl = ....MuscleModels.Right.Diaphragm.DiaphragmCC_1;
    #if BM_TRUNK_THORACIC_STERNUM_TOPOLOGY == 4
    AnyRefNode &Org = ....Segments.Right.CostalCartilageSeg.DiaphragmCC_1R;
    #else
    AnyRefNode &Org = ....Segments.SternalBodySeg.DiaphragmCC_1R;
    #endif
    AnyRefNode &Ins = ....Abdominal.Diaphragm.CavitySegSuperoanterior.Layer_T10.Right.DiaphragmCC_1Node;
    viewMuscle = {#include "../DrawSettings/MusDrawSettings.any"};
    viewForce.Visible ??= Off;
    AnyParamSurf &Srf = ....Abdominal.Diaphragm.CavitySegSuperoanterior.Layer_T10.Right.DiaphragmCC_1;
    SPLine = {
      StringMesh=35;
      AnyMatrix InitWrapPos = {transf3D({0,-.Srf.Radius[0],0}, &.Srf)};
      InitWrapPosVecArr = {&InitWrapPos};
    };
  };

  AnyMuscleShortestPath DiaphragmXiphoid = {
    AnyMuscleModel &MusMdl = ....MuscleModels.Right.Diaphragm.DiaphragmXiphoid;
    AnyRefNode &Org = ....Segments.SternalBodySeg.DiaphragmXiphoidNodeR;
    AnyRefNode &Ins = ....Abdominal.Diaphragm.CavitySegSuperoanterior.Layer_T10.Right.DiaphragmXiphoidNode;
    viewMuscle = {#include "../DrawSettings/MusDrawSettings.any"};
    viewForce.Visible ??= Off;
    AnyParamSurf &Srf = ....Abdominal.Diaphragm.CavitySegSuperoanterior.Layer_T10.Right.DiaphragmXiphoid;
    SPLine = {
      StringMesh=35;
      AnyMatrix InitWrapPos = {transf3D({0,-.Srf.Radius[0],0}, &.Srf)};
      InitWrapPosVecArr = {&InitWrapPos};
    };
  };
};
#endif

// Model needs the Hyoid bone. The hyoid muscles try to stabilize the trachea and play a
// vital part in swallowing and speech.
MuscleGroup Hyoid = {
  AnyMuscleViaPoint LumpedHyoidStC0 = {
    AnyMuscleModel &MusMdl = ....MuscleModels.Right.LumpedHyoid.LumpedHyoidStC0;
    AnyRefNode &Org = ....Segments.SkullSeg.LumpedHyoidT1C0NodeR;
    AnyRefNode &Ins = ....Segments.SternumSeg.LumpedHyoidStC0NodeRIns;
    viewMuscle = {#include "../DrawSettings/MusDrawSettings.any"};
    viewForce.Visible ??= Off;
  };
};

// Iliocostalis Cervicis
AnyFolder IliocostalisCervicis = {
  AnyMuscleViaPoint IliocostalisCervicisR3C4 = {
    AnyMuscleModel &MusMdl = ....MuscleModels.Right.IliocostalisCervicis.IliocostalisCervicisR3C4;
    AnyRefNode &Org = ....Segments.C4Seg.Right.IliocostalisCervicisR3C4Node;
    AnyRefNode &Via1 = ....Segments.C7Seg.Right.IliocostalisCervicisR3C4Via1Node;
    AnyRefNode &Via2 = ....Segments.Right.R1Seg.IliocostalisCervicisR3C4Via2Node;
    AnyRefNode &Ins = ....Segments.Right.R3Seg.IliocostalisCervicisR3C4Node;
    viewMuscle = {#include "../DrawSettings/MusDrawSettings.any"};
    viewForce.Visible ??= Off;
  };
  AnyMuscleViaPoint IliocostalisCervicisR4C5 = {
    AnyMuscleModel &MusMdl = ....MuscleModels.Right.IliocostalisCervicis.IliocostalisCervicisR4C5;
    AnyRefNode &Org = ....Segments.C5Seg.Right.IliocostalisCervicisR4C5Node;
    AnyRefNode &Via1 = ....Segments.C7Seg.Right.IliocostalisCervicisR4C5Via1Node;
    AnyRefNode &Via2 = ....Segments.Right.R1Seg.IliocostalisCervicisR4C5Via2Node;
    AnyRefNode &Via3 = ....Segments.Right.R3Seg.IliocostalisCervicisR4C5Via3Node;
    AnyRefNode &Ins = ....Segments.Right.R4Seg.IliocostalisCervicisR4C5Node;
    viewMuscle = {#include "../DrawSettings/MusDrawSettings.any"};
    viewForce.Visible ??= Off;
  };
  AnyMuscleViaPoint IliocostalisCervicisR5C6 = {
    AnyMuscleModel &MusMdl = ....MuscleModels.Right.IliocostalisCervicis.IliocostalisCervicisR5C6;
    AnyRefNode &Org = ....Segments.C6Seg.Right.IliocostalisCervicisR5C6Node;
    AnyRefNode &Via1 = ....Segments.C7Seg.Right.IliocostalisCervicisR5C6Via1Node;
    AnyRefNode &Via2 = ....Segments.Right.R1Seg.IliocostalisCervicisR5C6Via2Node;
    AnyRefNode &Via3 = ....Segments.Right.R3Seg.IliocostalisCervicisR5C6Via3Node;
    AnyRefNode &Via4 = ....Segments.Right.R4Seg.IliocostalisCervicisR5C6Via4Node;
    AnyRefNode &Ins = ....Segments.Right.R5Seg.IliocostalisCervicisR5C6Node;
    viewMuscle = {#include "../DrawSettings/MusDrawSettings.any"};
    viewForce.Visible ??= Off;
  };
  AnyMuscleViaPoint IliocostalisCervicisR6C4 = {
    AnyMuscleModel &MusMdl = ....MuscleModels.Right.IliocostalisCervicis.IliocostalisCervicisR6C4;
    AnyRefNode &Org = ....Segments.C4Seg.Right.IliocostalisCervicisR6C4Node;
    AnyRefNode &Via1 = ....Segments.C7Seg.Right.IliocostalisCervicisR6C4Via1Node;
    AnyRefNode &Via2 = ....Segments.Right.R1Seg.IliocostalisCervicisR6C4Via2Node;
    AnyRefNode &Via3 = ....Segments.Right.R3Seg.IliocostalisCervicisR6C4Via3Node;
    AnyRefNode &Via4 = ....Segments.Right.R4Seg.IliocostalisCervicisR6C4Via4Node;
    AnyRefNode &Via5 = ....Segments.Right.R5Seg.IliocostalisCervicisR6C4Via5Node;
    AnyRefNode &Ins = ....Segments.Right.R6Seg.IliocostalisCervicisR6C4Node;
    viewMuscle = {#include "../DrawSettings/MusDrawSettings.any"};
    viewForce.Visible ??= Off;
  };
}; // End of Iliocostalis cervicis

AnyFolder IliocostalisLumborum = {
  // Iliocostalis lumborum
    AnyMuscleViaPoint IliocostalisLumborumL1 = {
    AnyMuscleModel &MusMdl = ....MuscleModels.Right.IliocostalisLumborum.IliocostalisLumborumL1;
    AnyRefNode &Org = ....Segments.L1Seg.IliocostalisLumborumL1NodeR;
    #if BM_TRUNK_CAVITY_MODEL == _CAVITY_MODEL_VOLUME_
    AnyRefNode &Via1 = ....Abdominal.Layer_L3.BaseSegPosterior.IliocostalisLumborumL1ViaNodeR;
    #else
    AnyRefNode &Via1 = ....Segments.L2Seg.IliocostalisLumborumL1ViaNodeR;
    #endif
    AnyRefNode &Ins = ....Segments.PelvisSeg.IliocostalisLumborumL1NodeR;
    viewMuscle = {#include "../DrawSettings/MusDrawSettings.any"};
    viewForce.Visible ??= Off;
  };
  AnyMuscleViaPoint IliocostalisLumborumL2 = {
    AnyMuscleModel &MusMdl = ....MuscleModels.Right.IliocostalisLumborum.IliocostalisLumborumL2;
    AnyRefNode &Org = ....Segments.L2Seg.IliocostalisLumborumL2NodeR;
    AnyRefNode &Ins = ....Segments.PelvisSeg.IliocostalisLumborumL2NodeR;
    viewMuscle = {#include "../DrawSettings/MusDrawSettings.any"};
    viewForce.Visible ??= Off;
  };
  AnyMuscleViaPoint IliocostalisLumborumL3 = {
    AnyMuscleModel &MusMdl = ....MuscleModels.Right.IliocostalisLumborum.IliocostalisLumborumL3;
    AnyRefNode &Org = ....Segments.L3Seg.IliocostalisLumborumL3NodeR;
    AnyRefNode &Ins = ....Segments.PelvisSeg.IliocostalisLumborumL3NodeR;
    viewMuscle = {#include "../DrawSettings/MusDrawSettings.any"};
    viewForce.Visible ??= Off;
  };
  AnyMuscleViaPoint IliocostalisLumborumL4 = {
    AnyMuscleModel &MusMdl = ....MuscleModels.Right.IliocostalisLumborum.IliocostalisLumborumL4;
    AnyRefNode &Org = ....Segments.L4Seg.IliocostalisLumborumL4NodeR;
    AnyRefNode &Ins = ....Segments.PelvisSeg.IliocostalisLumborumL4NodeR;
    viewMuscle = {#include "../DrawSettings/MusDrawSettings.any"};
    viewForce.Visible ??= Off;
  };
  AnyMuscleViaPoint IliocostalisLumborumR5 = {
    AnyMuscleModel &MusMdl = ....MuscleModels.Right.IliocostalisLumborum.IliocostalisLumborumR5;
    AnyRefNode &Org = ....Segments.Right.R5Seg.IliocostalisLumborumR5NodeR;
    AnyRefNode &Via1 = ....Segments.Right.R6Seg.IliocostalisLumborumR5Via1NodeR;
    AnyRefNode &Via2 = ....Segments.Right.R7Seg.IliocostalisLumborumR5Via2NodeR;
    AnyRefNode &Via3 = ....Segments.Right.R8Seg.IliocostalisLumborumR5Via3NodeR;
    AnyRefNode &Via4 = ....Segments.Right.R9Seg.IliocostalisLumborumR5Via4NodeR;
    AnyRefNode &Via5 = ....Segments.Right.R10Seg.IliocostalisLumborumR5Via5NodeR;
    #if BM_TRUNK_CAVITY_MODEL == _CAVITY_MODEL_VOLUME_
    AnyRefNode &Via6 = ....Abdominal.Layer_L1.BaseSegPosterior.IliocostalisLumborumR5Via6NodeR;
    AnyRefNode &Via7 = ....Abdominal.Layer_L2.BaseSegPosterior.IliocostalisLumborumR5Via7NodeR;
    AnyRefNode &Via8 = ....Abdominal.Layer_L3.BaseSegPosterior.IliocostalisLumborumR5Via8NodeR;
    #else
    AnyRefNode &Via6 = ....Segments.Right.R12Seg.IliocostalisLumborumR5Via6NodeR;
    AnyRefNode &Via7 = ....Segments.L1Seg.IliocostalisLumborumR5Via7NodeR;
    AnyRefNode &Via8 = ....Segments.L2Seg.IliocostalisLumborumR5Via8NodeR;
    #endif
    AnyRefNode &Ins = ....Segments.PelvisSeg.IliocostalisLumborumR5NodeR;
    viewMuscle = {#include "../DrawSettings/MusDrawSettings.any"};
    viewForce.Visible ??= Off;
  };
  AnyMuscleViaPoint IliocostalisLumborumR6 = {
    AnyMuscleModel &MusMdl = ....MuscleModels.Right.IliocostalisLumborum.IliocostalisLumborumR6;
    AnyRefNode &Org = ....Segments.Right.R6Seg.IliocostalisLumborumR6NodeR;
    AnyRefNode &Via1 = ....Segments.Right.R7Seg.IliocostalisLumborumR6Via1NodeR;
    AnyRefNode &Via2 = ....Segments.Right.R8Seg.IliocostalisLumborumR6Via2NodeR;
    AnyRefNode &Via3 = ....Segments.Right.R9Seg.IliocostalisLumborumR6Via3NodeR;
    AnyRefNode &Via4 = ....Segments.Right.R10Seg.IliocostalisLumborumR6Via4NodeR;
    #if BM_TRUNK_CAVITY_MODEL == _CAVITY_MODEL_VOLUME_
    AnyRefNode &Via5 = ....Abdominal.Layer_L1.BaseSegPosterior.IliocostalisLumborumR6Via5NodeR;
    AnyRefNode &Via6 = ....Abdominal.Layer_L2.BaseSegPosterior.IliocostalisLumborumR6Via6NodeR;
    AnyRefNode &Via7 = ....Abdominal.Layer_L3.BaseSegPosterior.IliocostalisLumborumR6Via7NodeR;
    #else
    AnyRefNode &Via5 = ....Segments.Right.R12Seg.IliocostalisLumborumR6Via5NodeR;
    AnyRefNode &Via6 = ....Segments.L1Seg.IliocostalisLumborumR6Via6NodeR;
    AnyRefNode &Via7 = ....Segments.L2Seg.IliocostalisLumborumR6Via7NodeR;
    #endif
    AnyRefNode &Ins = ....Segments.PelvisSeg.IliocostalisLumborumR6NodeR;
    viewMuscle = {#include "../DrawSettings/MusDrawSettings.any"};
    viewForce.Visible ??= Off;
  };
  AnyMuscleViaPoint IliocostalisLumborumR7 = {
    AnyMuscleModel &MusMdl = ....MuscleModels.Right.IliocostalisLumborum.IliocostalisLumborumR7;
    AnyRefNode &Org = ....Segments.Right.R7Seg.IliocostalisLumborumR7NodeR;
    AnyRefNode &Via1 = ....Segments.Right.R8Seg.IliocostalisLumborumR7Via1NodeR;
    AnyRefNode &Via2 = ....Segments.Right.R9Seg.IliocostalisLumborumR7Via2NodeR;
    AnyRefNode &Via3 = ....Segments.Right.R10Seg.IliocostalisLumborumR7Via3NodeR;
    #if BM_TRUNK_CAVITY_MODEL == _CAVITY_MODEL_VOLUME_
    AnyRefNode &Via4 = ....Abdominal.Layer_L1.BaseSegPosterior.IliocostalisLumborumR7Via4NodeR;
    AnyRefNode &Via5 = ....Abdominal.Layer_L2.BaseSegPosterior.IliocostalisLumborumR7Via5NodeR;
    AnyRefNode &Via6 = ....Abdominal.Layer_L3.BaseSegPosterior.IliocostalisLumborumR7Via6NodeR;
    #else
    AnyRefNode &Via4 = ....Segments.Right.R12Seg.IliocostalisLumborumR7Via4NodeR;
    AnyRefNode &Via5 = ....Segments.L1Seg.IliocostalisLumborumR7Via5NodeR;
    AnyRefNode &Via6 = ....Segments.L2Seg.IliocostalisLumborumR7Via6NodeR;
    #endif
    AnyRefNode &Ins = ....Segments.PelvisSeg.IliocostalisLumborumR7NodeR;
    viewMuscle = {#include "../DrawSettings/MusDrawSettings.any"};
    viewForce.Visible ??= Off;
  };
  AnyMuscleViaPoint IliocostalisLumborumR8 = {
    AnyMuscleModel &MusMdl = ....MuscleModels.Right.IliocostalisLumborum.IliocostalisLumborumR8;
    AnyRefNode &Org = ....Segments.Right.R8Seg.IliocostalisLumborumR8NodeR;
    AnyRefNode &Via1 = ....Segments.Right.R9Seg.IliocostalisLumborumR8Via1NodeR;
    AnyRefNode &Via2 = ....Segments.Right.R10Seg.IliocostalisLumborumR8Via2NodeR;
    #if BM_TRUNK_CAVITY_MODEL == _CAVITY_MODEL_VOLUME_
    AnyRefNode &Via3 = ....Abdominal.Layer_L1.BaseSegPosterior.IliocostalisLumborumR8Via3NodeR;
    AnyRefNode &Via4 = ....Abdominal.Layer_L2.BaseSegPosterior.IliocostalisLumborumR8Via4NodeR;
    AnyRefNode &Via5 = ....Abdominal.Layer_L3.BaseSegPosterior.IliocostalisLumborumR8Via5NodeR;
    #else
    AnyRefNode &Via3 = ....Segments.Right.R12Seg.IliocostalisLumborumR8Via3NodeR;
    AnyRefNode &Via4 = ....Segments.L1Seg.IliocostalisLumborumR8Via4NodeR;
    AnyRefNode &Via5 = ....Segments.L2Seg.IliocostalisLumborumR8Via5NodeR;
    #endif
    AnyRefNode &Ins = ....Segments.PelvisSeg.IliocostalisLumborumR8NodeR;
    viewMuscle = {#include "../DrawSettings/MusDrawSettings.any"};
    viewForce.Visible ??= Off;
  };
  AnyMuscleViaPoint IliocostalisLumborumR9 = {
    AnyMuscleModel &MusMdl = ....MuscleModels.Right.IliocostalisLumborum.IliocostalisLumborumR9;
    AnyRefNode &Org = ....Segments.Right.R9Seg.IliocostalisLumborumR9NodeR;
    AnyRefNode &Via1 = ....Segments.Right.R10Seg.IliocostalisLumborumR9Via1NodeR;
    #if BM_TRUNK_CAVITY_MODEL == _CAVITY_MODEL_VOLUME_
    AnyRefNode &Via2 = ....Abdominal.Layer_L1.BaseSegPosterior.IliocostalisLumborumR9Via2NodeR;
    AnyRefNode &Via3 = ....Abdominal.Layer_L2.BaseSegPosterior.IliocostalisLumborumR9Via3NodeR;
    AnyRefNode &Via4 = ....Abdominal.Layer_L3.BaseSegPosterior.IliocostalisLumborumR9Via4NodeR;
    #else
    AnyRefNode &Via2 = ....Segments.Right.R12Seg.IliocostalisLumborumR9Via2NodeR;
    AnyRefNode &Via3 = ....Segments.L1Seg.IliocostalisLumborumR9Via3NodeR;
    AnyRefNode &Via4 = ....Segments.L2Seg.IliocostalisLumborumR9Via4NodeR;
    #endif
    AnyRefNode &Ins = ....Segments.PelvisSeg.IliocostalisLumborumR9NodeR;
    viewMuscle = {#include "../DrawSettings/MusDrawSettings.any"};
    viewForce.Visible ??= Off;
  };
  AnyMuscleViaPoint IliocostalisLumborumR10 = {
    AnyMuscleModel &MusMdl = ....MuscleModels.Right.IliocostalisLumborum.IliocostalisLumborumR10;
    AnyRefNode &Org = ....Segments.Right.R10Seg.IliocostalisLumborumR10NodeR;
    #if BM_TRUNK_CAVITY_MODEL == _CAVITY_MODEL_VOLUME_
    AnyRefNode &Via1 = ....Abdominal.Layer_L1.BaseSegPosterior.IliocostalisLumborumR10Via1NodeR;
    AnyRefNode &Via2 = ....Abdominal.Layer_L2.BaseSegPosterior.IliocostalisLumborumR10Via2NodeR;
    AnyRefNode &Via3 = ....Abdominal.Layer_L3.BaseSegPosterior.IliocostalisLumborumR10Via3NodeR;
    #else
    AnyRefNode &Via1 = ....Segments.Right.R12Seg.IliocostalisLumborumR10Via1NodeR;
    AnyRefNode &Via2 = ....Segments.L1Seg.IliocostalisLumborumR10Via2NodeR;
    AnyRefNode &Via3 = ....Segments.L2Seg.IliocostalisLumborumR10Via3NodeR;
    #endif
    AnyRefNode &Ins = ....Segments.PelvisSeg.IliocostalisLumborumR10NodeR;
    viewMuscle = {#include "../DrawSettings/MusDrawSettings.any"};
    viewForce.Visible ??= Off;
  };
  AnyMuscleViaPoint IliocostalisLumborumR11 = {
    AnyMuscleModel &MusMdl = ....MuscleModels.Right.IliocostalisLumborum.IliocostalisLumborumR11;
    AnyRefNode &Org = ....Segments.Right.R11Seg.IliocostalisLumborumR11NodeR;
    #if BM_TRUNK_CAVITY_MODEL == _CAVITY_MODEL_VOLUME_
//    AnyRefNode &Via1 = ....Abdominal.Layer_L2.BaseSegPosterior.IliocostalisLumborumR11Via1NodeR;
//    AnyRefNode &Via2 = ....Abdominal.Layer_L3.BaseSegPosterior.IliocostalisLumborumR11Via2NodeR;
    #else
    AnyRefNode &Via1 = ....Segments.L1Seg.IliocostalisLumborumR11Via1NodeR;
    AnyRefNode &Via2 = ....Segments.L2Seg.IliocostalisLumborumR11Via2NodeR;
    #endif
    AnyRefNode &Ins = ....Segments.PelvisSeg.IliocostalisLumborumR11NodeR;
    viewMuscle = {#include "../DrawSettings/MusDrawSettings.any"};
    viewForce.Visible ??= Off;
  };
  AnyMuscleViaPoint IliocostalisLumborumR12 = {
    AnyMuscleModel &MusMdl = ....MuscleModels.Right.IliocostalisLumborum.IliocostalisLumborumR12;
    AnyRefNode &Org = ....Segments.Right.R12Seg.IliocostalisLumborumR12NodeR;
    #if BM_TRUNK_CAVITY_MODEL == _CAVITY_MODEL_VOLUME_
//    AnyRefNode &Via1 = ....Abdominal.Layer_L2.BaseSegPosterior.IliocostalisLumborumR12Via1NodeR;
//    AnyRefNode &Via2 = ....Abdominal.Layer_L3.BaseSegPosterior.IliocostalisLumborumR12Via2NodeR;
    #else
    AnyRefNode &Via1 = ....Segments.L1Seg.IliocostalisLumborumR12Via1NodeR;
    AnyRefNode &Via2 = ....Segments.L2Seg.IliocostalisLumborumR12Via2NodeR;
    #endif
    AnyRefNode &Ins = ....Segments.PelvisSeg.IliocostalisLumborumR12NodeR;
    viewMuscle = {#include "../DrawSettings/MusDrawSettings.any"};
    viewForce.Visible ??= Off;
  };
}; // End of Iliocostalis lumborum

// Iliocostalis Thoracis
AnyFolder IliocostalisThoracis = {
  AnyMuscleViaPoint IliocostalisThoracisC7R7 = {
    AnyMuscleModel &MusMdl = ....MuscleModels.Right.IliocostalisThoracis.IliocostalisThoracisC7R7;
    AnyRefNode &Org = ....Segments.C7Seg.Right.IliocostalisThoracisC7R7NodeOrg;
    AnyRefNode &Via1 = ....Segments.Right.R1Seg.IliocostalisThoracisC7R7Via1NodeR;
    AnyRefNode &Via2 = ....Segments.Right.R2Seg.IliocostalisThoracisC7R7Via2NodeR;
    AnyRefNode &Via3 = ....Segments.Right.R3Seg.IliocostalisThoracisC7R7Via3NodeR;
    AnyRefNode &Via4 = ....Segments.Right.R4Seg.IliocostalisThoracisC7R7Via4NodeR;
    AnyRefNode &Via5 = ....Segments.Right.R5Seg.IliocostalisThoracisC7R7Via5NodeR;
    AnyRefNode &Via6 = ....Segments.Right.R6Seg.IliocostalisThoracisC7R7Via6NodeR;
    AnyRefNode &Ins = ....Segments.Right.R7Seg.IliocostalisThoracisC7R7NodeRIns;
    viewMuscle = {#include "../DrawSettings/MusDrawSettings.any"};
    viewForce.Visible ??= Off;
  };
  #if BM_TRUNK_THORACIC_MODEL == _THORACIC_MODEL_FLEXIBLE_
  AnyMuscleViaPoint IliocostalisThoracisR1R7 = {
    AnyMuscleModel &MusMdl = ....MuscleModels.Right.IliocostalisThoracis.IliocostalisThoracisR1R7;
    AnyRefNode &Org = ....Segments.Right.R1Seg.IliocostalisThoracisR1R7NodeROrg;
    AnyRefNode &Via2 = ....Segments.Right.R2Seg.IliocostalisThoracisR1R7Via1NodeR;
    AnyRefNode &Via3 = ....Segments.Right.R3Seg.IliocostalisThoracisR1R7Via2NodeR;
    AnyRefNode &Via4 = ....Segments.Right.R4Seg.IliocostalisThoracisR1R7Via3NodeR;
    AnyRefNode &Via5 = ....Segments.Right.R5Seg.IliocostalisThoracisR1R7Via4NodeR;
    AnyRefNode &Via6 = ....Segments.Right.R6Seg.IliocostalisThoracisR1R7Via5NodeR;
    AnyRefNode &Ins = ....Segments.Right.R7Seg.IliocostalisThoracisR1R7NodeRIns;
    viewMuscle = {#include "../DrawSettings/MusDrawSettings.any"};
    viewForce.Visible ??= Off;
  };
  AnyMuscleViaPoint IliocostalisThoracisR2R8 = {
    AnyMuscleModel &MusMdl = ....MuscleModels.Right.IliocostalisThoracis.IliocostalisThoracisR2R8;
    AnyRefNode &Org = ....Segments.Right.R2Seg.IliocostalisThoracisR2R8NodeROrg;
    AnyRefNode &Via2 = ....Segments.Right.R3Seg.IliocostalisThoracisR2R8Via1NodeR;
    AnyRefNode &Via3 = ....Segments.Right.R4Seg.IliocostalisThoracisR2R8Via2NodeR;
    AnyRefNode &Via4 = ....Segments.Right.R5Seg.IliocostalisThoracisR2R8Via3NodeR;
    AnyRefNode &Via5 = ....Segments.Right.R6Seg.IliocostalisThoracisR2R8Via4NodeR;
    AnyRefNode &Via6 = ....Segments.Right.R7Seg.IliocostalisThoracisR2R8Via5NodeR;
    AnyRefNode &Ins = ....Segments.Right.R8Seg.IliocostalisThoracisR2R8NodeRIns;
    viewMuscle = {#include "../DrawSettings/MusDrawSettings.any"};
    viewForce.Visible ??= Off;
  };
  AnyMuscleViaPoint IliocostalisThoracisR3R9 = {
    AnyMuscleModel &MusMdl = ....MuscleModels.Right.IliocostalisThoracis.IliocostalisThoracisR3R9;
    AnyRefNode &Org = ....Segments.Right.R3Seg.IliocostalisThoracisR3R9NodeROrg;
    AnyRefNode &Via2 = ....Segments.Right.R4Seg.IliocostalisThoracisR3R9Via1NodeR;
    AnyRefNode &Via3 = ....Segments.Right.R5Seg.IliocostalisThoracisR3R9Via2NodeR;
    AnyRefNode &Via4 = ....Segments.Right.R6Seg.IliocostalisThoracisR3R9Via3NodeR;
    AnyRefNode &Via5 = ....Segments.Right.R7Seg.IliocostalisThoracisR3R9Via4NodeR;
    AnyRefNode &Via6 = ....Segments.Right.R8Seg.IliocostalisThoracisR3R9Via5NodeR;
    AnyRefNode &Ins = ....Segments.Right.R9Seg.IliocostalisThoracisR3R9NodeRIns;
    viewMuscle = {#include "../DrawSettings/MusDrawSettings.any"};
    viewForce.Visible ??= Off;
  };
  AnyMuscleViaPoint IliocostalisThoracisR4R10 = {
    AnyMuscleModel &MusMdl = ....MuscleModels.Right.IliocostalisThoracis.IliocostalisThoracisR4R10;
    AnyRefNode &Org = ....Segments.Right.R4Seg.IliocostalisThoracisR4R10NodeROrg;
    AnyRefNode &Via2 = ....Segments.Right.R5Seg.IliocostalisThoracisR4R10Via1NodeR;
    AnyRefNode &Via3 = ....Segments.Right.R6Seg.IliocostalisThoracisR4R10Via2NodeR;
    AnyRefNode &Via4 = ....Segments.Right.R7Seg.IliocostalisThoracisR4R10Via3NodeR;
    AnyRefNode &Via5 = ....Segments.Right.R8Seg.IliocostalisThoracisR4R10Via4NodeR;
    AnyRefNode &Via6 = ....Segments.Right.R9Seg.IliocostalisThoracisR4R10Via5NodeR;
    AnyRefNode &Ins = ....Segments.Right.R10Seg.IliocostalisThoracisR4R10NodeRIns;
    viewMuscle = {#include "../DrawSettings/MusDrawSettings.any"};
    viewForce.Visible ??= Off;
  };
  AnyMuscleViaPoint IliocostalisThoracisR5R11 = {
    AnyMuscleModel &MusMdl = ....MuscleModels.Right.IliocostalisThoracis.IliocostalisThoracisR6R11;
    AnyRefNode &Org = ....Segments.Right.R5Seg.IliocostalisThoracisR5R11NodeROrg;
    AnyRefNode &Via2 = ....Segments.Right.R6Seg.IliocostalisThoracisR5R11Via1NodeR;
    AnyRefNode &Via3 = ....Segments.Right.R7Seg.IliocostalisThoracisR5R11Via2NodeR;
    AnyRefNode &Via4 = ....Segments.Right.R8Seg.IliocostalisThoracisR5R11Via3NodeR;
    AnyRefNode &Via5 = ....Segments.Right.R9Seg.IliocostalisThoracisR5R11Via4NodeR;
    AnyRefNode &Via6 = ....Segments.Right.R10Seg.IliocostalisThoracisR5R11Via5NodeR;
    AnyRefNode &Ins = ....Segments.Right.R11Seg.IliocostalisThoracisR5R11NodeRIns;
    viewMuscle = {#include "../DrawSettings/MusDrawSettings.any"};
    viewForce.Visible ??= Off;
  };
  AnyMuscleViaPoint IliocostalisThoracisR6R12 = {
    AnyMuscleModel &MusMdl = ....MuscleModels.Right.IliocostalisThoracis.IliocostalisThoracisR6R12;
    AnyRefNode &Org = ....Segments.Right.R6Seg.IliocostalisThoracisR6R12NodeR;
    AnyRefNode &Via2 = ....Segments.Right.R7Seg.IliocostalisThoracisR6R12Via1NodeR;
    AnyRefNode &Via3 = ....Segments.Right.R8Seg.IliocostalisThoracisR6R12Via2NodeR;
    AnyRefNode &Via4 = ....Segments.Right.R9Seg.IliocostalisThoracisR6R12Via3NodeR;
    AnyRefNode &Via5 = ....Segments.Right.R10Seg.IliocostalisThoracisR6R12Via4NodeR;
    AnyRefNode &Via6 = ....Segments.Right.R11Seg.IliocostalisThoracisR6R12Via5NodeR;
    AnyRefNode &Ins = ....Segments.Right.R12Seg.IliocostalisThoracisR6R12NodeRIns;
    viewMuscle = {#include "../DrawSettings/MusDrawSettings.any"};
    viewForce.Visible ??= Off;
  };
  #endif
}; // End of Iliocostalis thoracis

#if BM_TRUNK_THORACIC_MODEL == _THORACIC_MODEL_FLEXIBLE_

#define IC_SIZE 6
#define IC_MULTIPLIER 1


#if IC_TYPE == OLD

MuscleGroup IntercostalisExternus(searchString="*.*") = {
  SplineMuscle_CreateMuscle IntercostalisExternusR1R2(
  CREATE_ELEMENTS=IC_MULTIPLIER*(IC_SIZE),
  OriginSegment=....Segments.Right.R1Seg,
  ORIGIN_POINTS=....Data.unscaled.ModelParameters.R1.Right.IC_R1_Ext_Inf.Points,
  InsertionSegment=....Segments.Right.R2Seg,
  INSERTION_POINTS=....Data.unscaled.ModelParameters.R2.Right.IC_R2_Ext_Sup.Points,
  MUSCLE_MODEL_PARAMETERS=....MuscleModels.Right.IntercostalisExternus.IntercostalisExternusR1R2,
  )= {};

  SplineMuscle_CreateMuscle IntercostalisExternusR2R3 (
  CREATE_ELEMENTS=IC_MULTIPLIER*(IC_SIZE+1),
  OriginSegment=....Segments.Right.R2Seg,
  ORIGIN_POINTS=....Data.unscaled.ModelParameters.R2.Right.IC_R2_Ext_Inf.Points,
  InsertionSegment=....Segments.Right.R5Seg,
  INSERTION_POINTS=....Data.unscaled.ModelParameters.R3.Right.IC_R3_Ext_Sup.Points,
  MUSCLE_MODEL_PARAMETERS=....MuscleModels.Right.IntercostalisExternus.IntercostalisExternusR2R3,
  )= {};

  SplineMuscle_CreateMuscle IntercostalisExternusR3R4 (
  CREATE_ELEMENTS=IC_MULTIPLIER*(IC_SIZE+1),
  OriginSegment=....Segments.Right.R3Seg,
  ORIGIN_POINTS=....Data.unscaled.ModelParameters.R3.Right.IC_R3_Ext_Inf.Points,
  InsertionSegment=....Segments.Right.R4Seg,
  INSERTION_POINTS=....Data.unscaled.ModelParameters.R4.Right.IC_R4_Ext_Sup.Points,
  MUSCLE_MODEL_PARAMETERS=....MuscleModels.Right.IntercostalisExternus.IntercostalisExternusR3R4,
  )= {};

  SplineMuscle_CreateMuscle IntercostalisExternusR4R5 (
  CREATE_ELEMENTS=IC_MULTIPLIER*(IC_SIZE+1),
  OriginSegment=....Segments.Right.R4Seg,
  ORIGIN_POINTS=....Data.unscaled.ModelParameters.R4.Right.IC_R4_Ext_Inf.Points,
  InsertionSegment=....Segments.Right.R5Seg,
  INSERTION_POINTS=....Data.unscaled.ModelParameters.R5.Right.IC_R5_Ext_Sup.Points,
  MUSCLE_MODEL_PARAMETERS=....MuscleModels.Right.IntercostalisExternus.IntercostalisExternusR4R5,
  )= {};

  SplineMuscle_CreateMuscle IntercostalisExternusR5R6 (
  CREATE_ELEMENTS=IC_MULTIPLIER*(IC_SIZE+1),
  OriginSegment=....Segments.Right.R5Seg,
  ORIGIN_POINTS=....Data.unscaled.ModelParameters.R5.Right.IC_R5_Ext_Inf.Points,
  InsertionSegment=....Segments.Right.R6Seg,
  INSERTION_POINTS=....Data.unscaled.ModelParameters.R6.Right.IC_R6_Ext_Sup.Points,
  MUSCLE_MODEL_PARAMETERS=....MuscleModels.Right.IntercostalisExternus.IntercostalisExternusR5R6,
  )= {};

  SplineMuscle_CreateMuscle IntercostalisExternusR6R7 (
  CREATE_ELEMENTS=IC_MULTIPLIER*(IC_SIZE+1),
  OriginSegment=....Segments.Right.R6Seg,
  ORIGIN_POINTS=....Data.unscaled.ModelParameters.R6.Right.IC_R6_Ext_Inf.Points,
  InsertionSegment=....Segments.Right.R7Seg,
  INSERTION_POINTS=....Data.unscaled.ModelParameters.R7.Right.IC_R7_Ext_Sup.Points,
  MUSCLE_MODEL_PARAMETERS=....MuscleModels.Right.IntercostalisExternus.IntercostalisExternusR6R7,
  )= {};

  SplineMuscle_CreateMuscle IntercostalisExternusR7R8 (
  CREATE_ELEMENTS=IC_MULTIPLIER*(IC_SIZE+1),
  OriginSegment=....Segments.Right.R7Seg,
  ORIGIN_POINTS=....Data.unscaled.ModelParameters.R7.Right.IC_R7_Ext_Inf.Points,
  InsertionSegment=....Segments.Right.R8Seg,
  INSERTION_POINTS=....Data.unscaled.ModelParameters.R8.Right.IC_R8_Ext_Sup.Points,
  MUSCLE_MODEL_PARAMETERS=....MuscleModels.Right.IntercostalisExternus.IntercostalisExternusR7R8,
  )= {};

  SplineMuscle_CreateMuscle IntercostalisExternusR8R9 (
  CREATE_ELEMENTS=IC_MULTIPLIER*(IC_SIZE+1),
  OriginSegment=....Segments.Right.R8Seg,
  ORIGIN_POINTS=....Data.unscaled.ModelParameters.R8.Right.IC_R8_Ext_Inf.Points,
  InsertionSegment=....Segments.Right.R9Seg,
  INSERTION_POINTS=....Data.unscaled.ModelParameters.R9.Right.IC_R9_Ext_Sup.Points,
  MUSCLE_MODEL_PARAMETERS=....MuscleModels.Right.IntercostalisExternus.IntercostalisExternusR8R9,
  )= {};

  SplineMuscle_CreateMuscle IntercostalisExternusR9R10 (
  CREATE_ELEMENTS=IC_MULTIPLIER*(IC_SIZE+1),
  OriginSegment=....Segments.Right.R9Seg,
  ORIGIN_POINTS=....Data.unscaled.ModelParameters.R9.Right.IC_R9_Ext_Inf.Points,
  InsertionSegment=....Segments.Right.R10Seg,
  INSERTION_POINTS=....Data.unscaled.ModelParameters.R10.Right.IC_R10_Ext_Sup.Points,
  MUSCLE_MODEL_PARAMETERS=....MuscleModels.Right.IntercostalisExternus.IntercostalisExternusR9R10,
  )= {};

  SplineMuscle_CreateMuscle IntercostalisExternusR10R11 (
  CREATE_ELEMENTS=IC_MULTIPLIER*(IC_SIZE),
  OriginSegment=....Segments.Right.R10Seg,
  ORIGIN_POINTS=....Data.unscaled.ModelParameters.R10.Right.IC_R10_Ext_Inf.Points,
  InsertionSegment=....Segments.Right.R11Seg,
  INSERTION_POINTS=....Data.unscaled.ModelParameters.R11.Right.IC_R11_Ext_Sup.Points,
  MUSCLE_MODEL_PARAMETERS=....MuscleModels.Right.IntercostalisExternus.IntercostalisExternusR10R11,
  )= {};

  SplineMuscle_CreateMuscle IntercostalisExternusR11R12 (
  CREATE_ELEMENTS=IC_MULTIPLIER*(IC_SIZE-2),
  OriginSegment=....Segments.Right.R11Seg,
  ORIGIN_POINTS=....Data.unscaled.ModelParameters.R11.Right.IC_R11_Ext_Inf.Points,
  InsertionSegment=....Segments.Right.R12Seg,
  INSERTION_POINTS=....Data.unscaled.ModelParameters.R12.Right.IC_R12_Ext_Sup.Points,
  MUSCLE_MODEL_PARAMETERS=....MuscleModels.Right.IntercostalisExternus.IntercostalisExternusR11R12,
  )= {};
};

MuscleGroup IntercostalisInternus(searchString="*.*") = {


  SplineMuscle_CreateMuscle IntercostalisInternusR1R2 (
  CREATE_ELEMENTS=IC_MULTIPLIER*(IC_SIZE),
  OriginSegment=....Segments.Right.R1Seg,
  ORIGIN_POINTS=....Data.unscaled.ModelParameters.R1.Right.IC_R1_Int_Inf.Points,
  InsertionSegment=....Segments.Right.R2Seg,
  INSERTION_POINTS=....Data.unscaled.ModelParameters.R2.Right.IC_R2_Int_Sup.Points,
  MUSCLE_MODEL_PARAMETERS=....MuscleModels.Right.IntercostalisInternus.IntercostalisInternusR1R2,
  )= {
    NumberOfElements = IC_MULTIPLIER*(IC_SIZE)+1;
    //The Last element is defined manually
    AnyMuscleViaPoint elem_sternum = {
      AnyRefNode &Org = .....Segments.SternumSeg.Right_IntercostalisInternusR1R2_elem_sternum;
      AnyRefNode &Ins = .InsertionSegment.IntercostalisInternusR1R2_elem_sternum;
      AnyMuscleModel MusMdl = {
        F0=..MuscleModel.F0/..NumberOfElements;
        Lf0=..MuscleModel.F0;
        Vol0=..MuscleModel.Vol0/..NumberOfElements;
      };
      viewMuscle = {#include "../DrawSettings/MusDrawSettings.any"};
      //AnyDrawPLine drwLine = {AnyFloat RGB_Red= {1,0,0};AnyFloat RGB_Green= {0,1,0};RGB=iffun(gtfun(.LmtDot,0),RGB_Red,RGB_Green);Thickness=0.005;};

    };
  };


  SplineMuscle_CreateMuscle IntercostalisInternusR2R3 (
  CREATE_ELEMENTS=IC_MULTIPLIER*(IC_SIZE+1),
  OriginSegment=....Segments.Right.R2Seg,
  ORIGIN_POINTS=....Data.unscaled.ModelParameters.R2.Right.IC_R2_Int_Inf.Points,
  InsertionSegment=....Segments.Right.R3Seg,
  INSERTION_POINTS=....Data.unscaled.ModelParameters.R3.Right.IC_R3_Int_Sup.Points,
  MUSCLE_MODEL_PARAMETERS=....MuscleModels.Right.IntercostalisInternus.IntercostalisInternusR2R3,
  )= {
    NumberOfElements =  IC_MULTIPLIER*(IC_SIZE+1)+1;
    AnyMuscleViaPoint elem_sternum= {
      AnyRefNode &Org = .....Segments.SternalBodySeg.Right_IntercostalisInternusR2R3_elem_sternum;
      AnyRefNode &Ins = .InsertionSegment.IntercostalisInternusR2R3_elem_sternum;
      AnyMuscleModel MusMdl = {
        F0=..MuscleModel.F0/..NumberOfElements;
        Lf0=..MuscleModel.F0;
        Vol0=..MuscleModel.Vol0/..NumberOfElements;
      };
      viewMuscle = {#include "../DrawSettings/MusDrawSettings.any"};
      //AnyDrawPLine drwLine = {AnyFloat RGB_Red= {1,0,0};AnyFloat RGB_Green= {0,1,0};RGB=iffun(gtfun(.LmtDot,0),RGB_Red,RGB_Green);Thickness=0.005;};

    };
  };

  SplineMuscle_CreateMuscle IntercostalisInternusR3R4 (
  CREATE_ELEMENTS=IC_MULTIPLIER*(IC_SIZE+1),
  OriginSegment=....Segments.Right.R3Seg,
  ORIGIN_POINTS=....Data.unscaled.ModelParameters.R3.Right.IC_R3_Int_Inf.Points,
  InsertionSegment=....Segments.Right.R4Seg,
  INSERTION_POINTS=....Data.unscaled.ModelParameters.R4.Right.IC_R4_Int_Sup.Points,
  MUSCLE_MODEL_PARAMETERS=....MuscleModels.Right.IntercostalisInternus.IntercostalisInternusR3R4,
  )= {
    NumberOfElements =  IC_MULTIPLIER*(IC_SIZE+1)+1;
    AnyMuscleViaPoint elem_sternum= {
      AnyRefNode &Org = .....Segments.SternalBodySeg.Right_IntercostalisInternusR3R4_elem_sternum;
      AnyRefNode &Ins = .InsertionSegment.IntercostalisInternusR3R4_elem_sternum;
      AnyMuscleModel MusMdl = {
        F0=..MuscleModel.F0/..NumberOfElements;
        Lf0=..MuscleModel.F0;
        Vol0=..MuscleModel.Vol0/..NumberOfElements;
      };
      viewMuscle = {#include "../DrawSettings/MusDrawSettings.any"};
      //AnyDrawPLine drwLine = {AnyFloat RGB_Red= {1,0,0};AnyFloat RGB_Green= {0,1,0};RGB=iffun(gtfun(.LmtDot,0),RGB_Red,RGB_Green);Thickness=0.005;};

    };
  };

  SplineMuscle_CreateMuscle IntercostalisInternusR4R5 (
  CREATE_ELEMENTS=IC_MULTIPLIER*(IC_SIZE+1),
  OriginSegment=....Segments.Right.R4Seg,
  ORIGIN_POINTS=....Data.unscaled.ModelParameters.R4.Right.IC_R4_Int_Inf.Points,
  InsertionSegment=....Segments.Right.R5Seg,
  INSERTION_POINTS=....Data.unscaled.ModelParameters.R5.Right.IC_R5_Int_Sup.Points,
  MUSCLE_MODEL_PARAMETERS=....MuscleModels.Right.IntercostalisInternus.IntercostalisInternusR4R5,
  )= {
    NumberOfElements =  IC_MULTIPLIER*(IC_SIZE+1)+1;
    AnyMuscleViaPoint elem_sternum= {
      AnyRefNode &Org = .....Segments.SternalBodySeg.Right_IntercostalisInternusR4R5_elem_sternum;
      AnyRefNode &Ins = .InsertionSegment.IntercostalisInternusR4R5_elem_sternum;
      AnyMuscleModel MusMdl = {
        F0=..MuscleModel.F0/..NumberOfElements;
        Lf0=..MuscleModel.F0;
        Vol0=..MuscleModel.Vol0/..NumberOfElements;
      };
      viewMuscle = {#include "../DrawSettings/MusDrawSettings.any"};
      //AnyDrawPLine drwLine = {AnyFloat RGB_Red= {1,0,0};AnyFloat RGB_Green= {0,1,0};RGB=iffun(gtfun(.LmtDot,0),RGB_Red,RGB_Green);Thickness=0.005;};

    };
  };

  SplineMuscle_CreateMuscle IntercostalisInternusR5R6 (
  CREATE_ELEMENTS=IC_MULTIPLIER*(IC_SIZE+1),
  OriginSegment=....Segments.Right.R5Seg,
  ORIGIN_POINTS=....Data.unscaled.ModelParameters.R5.Right.IC_R5_Int_Inf.Points,
  InsertionSegment=....Segments.Right.R6Seg,
  INSERTION_POINTS=....Data.unscaled.ModelParameters.R6.Right.IC_R6_Int_Sup.Points,
  MUSCLE_MODEL_PARAMETERS=....MuscleModels.Right.IntercostalisInternus.IntercostalisInternusR5R6,
  )= {
    NumberOfElements =  IC_MULTIPLIER*(IC_SIZE+1)+1;
    AnyMuscleViaPoint elem_sternum= {
      AnyRefNode &Org = .....Segments.SternalBodySeg.Right_IntercostalisInternusR5R6_elem_sternum;
      AnyRefNode &Ins = .InsertionSegment.IntercostalisInternusR5R6_elem_sternum;
      AnyMuscleModel MusMdl = {
        F0=..MuscleModel.F0/..NumberOfElements;
        Lf0=..MuscleModel.F0;
        Vol0=..MuscleModel.Vol0/..NumberOfElements;
      };
      viewMuscle = {#include "../DrawSettings/MusDrawSettings.any"};
      //AnyDrawPLine drwLine = {AnyFloat RGB_Red= {1,0,0};AnyFloat RGB_Green= {0,1,0};RGB=iffun(gtfun(.LmtDot,0),RGB_Red,RGB_Green);Thickness=0.005;};

    };
  };

  SplineMuscle_CreateMuscle IntercostalisInternusR6R7 (
  CREATE_ELEMENTS=IC_MULTIPLIER*(IC_SIZE+1),
  OriginSegment=....Segments.Right.R6Seg,
  ORIGIN_POINTS=....Data.unscaled.ModelParameters.R6.Right.IC_R6_Int_Inf.Points,
  InsertionSegment=....Segments.Right.R7Seg,
  INSERTION_POINTS=....Data.unscaled.ModelParameters.R7.Right.IC_R7_Int_Sup.Points,
  MUSCLE_MODEL_PARAMETERS=....MuscleModels.Right.IntercostalisInternus.IntercostalisInternusR6R7,
  )= {
    NumberOfElements =  IC_MULTIPLIER*(IC_SIZE+1)+1;
    AnyMuscleViaPoint elem_sternum= {
      AnyRefNode &Org = .....Segments.SternalBodySeg.Right_IntercostalisInternusR6R7_elem_sternum;
      AnyRefNode &Ins = .InsertionSegment.IntercostalisInternusR6R7_elem_sternum;
      AnyMuscleModel MusMdl = {
        F0=..MuscleModel.F0/..NumberOfElements;
        Lf0=..MuscleModel.F0;
        Vol0=..MuscleModel.Vol0/..NumberOfElements;
      };
      viewMuscle = {#include "../DrawSettings/MusDrawSettings.any"};
      //AnyDrawPLine drwLine = {AnyFloat RGB_Red= {1,0,0};AnyFloat RGB_Green= {0,1,0};RGB=iffun(gtfun(.LmtDot,0),RGB_Red,RGB_Green);Thickness=0.005;};

    };
  };

  SplineMuscle_CreateMuscle IntercostalisInternusR7R8 (
  CREATE_ELEMENTS=IC_MULTIPLIER*(IC_SIZE+1),
  OriginSegment=....Segments.Right.R7Seg,
  ORIGIN_POINTS=....Data.unscaled.ModelParameters.R7.Right.IC_R7_Int_Inf.Points,
  InsertionSegment=....Segments.Right.R8Seg,
  INSERTION_POINTS=....Data.unscaled.ModelParameters.R8.Right.IC_R8_Int_Sup.Points,
  MUSCLE_MODEL_PARAMETERS=....MuscleModels.Right.IntercostalisInternus.IntercostalisInternusR7R8,
  )= {
    NumberOfElements =  IC_MULTIPLIER*(IC_SIZE+1)+1;
    AnyMuscleViaPoint elem_sternum= {
      #if BM_TRUNK_THORACIC_STERNUM_TOPOLOGY == 4
      AnyRefNode &Org = .....Segments.Right.CostalCartilageSeg.Right_IntercostalisInternusR7R8_elem_sternum;
      #else
      AnyRefNode &Org = .....Segments.SternalBodySeg.Right_IntercostalisInternusR7R8_elem_sternum;
      #endif
      AnyRefNode &Ins = .InsertionSegment.IntercostalisInternusR7R8_elem_sternum;
      AnyMuscleModel MusMdl = {
        F0=..MuscleModel.F0/..NumberOfElements;
        Lf0=..MuscleModel.F0;
        Vol0=..MuscleModel.Vol0/..NumberOfElements;
      };
      viewMuscle = {#include "../DrawSettings/MusDrawSettings.any"};
      // AnyDrawPLine drwLine = {AnyFloat RGB_Red= {1,0,0};AnyFloat RGB_Green= {0,1,0};RGB=iffun(gtfun(.LmtDot,0),RGB_Red,RGB_Green);Thickness=0.005;};

    };
  };

  SplineMuscle_CreateMuscle IntercostalisInternusR8R9 (
  CREATE_ELEMENTS=IC_MULTIPLIER*(IC_SIZE+1),
  OriginSegment=....Segments.Right.R8Seg,
  ORIGIN_POINTS=....Data.unscaled.ModelParameters.R8.Right.IC_R8_Int_Inf.Points,
  InsertionSegment=....Segments.Right.R9Seg,
  INSERTION_POINTS=....Data.unscaled.ModelParameters.R9.Right.IC_R9_Int_Sup.Points,
  MUSCLE_MODEL_PARAMETERS=....MuscleModels.Right.IntercostalisInternus.IntercostalisInternusR8R9,
  )= {
    NumberOfElements =  IC_MULTIPLIER*(IC_SIZE+1)+1;
    AnyMuscleViaPoint elem_sternum= {
      #if BM_TRUNK_THORACIC_STERNUM_TOPOLOGY == 4
      AnyRefNode &Org = .....Segments.Right.CostalCartilageSeg.Right_IntercostalisInternusR8R9_elem_sternum;
      #else
      AnyRefNode &Org = .....Segments.SternalBodySeg.Right_IntercostalisInternusR8R9_elem_sternum;
      #endif
      AnyRefNode &Ins = .InsertionSegment.IntercostalisInternusR8R9_elem_sternum;
      AnyMuscleModel MusMdl = {
        F0=..MuscleModel.F0/..NumberOfElements;
        Lf0=..MuscleModel.F0;
        Vol0=..MuscleModel.Vol0/..NumberOfElements;
      };
      viewMuscle = {#include "../DrawSettings/MusDrawSettings.any"};
    };
  };

  SplineMuscle_CreateMuscle IntercostalisInternusR9R10 (
  CREATE_ELEMENTS=IC_MULTIPLIER*(IC_SIZE+1),
  OriginSegment=....Segments.Right.R9Seg,
  ORIGIN_POINTS=....Data.unscaled.ModelParameters.R9.Right.IC_R9_Int_Inf.Points,
  InsertionSegment=....Segments.Right.R10Seg,
  INSERTION_POINTS=....Data.unscaled.ModelParameters.R10.Right.IC_R10_Int_Sup.Points,
  MUSCLE_MODEL_PARAMETERS=....MuscleModels.Right.IntercostalisInternus.IntercostalisInternusR9R10,
  )= {
    NumberOfElements =  IC_MULTIPLIER*(IC_SIZE+1)+1;
    AnyMuscleViaPoint elem_sternum= {
      #if BM_TRUNK_THORACIC_STERNUM_TOPOLOGY == 4
      AnyRefNode &Org = .....Segments.Right.CostalCartilageSeg.Right_IntercostalisInternusR9R10_elem_sternum;
      #else
      AnyRefNode &Org = .....Segments.SternalBodySeg.Right_IntercostalisInternusR9R10_elem_sternum;
      #endif
      AnyRefNode &Ins = .InsertionSegment.IntercostalisInternusR9R10_elem_sternum;
      AnyMuscleModel MusMdl = {
        F0=..MuscleModel.F0/..NumberOfElements;
        Lf0=..MuscleModel.F0;
        Vol0=..MuscleModel.Vol0/..NumberOfElements;
      };
      viewMuscle = {#include "../DrawSettings/MusDrawSettings.any"};
    };
  };

  SplineMuscle_CreateMuscle IntercostalisInternusR10R11 (
  CREATE_ELEMENTS=IC_MULTIPLIER*(IC_SIZE),
  OriginSegment=....Segments.Right.R10Seg,
  ORIGIN_POINTS=....Data.unscaled.ModelParameters.R10.Right.IC_R10_Int_Inf.Points,
  InsertionSegment=....Segments.Right.R11Seg,
  INSERTION_POINTS=....Data.unscaled.ModelParameters.R11.Right.IC_R11_Int_Sup.Points,
  MUSCLE_MODEL_PARAMETERS=....MuscleModels.Right.IntercostalisInternus.IntercostalisInternusR10R11,
  )= {};

  SplineMuscle_CreateMuscle IntercostalisInternusR11R12 (
  CREATE_ELEMENTS=IC_MULTIPLIER*(IC_SIZE-1),
  OriginSegment=....Segments.Right.R11Seg,
  ORIGIN_POINTS=....Data.unscaled.ModelParameters.R11.Right.IC_R11_Int_Inf.Points,
  InsertionSegment=....Segments.Right.R12Seg,
  INSERTION_POINTS=....Data.unscaled.ModelParameters.R12.Right.IC_R12_Int_Sup.Points,
  MUSCLE_MODEL_PARAMETERS=....MuscleModels.Right.IntercostalisInternus.IntercostalisInternusR11R12,
  )= {};
};

MuscleGroup IntercostalisIntimus(searchString="*.*") = {

  SplineMuscle_CreateMuscle IntercostalisIntimusR1R2(
  CREATE_ELEMENTS=IC_MULTIPLIER*(IC_SIZE),
  OriginSegment=....Segments.Right.R1Seg,
  ORIGIN_POINTS=....Data.unscaled.ModelParameters.R1.Right.IC_R1_Inn_Inf.Points,
  InsertionSegment=....Segments.Right.R2Seg,
  INSERTION_POINTS=....Data.unscaled.ModelParameters.R2.Right.IC_R2_Inn_Sup.Points,
  MUSCLE_MODEL_PARAMETERS=....MuscleModels.Right.IntercostalisIntimus.IntercostalisIntimusR1R2,
  )= {};

  SplineMuscle_CreateMuscle IntercostalisIntimusR2R3 (
  CREATE_ELEMENTS=IC_MULTIPLIER*(IC_SIZE+1),
  OriginSegment=....Segments.Right.R2Seg,
  ORIGIN_POINTS=....Data.unscaled.ModelParameters.R2.Right.IC_R2_Inn_Inf.Points,
  InsertionSegment=....Segments.Right.R5Seg,
  INSERTION_POINTS=....Data.unscaled.ModelParameters.R3.Right.IC_R3_Inn_Sup.Points,
  MUSCLE_MODEL_PARAMETERS=....MuscleModels.Right.IntercostalisIntimus.IntercostalisIntimusR2R3,
  )= {};

  SplineMuscle_CreateMuscle IntercostalisIntimusR3R4 (
  CREATE_ELEMENTS=IC_MULTIPLIER*(IC_SIZE+1),
  OriginSegment=....Segments.Right.R3Seg,
  ORIGIN_POINTS=....Data.unscaled.ModelParameters.R3.Right.IC_R3_Inn_Inf.Points,
  InsertionSegment=....Segments.Right.R4Seg,
  INSERTION_POINTS=....Data.unscaled.ModelParameters.R4.Right.IC_R4_Inn_Sup.Points,
  MUSCLE_MODEL_PARAMETERS=....MuscleModels.Right.IntercostalisIntimus.IntercostalisIntimusR3R4,
  )= {};

  SplineMuscle_CreateMuscle IntercostalisIntimusR4R5 (
  CREATE_ELEMENTS=IC_MULTIPLIER*(IC_SIZE+1),
  OriginSegment=....Segments.Right.R4Seg,
  ORIGIN_POINTS=....Data.unscaled.ModelParameters.R4.Right.IC_R4_Inn_Inf.Points,
  InsertionSegment=....Segments.Right.R5Seg,
  INSERTION_POINTS=....Data.unscaled.ModelParameters.R5.Right.IC_R5_Inn_Sup.Points,
  MUSCLE_MODEL_PARAMETERS=....MuscleModels.Right.IntercostalisIntimus.IntercostalisIntimusR4R5,
  )= {};

  SplineMuscle_CreateMuscle IntercostalisIntimusR5R6 (
  CREATE_ELEMENTS=IC_MULTIPLIER*(IC_SIZE+1),
  OriginSegment=....Segments.Right.R5Seg,
  ORIGIN_POINTS=....Data.unscaled.ModelParameters.R5.Right.IC_R5_Inn_Inf.Points,
  InsertionSegment=....Segments.Right.R6Seg,
  INSERTION_POINTS=....Data.unscaled.ModelParameters.R6.Right.IC_R6_Inn_Sup.Points,
  MUSCLE_MODEL_PARAMETERS=....MuscleModels.Right.IntercostalisIntimus.IntercostalisIntimusR5R6,
  )= {};

  SplineMuscle_CreateMuscle IntercostalisIntimusR6R7 (
  CREATE_ELEMENTS=IC_MULTIPLIER*(IC_SIZE+1),
  OriginSegment=....Segments.Right.R6Seg,
  ORIGIN_POINTS=....Data.unscaled.ModelParameters.R6.Right.IC_R6_Inn_Inf.Points,
  InsertionSegment=....Segments.Right.R7Seg,
  INSERTION_POINTS=....Data.unscaled.ModelParameters.R7.Right.IC_R7_Inn_Sup.Points,
  MUSCLE_MODEL_PARAMETERS=....MuscleModels.Right.IntercostalisIntimus.IntercostalisIntimusR6R7,
  )= {};

  SplineMuscle_CreateMuscle IntercostalisIntimusR7R8 (
  CREATE_ELEMENTS=IC_MULTIPLIER*(IC_SIZE+1),
  OriginSegment=....Segments.Right.R7Seg,
  ORIGIN_POINTS=....Data.unscaled.ModelParameters.R7.Right.IC_R7_Inn_Inf.Points,
  InsertionSegment=....Segments.Right.R8Seg,
  INSERTION_POINTS=....Data.unscaled.ModelParameters.R8.Right.IC_R8_Inn_Sup.Points,
  MUSCLE_MODEL_PARAMETERS=....MuscleModels.Right.IntercostalisIntimus.IntercostalisIntimusR7R8,
  )= {};

  SplineMuscle_CreateMuscle IntercostalisIntimusR8R9 (
  CREATE_ELEMENTS=IC_MULTIPLIER*(IC_SIZE+1),
  OriginSegment=....Segments.Right.R8Seg,
  ORIGIN_POINTS=....Data.unscaled.ModelParameters.R8.Right.IC_R8_Inn_Inf.Points,
  InsertionSegment=....Segments.Right.R9Seg,
  INSERTION_POINTS=....Data.unscaled.ModelParameters.R9.Right.IC_R9_Inn_Sup.Points,
  MUSCLE_MODEL_PARAMETERS=....MuscleModels.Right.IntercostalisIntimus.IntercostalisIntimusR8R9,
  )= {};

  SplineMuscle_CreateMuscle IntercostalisIntimusR9R10 (
  CREATE_ELEMENTS=IC_MULTIPLIER*(IC_SIZE+1),
  OriginSegment=....Segments.Right.R9Seg,
  ORIGIN_POINTS=....Data.unscaled.ModelParameters.R9.Right.IC_R9_Inn_Inf.Points,
  InsertionSegment=....Segments.Right.R10Seg,
  INSERTION_POINTS=....Data.unscaled.ModelParameters.R10.Right.IC_R10_Inn_Sup.Points,
  MUSCLE_MODEL_PARAMETERS=....MuscleModels.Right.IntercostalisIntimus.IntercostalisIntimusR9R10,
  )= {};

  SplineMuscle_CreateMuscle IntercostalisIntimusR10R11 (
  CREATE_ELEMENTS=IC_MULTIPLIER*(IC_SIZE),
  OriginSegment=....Segments.Right.R10Seg,
  ORIGIN_POINTS=....Data.unscaled.ModelParameters.R10.Right.IC_R10_Inn_Inf.Points,
  InsertionSegment=....Segments.Right.R11Seg,
  INSERTION_POINTS=....Data.unscaled.ModelParameters.R11.Right.IC_R11_Inn_Sup.Points,
  MUSCLE_MODEL_PARAMETERS=....MuscleModels.Right.IntercostalisIntimus.IntercostalisIntimusR10R11,
  )= {};

  SplineMuscle_CreateMuscle IntercostalisIntimusR11R12 (
  CREATE_ELEMENTS=IC_MULTIPLIER*(IC_SIZE-2),
  OriginSegment=....Segments.Right.R11Seg,
  ORIGIN_POINTS=....Data.unscaled.ModelParameters.R11.Right.IC_R11_Inn_Inf.Points,
  InsertionSegment=....Segments.Right.R12Seg,
  INSERTION_POINTS=....Data.unscaled.ModelParameters.R12.Right.IC_R12_Inn_Sup.Points,
  MUSCLE_MODEL_PARAMETERS=....MuscleModels.Right.IntercostalisIntimus.IntercostalisIntimusR11R12,
  )= {};

};
#endif


#if IC_TYPE != OLD
//  #if IC_TYPE== MULTI_OFFSET

MuscleGroup IntercostalisExternus(searchString="*.*") = {

  SplineMuscle_CreateMuscleMultiOffset IntercostalisExternusR1R2 (
  CREATE_ELEMENTS=IC_MULTIPLIER*(IC_SIZE+1),
  OriginSegment=....Segments.Right.R1Seg,
  ORIGIN_POINTS=....Segments.Right.R1Seg.IC_points.Ext_InfPoints,
  InsertionSegment=....Segments.Right.R2Seg,
  INSERTION_POINTS=....Segments.Right.R2Seg.IC_points.Ext_SupPoints,
  MUSCLE_MODEL_PARAMETERS=....MuscleModels.Right.IntercostalisExternus.IntercostalisExternusR1R2,
  )= {DesiredAngle=45;};

  SplineMuscle_CreateMuscleMultiOffset IntercostalisExternusR2R3 (
  CREATE_ELEMENTS=IC_MULTIPLIER*(IC_SIZE+1),
  OriginSegment=....Segments.Right.R2Seg,
  ORIGIN_POINTS=....Segments.Right.R2Seg.IC_points.Ext_InfPoints,
  InsertionSegment=....Segments.Right.R3Seg,
  INSERTION_POINTS=....Segments.Right.R3Seg.IC_points.Ext_SupPoints,
  MUSCLE_MODEL_PARAMETERS=....MuscleModels.Right.IntercostalisExternus.IntercostalisExternusR2R3,
  )= {DesiredAngle=45;};


  SplineMuscle_CreateMuscleMultiOffset IntercostalisExternusR3R4 (
  CREATE_ELEMENTS=IC_MULTIPLIER*(IC_SIZE+1),
  OriginSegment=....Segments.Right.R3Seg,
  ORIGIN_POINTS=....Segments.Right.R3Seg.IC_points.Ext_InfPoints,
  InsertionSegment=....Segments.Right.R4Seg,
  INSERTION_POINTS=....Segments.Right.R4Seg.IC_points.Ext_SupPoints,
  MUSCLE_MODEL_PARAMETERS=....MuscleModels.Right.IntercostalisExternus.IntercostalisExternusR3R4,
  )= {DesiredAngle=45;};

  SplineMuscle_CreateMuscleMultiOffset IntercostalisExternusR4R5 (
  CREATE_ELEMENTS=IC_MULTIPLIER*(IC_SIZE+1),
  OriginSegment=....Segments.Right.R4Seg,
  ORIGIN_POINTS=....Segments.Right.R4Seg.IC_points.Ext_InfPoints,
  InsertionSegment=....Segments.Right.R5Seg,
  INSERTION_POINTS=....Segments.Right.R5Seg.IC_points.Ext_SupPoints,
  MUSCLE_MODEL_PARAMETERS=....MuscleModels.Right.IntercostalisExternus.IntercostalisExternusR4R5,
  )= {DesiredAngle=45;};


  SplineMuscle_CreateMuscleMultiOffset IntercostalisExternusR5R6 (
  CREATE_ELEMENTS=IC_MULTIPLIER*(IC_SIZE+1),
  OriginSegment=....Segments.Right.R5Seg,
  ORIGIN_POINTS=....Segments.Right.R5Seg.IC_points.Ext_InfPoints,
  InsertionSegment=....Segments.Right.R6Seg,
  INSERTION_POINTS=....Segments.Right.R6Seg.IC_points.Ext_SupPoints,
  MUSCLE_MODEL_PARAMETERS=....MuscleModels.Right.IntercostalisExternus.IntercostalisExternusR5R6,
  )= {DesiredAngle=45;};


  SplineMuscle_CreateMuscleMultiOffset IntercostalisExternusR6R7 (
  CREATE_ELEMENTS=IC_MULTIPLIER*(IC_SIZE+1),
  OriginSegment=....Segments.Right.R6Seg,
  ORIGIN_POINTS=....Segments.Right.R6Seg.IC_points.Ext_InfPoints,
  InsertionSegment=....Segments.Right.R7Seg,
  INSERTION_POINTS=....Segments.Right.R7Seg.IC_points.Ext_SupPoints,
  MUSCLE_MODEL_PARAMETERS=....MuscleModels.Right.IntercostalisExternus.IntercostalisExternusR6R7,
  )= {DesiredAngle=45;};

  SplineMuscle_CreateMuscleMultiOffset IntercostalisExternusR7R8 (
  CREATE_ELEMENTS=IC_MULTIPLIER*(IC_SIZE+1),
  OriginSegment=....Segments.Right.R7Seg,
  ORIGIN_POINTS=....Segments.Right.R7Seg.IC_points.Ext_InfPoints,
  InsertionSegment=....Segments.Right.R8Seg,
  INSERTION_POINTS=....Segments.Right.R8Seg.IC_points.Ext_SupPoints,
  MUSCLE_MODEL_PARAMETERS=....MuscleModels.Right.IntercostalisExternus.IntercostalisExternusR7R8,
  )= {DesiredAngle=45;};


  SplineMuscle_CreateMuscleMultiOffset IntercostalisExternusR8R9 (
  CREATE_ELEMENTS=IC_MULTIPLIER*(IC_SIZE+1),
  OriginSegment=....Segments.Right.R8Seg,
  ORIGIN_POINTS=....Segments.Right.R8Seg.IC_points.Ext_InfPoints,
  InsertionSegment=....Segments.Right.R9Seg,
  INSERTION_POINTS=....Segments.Right.R9Seg.IC_points.Ext_SupPoints,
  MUSCLE_MODEL_PARAMETERS=....MuscleModels.Right.IntercostalisExternus.IntercostalisExternusR8R9,
  )= {DesiredAngle=45;};

  SplineMuscle_CreateMuscleMultiOffset IntercostalisExternusR9R10 (
  CREATE_ELEMENTS=IC_MULTIPLIER*(IC_SIZE+1),
  OriginSegment=....Segments.Right.R9Seg,
  ORIGIN_POINTS=....Segments.Right.R9Seg.IC_points.Ext_InfPoints,
  InsertionSegment=....Segments.Right.R10Seg,
  INSERTION_POINTS=....Segments.Right.R10Seg.IC_points.Ext_SupPoints,
  MUSCLE_MODEL_PARAMETERS=....MuscleModels.Right.IntercostalisExternus.IntercostalisExternusR9R10,
  )= {DesiredAngle=45;};


  SplineMuscle_CreateMuscleMultiOffset IntercostalisExternusR10R11 (
  CREATE_ELEMENTS=IC_MULTIPLIER*(IC_SIZE),
  OriginSegment=....Segments.Right.R10Seg,
  ORIGIN_POINTS=....Segments.Right.R10Seg.IC_points.Ext_InfPoints,
  InsertionSegment=....Segments.Right.R11Seg,
  INSERTION_POINTS=....Segments.Right.R11Seg.IC_points.Ext_SupPoints,
  MUSCLE_MODEL_PARAMETERS=....MuscleModels.Right.IntercostalisExternus.IntercostalisExternusR10R11,
  )= {DesiredAngle=45;};


  SplineMuscle_CreateMuscleMultiOffset IntercostalisExternusR11R12 (
  CREATE_ELEMENTS=IC_MULTIPLIER*(IC_SIZE-4),
  OriginSegment=....Segments.Right.R11Seg,
  ORIGIN_POINTS=....Segments.Right.R11Seg.IC_points.Ext_InfPoints,
  InsertionSegment=....Segments.Right.R12Seg,
  INSERTION_POINTS=....Segments.Right.R12Seg.IC_points.Ext_SupPoints,
  MUSCLE_MODEL_PARAMETERS=....MuscleModels.Right.IntercostalisExternus.IntercostalisExternusR11R12,
  )= {DesiredAngle=45;};
};

MuscleGroup IntercostalisInternus(searchString="*.*") = {

  SplineMuscle_CreateMuscleMultiOffset IntercostalisInternusR1R2 (
  CREATE_ELEMENTS=IC_MULTIPLIER*(IC_SIZE+1-3),
  OriginSegment=....Segments.Right.R1Seg,
  ORIGIN_POINTS=....Segments.Right.R1Seg.IC_points.Int_InfPoints,
  InsertionSegment=....Segments.Right.R2Seg,
  INSERTION_POINTS=....Segments.Right.R2Seg.IC_points.Int_SupPoints,
  MUSCLE_MODEL_PARAMETERS=....MuscleModels.Right.IntercostalisInternus.IntercostalisInternusR1R2,
  )= {
    DesiredAngle =-45;
    NumberOfElements = IC_MULTIPLIER*(IC_SIZE+1-3);
    //The Last element is defined manually
    AnyMuscleViaPoint elem_sternum = {
      AnyRefNode &Org = .....Segments.SternumSeg.Right_IntercostalisInternusR1R2_elem_sternum;
      AnyRefNode &Ins = .InsertionSegment.IntercostalisInternusR1R2_elem_sternum;
      AnyMuscleModel MusMdl = {
        F0=..MuscleModel.F0/..NumberOfElements;
        Lf0=..MuscleModel.F0;
        Vol0=..MuscleModel.Vol0/..NumberOfElements;
      };
      viewMuscle = {#include "../DrawSettings/MusDrawSettings.any"};
      //AnyDrawPLine drwLine = {AnyFloat RGB_Red= {1,0,0};AnyFloat RGB_Green= {0,1,0};RGB=iffun(gtfun(.LmtDot,0),RGB_Red,RGB_Green);Thickness=0.005;};
    };
  };

  SplineMuscle_CreateMuscleMultiOffset IntercostalisInternusR2R3 (
  CREATE_ELEMENTS=IC_MULTIPLIER*(IC_SIZE+1),
  OriginSegment=....Segments.Right.R2Seg,
  ORIGIN_POINTS=....Segments.Right.R2Seg.IC_points.Int_InfPoints,
  InsertionSegment=....Segments.Right.R3Seg,
  INSERTION_POINTS=....Segments.Right.R3Seg.IC_points.Int_SupPoints,
  MUSCLE_MODEL_PARAMETERS=....MuscleModels.Right.IntercostalisInternus.IntercostalisInternusR2R3,
  )= {
    DesiredAngle=-45;
    NumberOfElements =  IC_MULTIPLIER*(IC_SIZE+1);
    AnyMuscleViaPoint elem_sternum= {
      AnyRefNode &Org = .....Segments.SternalBodySeg.Right_IntercostalisInternusR2R3_elem_sternum;
      AnyRefNode &Ins = .InsertionSegment.IntercostalisInternusR2R3_elem_sternum;
      AnyMuscleModel MusMdl = {
        F0 = ..MuscleModel.F0/..NumberOfElements;
        Lf0 = ..MuscleModel.F0;
        Vol0 = ..MuscleModel.Vol0/..NumberOfElements;
      };
      viewMuscle = {#include "../DrawSettings/MusDrawSettings.any"};
      //AnyDrawPLine drwLine = {AnyFloat RGB_Red= {1,0,0};AnyFloat RGB_Green= {0,1,0};RGB=iffun(gtfun(.LmtDot,0),RGB_Red,RGB_Green);Thickness=0.005;};
    };
  };

  SplineMuscle_CreateMuscleMultiOffset IntercostalisInternusR3R4 (
  CREATE_ELEMENTS=IC_MULTIPLIER*(IC_SIZE+1),
  OriginSegment=....Segments.Right.R3Seg,
  ORIGIN_POINTS=....Segments.Right.R3Seg.IC_points.Int_InfPoints,
  InsertionSegment=....Segments.Right.R4Seg,
  INSERTION_POINTS=....Segments.Right.R4Seg.IC_points.Int_SupPoints,
  MUSCLE_MODEL_PARAMETERS=....MuscleModels.Right.IntercostalisInternus.IntercostalisInternusR3R4,
  )= {
    DesiredAngle=-45;
    NumberOfElements =  IC_MULTIPLIER*(IC_SIZE+1);
    AnyMuscleViaPoint elem_sternum= {
      AnyRefNode &Org = .....Segments.SternalBodySeg.Right_IntercostalisInternusR3R4_elem_sternum;
      AnyRefNode &Ins = .InsertionSegment.IntercostalisInternusR3R4_elem_sternum;
      AnyMuscleModel MusMdl = {
        F0 = ..MuscleModel.F0/..NumberOfElements;
        Lf0 = ..MuscleModel.F0;
        Vol0 = ..MuscleModel.Vol0/..NumberOfElements;
      };
      viewMuscle = {#include "../DrawSettings/MusDrawSettings.any"};
      // AnyDrawPLine drwLine = {AnyFloat RGB_Red= {1,0,0};AnyFloat RGB_Green= {0,1,0};RGB=iffun(gtfun(.LmtDot,0),RGB_Red,RGB_Green);Thickness=0.005;};
    };
  };

  SplineMuscle_CreateMuscleMultiOffset IntercostalisInternusR4R5 (
  CREATE_ELEMENTS=IC_MULTIPLIER*(IC_SIZE+1),
  OriginSegment=....Segments.Right.R4Seg,
  ORIGIN_POINTS=....Segments.Right.R4Seg.IC_points.Int_InfPoints,
  InsertionSegment=....Segments.Right.R5Seg,
  INSERTION_POINTS=....Segments.Right.R5Seg.IC_points.Int_SupPoints,
  MUSCLE_MODEL_PARAMETERS=....MuscleModels.Right.IntercostalisInternus.IntercostalisInternusR4R5,
  )= {
    DesiredAngle=-45;
    NumberOfElements =  IC_MULTIPLIER*(IC_SIZE+1);
    AnyMuscleViaPoint elem_sternum= {
      AnyRefNode &Org = .....Segments.SternalBodySeg.Right_IntercostalisInternusR4R5_elem_sternum;
      AnyRefNode &Ins = .InsertionSegment.IntercostalisInternusR4R5_elem_sternum;
      AnyMuscleModel MusMdl = {
        F0 = ..MuscleModel.F0/..NumberOfElements;
        Lf0 = ..MuscleModel.F0;
        Vol0 = ..MuscleModel.Vol0/..NumberOfElements;
      };
      viewMuscle = {#include "../DrawSettings/MusDrawSettings.any"};
      //  AnyDrawPLine drwLine = {AnyFloat RGB_Red= {1,0,0};AnyFloat RGB_Green= {0,1,0};RGB=iffun(gtfun(.LmtDot,0),RGB_Red,RGB_Green);Thickness=0.005;};
    };
  };

  SplineMuscle_CreateMuscleMultiOffset IntercostalisInternusR5R6 (
  CREATE_ELEMENTS=IC_MULTIPLIER*(IC_SIZE+1),
  OriginSegment=....Segments.Right.R5Seg,
  ORIGIN_POINTS=....Segments.Right.R5Seg.IC_points.Int_InfPoints,
  InsertionSegment=....Segments.Right.R6Seg,
  INSERTION_POINTS=....Segments.Right.R6Seg.IC_points.Int_SupPoints,
  MUSCLE_MODEL_PARAMETERS=....MuscleModels.Right.IntercostalisInternus.IntercostalisInternusR5R6,
  )= {
    DesiredAngle=-45;
    NumberOfElements =  IC_MULTIPLIER*(IC_SIZE+1);
    AnyMuscleViaPoint elem_sternum= {
      AnyRefNode &Org = .....Segments.SternalBodySeg.Right_IntercostalisInternusR5R6_elem_sternum;
      AnyRefNode &Ins = .InsertionSegment.IntercostalisInternusR5R6_elem_sternum;
      AnyMuscleModel MusMdl = {
        F0 = ..MuscleModel.F0/..NumberOfElements;
        Lf0 = ..MuscleModel.F0;
        Vol0 = ..MuscleModel.Vol0/..NumberOfElements;
      };
      viewMuscle = {#include "../DrawSettings/MusDrawSettings.any"};
      // AnyDrawPLine drwLine = {AnyFloat RGB_Red= {1,0,0};AnyFloat RGB_Green= {0,1,0};RGB=iffun(gtfun(.LmtDot,0),RGB_Red,RGB_Green);Thickness=0.005;};
    };
  };

  SplineMuscle_CreateMuscleMultiOffset IntercostalisInternusR6R7 (
  CREATE_ELEMENTS=IC_MULTIPLIER*(IC_SIZE+1),
  OriginSegment=....Segments.Right.R6Seg,
  ORIGIN_POINTS=....Segments.Right.R6Seg.IC_points.Int_InfPoints,
  InsertionSegment=....Segments.Right.R7Seg,
  INSERTION_POINTS=....Segments.Right.R7Seg.IC_points.Int_SupPoints,
  MUSCLE_MODEL_PARAMETERS=....MuscleModels.Right.IntercostalisInternus.IntercostalisInternusR6R7,
  )= {
    DesiredAngle=-45;
    NumberOfElements =  IC_MULTIPLIER*(IC_SIZE+1);
    AnyMuscleViaPoint elem_sternum= {
      AnyRefNode &Org = .....Segments.SternalBodySeg.Right_IntercostalisInternusR6R7_elem_sternum;
      AnyRefNode &Ins = .InsertionSegment.IntercostalisInternusR6R7_elem_sternum;
      AnyMuscleModel MusMdl = {
        F0 = ..MuscleModel.F0/..NumberOfElements;
        Lf0 = ..MuscleModel.F0;
        Vol0 = ..MuscleModel.Vol0/..NumberOfElements;
      };
      viewMuscle = {#include "../DrawSettings/MusDrawSettings.any"};
      //AnyDrawPLine drwLine = {AnyFloat RGB_Red= {1,0,0};AnyFloat RGB_Green= {0,1,0};RGB=iffun(gtfun(.LmtDot,0),RGB_Red,RGB_Green);Thickness=0.005;};

    };
  };

  SplineMuscle_CreateMuscleMultiOffset IntercostalisInternusR7R8 (
  CREATE_ELEMENTS=IC_MULTIPLIER*(IC_SIZE+1),
  OriginSegment=....Segments.Right.R7Seg,
  ORIGIN_POINTS=....Segments.Right.R7Seg.IC_points.Int_InfPoints,
  InsertionSegment=....Segments.Right.R8Seg,
  INSERTION_POINTS=....Segments.Right.R8Seg.IC_points.Int_SupPoints,
  MUSCLE_MODEL_PARAMETERS=....MuscleModels.Right.IntercostalisInternus.IntercostalisInternusR7R8,
  )= {
    DesiredAngle=-45;
    NumberOfElements =  IC_MULTIPLIER*(IC_SIZE+1);
    AnyMuscleViaPoint elem_sternum= {
      #if BM_TRUNK_THORACIC_STERNUM_TOPOLOGY == 4
      AnyRefNode &Org = .....Segments.Right.CostalCartilageSeg.Right_IntercostalisInternusR7R8_elem_sternum;
      #else
      AnyRefNode &Org = .....Segments.SternalBodySeg.Right_IntercostalisInternusR7R8_elem_sternum;
      #endif
      AnyRefNode &Ins = .InsertionSegment.IntercostalisInternusR7R8_elem_sternum;
      AnyMuscleModel MusMdl = {
        F0 = ..MuscleModel.F0/..NumberOfElements;
        Lf0 = ..MuscleModel.F0;
        Vol0 = ..MuscleModel.Vol0/..NumberOfElements;
      };
      viewMuscle = {#include "../DrawSettings/MusDrawSettings.any"};
      //AnyDrawPLine drwLine = {AnyFloat RGB_Red= {1,0,0};AnyFloat RGB_Green= {0,1,0};RGB=iffun(gtfun(.LmtDot,0),RGB_Red,RGB_Green);Thickness=0.005;};

    };
  };


  SplineMuscle_CreateMuscleMultiOffset IntercostalisInternusR8R9 (
  CREATE_ELEMENTS=IC_MULTIPLIER*(IC_SIZE+1),
  OriginSegment=....Segments.Right.R8Seg,
  ORIGIN_POINTS=....Segments.Right.R8Seg.IC_points.Int_InfPoints,
  InsertionSegment=....Segments.Right.R9Seg,
  INSERTION_POINTS=....Segments.Right.R9Seg.IC_points.Int_SupPoints,
  MUSCLE_MODEL_PARAMETERS=....MuscleModels.Right.IntercostalisInternus.IntercostalisInternusR8R9,
  )= {
    DesiredAngle=-45;
    NumberOfElements =  IC_MULTIPLIER*(IC_SIZE+1);
    AnyMuscleViaPoint elem_sternum= {
      #if BM_TRUNK_THORACIC_STERNUM_TOPOLOGY == 4
      AnyRefNode &Org = .....Segments.Right.CostalCartilageSeg.Right_IntercostalisInternusR8R9_elem_sternum;
      #else
      AnyRefNode &Org = .....Segments.SternalBodySeg.Right_IntercostalisInternusR8R9_elem_sternum;
      #endif
      AnyRefNode &Ins = .InsertionSegment.IntercostalisInternusR8R9_elem_sternum;
      AnyMuscleModel MusMdl = {
        F0 = ..MuscleModel.F0/..NumberOfElements;
        Lf0 = ..MuscleModel.F0;
        Vol0 = ..MuscleModel.Vol0/..NumberOfElements;
      };
      viewMuscle = {#include "../DrawSettings/MusDrawSettings.any"};
    };
  };

  SplineMuscle_CreateMuscleMultiOffset IntercostalisInternusR9R10 (
  CREATE_ELEMENTS=IC_MULTIPLIER*(IC_SIZE+1),
  OriginSegment=....Segments.Right.R9Seg,
  ORIGIN_POINTS=....Segments.Right.R9Seg.IC_points.Int_InfPoints,
  InsertionSegment=....Segments.Right.R10Seg,
  INSERTION_POINTS=....Segments.Right.R10Seg.IC_points.Int_SupPoints,
  MUSCLE_MODEL_PARAMETERS=....MuscleModels.Right.IntercostalisInternus.IntercostalisInternusR9R10,
  )= {
    DesiredAngle=-45;
    NumberOfElements =  IC_MULTIPLIER*(IC_SIZE+1);
    AnyMuscleViaPoint elem_sternum= {
      #if BM_TRUNK_THORACIC_STERNUM_TOPOLOGY == 4
      AnyRefNode &Org = .....Segments.Right.CostalCartilageSeg.Right_IntercostalisInternusR9R10_elem_sternum;
      #else
      AnyRefNode &Org = .....Segments.SternalBodySeg.Right_IntercostalisInternusR9R10_elem_sternum;
      #endif
      AnyRefNode &Ins = .InsertionSegment.IntercostalisInternusR9R10_elem_sternum;
      AnyMuscleModel MusMdl = {
        F0 = ..MuscleModel.F0/..NumberOfElements;
        Lf0 = ..MuscleModel.F0;
        Vol0 = ..MuscleModel.Vol0/..NumberOfElements;
      };
      viewMuscle = {#include "../DrawSettings/MusDrawSettings.any"};
    };
  };


  SplineMuscle_CreateMuscleMultiOffset IntercostalisInternusR10R11 (
  CREATE_ELEMENTS=IC_MULTIPLIER*(IC_SIZE),
  OriginSegment=....Segments.Right.R10Seg,
  ORIGIN_POINTS=....Segments.Right.R10Seg.IC_points.Int_InfPoints,
  InsertionSegment=....Segments.Right.R11Seg,
  INSERTION_POINTS=....Segments.Right.R11Seg.IC_points.Int_SupPoints,
  MUSCLE_MODEL_PARAMETERS=....MuscleModels.Right.IntercostalisInternus.IntercostalisInternusR10R11,
  )= {DesiredAngle=-45;};


  SplineMuscle_CreateMuscleMultiOffset IntercostalisInternusR11R12 (
  CREATE_ELEMENTS=IC_MULTIPLIER*(IC_SIZE-4),
  OriginSegment=....Segments.Right.R11Seg,
  ORIGIN_POINTS=....Segments.Right.R11Seg.IC_points.Int_InfPoints,
  InsertionSegment=....Segments.Right.R12Seg,
  INSERTION_POINTS=....Segments.Right.R12Seg.IC_points.Int_SupPoints,
  MUSCLE_MODEL_PARAMETERS=....MuscleModels.Right.IntercostalisInternus.IntercostalisInternusR11R12,
  )= {DesiredAngle=-45;};
};

MuscleGroup IntercostalisIntimus(searchString="*.*") = {

  SplineMuscle_CreateMuscleMultiOffset IntercostalisIntimusR1R2 (
  CREATE_ELEMENTS= IC_MULTIPLIER*IC_SIZE,
  OriginSegment=....Segments.Right.R1Seg,
  ORIGIN_POINTS=....Segments.Right.R1Seg.IC_points.Inn_InfPoints,
  InsertionSegment=....Segments.Right.R2Seg,
  INSERTION_POINTS=....Segments.Right.R2Seg.IC_points.Inn_SupPoints,
  MUSCLE_MODEL_PARAMETERS=....MuscleModels.Right.IntercostalisIntimus.IntercostalisIntimusR1R2,
  )= {DesiredAngle = 0;};

  SplineMuscle_CreateMuscleMultiOffset IntercostalisIntimusR2R3 (
  CREATE_ELEMENTS=IC_MULTIPLIER*(IC_SIZE+3),
  OriginSegment=....Segments.Right.R2Seg,
  ORIGIN_POINTS=....Segments.Right.R2Seg.IC_points.Inn_InfPoints,
  InsertionSegment=....Segments.Right.R3Seg,
  INSERTION_POINTS=....Segments.Right.R3Seg.IC_points.Inn_SupPoints,
  MUSCLE_MODEL_PARAMETERS=....MuscleModels.Right.IntercostalisIntimus.IntercostalisIntimusR2R3,
  )= {DesiredAngle = 0;};


  SplineMuscle_CreateMuscleMultiOffset IntercostalisIntimusR3R4 (
  CREATE_ELEMENTS=IC_MULTIPLIER*(IC_SIZE+3),
  OriginSegment=....Segments.Right.R3Seg,
  ORIGIN_POINTS=....Segments.Right.R3Seg.IC_points.Inn_InfPoints,
  InsertionSegment=....Segments.Right.R4Seg,
  INSERTION_POINTS=....Segments.Right.R4Seg.IC_points.Inn_SupPoints,
  MUSCLE_MODEL_PARAMETERS=....MuscleModels.Right.IntercostalisIntimus.IntercostalisIntimusR3R4,
  )= {DesiredAngle = 0;};

  SplineMuscle_CreateMuscleMultiOffset IntercostalisIntimusR4R5 (
  CREATE_ELEMENTS=IC_MULTIPLIER*(IC_SIZE+3),
  OriginSegment=....Segments.Right.R4Seg,
  ORIGIN_POINTS=....Segments.Right.R4Seg.IC_points.Inn_InfPoints,
  InsertionSegment=....Segments.Right.R5Seg,
  INSERTION_POINTS=....Segments.Right.R5Seg.IC_points.Inn_SupPoints,
  MUSCLE_MODEL_PARAMETERS=....MuscleModels.Right.IntercostalisIntimus.IntercostalisIntimusR4R5,
  )= {DesiredAngle = 0;};


  SplineMuscle_CreateMuscleMultiOffset IntercostalisIntimusR5R6 (
  CREATE_ELEMENTS=IC_MULTIPLIER*(IC_SIZE+3),
  OriginSegment=....Segments.Right.R5Seg,
  ORIGIN_POINTS=....Segments.Right.R5Seg.IC_points.Inn_InfPoints,
  InsertionSegment=....Segments.Right.R6Seg,
  INSERTION_POINTS=....Segments.Right.R6Seg.IC_points.Inn_SupPoints,
  MUSCLE_MODEL_PARAMETERS=....MuscleModels.Right.IntercostalisIntimus.IntercostalisIntimusR5R6,
  )= {DesiredAngle = 0;};


  SplineMuscle_CreateMuscleMultiOffset IntercostalisIntimusR6R7 (
  CREATE_ELEMENTS=IC_MULTIPLIER*(IC_SIZE+3),
  OriginSegment=....Segments.Right.R6Seg,
  ORIGIN_POINTS=....Segments.Right.R6Seg.IC_points.Inn_InfPoints,
  InsertionSegment=....Segments.Right.R7Seg,
  INSERTION_POINTS=....Segments.Right.R7Seg.IC_points.Inn_SupPoints,
  MUSCLE_MODEL_PARAMETERS=....MuscleModels.Right.IntercostalisIntimus.IntercostalisIntimusR6R7,
  )= {DesiredAngle = 0;};

  SplineMuscle_CreateMuscleMultiOffset IntercostalisIntimusR7R8 (
  CREATE_ELEMENTS=IC_MULTIPLIER*(IC_SIZE+3),
  OriginSegment=....Segments.Right.R7Seg,
  ORIGIN_POINTS=....Segments.Right.R7Seg.IC_points.Inn_InfPoints,
  InsertionSegment=....Segments.Right.R8Seg,
  INSERTION_POINTS=....Segments.Right.R8Seg.IC_points.Inn_SupPoints,
  MUSCLE_MODEL_PARAMETERS=....MuscleModels.Right.IntercostalisIntimus.IntercostalisIntimusR7R8,
  )= {DesiredAngle = 0;};


  SplineMuscle_CreateMuscleMultiOffset IntercostalisIntimusR8R9 (
  CREATE_ELEMENTS=IC_MULTIPLIER*(IC_SIZE+3),
  OriginSegment=....Segments.Right.R8Seg,
  ORIGIN_POINTS=....Segments.Right.R8Seg.IC_points.Inn_InfPoints,
  InsertionSegment=....Segments.Right.R9Seg,
  INSERTION_POINTS=....Segments.Right.R9Seg.IC_points.Inn_SupPoints,
  MUSCLE_MODEL_PARAMETERS=....MuscleModels.Right.IntercostalisIntimus.IntercostalisIntimusR8R9,
  )= {DesiredAngle = 0;};

  SplineMuscle_CreateMuscleMultiOffset IntercostalisIntimusR9R10 (
  CREATE_ELEMENTS=IC_MULTIPLIER*(IC_SIZE+3),
  OriginSegment=....Segments.Right.R9Seg,
  ORIGIN_POINTS=....Segments.Right.R9Seg.IC_points.Inn_InfPoints,
  InsertionSegment=....Segments.Right.R10Seg,
  INSERTION_POINTS=....Segments.Right.R10Seg.IC_points.Inn_SupPoints,
  MUSCLE_MODEL_PARAMETERS=....MuscleModels.Right.IntercostalisIntimus.IntercostalisIntimusR9R10,
  )= {DesiredAngle = 0;};

  SplineMuscle_CreateMuscleMultiOffset IntercostalisIntimusR10R11 (
  CREATE_ELEMENTS=IC_MULTIPLIER*(IC_SIZE),
  OriginSegment=....Segments.Right.R10Seg,
  ORIGIN_POINTS=....Segments.Right.R10Seg.IC_points.Inn_InfPoints,
  InsertionSegment=....Segments.Right.R11Seg,
  INSERTION_POINTS=....Segments.Right.R11Seg.IC_points.Inn_SupPoints,
  MUSCLE_MODEL_PARAMETERS=....MuscleModels.Right.IntercostalisIntimus.IntercostalisIntimusR10R11,
  )= {DesiredAngle = 0;};


  SplineMuscle_CreateMuscleMultiOffset IntercostalisIntimusR11R12 (
  CREATE_ELEMENTS=IC_MULTIPLIER*(IC_SIZE-4),
  OriginSegment=....Segments.Right.R11Seg,
  ORIGIN_POINTS=....Segments.Right.R11Seg.IC_points.Inn_InfPoints,
  InsertionSegment=....Segments.Right.R12Seg,
  INSERTION_POINTS=....Segments.Right.R12Seg.IC_points.Inn_SupPoints,
  MUSCLE_MODEL_PARAMETERS=....MuscleModels.Right.IntercostalisIntimus.IntercostalisIntimusR11R12,
  )= {DesiredAngle = 0;};

};

#endif

#endif

MuscleGroup LevatorCostarum = {

  AnyMuscleViaPoint LevatorCostarumC7R1 = {
    AnyMuscleModel &MusMdl = ....MuscleModels.Right.LevatorCostarum.LevatorCostarumC7R1;
    AnyRefNode &S4 = ....Segments.C7Seg.LevatorCostarumC7R1ROrg;
    AnyRefNode &R1 = ....Segments.Right.R1Seg.LevatorCostarumC7R1_R_Ins;
    viewMuscle = {#include "../DrawSettings/MusDrawSettings.any"};
    viewForce.Visible ??= Off;
  };

  #if BM_TRUNK_THORACIC_MODEL == _THORACIC_MODEL_FLEXIBLE_
  AnyMuscleViaPoint LevatorCostarumT1R2 = {
    AnyMuscleModel &MusMdl = ....MuscleModels.Right.LevatorCostarum.LevatorCostarumT1R2;
    AnyRefNode &S4 = ....Segments.T1Seg.LevatorCostarumT1R2ROrg;
    AnyRefNode &R1 = ....Segments.Right.R2Seg.LevatorCostarumT1R2_R_Ins;
    viewMuscle = {#include "../DrawSettings/MusDrawSettings.any"};
    viewForce.Visible ??= Off;
  };

  AnyMuscleViaPoint LevatorCostarumT2R3 = {
    AnyMuscleModel &MusMdl = ....MuscleModels.Right.LevatorCostarum.LevatorCostarumT2R3;
    AnyRefNode &S4 = ....Segments.T2Seg.LevatorCostarumT2R3ROrg;
    AnyRefNode &R1 = ....Segments.Right.R3Seg.LevatorCostarumT2R3_R_Ins;
    viewMuscle = {#include "../DrawSettings/MusDrawSettings.any"};
    viewForce.Visible ??= Off;
  };

  AnyMuscleViaPoint LevatorCostarumT3R4 = {
    AnyMuscleModel &MusMdl = ....MuscleModels.Right.LevatorCostarum.LevatorCostarumT3R4;
    AnyRefNode &S4 = ....Segments.T3Seg.LevatorCostarumT3R4ROrg;
    AnyRefNode &R1 = ....Segments.Right.R4Seg.LevatorCostarumT3R4_R_Ins;
    viewMuscle = {#include "../DrawSettings/MusDrawSettings.any"};
    viewForce.Visible ??= Off;
  };

  AnyMuscleViaPoint LevatorCostarumT4R5 = {
    AnyMuscleModel &MusMdl = ....MuscleModels.Right.LevatorCostarum.LevatorCostarumT4R5;
    AnyRefNode &S4 = ....Segments.T4Seg.LevatorCostarumT4R5ROrg;
    AnyRefNode &R1 = ....Segments.Right.R5Seg.LevatorCostarumT4R5_R_Ins;
    viewMuscle = {#include "../DrawSettings/MusDrawSettings.any"};
    viewForce.Visible ??= Off;
  };

  AnyMuscleViaPoint LevatorCostarumT5R6 = {
    AnyMuscleModel &MusMdl = ....MuscleModels.Right.LevatorCostarum.LevatorCostarumT5R6;
    AnyRefNode &S4 = ....Segments.T5Seg.LevatorCostarumT5R6ROrg;
    AnyRefNode &R1 = ....Segments.Right.R6Seg.LevatorCostarumT5R6_R_Ins;
    viewMuscle = {#include "../DrawSettings/MusDrawSettings.any"};
    viewForce.Visible ??= Off;
  };

  AnyMuscleViaPoint LevatorCostarumT6R7 = {
    AnyMuscleModel &MusMdl = ....MuscleModels.Right.LevatorCostarum.LevatorCostarumT6R7;
    AnyRefNode &S4 = ....Segments.T6Seg.LevatorCostarumT6R7ROrg;
    AnyRefNode &R1 = ....Segments.Right.R7Seg.LevatorCostarumT6R7_R_Ins;
    viewMuscle = {#include "../DrawSettings/MusDrawSettings.any"};
    viewForce.Visible ??= Off;
  };

  AnyMuscleViaPoint LevatorCostarumT7R8 = {
    AnyMuscleModel &MusMdl = ....MuscleModels.Right.LevatorCostarum.LevatorCostarumT7R8;
    AnyRefNode &S4 = ....Segments.T7Seg.LevatorCostarumT7R8ROrg;
    AnyRefNode &R1 = ....Segments.Right.R8Seg.LevatorCostarumT7R8_R_Ins;
    viewMuscle = {#include "../DrawSettings/MusDrawSettings.any"};
    viewForce.Visible ??= Off;
  };

  AnyMuscleViaPoint LevatorCostarumT8R9 = {
    AnyMuscleModel &MusMdl = ....MuscleModels.Right.LevatorCostarum.LevatorCostarumT8R9;
    AnyRefNode &S4 = ....Segments.T8Seg.LevatorCostarumT8R9ROrg;
    AnyRefNode &R1 = ....Segments.Right.R9Seg.LevatorCostarumT8R9_R_Ins;
    viewMuscle = {#include "../DrawSettings/MusDrawSettings.any"};
    viewForce.Visible ??= Off;
  };

  AnyMuscleViaPoint LevatorCostarumT9R10 = {
    AnyMuscleModel &MusMdl = ....MuscleModels.Right.LevatorCostarum.LevatorCostarumT9R10;
    AnyRefNode &S4 = ....Segments.T9Seg.LevatorCostarumT9R10ROrg;
    AnyRefNode &R1 = ....Segments.Right.R10Seg.LevatorCostarumT9R10_R_Ins;
    viewMuscle = {#include "../DrawSettings/MusDrawSettings.any"};
    viewForce.Visible ??= Off;
  };

  AnyMuscleViaPoint LevatorCostarumT10R11 = {
    AnyMuscleModel &MusMdl = ....MuscleModels.Right.LevatorCostarum.LevatorCostarumT10R11;
    AnyRefNode &S4 = ....Segments.T10Seg.LevatorCostarumT10R11ROrg;
    AnyRefNode &R1 = ....Segments.Right.R11Seg.LevatorCostarumT10R11_R_Ins;
    viewMuscle = {#include "../DrawSettings/MusDrawSettings.any"};
    viewForce.Visible ??= Off;
  };

  AnyMuscleViaPoint LevatorCostarumT11R12 = {
    AnyMuscleModel &MusMdl = ....MuscleModels.Right.LevatorCostarum.LevatorCostarumT11R12;
    AnyRefNode &S4 = ....Segments.T11Seg.LevatorCostarumT11R12ROrg;
    AnyRefNode &R1 = ....Segments.Right.R12Seg.LevatorCostarumT11R12_R_Ins;
    viewMuscle = {#include "../DrawSettings/MusDrawSettings.any"};
    viewForce.Visible ??= Off;
  };

  // LONGUS
  AnyMuscleViaPoint LevatorCostarumT5R7 = {
    AnyMuscleModel &MusMdl = ....MuscleModels.Right.LevatorCostarum.LevatorCostarumT5R7;
    AnyRefNode &S4 = ....Segments.T5Seg.LevatorCostarumT5R7ROrg;
    AnyRefNode &R1 = ....Segments.Right.R7Seg.LevatorCostarumT5R7_R_Ins;
    viewMuscle = {#include "../DrawSettings/MusDrawSettings.any"};
    viewForce.Visible ??= Off;
  };

  AnyMuscleViaPoint LevatorCostarumT6R8 = {
    AnyMuscleModel &MusMdl = ....MuscleModels.Right.LevatorCostarum.LevatorCostarumT6R8;
    AnyRefNode &S4 = ....Segments.T6Seg.LevatorCostarumT6R8ROrg;
    AnyRefNode &R1 = ....Segments.Right.R8Seg.LevatorCostarumT6R8_R_Ins;
    viewMuscle = {#include "../DrawSettings/MusDrawSettings.any"};
    viewForce.Visible ??= Off;
  };

  AnyMuscleViaPoint LevatorCostarumT7R9 = {
    AnyMuscleModel &MusMdl = ....MuscleModels.Right.LevatorCostarum.LevatorCostarumT7R9;
    AnyRefNode &S4 = ....Segments.T7Seg.LevatorCostarumT7R9ROrg;
    AnyRefNode &R1 = ....Segments.Right.R9Seg.LevatorCostarumT7R9_R_Ins;
    viewMuscle = {#include "../DrawSettings/MusDrawSettings.any"};
    viewForce.Visible ??= Off;
  };

  AnyMuscleViaPoint LevatorCostarumT8R10 = {
    AnyMuscleModel &MusMdl = ....MuscleModels.Right.LevatorCostarum.LevatorCostarumT8R10;
    AnyRefNode &S4 = ....Segments.T8Seg.LevatorCostarumT8R10ROrg;
    AnyRefNode &R1 = ....Segments.Right.R10Seg.LevatorCostarumT8R10_R_Ins;
    viewMuscle = {#include "../DrawSettings/MusDrawSettings.any"};
    viewForce.Visible ??= Off;
  };

  AnyMuscleViaPoint LevatorCostarumT9R11 = {
    AnyMuscleModel &MusMdl = ....MuscleModels.Right.LevatorCostarum.LevatorCostarumT9R11;
    AnyRefNode &S4 = ....Segments.T9Seg.LevatorCostarumT9R11ROrg;
    AnyRefNode &R1 = ....Segments.Right.R11Seg.LevatorCostarumT9R11_R_Ins;
    viewMuscle = {#include "../DrawSettings/MusDrawSettings.any"};
    viewForce.Visible ??= Off;
  };

  AnyMuscleViaPoint LevatorCostarumT10R12 = {
    AnyMuscleModel &MusMdl = ....MuscleModels.Right.LevatorCostarum.LevatorCostarumT10R12;
    AnyRefNode &S4 = ....Segments.T10Seg.LevatorCostarumT10R12ROrg;
    AnyRefNode &R1 = ....Segments.Right.R12Seg.LevatorCostarumT10R12_R_Ins;
    viewMuscle = {#include "../DrawSettings/MusDrawSettings.any"};
    viewForce.Visible ??= Off;
  };
  #endif
};

MuscleGroup LongissimusCapitis = {
  AnyMuscleViaPoint LongissimusCapitisC3 = {
    AnyMuscleModel &MusMdl = ....MuscleModels.Right.LongissimusCapitis.LongissimusCapitisC3;
    AnyRefNode &Org = ....Segments.C3Seg.LongissimusCapitisC3NodeR;
    AnyRefNode &Ins = ....Segments.SkullSeg.LongissimusCapitisNodeR;
    viewMuscle = {#include "../DrawSettings/MusDrawSettings.any"};
    viewForce.Visible ??= Off;
  };
  AnyMuscleViaPoint LongissimusCapitisC4 = {
    AnyMuscleModel &MusMdl = ....MuscleModels.Right.LongissimusCapitis.LongissimusCapitisC4;
    AnyRefNode &Org = ....Segments.C4Seg.LongissimusCapitisC4NodeR;
    AnyRefNode &Ins = ....Segments.SkullSeg.LongissimusCapitisNodeR;
    viewMuscle = {#include "../DrawSettings/MusDrawSettings.any"};
    viewForce.Visible ??= Off;
  };
  AnyMuscleViaPoint LongissimusCapitisC5 = {
    AnyMuscleModel &MusMdl = ....MuscleModels.Right.LongissimusCapitis.LongissimusCapitisC5;
    AnyRefNode &Org = ....Segments.C5Seg.LongissimusCapitisC5NodeR;
    AnyRefNode &Ins = ....Segments.SkullSeg.LongissimusCapitisNodeR;
    viewMuscle = {#include "../DrawSettings/MusDrawSettings.any"};
    viewForce.Visible ??= Off;
  };
  AnyMuscleViaPoint LongissimusCapitisC6 = {
    AnyMuscleModel &MusMdl = ....MuscleModels.Right.LongissimusCapitis.LongissimusCapitisC6;
    AnyRefNode &Org = ....Segments.C6Seg.LongissimusCapitisC6NodeR;
    AnyRefNode &Ins = ....Segments.SkullSeg.LongissimusCapitisNodeR;
    viewMuscle = {#include "../DrawSettings/MusDrawSettings.any"};
    viewForce.Visible ??= Off;
  };
  AnyMuscleViaPoint LongissimusCapitisC7 = {
    AnyMuscleModel &MusMdl = ....MuscleModels.Right.LongissimusCapitis.LongissimusCapitisC7;
    AnyRefNode &Org = ....Segments.C7Seg.LongissimusCapitisC7NodeR;
    AnyRefNode &Ins = ....Segments.SkullSeg.LongissimusCapitisNodeR;
    viewMuscle = {#include "../DrawSettings/MusDrawSettings.any"};
    viewForce.Visible ??= Off;
  };
  AnyMuscleViaPoint LongissimusCapitisT1 = {
    AnyMuscleModel &MusMdl = ....MuscleModels.Right.LongissimusCapitis.LongissimusCapitisT1;
    AnyRefNode &Org = ....Segments.T1Seg.Right.LongissimusCapitisT1Node;
    AnyRefNode &Ins = ....Segments.SkullSeg.LongissimusCapitisNodeR;
    viewMuscle = {#include "../DrawSettings/MusDrawSettings.any"};
    viewForce.Visible ??= Off;
  };
  AnyMuscleViaPoint LongissimusCapitisT2 = {
    AnyMuscleModel &MusMdl = ....MuscleModels.Right.LongissimusCapitis.LongissimusCapitisT2;
    AnyRefNode &Org = ....Segments.T2Seg.Right.LongissimusCapitisT2Node;
    AnyRefNode &Ins = ....Segments.SkullSeg.LongissimusCapitisNodeR;
    viewMuscle = {#include "../DrawSettings/MusDrawSettings.any"};
    viewForce.Visible ??= Off;
  };
  AnyMuscleViaPoint LongissimusCapitisT3 = {
    AnyMuscleModel &MusMdl = ....MuscleModels.Right.LongissimusCapitis.LongissimusCapitisT3;
    AnyRefNode &Org = ....Segments.T3Seg.Right.LongissimusCapitisT3Node;
    AnyRefNode &Ins = ....Segments.SkullSeg.LongissimusCapitisNodeR;
    viewMuscle = {#include "../DrawSettings/MusDrawSettings.any"};
    viewForce.Visible ??= Off;
  };
  AnyMuscleViaPoint LongissimusCapitisT4 = {
    AnyMuscleModel &MusMdl = ....MuscleModels.Right.LongissimusCapitis.LongissimusCapitisT4;
    AnyRefNode &Org = ....Segments.T4Seg.Right.LongissimusCapitisT4Node;
    AnyRefNode &Ins = ....Segments.SkullSeg.LongissimusCapitisNodeR;
    viewMuscle = {#include "../DrawSettings/MusDrawSettings.any"};
    viewForce.Visible ??= Off;
  };
  AnyMuscleViaPoint LongissimusCapitisT5 = {
    AnyMuscleModel &MusMdl = ....MuscleModels.Right.LongissimusCapitis.LongissimusCapitisT5;
    AnyRefNode &Org = ....Segments.T5Seg.Right.LongissimusCapitisT5Node;
    AnyRefNode &Ins = ....Segments.SkullSeg.LongissimusCapitisNodeR;
    viewMuscle = {#include "../DrawSettings/MusDrawSettings.any"};
    viewForce.Visible ??= Off;
  };
};

MuscleGroup LongissimusCervicis = {
  AnyMuscleViaPoint LongissimusCervicisT1C2 = {
    AnyMuscleModel &MusMdl = ....MuscleModels.Right.LongissimusCervicis.LongissimusCervicisT1C2;
    AnyRefNode &Org = ....Segments.T1Seg.Right.LongissimusCervicisT1Node;
    AnyRefNode &Ins = ....Segments.C2Seg.Right.LongissimusCervicisT1C2Node;
    viewMuscle = {#include "../DrawSettings/MusDrawSettings.any"};
    viewForce.Visible ??= Off;
  };

  AnyMuscleViaPoint LongissimusCervicisT2C3 = {
    AnyMuscleModel &MusMdl = ....MuscleModels.Right.LongissimusCervicis.LongissimusCervicisT2C3;
    AnyRefNode &Org = ....Segments.T2Seg.Right.LongissimusCervicisT2Node;
    AnyRefNode &Ins = ....Segments.C3Seg.Right.LongissimusCervicisT2C3Node;
    viewMuscle = {#include "../DrawSettings/MusDrawSettings.any"};
    viewForce.Visible ??= Off;
  };

  AnyMuscleViaPoint LongissimusCervicisT3C4 = {
    AnyMuscleModel &MusMdl = ....MuscleModels.Right.LongissimusCervicis.LongissimusCervicisT3C4;
    AnyRefNode &Org = ....Segments.T3Seg.Right.LongissimusCervicisT3Node;
    AnyRefNode &Ins = ....Segments.C4Seg.Right.LongissimusCervicisT3C4Node;
    viewMuscle = {#include "../DrawSettings/MusDrawSettings.any"};
    viewForce.Visible ??= Off;
  };

  AnyMuscleViaPoint LongissimusCervicisT4C5 = {
    AnyMuscleModel &MusMdl = ....MuscleModels.Right.LongissimusCervicis.LongissimusCervicisT4C5;
    AnyRefNode &Org = ....Segments.T4Seg.Right.LongissimusCervicisT4Node;
    AnyRefNode &Ins = ....Segments.C5Seg.Right.LongissimusCervicisT4C5Node;
    viewMuscle = {#include "../DrawSettings/MusDrawSettings.any"};
    viewForce.Visible ??= Off;
  };

  AnyMuscleViaPoint LongissimusCervicisT5C6 = {
    AnyMuscleModel &MusMdl = ....MuscleModels.Right.LongissimusCervicis.LongissimusCervicisT5C6;
    AnyRefNode &Org = ....Segments.T5Seg.Right.LongissimusCervicisT5Node;
    AnyRefNode &Ins = ....Segments.C6Seg.Right.LongissimusCervicisT5C6Node;
    viewMuscle = {#include "../DrawSettings/MusDrawSettings.any"};
    viewForce.Visible ??= Off;
  };
};
///The longissimus thoracis is a component of the erector spinae muscle group. It consists of two parts: lumbar and thoracic.
///The thoracic part inserts into the transverse processes of vertebrae T1 - T12 and the angles of ribs 3 - 12.
/// Refrence: Bakkum, B.W., Cramer, G.D.: Muscles That Influence the Spine. In: Clinical Anatomy of the Spine, Spinal Cord, and Ans. pp. 98 - 134. Elsevier (2014) (DOI: 10.1016/B978-0-323-07954-9.00004-9)
MuscleGroup LongissimusThoracis = {
  // Longissimus thoracis part lumbar
  AnyMuscleViaPoint LongissimusThoracisL1IC = {
    AnyMuscleModel &MusMdl = ....MuscleModels.Right.LongissimusThoracis.LongissimusThoracisL1IC;
    AnyRefNode &Org = ....Segments.L1Seg.LongissimusThoracisL1ICNodeR;
    #if BM_TRUNK_CAVITY_MODEL == _CAVITY_MODEL_VOLUME_
    AnyRefNode &Via1 = ....Abdominal.Layer_L3.BaseSegPosterior.LongissimusThoracisL1ICViaNodeR;
    #else
    AnyRefNode &Via1 = ....Segments.L2Seg.LongissimusThoracisL1ICViaNodeR;
    #endif
    AnyRefNode &Ins = ....Segments.PelvisSeg.LongissimusThoracisL1ICNodeR;
    viewMuscle = {#include "../DrawSettings/MusDrawSettings.any"};
    viewForce.Visible ??= Off;
  };
  AnyMuscleViaPoint LongissimusThoracisL2IC = {
    AnyMuscleModel &MusMdl = ....MuscleModels.Right.LongissimusThoracis.LongissimusThoracisL2IC;
    AnyRefNode &Org = ....Segments.L2Seg.LongissimusThoracisL2ICNodeR;
    AnyRefNode &Ins = ....Segments.PelvisSeg.LongissimusThoracisL2ICNodeR;
    viewMuscle = {#include "../DrawSettings/MusDrawSettings.any"};
    viewForce.Visible ??= Off;
  };
  AnyMuscleViaPoint LongissimusThoracisL3IC = {
    AnyMuscleModel &MusMdl = ....MuscleModels.Right.LongissimusThoracis.LongissimusThoracisL3IC;
    AnyRefNode &Org = ....Segments.L3Seg.LongissimusThoracisL3ICNodeR;
    AnyRefNode &Ins = ....Segments.PelvisSeg.LongissimusThoracisL3ICNodeR;
    viewMuscle = {#include "../DrawSettings/MusDrawSettings.any"};
    viewForce.Visible ??= Off;
  };
  AnyMuscleViaPoint LongissimusThoracisL4IC = {
    AnyMuscleModel &MusMdl = ....MuscleModels.Right.LongissimusThoracis.LongissimusThoracisL4IC;
    AnyRefNode &Org = ....Segments.L4Seg.LongissimusThoracisL4ICNodeR;
    AnyRefNode &Ins = ....Segments.PelvisSeg.LongissimusThoracisL4ICNodeR;
    viewMuscle = {#include "../DrawSettings/MusDrawSettings.any"};
    viewForce.Visible ??= Off;
  };
  AnyMuscleViaPoint LongissimusThoracisL5Ilium = {
    AnyMuscleModel &MusMdl = ....MuscleModels.Right.LongissimusThoracis.LongissimusThoracisL5Ilium;
    AnyRefNode &Org = ....Segments.L5Seg.LongissimusThoracisL5IliumNodeR;
    AnyRefNode &Ins = ....Segments.SacrumSeg.LongissimusThoracisL5IliumNodeR;
    viewMuscle = {#include "../DrawSettings/MusDrawSettings.any"};
    viewForce.Visible ??= Off;
  };
    // End of Longissimus thoracis part lumbar

    // Longissimus thoracis part thoracis
  AnyMuscleViaPoint LongissimusThoracisT1L1 = {
    AnyMuscleModel &MusMdl = ....MuscleModels.Right.LongissimusThoracis.LongissimusThoracisT1L1;
    AnyRefNode &Org = ....Segments.T1Seg.LongissimusThoracisT1L1NodeR;
    AnyRefNode &Via1 = ....Segments.T2Seg.LongissimusThoracisT1L1Via1NodeR;
    AnyRefNode &Via2 = ....Segments.T3Seg.LongissimusThoracisT1L1Via2NodeR;
    AnyRefNode &Via3 = ....Segments.T4Seg.LongissimusThoracisT1L1Via3NodeR;
    AnyRefNode &Via4 = ....Segments.T5Seg.LongissimusThoracisT1L1Via4NodeR;
    AnyRefNode &Via5 = ....Segments.T6Seg.LongissimusThoracisT1L1Via5NodeR;
    AnyRefNode &Via6 = ....Segments.T7Seg.LongissimusThoracisT1L1Via6NodeR;
    AnyRefNode &Via7 = ....Segments.T8Seg.LongissimusThoracisT1L1Via7NodeR;
    AnyRefNode &Via8 = ....Segments.T9Seg.LongissimusThoracisT1L1Via8NodeR;
    AnyRefNode &Via9 = ....Segments.T10Seg.LongissimusThoracisT1L1Via9NodeR;
    AnyRefNode &Via10 = ....Segments.T11Seg.LongissimusThoracisT1L1Via10NodeR;
    AnyRefNode &Via11 = ....Segments.T12Seg.LongissimusThoracisT1L1Via11NodeR;
    AnyRefNode &Ins = ....Segments.L1Seg.LongissimusThoracisT1L1NodeR;
    viewMuscle = {#include "../DrawSettings/MusDrawSettings.any"};
    viewForce.Visible ??= Off;
  };
  AnyMuscleViaPoint LongissimusThoracisT2L2 = {
    AnyMuscleModel &MusMdl = ....MuscleModels.Right.LongissimusThoracis.LongissimusThoracisT2L2;
    AnyRefNode &Org = ....Segments.T2Seg.LongissimusThoracisT2L2NodeR;
    AnyRefNode &Via1 = ....Segments.T3Seg.LongissimusThoracisT2L2Via1NodeR;
    AnyRefNode &Via2 = ....Segments.T4Seg.LongissimusThoracisT2L2Via2NodeR;
    AnyRefNode &Via3 = ....Segments.T5Seg.LongissimusThoracisT2L2Via3NodeR;
    AnyRefNode &Via4 = ....Segments.T6Seg.LongissimusThoracisT2L2Via4NodeR;
    AnyRefNode &Via5 = ....Segments.T7Seg.LongissimusThoracisT2L2Via5NodeR;
    AnyRefNode &Via6 = ....Segments.T8Seg.LongissimusThoracisT2L2Via6NodeR;
    AnyRefNode &Via7 = ....Segments.T9Seg.LongissimusThoracisT2L2Via7NodeR;
    AnyRefNode &Via8 = ....Segments.T10Seg.LongissimusThoracisT2L2Via8NodeR;
    AnyRefNode &Via9 = ....Segments.T11Seg.LongissimusThoracisT2L2Via9NodeR;
    AnyRefNode &Via10 = ....Segments.T12Seg.LongissimusThoracisT2L2Via10NodeR;
    AnyRefNode &Via11 = ....Segments.L1Seg.LongissimusThoracisT2L2Via11NodeR;
    AnyRefNode &Ins = ....Segments.L2Seg.LongissimusThoracisT2L2NodeR;
    viewMuscle = {#include "../DrawSettings/MusDrawSettings.any"};
    viewForce.Visible ??= Off;
  };
  AnyMuscleViaPoint LongissimusThoracisT3L3 = {
    AnyMuscleModel &MusMdl = ....MuscleModels.Right.LongissimusThoracis.LongissimusThoracisT3L3;
    AnyRefNode &Org = ....Segments.T3Seg.LongissimusThoracisT3L3NodeR;
    AnyRefNode &Via1 = ....Segments.T4Seg.LongissimusThoracisT3L3Via1NodeR;
    AnyRefNode &Via2 = ....Segments.T5Seg.LongissimusThoracisT3L3Via2NodeR;
    AnyRefNode &Via3 = ....Segments.T6Seg.LongissimusThoracisT3L3Via3NodeR;
    AnyRefNode &Via4 = ....Segments.T7Seg.LongissimusThoracisT3L3Via4NodeR;
    AnyRefNode &Via5 = ....Segments.T8Seg.LongissimusThoracisT3L3Via5NodeR;
    AnyRefNode &Via6 = ....Segments.T9Seg.LongissimusThoracisT3L3Via6NodeR;
    AnyRefNode &Via7 = ....Segments.T10Seg.LongissimusThoracisT3L3Via7NodeR;
    AnyRefNode &Via8 = ....Segments.T11Seg.LongissimusThoracisT3L3Via8NodeR;
    AnyRefNode &Via9 = ....Segments.T12Seg.LongissimusThoracisT3L3Via9NodeR;
    AnyRefNode &Via10 = ....Segments.L1Seg.LongissimusThoracisT3L3Via10NodeR;
    AnyRefNode &Via11 = ....Segments.L2Seg.LongissimusThoracisT3L3Via11NodeR;
    AnyRefNode &Ins = ....Segments.L3Seg.LongissimusThoracisT3L3NodeR;
    viewMuscle = {#include "../DrawSettings/MusDrawSettings.any"};
    viewForce.Visible ??= Off;
  };
  AnyMuscleViaPoint LongissimusThoracisT4L4 = {
    AnyMuscleModel &MusMdl = ....MuscleModels.Right.LongissimusThoracis.LongissimusThoracisT4L4;
    AnyRefNode &Org = ....Segments.T4Seg.LongissimusThoracisT4L4NodeR;
    AnyRefNode &Via1 = ....Segments.T5Seg.LongissimusThoracisT4L4Via1NodeR;
    AnyRefNode &Via2 = ....Segments.T6Seg.LongissimusThoracisT4L4Via2NodeR;
    AnyRefNode &Via3 = ....Segments.T7Seg.LongissimusThoracisT4L4Via3NodeR;
    AnyRefNode &Via4 = ....Segments.T8Seg.LongissimusThoracisT4L4Via4NodeR;
    AnyRefNode &Via5 = ....Segments.T9Seg.LongissimusThoracisT4L4Via5NodeR;
    AnyRefNode &Via6 = ....Segments.T10Seg.LongissimusThoracisT4L4Via6NodeR;
    AnyRefNode &Via7 = ....Segments.T11Seg.LongissimusThoracisT4L4Via7NodeR;
    AnyRefNode &Via8 = ....Segments.T12Seg.LongissimusThoracisT4L4Via8NodeR;
    AnyRefNode &Via9 = ....Segments.L1Seg.LongissimusThoracisT4L4Via9NodeR;
    AnyRefNode &Via10 = ....Segments.L2Seg.LongissimusThoracisT4L4Via10NodeR;
    AnyRefNode &Via11 = ....Segments.L3Seg.LongissimusThoracisT4L4Via11NodeR;
    AnyRefNode &Ins = ....Segments.L4Seg.LongissimusThoracisT4L4NodeR;
    viewMuscle = {#include "../DrawSettings/MusDrawSettings.any"};
    viewForce.Visible ??= Off;
  };
  AnyMuscleViaPoint LongissimusThoracisT5L5 = {
    AnyMuscleModel &MusMdl = ....MuscleModels.Right.LongissimusThoracis.LongissimusThoracisT5L5;
    AnyRefNode &Org = ....Segments.T5Seg.LongissimusThoracisT5L5NodeR;
    AnyRefNode &Via1 = ....Segments.T6Seg.LongissimusThoracisT5L5Via1NodeR;
    AnyRefNode &Via2 = ....Segments.T7Seg.LongissimusThoracisT5L5Via2NodeR;
    AnyRefNode &Via3 = ....Segments.T8Seg.LongissimusThoracisT5L5Via3NodeR;
    AnyRefNode &Via4 = ....Segments.T9Seg.LongissimusThoracisT5L5Via4NodeR;
    AnyRefNode &Via5 = ....Segments.T10Seg.LongissimusThoracisT5L5Via5NodeR;
    AnyRefNode &Via6 = ....Segments.T11Seg.LongissimusThoracisT5L5Via6NodeR;
    AnyRefNode &Via7 = ....Segments.T12Seg.LongissimusThoracisT5L5Via7NodeR;
    AnyRefNode &Via8 = ....Segments.L1Seg.LongissimusThoracisT5L5Via8NodeR;
    AnyRefNode &Via9 = ....Segments.L2Seg.LongissimusThoracisT5L5Via9NodeR;
    AnyRefNode &Via10 = ....Segments.L3Seg.LongissimusThoracisT5L5Via10NodeR;
    AnyRefNode &Via11 = ....Segments.L4Seg.LongissimusThoracisT5L5Via11NodeR;
    AnyRefNode &Ins = ....Segments.L5Seg.LongissimusThoracisT5L5NodeR;
    viewMuscle = {#include "../DrawSettings/MusDrawSettings.any"};
    viewForce.Visible ??= Off;
  };
  AnyMuscleViaPoint LongissimusThoracisT6S1 = {
    AnyMuscleModel &MusMdl = ....MuscleModels.Right.LongissimusThoracis.LongissimusThoracisT6S1;
    AnyRefNode &Org = ....Segments.T6Seg.LongissimusThoracisT6S1NodeR;
    AnyRefNode &Via1 = ....Segments.T7Seg.LongissimusThoracisT6S1Via1NodeR;
    AnyRefNode &Via2 = ....Segments.T8Seg.LongissimusThoracisT6S1Via2NodeR;
    AnyRefNode &Via3 = ....Segments.T9Seg.LongissimusThoracisT6S1Via3NodeR;
    AnyRefNode &Via4 = ....Segments.T10Seg.LongissimusThoracisT6S1Via4NodeR;
    AnyRefNode &Via5 = ....Segments.T11Seg.LongissimusThoracisT6S1Via5NodeR;
    AnyRefNode &Via6 = ....Segments.T12Seg.LongissimusThoracisT6S1Via6NodeR;
    AnyRefNode &Via7 = ....Segments.L1Seg.LongissimusThoracisT6S1Via7NodeR;
    AnyRefNode &Via8 = ....Segments.L2Seg.LongissimusThoracisT6S1Via8NodeR;
    AnyRefNode &Via9 = ....Segments.L3Seg.LongissimusThoracisT6S1Via9NodeR;
    AnyRefNode &Via10 = ....Segments.L4Seg.LongissimusThoracisT6S1Via10NodeR;
    AnyRefNode &Via11 = ....Segments.L5Seg.LongissimusThoracisT6S1Via11NodeR;
    AnyRefNode &Ins = ....Segments.SacrumSeg.LongissimusThoracisT6S1NodeR;
    viewMuscle = {#include "../DrawSettings/MusDrawSettings.any"};
    viewForce.Visible ??= Off;
  };
  AnyMuscleViaPoint LongissimusThoracisT7S2 = {
    AnyMuscleModel &MusMdl = ....MuscleModels.Right.LongissimusThoracis.LongissimusThoracisT7S2;
    AnyRefNode &Org = ....Segments.T7Seg.LongissimusThoracisT7S2NodeR;
    AnyRefNode &Via1 = ....Segments.T8Seg.LongissimusThoracisT7S2Via1NodeR;
    AnyRefNode &Via2 = ....Segments.T9Seg.LongissimusThoracisT7S2Via2NodeR;
    AnyRefNode &Via3 = ....Segments.T10Seg.LongissimusThoracisT7S2Via3NodeR;
    AnyRefNode &Via4 = ....Segments.T11Seg.LongissimusThoracisT7S2Via4NodeR;
    AnyRefNode &Via5 = ....Segments.T12Seg.LongissimusThoracisT7S2Via5NodeR;
    AnyRefNode &Via6 = ....Segments.L1Seg.LongissimusThoracisT7S2Via6NodeR;
    AnyRefNode &Via7 = ....Segments.L2Seg.LongissimusThoracisT7S2Via7NodeR;
    AnyRefNode &Via8 = ....Segments.L3Seg.LongissimusThoracisT7S2Via8NodeR;
    AnyRefNode &Via9 = ....Segments.L4Seg.LongissimusThoracisT7S2Via9NodeR;
    AnyRefNode &Via10 = ....Segments.L5Seg.LongissimusThoracisT7S2Via10NodeR;
    AnyRefNode &Ins = ....Segments.SacrumSeg.LongissimusThoracisT7S2NodeR;
    viewMuscle = {#include "../DrawSettings/MusDrawSettings.any"};
    viewForce.Visible ??= Off;
  };
  AnyMuscleViaPoint LongissimusThoracisT8S3 = {
    AnyMuscleModel &MusMdl = ....MuscleModels.Right.LongissimusThoracis.LongissimusThoracisT8S3;
    AnyRefNode &Org = ....Segments.T8Seg.LongissimusThoracisT8S3NodeR;
    AnyRefNode &Via1 = ....Segments.T9Seg.LongissimusThoracisT8S3Via1NodeR;
    AnyRefNode &Via2 = ....Segments.T10Seg.LongissimusThoracisT8S3Via2NodeR;
    AnyRefNode &Via3 = ....Segments.T11Seg.LongissimusThoracisT8S3Via3NodeR;
    AnyRefNode &Via4 = ....Segments.T12Seg.LongissimusThoracisT8S3Via4NodeR;
    AnyRefNode &Via5 = ....Segments.L1Seg.LongissimusThoracisT8S3Via5NodeR;
    AnyRefNode &Via6 = ....Segments.L2Seg.LongissimusThoracisT8S3Via6NodeR;
    AnyRefNode &Via7 = ....Segments.L3Seg.LongissimusThoracisT8S3Via7NodeR;
    AnyRefNode &Via8 = ....Segments.L4Seg.LongissimusThoracisT8S3Via8NodeR;
    AnyRefNode &Via9 = ....Segments.L5Seg.LongissimusThoracisT8S3Via9NodeR;
    AnyRefNode &Ins = ....Segments.SacrumSeg.LongissimusThoracisT8S3NodeR;
    viewMuscle = {#include "../DrawSettings/MusDrawSettings.any"};
    viewForce.Visible ??= Off;
  };
  AnyMuscleViaPoint LongissimusThoracisT9S4 = {
    AnyMuscleModel &MusMdl = ....MuscleModels.Right.LongissimusThoracis.LongissimusThoracisT9S4;
    AnyRefNode &Org = ....Segments.T9Seg.LongissimusThoracisT9S4NodeR;
    AnyRefNode &Via1 = ....Segments.T10Seg.LongissimusThoracisT9S4Via1NodeR;
    AnyRefNode &Via2 = ....Segments.T11Seg.LongissimusThoracisT9S4Via2NodeR;
    AnyRefNode &Via3 = ....Segments.T12Seg.LongissimusThoracisT9S4Via3NodeR;
    AnyRefNode &Via4 = ....Segments.L1Seg.LongissimusThoracisT9S4Via4NodeR;
    AnyRefNode &Via5 = ....Segments.L2Seg.LongissimusThoracisT9S4Via5NodeR;
    AnyRefNode &Via6 = ....Segments.L3Seg.LongissimusThoracisT9S4Via6NodeR;
    AnyRefNode &Via7 = ....Segments.L4Seg.LongissimusThoracisT9S4Via7NodeR;
    AnyRefNode &Via8 = ....Segments.L5Seg.LongissimusThoracisT9S4Via8NodeR;
    AnyRefNode &Ins = ....Segments.SacrumSeg.LongissimusThoracisT9S4NodeR;
    viewMuscle = {#include "../DrawSettings/MusDrawSettings.any"};
    viewForce.Visible ??= Off;
  };
  AnyMuscleViaPoint LongissimusThoracisT10S3 = {
    AnyMuscleModel &MusMdl = ....MuscleModels.Right.LongissimusThoracis.LongissimusThoracisT10S3;
    AnyRefNode &Org = ....Segments.T10Seg.LongissimusThoracisT10S3NodeR;
    AnyRefNode &Via1 = ....Segments.T11Seg.LongissimusThoracisT10S3Via1NodeR;
    #if BM_TRUNK_CAVITY_MODEL == _CAVITY_MODEL_VOLUME_
    AnyRefNode &Via2 = ....Abdominal.Layer_L1.BaseSegPosterior.LongissimusThoracisT10S3Via2NodeR;
    AnyRefNode &Via3 = ....Abdominal.Layer_L2.BaseSegPosterior.LongissimusThoracisT10S3Via3NodeR;
    AnyRefNode &Via4 = ....Abdominal.Layer_L3.BaseSegPosterior.LongissimusThoracisT10S3Via4NodeR;
    AnyRefNode &Via5 = ....Abdominal.Layer_L4.BaseSegPosterior.LongissimusThoracisT10S3Via5NodeR;
    AnyRefNode &Via6 = ....Abdominal.Layer_L5.BaseSegPosterior.LongissimusThoracisT10S3Via6NodeR;
//    AnyRefNode &Via7 = ....Abdominal.Layer_L5.BaseSegPosterior.LongissimusThoracisT10S3Via7NodeR;
    #else
    AnyRefNode &Via2 = ....Segments.T12Seg.LongissimusThoracisT10S3Via2NodeR;
    AnyRefNode &Via3 = ....Segments.L1Seg.LongissimusThoracisT10S3Via3NodeR;
    AnyRefNode &Via4 = ....Segments.L2Seg.LongissimusThoracisT10S3Via4NodeR;
    AnyRefNode &Via5 = ....Segments.L3Seg.LongissimusThoracisT10S3Via5NodeR;
    AnyRefNode &Via6 = ....Segments.L4Seg.LongissimusThoracisT10S3Via6NodeR;
    AnyRefNode &Via7 = ....Segments.L5Seg.LongissimusThoracisT10S3Via7NodeR;
    #endif
    AnyRefNode &Ins = ....Segments.SacrumSeg.LongissimusThoracisT10S3NodeR;
    viewMuscle = {#include "../DrawSettings/MusDrawSettings.any"};
    viewForce.Visible ??= Off;
  };
  AnyMuscleViaPoint LongissimusThoracisT11S3 = {
    AnyMuscleModel &MusMdl = ....MuscleModels.Right.LongissimusThoracis.LongissimusThoracisT11S3;
    AnyRefNode &Org = ....Segments.T11Seg.LongissimusThoracisT11S3NodeR;
    #if BM_TRUNK_CAVITY_MODEL == _CAVITY_MODEL_VOLUME_
    AnyRefNode &Via1 = ....Abdominal.Layer_L1.BaseSegPosterior.LongissimusThoracisT11S3Via1NodeR;
    AnyRefNode &Via2 = ....Abdominal.Layer_L2.BaseSegPosterior.LongissimusThoracisT11S3Via2NodeR;
    AnyRefNode &Via3 = ....Abdominal.Layer_L3.BaseSegPosterior.LongissimusThoracisT11S3Via3NodeR;
    AnyRefNode &Via4 = ....Abdominal.Layer_L4.BaseSegPosterior.LongissimusThoracisT11S3Via4NodeR;
    AnyRefNode &Via5 = ....Abdominal.Layer_L5.BaseSegPosterior.LongissimusThoracisT11S3Via5NodeR;
//    AnyRefNode &Via6 = ....Abdominal.Layer_L5.BaseSegPosterior.LongissimusThoracisT11S3Via6NodeR;
    #else
    AnyRefNode &Via1 = ....Segments.T12Seg.LongissimusThoracisT11S3Via1NodeR;
    AnyRefNode &Via2 = ....Segments.L1Seg.LongissimusThoracisT11S3Via2NodeR;
    AnyRefNode &Via3 = ....Segments.L2Seg.LongissimusThoracisT11S3Via3NodeR;
    AnyRefNode &Via4 = ....Segments.L3Seg.LongissimusThoracisT11S3Via4NodeR;
    AnyRefNode &Via5 = ....Segments.L4Seg.LongissimusThoracisT11S3Via5NodeR;
    AnyRefNode &Via6 = ....Segments.L5Seg.LongissimusThoracisT11S3Via6NodeR;
    #endif
    AnyRefNode &Ins = ....Segments.SacrumSeg.LongissimusThoracisT11S3NodeR;
    viewMuscle = {#include "../DrawSettings/MusDrawSettings.any"};
    viewForce.Visible ??= Off;
  };
  AnyMuscleViaPoint LongissimusThoracisT12S3 = {
    AnyMuscleModel &MusMdl = ....MuscleModels.Right.LongissimusThoracis.LongissimusThoracisT12S3;
    AnyRefNode &Org = ....Segments.T12Seg.LongissimusThoracisT12S3NodeR;
    #if BM_TRUNK_CAVITY_MODEL == _CAVITY_MODEL_VOLUME_
    AnyRefNode &Via1 = ....Abdominal.Layer_L2.BaseSegPosterior.LongissimusThoracisT12S3Via1NodeR;
    AnyRefNode &Via2 = ....Abdominal.Layer_L3.BaseSegPosterior.LongissimusThoracisT12S3Via2NodeR;
    AnyRefNode &Via3 = ....Abdominal.Layer_L4.BaseSegPosterior.LongissimusThoracisT12S3Via3NodeR;
    AnyRefNode &Via4 = ....Abdominal.Layer_L5.BaseSegPosterior.LongissimusThoracisT12S3Via4NodeR;
//    AnyRefNode &Via5 = ....Abdominal.Layer_L5.BaseSegPosterior.LongissimusThoracisT12S3Via5NodeR;
    #else
    AnyRefNode &Via1 = ....Segments.L1Seg.LongissimusThoracisT12S3Via1NodeR;
    AnyRefNode &Via2 = ....Segments.L2Seg.LongissimusThoracisT12S3Via2NodeR;
    AnyRefNode &Via3 = ....Segments.L3Seg.LongissimusThoracisT12S3Via3NodeR;
    AnyRefNode &Via4 = ....Segments.L4Seg.LongissimusThoracisT12S3Via4NodeR;
    AnyRefNode &Via5 = ....Segments.L5Seg.LongissimusThoracisT12S3Via5NodeR;
    #endif
    AnyRefNode &Ins = ....Segments.SacrumSeg.LongissimusThoracisT12S3NodeR;
    viewMuscle = {#include "../DrawSettings/MusDrawSettings.any"};
    viewForce.Visible ??= Off;
  };

  // Longissimus Thoracis - lateral part (attaching to ribs)
  AnyMuscleViaPoint LongissimusThoracisR3L3 = {
    AnyMuscleModel &MusMdl = ....MuscleModels.Right.LongissimusThoracis.LongissimusThoracisR3L3;
    AnyRefNode &Org = ....Segments.Right.R3Seg.LongissimusThoracisR3L3NodeR;
    AnyRefNode &Via1 = ....Segments.Right.R4Seg.LongissimusThoracisR3L3Via1NodeR;
    #ifndef LongissimusThoracis_ViaNodes_Ribs
    AnyRefNode &Via2 = ....Segments.T5Seg.LongissimusThoracisR3L3Via2NodeR;
    AnyRefNode &Via3 = ....Segments.T6Seg.LongissimusThoracisR3L3Via3NodeR;
    AnyRefNode &Via4 = ....Segments.T7Seg.LongissimusThoracisR3L3Via4NodeR;
    AnyRefNode &Via5 = ....Segments.T8Seg.LongissimusThoracisR3L3Via5NodeR;
    AnyRefNode &Via6 = ....Segments.T9Seg.LongissimusThoracisR3L3Via6NodeR;
    AnyRefNode &Via7 = ....Segments.T10Seg.LongissimusThoracisR3L3Via7NodeR;
    #else
    AnyRefNode &Via2 = ....Segments.Right.R5Seg.LongissimusThoracisR3L3Via2NodeR;
    AnyRefNode &Via3 = ....Segments.Right.R6Seg.LongissimusThoracisR3L3Via3NodeR;
    AnyRefNode &Via4 = ....Segments.Right.R7Seg.LongissimusThoracisR3L3Via4NodeR;
    AnyRefNode &Via5 = ....Segments.Right.R8Seg.LongissimusThoracisR3L3Via5NodeR;
    AnyRefNode &Via6 = ....Segments.Right.R9Seg.LongissimusThoracisR3L3Via6NodeR;
    AnyRefNode &Via7 = ....Segments.Right.R10Seg.LongissimusThoracisR3L3Via7NodeR;
    #endif
    AnyRefNode &Via8 = ....Segments.T11Seg.LongissimusThoracisR3L3Via8NodeR;
    AnyRefNode &Via9 = ....Segments.T12Seg.LongissimusThoracisR3L3Via9NodeR;
    AnyRefNode &Via10 = ....Segments.L1Seg.LongissimusThoracisR3L3Via10NodeR;
    AnyRefNode &Via11 = ....Segments.L2Seg.LongissimusThoracisR3L3Via11NodeR;
    AnyRefNode &Ins = ....Segments.L3Seg.LongissimusThoracisR3L3NodeR;
    viewMuscle = {#include "../DrawSettings/MusDrawSettings.any"};
    viewForce.Visible ??= Off;
  };
  AnyMuscleViaPoint LongissimusThoracisR4L4 = {
    AnyMuscleModel &MusMdl = ....MuscleModels.Right.LongissimusThoracis.LongissimusThoracisR4L4;
    AnyRefNode &Org = ....Segments.Right.R4Seg.LongissimusThoracisR4L4NodeR;
    AnyRefNode &Via1 = ....Segments.Right.R5Seg.LongissimusThoracisR4L4Via1NodeR;
    #ifndef LongissimusThoracis_ViaNodes_Ribs
    AnyRefNode &Via2 = ....Segments.T6Seg.LongissimusThoracisR4L4Via2NodeR;
    AnyRefNode &Via3 = ....Segments.T7Seg.LongissimusThoracisR4L4Via3NodeR;
    AnyRefNode &Via4 = ....Segments.T8Seg.LongissimusThoracisR4L4Via4NodeR;
    AnyRefNode &Via5 = ....Segments.T9Seg.LongissimusThoracisR4L4Via5NodeR;
    AnyRefNode &Via6 = ....Segments.T10Seg.LongissimusThoracisR4L4Via6NodeR;
    #else
    AnyRefNode &Via2 = ....Segments.Right.R6Seg.LongissimusThoracisR4L4Via2NodeR;
    AnyRefNode &Via3 = ....Segments.Right.R7Seg.LongissimusThoracisR4L4Via3NodeR;
    AnyRefNode &Via4 = ....Segments.Right.R8Seg.LongissimusThoracisR4L4Via4NodeR;
    AnyRefNode &Via5 = ....Segments.Right.R9Seg.LongissimusThoracisR4L4Via5NodeR;
    AnyRefNode &Via6 = ....Segments.Right.R10Seg.LongissimusThoracisR4L4Via6NodeR;
    #endif
    AnyRefNode &Via7 = ....Segments.T11Seg.LongissimusThoracisR4L4Via7NodeR;
    AnyRefNode &Via8 = ....Segments.T12Seg.LongissimusThoracisR4L4Via8NodeR;
    AnyRefNode &Via9 = ....Segments.L1Seg.LongissimusThoracisR4L4Via9NodeR;
    AnyRefNode &Via10 = ....Segments.L2Seg.LongissimusThoracisR4L4Via10NodeR;
    AnyRefNode &Via11 = ....Segments.L3Seg.LongissimusThoracisR4L4Via11NodeR;
    AnyRefNode &Ins = ....Segments.L4Seg.LongissimusThoracisR4L4NodeR;
    viewMuscle = {#include "../DrawSettings/MusDrawSettings.any"};
    viewForce.Visible ??= Off;
  };
  AnyMuscleViaPoint LongissimusThoracisR5L5 = {
    AnyMuscleModel &MusMdl = ....MuscleModels.Right.LongissimusThoracis.LongissimusThoracisR5L5;
    AnyRefNode &Org = ....Segments.Right.R5Seg.LongissimusThoracisR5L5NodeR;
    AnyRefNode &Via1 = ....Segments.Right.R6Seg.LongissimusThoracisR5L5Via1NodeR;
    #ifndef LongissimusThoracis_ViaNodes_Ribs
    AnyRefNode &Via2 = ....Segments.T7Seg.LongissimusThoracisR5L5Via2NodeR;
    AnyRefNode &Via3 = ....Segments.T8Seg.LongissimusThoracisR5L5Via3NodeR;
    AnyRefNode &Via4 = ....Segments.T9Seg.LongissimusThoracisR5L5Via4NodeR;
    AnyRefNode &Via5 = ....Segments.T10Seg.LongissimusThoracisR5L5Via5NodeR;
    #else
    AnyRefNode &Via2 = ....Segments.Right.R7Seg.LongissimusThoracisR5L5Via2NodeR;
    AnyRefNode &Via3 = ....Segments.Right.R8Seg.LongissimusThoracisR5L5Via3NodeR;
    AnyRefNode &Via4 = ....Segments.Right.R9Seg.LongissimusThoracisR5L5Via4NodeR;
    AnyRefNode &Via5 = ....Segments.Right.R10Seg.LongissimusThoracisR5L5Via5NodeR;
    #endif
    AnyRefNode &Via6 = ....Segments.T11Seg.LongissimusThoracisR5L5Via6NodeR;
    AnyRefNode &Via7 = ....Segments.T12Seg.LongissimusThoracisR5L5Via7NodeR;
    AnyRefNode &Via8 = ....Segments.L1Seg.LongissimusThoracisR5L5Via8NodeR;
    AnyRefNode &Via9 = ....Segments.L2Seg.LongissimusThoracisR5L5Via9NodeR;
    AnyRefNode &Via10 = ....Segments.L3Seg.LongissimusThoracisR5L5Via10NodeR;
    AnyRefNode &Via11 = ....Segments.L4Seg.LongissimusThoracisR5L5Via11NodeR;
    AnyRefNode &Ins = ....Segments.L5Seg.LongissimusThoracisR5L5NodeR;
    viewMuscle = {#include "../DrawSettings/MusDrawSettings.any"};
    viewForce.Visible ??= Off;
  };
  AnyMuscleViaPoint LongissimusThoracisR6S1 = {
    AnyMuscleModel &MusMdl = ....MuscleModels.Right.LongissimusThoracis.LongissimusThoracisR6S1;
    AnyRefNode &Org = ....Segments.Right.R6Seg.LongissimusThoracisR6S1NodeR;
    AnyRefNode &Via1 = ....Segments.Right.R7Seg.LongissimusThoracisR6S1Via1NodeR;
    #ifndef LongissimusThoracis_ViaNodes_Ribs
    AnyRefNode &Via2 = ....Segments.T8Seg.LongissimusThoracisR6S1Via2NodeR;
    AnyRefNode &Via3 = ....Segments.T9Seg.LongissimusThoracisR6S1Via3NodeR;
    AnyRefNode &Via4 = ....Segments.T10Seg.LongissimusThoracisR6S1Via4NodeR;
    #else
    AnyRefNode &Via2 = ....Segments.Right.R8Seg.LongissimusThoracisR6S1Via2NodeR;
    AnyRefNode &Via3 = ....Segments.Right.R9Seg.LongissimusThoracisR6S1Via3NodeR;
    AnyRefNode &Via4 = ....Segments.Right.R10Seg.LongissimusThoracisR6S1Via4NodeR;
    #endif
    AnyRefNode &Via5 = ....Segments.T11Seg.LongissimusThoracisR6S1Via5NodeR;
    AnyRefNode &Via6 = ....Segments.T12Seg.LongissimusThoracisR6S1Via6NodeR;
    AnyRefNode &Via7 = ....Segments.L1Seg.LongissimusThoracisR6S1Via7NodeR;
    AnyRefNode &Via8 = ....Segments.L2Seg.LongissimusThoracisR6S1Via8NodeR;
    AnyRefNode &Via9 = ....Segments.L3Seg.LongissimusThoracisR6S1Via9NodeR;
    AnyRefNode &Via10 = ....Segments.L4Seg.LongissimusThoracisR6S1Via10NodeR;
    AnyRefNode &Via11 = ....Segments.L5Seg.LongissimusThoracisR6S1Via11NodeR;
    AnyRefNode &Ins = ....Segments.SacrumSeg.LongissimusThoracisR6S1NodeR;
    viewMuscle = {#include "../DrawSettings/MusDrawSettings.any"};
    viewForce.Visible ??= Off;
  };
  AnyMuscleViaPoint LongissimusThoracisR7S2 = {
    AnyMuscleModel &MusMdl = ....MuscleModels.Right.LongissimusThoracis.LongissimusThoracisR7S2;
    AnyRefNode &Org = ....Segments.Right.R7Seg.LongissimusThoracisR7S2NodeR;
    AnyRefNode &Via1 = ....Segments.Right.R8Seg.LongissimusThoracisR7S2Via1NodeR;
    AnyRefNode &Via2 = ....Segments.Right.R9Seg.LongissimusThoracisR7S2Via2NodeR;
    AnyRefNode &Via3 = ....Segments.Right.R10Seg.LongissimusThoracisR7S2Via3NodeR;
    #ifndef LongissimusThoracis_ViaNodes_Ribs
    AnyRefNode &Via4 = ....Segments.T11Seg.LongissimusThoracisR7S2Via4NodeR;
    #else
    AnyRefNode &Via4 = ....Segments.Right.R11Seg.LongissimusThoracisR7S2Via4NodeR;
    #endif
    AnyRefNode &Via5 = ....Segments.T12Seg.LongissimusThoracisR7S2Via5NodeR;
    AnyRefNode &Via6 = ....Segments.L1Seg.LongissimusThoracisR7S2Via6NodeR;
    AnyRefNode &Via7 = ....Segments.L2Seg.LongissimusThoracisR7S2Via7NodeR;
    AnyRefNode &Via8 = ....Segments.L3Seg.LongissimusThoracisR7S2Via8NodeR;
    AnyRefNode &Via9 = ....Segments.L4Seg.LongissimusThoracisR7S2Via9NodeR;
    AnyRefNode &Via10 = ....Segments.L5Seg.LongissimusThoracisR7S2Via10NodeR;
    AnyRefNode &Ins = ....Segments.SacrumSeg.LongissimusThoracisR7S2NodeR;
    viewMuscle = {#include "../DrawSettings/MusDrawSettings.any"};
    viewForce.Visible ??= Off;
  };
  AnyMuscleViaPoint LongissimusThoracisR8S3 = {
    AnyMuscleModel &MusMdl = ....MuscleModels.Right.LongissimusThoracis.LongissimusThoracisR8S3;
    AnyRefNode &Org = ....Segments.Right.R8Seg.LongissimusThoracisR8S3NodeR;
    AnyRefNode &Via1 = ....Segments.Right.R9Seg.LongissimusThoracisR8S3Via1NodeR;
    AnyRefNode &Via2 = ....Segments.Right.R10Seg.LongissimusThoracisR8S3Via2NodeR;
    AnyRefNode &Via3 = ....Segments.Right.R11Seg.LongissimusThoracisR8S3Via3NodeR;
    #ifndef LongissimusThoracis_ViaNodes_Ribs
    AnyRefNode &Via4 = ....Segments.T12Seg.LongissimusThoracisR8S3Via4NodeR;
    #else
    AnyRefNode &Via4 = ....Segments.Right.R12Seg.LongissimusThoracisR8S3Via4NodeR;
    #endif
    AnyRefNode &Via5 = ....Segments.L1Seg.LongissimusThoracisR8S3Via5NodeR;
    AnyRefNode &Via6 = ....Segments.L2Seg.LongissimusThoracisR8S3Via6NodeR;
    AnyRefNode &Via7 = ....Segments.L3Seg.LongissimusThoracisR8S3Via7NodeR;
    AnyRefNode &Via8 = ....Segments.L4Seg.LongissimusThoracisR8S3Via8NodeR;
    AnyRefNode &Via9 = ....Segments.L5Seg.LongissimusThoracisR8S3Via9NodeR;
    AnyRefNode &Ins = ....Segments.SacrumSeg.LongissimusThoracisR8S3NodeR;
    viewMuscle = {#include "../DrawSettings/MusDrawSettings.any"};
    viewForce.Visible ??= Off;
  };
  AnyMuscleViaPoint LongissimusThoracisR9S4 = {
    AnyMuscleModel &MusMdl = ....MuscleModels.Right.LongissimusThoracis.LongissimusThoracisR9S4;
    AnyRefNode &Org = ....Segments.Right.R9Seg.LongissimusThoracisR9S4NodeR;
    AnyRefNode &Via1 = ....Segments.Right.R10Seg.LongissimusThoracisR9S4Via1NodeR;
    AnyRefNode &Via2 = ....Segments.Right.R11Seg.LongissimusThoracisR9S4Via2NodeR;
    #ifndef LongissimusThoracis_ViaNodes_Ribs
    AnyRefNode &Via3 = ....Segments.T12Seg.LongissimusThoracisR9S4Via3NodeR;
    #else
    AnyRefNode &Via3 = ....Segments.Right.R12Seg.LongissimusThoracisR9S4Via3NodeR;
    #endif
    AnyRefNode &Via4 = ....Segments.L1Seg.LongissimusThoracisR9S4Via4NodeR;
    AnyRefNode &Via5 = ....Segments.L2Seg.LongissimusThoracisR9S4Via5NodeR;
    AnyRefNode &Via6 = ....Segments.L3Seg.LongissimusThoracisR9S4Via6NodeR;
    AnyRefNode &Via7 = ....Segments.L4Seg.LongissimusThoracisR9S4Via7NodeR;
    AnyRefNode &Via8 = ....Segments.L5Seg.LongissimusThoracisR9S4Via8NodeR;
    AnyRefNode &Ins = ....Segments.SacrumSeg.LongissimusThoracisR9S4NodeR;
    viewMuscle = {#include "../DrawSettings/MusDrawSettings.any"};
    viewForce.Visible ??= Off;
  };
  AnyMuscleViaPoint LongissimusThoracisR10S3 = {
    AnyMuscleModel &MusMdl = ....MuscleModels.Right.LongissimusThoracis.LongissimusThoracisR10S3;
    AnyRefNode &Org = ....Segments.Right.R10Seg.LongissimusThoracisR10S3NodeR;
    AnyRefNode &Via1 = ....Segments.Right.R11Seg.LongissimusThoracisR10S3Via1NodeR;
    #if BM_TRUNK_CAVITY_MODEL == _CAVITY_MODEL_VOLUME_
    AnyRefNode &Via2 = ....Abdominal.Layer_L1.BaseSegPosterior.LongissimusThoracisR10S3Via2NodeR;
    AnyRefNode &Via3 = ....Abdominal.Layer_L2.BaseSegPosterior.LongissimusThoracisR10S3Via3NodeR;
    AnyRefNode &Via4 = ....Abdominal.Layer_L3.BaseSegPosterior.LongissimusThoracisR10S3Via4NodeR;
    AnyRefNode &Via5 = ....Abdominal.Layer_L4.BaseSegPosterior.LongissimusThoracisR10S3Via5NodeR;
    AnyRefNode &Via6 = ....Abdominal.Layer_L5.BaseSegPosterior.LongissimusThoracisR10S3Via6NodeR;
//    AnyRefNode &Via7 = ....Abdominal.Layer_L5.BaseSegPosterior.LongissimusThoracisR10S3Via7NodeR;
    #else
    AnyRefNode &Via2 = ....Segments.Right.R12Seg.LongissimusThoracisR10S3Via2NodeR;
    AnyRefNode &Via3 = ....Segments.L1Seg.LongissimusThoracisR10S3Via3NodeR;
    AnyRefNode &Via4 = ....Segments.L2Seg.LongissimusThoracisR10S3Via4NodeR;
    AnyRefNode &Via5 = ....Segments.L3Seg.LongissimusThoracisR10S3Via5NodeR;
    AnyRefNode &Via6 = ....Segments.L4Seg.LongissimusThoracisR10S3Via6NodeR;
    AnyRefNode &Via7 = ....Segments.L5Seg.LongissimusThoracisR10S3Via7NodeR;
    #endif
    AnyRefNode &Ins = ....Segments.SacrumSeg.LongissimusThoracisR10S3NodeR;
    viewMuscle = {#include "../DrawSettings/MusDrawSettings.any"};
    viewForce.Visible ??= Off;
  };
  AnyMuscleViaPoint LongissimusThoracisR11S3 = {
    AnyMuscleModel &MusMdl = ....MuscleModels.Right.LongissimusThoracis.LongissimusThoracisR11S3;
    AnyRefNode &Org = ....Segments.Right.R11Seg.LongissimusThoracisR11S3NodeR;
    #if BM_TRUNK_CAVITY_MODEL == _CAVITY_MODEL_VOLUME_
    AnyRefNode &Via1 = ....Abdominal.Layer_L1.BaseSegPosterior.LongissimusThoracisR11S3Via1NodeR;
    AnyRefNode &Via2 = ....Abdominal.Layer_L2.BaseSegPosterior.LongissimusThoracisR11S3Via2NodeR;
    AnyRefNode &Via3 = ....Abdominal.Layer_L3.BaseSegPosterior.LongissimusThoracisR11S3Via3NodeR;
    AnyRefNode &Via4 = ....Abdominal.Layer_L4.BaseSegPosterior.LongissimusThoracisR11S3Via4NodeR;
    AnyRefNode &Via5 = ....Abdominal.Layer_L5.BaseSegPosterior.LongissimusThoracisR11S3Via5NodeR;
//    AnyRefNode &Via6 = ....Abdominal.Layer_L5.BaseSegPosterior.LongissimusThoracisR11S3Via6NodeR;
    #else
    AnyRefNode &Via1 = ....Segments.Right.R12Seg.LongissimusThoracisR11S3Via1NodeR;
    AnyRefNode &Via2 = ....Segments.L1Seg.LongissimusThoracisR11S3Via2NodeR;
    AnyRefNode &Via3 = ....Segments.L2Seg.LongissimusThoracisR11S3Via3NodeR;
    AnyRefNode &Via4 = ....Segments.L3Seg.LongissimusThoracisR11S3Via4NodeR;
    AnyRefNode &Via5 = ....Segments.L4Seg.LongissimusThoracisR11S3Via5NodeR;
    AnyRefNode &Via6 = ....Segments.L5Seg.LongissimusThoracisR11S3Via6NodeR;
    #endif
    AnyRefNode &Ins = ....Segments.SacrumSeg.LongissimusThoracisR11S3NodeR;
    viewMuscle = {#include "../DrawSettings/MusDrawSettings.any"};
    viewForce.Visible ??= Off;
  };
  AnyMuscleViaPoint LongissimusThoracisR12S3 = {
    AnyMuscleModel &MusMdl = ....MuscleModels.Right.LongissimusThoracis.LongissimusThoracisR12S3;
    AnyRefNode &Org = ....Segments.Right.R12Seg.LongissimusThoracisR12S3NodeR;
    #if BM_TRUNK_CAVITY_MODEL == _CAVITY_MODEL_VOLUME_
    AnyRefNode &Via1 = ....Abdominal.Layer_L2.BaseSegPosterior.LongissimusThoracisR12S3Via1NodeR;
    AnyRefNode &Via2 = ....Abdominal.Layer_L3.BaseSegPosterior.LongissimusThoracisR12S3Via2NodeR;
    AnyRefNode &Via3 = ....Abdominal.Layer_L4.BaseSegPosterior.LongissimusThoracisR12S3Via3NodeR;
    AnyRefNode &Via4 = ....Abdominal.Layer_L5.BaseSegPosterior.LongissimusThoracisR12S3Via4NodeR;
//    AnyRefNode &Via5 = ....Abdominal.Layer_L5.BaseSegPosterior.LongissimusThoracisR12S3Via5NodeR;
    #else
    AnyRefNode &Via1 = ....Segments.L1Seg.LongissimusThoracisR12S3Via1NodeR;
    AnyRefNode &Via2 = ....Segments.L2Seg.LongissimusThoracisR12S3Via2NodeR;
    AnyRefNode &Via3 = ....Segments.L3Seg.LongissimusThoracisR12S3Via3NodeR;
    AnyRefNode &Via4 = ....Segments.L4Seg.LongissimusThoracisR12S3Via4NodeR;
    AnyRefNode &Via5 = ....Segments.L5Seg.LongissimusThoracisR12S3Via5NodeR;
    #endif
    AnyRefNode &Ins = ....Segments.SacrumSeg.LongissimusThoracisR12S3NodeR;
    viewMuscle = {#include "../DrawSettings/MusDrawSettings.any"};
    viewForce.Visible ??= Off;
  };
  // End of Longissimus thoracis part thoracis
};

MuscleGroup LongusCapitis = {
  AnyMuscleViaPoint LongusCapitisC6 = {
    AnyMuscleModel &MusMdl = ....MuscleModels.Right.LongusCapitis.LongusCapitisC6;
    AnyRefNode &Org = ....Segments.C6Seg.LongusCapitisC6NodeR;
    AnyRefNode &Ins = ....Segments.SkullSeg.LongusCapitisC0NodeR;
    viewMuscle = {#include "../DrawSettings/MusDrawSettings.any"};
    viewForce.Visible ??= Off;
  };

  AnyMuscleViaPoint LongusCapitisC5 = {
    AnyMuscleModel &MusMdl = ....MuscleModels.Right.LongusCapitis.LongusCapitisC5;
    AnyRefNode &Org = ....Segments.C5Seg.LongusCapitisC5NodeR;
    AnyRefNode &Ins = ....Segments.SkullSeg.LongusCapitisC0NodeR;
    viewMuscle = {#include "../DrawSettings/MusDrawSettings.any"};
    viewForce.Visible ??= Off;
  };

  AnyMuscleViaPoint LongusCapitisC4 = {
    AnyMuscleModel &MusMdl = ....MuscleModels.Right.LongusCapitis.LongusCapitisC4;
    AnyRefNode &Org = ....Segments.C4Seg.LongusCapitisC4NodeR;
    AnyRefNode &Ins = ....Segments.SkullSeg.LongusCapitisC0NodeR;
    viewMuscle = {#include "../DrawSettings/MusDrawSettings.any"};
    viewForce.Visible ??= Off;
  };

  AnyMuscleViaPoint LongusCapitisC3 = {
    AnyMuscleModel &MusMdl = ....MuscleModels.Right.LongusCapitis.LongusCapitisC3;
    AnyRefNode &Org = ....Segments.C3Seg.LongusCapitisC3NodeR;
    AnyRefNode &Ins = ....Segments.SkullSeg.LongusCapitisC0NodeR;
    viewMuscle = {#include "../DrawSettings/MusDrawSettings.any"};
    viewForce.Visible ??= Off;
  };
};

MuscleGroup LongusColli = {
  // LongusColliVertical
  AnyMuscleViaPoint LongusColliT3C6 = {
    AnyMuscleModel &MusMdl = ....MuscleModels.Right.LongusColli.LongusColliT3C6;
    AnyRefNode &Org = ....Segments.T3Seg.Right.LongusColliT3C6Node;
    AnyRefNode &Via1 = ....Segments.T2Seg.Right.LongusColliT3C6Node;
    AnyRefNode &Via2 = ....Segments.T1Seg.Right.LongusColliT3C6Node;
    AnyRefNode &Via3 = ....Segments.C7Seg.Right.LongusColliT3C6Node;
    AnyRefNode &Ins = ....Segments.C6Seg.Right.LongusColliT3C6Node;
    viewMuscle = {#include "../DrawSettings/MusDrawSettings.any"};
    viewForce.Visible ??= Off;
  };
  AnyMuscleViaPoint LongusColliT2C5_1 = {
    AnyMuscleModel &MusMdl = ....MuscleModels.Right.LongusColli.LongusColliT2C5_1;
    AnyRefNode &Org = ....Segments.T2Seg.Right.LongusColliT2C5Node;
    AnyRefNode &Via1 = ....Segments.T1Seg.Right.LongusColliT2C5Node;
    AnyRefNode &Via2 = ....Segments.C7Seg.Right.LongusColliT2C5Node;
    AnyRefNode &Via3 = ....Segments.C6Seg.Right.LongusColliT2C5Node;
    AnyRefNode &Ins = ....Segments.C5Seg.Right.LongusColliT2C5Node;
    viewMuscle = {#include "../DrawSettings/MusDrawSettings.any"};
    viewForce.Visible ??= Off;
  };
  AnyMuscleViaPoint LongusColliT2C3 = {
    AnyMuscleModel &MusMdl = ....MuscleModels.Right.LongusColli.LongusColliT2C3;
    AnyRefNode &Org = ....Segments.T2Seg.Right.LongusColliT2C5Node;
    AnyRefNode &Via1 = ....Segments.T1Seg.Right.LongusColliT1C4Node;
    AnyRefNode &Via2 = ....Segments.C7Seg.Right.LongusColliT1C4Node;
    AnyRefNode &Via3 = ....Segments.C6Seg.Right.LongusColliT1C4Node;
    AnyRefNode &Via4 = ....Segments.C5Seg.Right.LongusColliT1C4Node;
    AnyRefNode &Via5 = ....Segments.C4Seg.Right.LongusColliC7C3Node;
    AnyRefNode &Ins = ....Segments.C3Seg.Right.LongusColliC7C3Node;
    viewMuscle = {#include "<ANYBODY_PATH_BODY>/drawSettings/MusDrawSettings.any"};
    viewForce.Visible ??= Off;
  };
  AnyMuscleViaPoint LongusColliT2C2 = {
    AnyMuscleModel &MusMdl = ....MuscleModels.Right.LongusColli.LongusColliT2C2;
    AnyRefNode &Org = ....Segments.T2Seg.Right.LongusColliT2C5Node;
    AnyRefNode &Via1 = ....Segments.T1Seg.Right.LongusColliT1C4Node;
    AnyRefNode &Via2 = ....Segments.C7Seg.Right.LongusColliT1C4Node;
    AnyRefNode &Via3 = ....Segments.C6Seg.Right.LongusColliT1C4Node;
    AnyRefNode &Via4 = ....Segments.C5Seg.Right.LongusColliT1C4Node;
    AnyRefNode &Via5 = ....Segments.C4Seg.Right.LongusColliC7C3Node;
    AnyRefNode &Via6 = ....Segments.C3Seg.Right.LongusColliC7C3Node;
    AnyRefNode &Ins = ....Segments.C2Seg.Right.LongusColliC6C2Node;
    viewMuscle = {#include "<ANYBODY_PATH_BODY>/drawSettings/MusDrawSettings.any"};
    viewForce.Visible ??= Off;
  };
  AnyMuscleViaPoint LongusColliT1C4 = {
    AnyMuscleModel &MusMdl = ....MuscleModels.Right.LongusColli.LongusColliT1C4;
    AnyRefNode &Org = ....Segments.T1Seg.Right.LongusColliT1C4Node;
    AnyRefNode &Via1 = ....Segments.C7Seg.Right.LongusColliT1C4Node;
    AnyRefNode &Via2 = ....Segments.C6Seg.Right.LongusColliT1C4Node;
    AnyRefNode &Via3 = ....Segments.C5Seg.Right.LongusColliT1C4Node;
    AnyRefNode &Ins = ....Segments.C4Seg.Right.LongusColliT1C4Node;
    viewMuscle = {#include "../DrawSettings/MusDrawSettings.any"};
    viewForce.Visible ??= Off;
  };
  AnyMuscleViaPoint LongusColliT1C3 = {
    AnyMuscleModel &MusMdl = ....MuscleModels.Right.LongusColli.LongusColliT1C3;
    AnyRefNode &Org = ....Segments.T1Seg.Right.LongusColliT1C4Node;
    AnyRefNode &Via1 = ....Segments.C7Seg.Right.LongusColliT1C4Node;
    AnyRefNode &Via2 = ....Segments.C6Seg.Right.LongusColliT1C4Node;
    AnyRefNode &Via3 = ....Segments.C5Seg.Right.LongusColliT1C4Node;
    AnyRefNode &Via4 = ....Segments.C4Seg.Right.LongusColliC7C3Node;
    AnyRefNode &Ins = ....Segments.C3Seg.Right.LongusColliC7C3Node;
    viewMuscle = {#include "<ANYBODY_PATH_BODY>/drawSettings/MusDrawSettings.any"};
    viewForce.Visible ??= Off;
  };
  AnyMuscleViaPoint LongusColliT1C2 = {
    AnyMuscleModel &MusMdl = ....MuscleModels.Right.LongusColli.LongusColliT1C2;
    AnyRefNode &Org = ....Segments.T1Seg.Right.LongusColliT1C4Node;
    AnyRefNode &Via1 = ....Segments.C7Seg.Right.LongusColliT1C4Node;
    AnyRefNode &Via2 = ....Segments.C6Seg.Right.LongusColliT1C4Node;
    AnyRefNode &Via3 = ....Segments.C5Seg.Right.LongusColliT1C4Node;
    AnyRefNode &Via4 = ....Segments.C4Seg.Right.LongusColliC7C3Node;
    AnyRefNode &Via5 = ....Segments.C3Seg.Right.LongusColliC7C3Node;
    AnyRefNode &Ins = ....Segments.C2Seg.Right.LongusColliC6C2Node;
    viewMuscle = {#include "<ANYBODY_PATH_BODY>/drawSettings/MusDrawSettings.any"};
    viewForce.Visible ??= Off;
  };
  AnyMuscleViaPoint LongusColliC7C3 = {
    AnyMuscleModel &MusMdl = ....MuscleModels.Right.LongusColli.LongusColliC7C3;
    AnyRefNode &Org = ....Segments.C7Seg.Right.LongusColliC7C3Node;
    AnyRefNode &Via1 = ....Segments.C6Seg.Right.LongusColliC7C3Node;
    AnyRefNode &Via2 = ....Segments.C5Seg.Right.LongusColliC7C3Node;
    AnyRefNode &Via3 = ....Segments.C4Seg.Right.LongusColliC7C3Node;
    AnyRefNode &Ins = ....Segments.C3Seg.Right.LongusColliC7C3Node;
    viewMuscle = {#include "../DrawSettings/MusDrawSettings.any"};
    viewForce.Visible ??= Off;
  };
  AnyMuscleViaPoint LongusColliC6C2_1 = {
    AnyMuscleModel &MusMdl = ....MuscleModels.Right.LongusColli.LongusColliC6C2_1;
    AnyRefNode &Org = ....Segments.C6Seg.Right.LongusColliC6C2Node;
    AnyRefNode &Via1 = ....Segments.C5Seg.Right.LongusColliC6C2Node;
    AnyRefNode &Via2 = ....Segments.C4Seg.Right.LongusColliC6C2Node;
    AnyRefNode &Via3 = ....Segments.C3Seg.Right.LongusColliC6C2Node;
    AnyRefNode &Ins = ....Segments.C2Seg.Right.LongusColliC6C2Node;
    viewMuscle = {#include "../DrawSettings/MusDrawSettings.any"};
    viewForce.Visible ??= Off;
  };
  AnyMuscleViaPoint LongusColliC5C1_1 = {
    AnyMuscleModel &MusMdl = ....MuscleModels.Right.LongusColli.LongusColliC5C1_1;
    AnyRefNode &Org = ....Segments.C5Seg.Right.LongusColliC5C1Node;
    AnyRefNode &Via1 = ....Segments.C4Seg.Right.LongusColliC5C1Node;
    AnyRefNode &Via2 = ....Segments.C3Seg.Right.LongusColliC5C1Node;
    AnyRefNode &Via3 = ....Segments.C2Seg.Right.LongusColliC5C1Node;
    AnyRefNode &Ins = ....Segments.C1Seg.Right.LongusColliC5C1Node;
    viewMuscle = {#include "../DrawSettings/MusDrawSettings.any"};
    viewForce.Visible ??= Off;
  };
  // LongusColliSuperiorOblique
  AnyMuscleViaPoint LongusColliC3C1 = {
    AnyMuscleModel &MusMdl = ....MuscleModels.Right.LongusColli.LongusColliC3C1;
    AnyRefNode &Org = ....Segments.C3Seg.LongusCapitisC3NodeR;
    AnyRefNode &Ins = ....Segments.C1Seg.Right.LongusColliC5C1Node;
    viewMuscle = {#include "<ANYBODY_PATH_BODY>/drawSettings/MusDrawSettings.any"};
    viewForce.Visible ??= Off;
  };
  AnyMuscleViaPoint LongusColliC4C1 = {
    AnyMuscleModel &MusMdl = ....MuscleModels.Right.LongusColli.LongusColliC4C1;
    AnyRefNode &Org = ....Segments.C4Seg.LongusCapitisC4NodeR;
    AnyRefNode &Ins = ....Segments.C1Seg.Right.LongusColliC5C1Node;
    viewMuscle = {#include "<ANYBODY_PATH_BODY>/drawSettings/MusDrawSettings.any"};
    viewForce.Visible ??= Off;
  };
  AnyMuscleViaPoint LongusColliC5C1_2 = {
    AnyMuscleModel &MusMdl = ....MuscleModels.Right.LongusColli.LongusColliC5C1_2;
    AnyRefNode &Org = ....Segments.C5Seg.LongusCapitisC5NodeR;
    AnyRefNode &Ins = ....Segments.C1Seg.Right.LongusColliC5C1Node;
    viewMuscle = {#include "<ANYBODY_PATH_BODY>/drawSettings/MusDrawSettings.any"};
    viewForce.Visible ??= Off;
  };
  AnyMuscleViaPoint LongusColliC4C2 = {
    AnyMuscleModel &MusMdl = ....MuscleModels.Right.LongusColli.LongusColliC4C2;
    AnyRefNode &Org = ....Segments.C4Seg.LongusCapitisC4NodeR;
    AnyRefNode &Ins = ....Segments.C2Seg.Right.LongusColliC6C2Node;
    viewMuscle = {#include "<ANYBODY_PATH_BODY>/drawSettings/MusDrawSettings.any"};
    viewForce.Visible ??= Off;
  };
  AnyMuscleViaPoint LongusColliC5C2 = {
    AnyMuscleModel &MusMdl = ....MuscleModels.Right.LongusColli.LongusColliC5C2;
    AnyRefNode &Org = ....Segments.C5Seg.LongusCapitisC5NodeR;
    AnyRefNode &Ins = ....Segments.C2Seg.Right.LongusColliC6C2Node;
    viewMuscle = {#include "<ANYBODY_PATH_BODY>/drawSettings/MusDrawSettings.any"};
    viewForce.Visible ??= Off;
  };
  AnyMuscleViaPoint LongusColliC6C2_2 = {
    AnyMuscleModel &MusMdl = ....MuscleModels.Right.LongusColli.LongusColliC6C2_2;
    AnyRefNode &Org = ....Segments.C6Seg.LongusCapitisC6NodeR;
    AnyRefNode &Ins = ....Segments.C2Seg.Right.LongusColliC6C2Node;
    viewMuscle = {#include "<ANYBODY_PATH_BODY>/drawSettings/MusDrawSettings.any"};
    viewForce.Visible ??= Off;
  };
  AnyMuscleViaPoint LongusColliC6C3 = {
    AnyMuscleModel &MusMdl = ....MuscleModels.Right.LongusColli.LongusColliC6C3;
    AnyRefNode &Org = ....Segments.C6Seg.LongusCapitisC6NodeR;
    AnyRefNode &Ins = ....Segments.C3Seg.Right.LongusColliC7C3Node;
    viewMuscle = {#include "<ANYBODY_PATH_BODY>/drawSettings/MusDrawSettings.any"};
    viewForce.Visible ??= Off;
  };

  // LongusColliInferiorOblique
  AnyMuscleViaPoint LongusColliT1C6 = {
    AnyMuscleModel &MusMdl = ....MuscleModels.Right.LongusColli.LongusColliT1C6;
    AnyRefNode &Org = ....Segments.T1Seg.Right.LongusColliT1C4Node;
    AnyRefNode &Ins = ....Segments.C6Seg.LongusCapitisC6NodeR;
    viewMuscle = {#include "<ANYBODY_PATH_BODY>/drawSettings/MusDrawSettings.any"};
    viewForce.Visible ??= Off;
  };
  AnyMuscleViaPoint LongusColliT2C6 = {
    AnyMuscleModel &MusMdl = ....MuscleModels.Right.LongusColli.LongusColliT2C6;
    AnyRefNode &Org = ....Segments.T2Seg.Right.LongusColliT2C5Node;
    AnyRefNode &Ins = ....Segments.C6Seg.LongusCapitisC6NodeR;
    viewMuscle = {#include "<ANYBODY_PATH_BODY>/drawSettings/MusDrawSettings.any"};
    viewForce.Visible ??= Off;
  };
  AnyMuscleViaPoint LongusColliT2C5_2 = {
    AnyMuscleModel &MusMdl = ....MuscleModels.Right.LongusColli.LongusColliT2C5_2;
    AnyRefNode &Org = ....Segments.T2Seg.Right.LongusColliT2C5Node;
    AnyRefNode &Ins = ....Segments.C5Seg.LongusCapitisC5NodeR;
    viewMuscle = {#include "<ANYBODY_PATH_BODY>/drawSettings/MusDrawSettings.any"};
    viewForce.Visible ??= Off;
  };
};

MuscleGroup MultifidusCervicis = {
  AnyMuscleViaPoint MultifidusCervicisC5C2 = {
    AnyMuscleModel &MusMdl = ....MuscleModels.Right.MultifidusCervicis.MultifidusCervicisC5C2;
    AnyRefNode &Org = ....Segments.C5Seg.MultifidusCervicisC5C2NodeR;
    AnyRefNode &Ins = ....Segments.C2Seg.MultifidusCervicisC2NodeR;
    viewMuscle = {#include "../DrawSettings/MusDrawSettings.any"};
    viewForce.Visible ??= Off;
  };

  AnyMuscleViaPoint MultifidusCervicisC6C2 = {
    AnyMuscleModel &MusMdl = ....MuscleModels.Right.MultifidusCervicis.MultifidusCervicisC6C2;
    AnyRefNode &Org = ....Segments.C6Seg.MultifidusCervicisC6C2NodeR;
    AnyRefNode &Ins = ....Segments.C2Seg.MultifidusCervicisC2NodeR;
    viewMuscle = {#include "../DrawSettings/MusDrawSettings.any"};
    viewForce.Visible ??= Off;
  };

  AnyMuscleViaPoint MultifidusCervicisC6C3 = {
    AnyMuscleModel &MusMdl = ....MuscleModels.Right.MultifidusCervicis.MultifidusCervicisC6C3;
    AnyRefNode &Org = ....Segments.C6Seg.MultifidusCervicisC6C2NodeR;
    AnyRefNode &Ins = ....Segments.C3Seg.MultifidusCervicisC3NodeR;
    viewMuscle = {#include "../DrawSettings/MusDrawSettings.any"};
    viewForce.Visible ??= Off;
  };

  AnyMuscleViaPoint MultifidusCervicisC7C3 = {
    AnyMuscleModel &MusMdl = ....MuscleModels.Right.MultifidusCervicis.MultifidusCervicisC7C3;
    AnyRefNode &Org = ....Segments.C7Seg.MultifidusCervicisC7C3NodeR;
    AnyRefNode &Ins = ....Segments.C3Seg.MultifidusCervicisC3NodeR;
    viewMuscle = {#include "../DrawSettings/MusDrawSettings.any"};
    viewForce.Visible ??= Off;
  };

  AnyMuscleViaPoint MultifidusCervicisC7C4 = {
    AnyMuscleModel &MusMdl = ....MuscleModels.Right.MultifidusCervicis.MultifidusCervicisC7C4;
    AnyRefNode &Org = ....Segments.C7Seg.MultifidusCervicisC7C4NodeR;
    AnyRefNode &Ins = ....Segments.C4Seg.MultifidusCervicisC4NodeR;
    viewMuscle = {#include "../DrawSettings/MusDrawSettings.any"};
    viewForce.Visible ??= Off;
  };

  AnyMuscleViaPoint MultifidusCervicisT1C4 = {
    AnyMuscleModel &MusMdl = ....MuscleModels.Right.MultifidusCervicis.MultifidusCervicisT1C4;
    AnyRefNode &Org = ....Segments.T1Seg.MultifidusCervicisT1C4NodeR;
    AnyRefNode &Ins = ....Segments.C4Seg.MultifidusCervicisC4NodeR;
    viewMuscle = {#include "../DrawSettings/MusDrawSettings.any"};
    viewForce.Visible ??= Off;
  };

  AnyMuscleViaPoint MultifidusCervicisT1C5 = {
    AnyMuscleModel &MusMdl = ....MuscleModels.Right.MultifidusCervicis.MultifidusCervicisT1C5;
    AnyRefNode &Org = ....Segments.T1Seg.MultifidusCervicisT1C5NodeR;
    AnyRefNode &Ins = ....Segments.C5Seg.MultifidusCervicisC5NodeR;
    viewMuscle = {#include "../DrawSettings/MusDrawSettings.any"};
    viewForce.Visible ??= Off;
  };

  AnyMuscleViaPoint MultifidusCervicisT2C5 = {
    AnyMuscleModel &MusMdl = ....MuscleModels.Right.MultifidusCervicis.MultifidusCervicisT2C5;
    AnyRefNode &Org = ....Segments.T2Seg.MultifidusCervicisT2C5NodeR;
    AnyRefNode &Ins = ....Segments.C5Seg.MultifidusCervicisC5NodeR;
    viewMuscle = {#include "../DrawSettings/MusDrawSettings.any"};
    viewForce.Visible ??= Off;
  };

  AnyMuscleViaPoint MultifidusCervicisT2C6 = {
    AnyMuscleModel &MusMdl = ....MuscleModels.Right.MultifidusCervicis.MultifidusCervicisT2C6;
    AnyRefNode &Org = ....Segments.T2Seg.MultifidusCervicisT2C6NodeR;
    AnyRefNode &Ins = ....Segments.C6Seg.MultifidusCervicisC6NodeR;
    viewMuscle = {#include "../DrawSettings/MusDrawSettings.any"};
    viewForce.Visible ??= Off;
  };

  AnyMuscleViaPoint MultifidusCervicisT3C6 = {
    AnyMuscleModel &MusMdl = ....MuscleModels.Right.MultifidusCervicis.MultifidusCervicisT3C6;
    AnyRefNode &Org = ....Segments.T3Seg.MultifidusCervicisT3C6NodeR;
    AnyRefNode &Ins = ....Segments.C6Seg.MultifidusCervicisC6NodeR;
    viewMuscle = {#include "../DrawSettings/MusDrawSettings.any"};
    viewForce.Visible ??= Off;
  };

  AnyMuscleViaPoint MultifidusCervicisT3C7 = {
    AnyMuscleModel &MusMdl = ....MuscleModels.Right.MultifidusCervicis.MultifidusCervicisT3C7;
    AnyRefNode &Org = ....Segments.T3Seg.MultifidusCervicisT3C7NodeR;
    AnyRefNode &Ins = ....Segments.C7Seg.MultifidusCervicisC7NodeR;
    viewMuscle = {#include "../DrawSettings/MusDrawSettings.any"};
    viewForce.Visible ??= Off;
  };

  AnyMuscleViaPoint MultifidusCervicisT4C7 = {
    AnyMuscleModel &MusMdl = ....MuscleModels.Right.MultifidusCervicis.MultifidusCervicisT4C7;
    AnyRefNode &Org = ....Segments.T4Seg.MultifidusCervicisT4C7NodeR;
    AnyRefNode &Ins = ....Segments.C7Seg.MultifidusCervicisC7NodeR;
    viewMuscle = {#include "../DrawSettings/MusDrawSettings.any"};
    viewForce.Visible ??= Off;
  };
};

MuscleGroup MultifidusLumborum = {
  AnyMuscleViaPoint MultifidusLumborumL1L3 = {
    AnyMuscleModel &MusMdl = ....MuscleModels.Right.Multifidi.MultifidusLumborumL1L3;
    AnyRefNode &Org = ....Segments.L1Seg.MultifidusLumborumL1L3NodeR;
    AnyRefNode &Ins = ....Segments.L3Seg.MultifidusLumborumL1L3NodeR;
    viewMuscle = {#include "../DrawSettings/MusDrawSettings.any"};
    viewForce.Visible ??= Off;
  };

  AnyMuscleViaPoint MultifidusLumborumL2L4 = {
    AnyMuscleModel &MusMdl = ....MuscleModels.Right.Multifidi.MultifidusLumborumL2L4;
    AnyRefNode &Org = ....Segments.L2Seg.MultifidusLumborumL2L4NodeR;
    AnyRefNode &Ins = ....Segments.L4Seg.MultifidusLumborumL2L4NodeR;
    viewMuscle = {#include "../DrawSettings/MusDrawSettings.any"};
    viewForce.Visible ??= Off;
  };

  AnyMuscleViaPoint MultifidusLumborumL3L5 = {
    AnyMuscleModel &MusMdl = ....MuscleModels.Right.Multifidi.MultifidusLumborumL3L5;
    AnyRefNode &Org = ....Segments.L3Seg.MultifidusLumborumL3L5NodeR;
    AnyRefNode &Ins = ....Segments.L5Seg.MultifidusLumborumL3L5NodeR;
    viewMuscle = {#include "../DrawSettings/MusDrawSettings.any"};
    viewForce.Visible ??= Off;
  };

  AnyMuscleViaPoint MultifidusLumborumL4S1_1 = {
    AnyMuscleModel &MusMdl = ....MuscleModels.Right.Multifidi.MultifidusLumborumL4S1_1;
    AnyRefNode &Org = ....Segments.L4Seg.MultifidusLumborumL4S1_1NodeR;
    AnyRefNode &Ins = ....Segments.SacrumSeg.MultifidusLumborumL4S1_1NodeR;
    viewMuscle = {#include "../DrawSettings/MusDrawSettings.any"};
    viewForce.Visible ??= Off;
  };

  AnyMuscleViaPoint MultifidusLumborumL5S1_1 = {
    AnyMuscleModel &MusMdl = ....MuscleModels.Right.Multifidi.MultifidusLumborumL5S1_1;
    AnyRefNode &Org = ....Segments.L5Seg.MultifidusLumborumL5S1_1NodeR;
    AnyRefNode &Ins = ....Segments.SacrumSeg.MultifidusLumborumL5S1_1NodeR;
    viewMuscle = {#include "../DrawSettings/MusDrawSettings.any"};
    viewForce.Visible ??= Off;
  };

  AnyMuscleViaPoint MultifidusLumborumL1L4 = {
    AnyMuscleModel &MusMdl = ....MuscleModels.Right.Multifidi.MultifidusLumborumL1L4;
    AnyRefNode &Org = ....Segments.L1Seg.MultifidusLumborumL1L4NodeR;
    AnyRefNode &Ins = ....Segments.L4Seg.MultifidusLumborumL1L4NodeR;
    viewMuscle = {#include "../DrawSettings/MusDrawSettings.any"};
    viewForce.Visible ??= Off;
  };

  AnyMuscleViaPoint MultifidusLumborumL2L5_1 = {
    AnyMuscleModel &MusMdl = ....MuscleModels.Right.Multifidi.MultifidusLumborumL2L5_1;
    AnyRefNode &Org = ....Segments.L2Seg.MultifidusLumborumL2L5_1NodeR;
    AnyRefNode &Ins = ....Segments.L5Seg.MultifidusLumborumL2L5_1NodeR;
    viewMuscle = {#include "../DrawSettings/MusDrawSettings.any"};
    viewForce.Visible ??= Off;
  };

  AnyMuscleViaPoint MultifidusLumborumL3S1 = {
    AnyMuscleModel &MusMdl = ....MuscleModels.Right.Multifidi.MultifidusLumborumL3S1;
    AnyRefNode &Org = ....Segments.L3Seg.MultifidusLumborumL3S1NodeR;
    AnyRefNode &Ins = ....Segments.SacrumSeg.MultifidusLumborumL3S1NodeR;
    viewMuscle = {#include "../DrawSettings/MusDrawSettings.any"};
    viewForce.Visible ??= Off;
  };

  AnyMuscleViaPoint MultifidusLumborumL4S1_2 = {
    AnyMuscleModel &MusMdl = ....MuscleModels.Right.Multifidi.MultifidusLumborumL4S1_2;
    AnyRefNode &Org = ....Segments.L4Seg.MultifidusLumborumL4S1_2NodeR;
    AnyRefNode &Ins = ....Segments.SacrumSeg.MultifidusLumborumL4S1_2NodeR;
    viewMuscle = {#include "../DrawSettings/MusDrawSettings.any"};
    viewForce.Visible ??= Off;
  };

  AnyMuscleViaPoint MultifidusLumborumL5S1_2 = {
    AnyMuscleModel &MusMdl = ....MuscleModels.Right.Multifidi.MultifidusLumborumL5S1_2;
    AnyRefNode &Org = ....Segments.L5Seg.MultifidusLumborumL5S1_2NodeR;
    AnyRefNode &Ins = ....Segments.SacrumSeg.MultifidusLumborumL5S1_2NodeR;
    viewMuscle = {#include "../DrawSettings/MusDrawSettings.any"};
    viewForce.Visible ??= Off;
  };

  AnyMuscleViaPoint MultifidusLumborumL1L5 = {
    AnyMuscleModel &MusMdl = ....MuscleModels.Right.Multifidi.MultifidusLumborumL1L5;
    AnyRefNode &Org = ....Segments.L1Seg.MultifidusLumborumL1L5NodeR;
    AnyRefNode &Ins = ....Segments.L5Seg.MultifidusLumborumL1L5NodeR;
    viewMuscle = {#include "../DrawSettings/MusDrawSettings.any"};
    viewForce.Visible ??= Off;
  };

  AnyMuscleViaPoint MultifidusLumborumL1S1 = {
    AnyMuscleModel &MusMdl = ....MuscleModels.Right.Multifidi.MultifidusLumborumL1S1;
    AnyRefNode &Org = ....Segments.L1Seg.MultifidusLumborumL1S1NodeR;
    AnyRefNode &Ins = ....Segments.SacrumSeg.MultifidusLumborumL1S1NodeR;
    viewMuscle = {#include "../DrawSettings/MusDrawSettings.any"};
    viewForce.Visible ??= Off;
  };

  AnyMuscleViaPoint MultifidusLumborumL2L5_2 = {
    AnyMuscleModel &MusMdl = ....MuscleModels.Right.Multifidi.MultifidusLumborumL2L5_2;
    AnyRefNode &Org = ....Segments.L2Seg.MultifidusLumborumL2L5_2NodeR;
    AnyRefNode &Ins = ....Segments.L5Seg.MultifidusLumborumL2L5_2NodeR;
    viewMuscle = {#include "../DrawSettings/MusDrawSettings.any"};
    viewForce.Visible ??= Off;
  };

  AnyMuscleViaPoint MultifidusLumborumL2S1 = {
    AnyMuscleModel &MusMdl = ....MuscleModels.Right.Multifidi.MultifidusLumborumL2S1;
    AnyRefNode &Org = ....Segments.L2Seg.MultifidusLumborumL2S1NodeR;
    AnyRefNode &Ins = ....Segments.SacrumSeg.MultifidusLumborumL2S1NodeR;
    viewMuscle = {#include "../DrawSettings/MusDrawSettings.any"};
    viewForce.Visible ??= Off;
  };

  AnyMuscleViaPoint MultifidusLumborumL3S2 = {
    AnyMuscleModel &MusMdl = ....MuscleModels.Right.Multifidi.MultifidusLumborumL3S2;
    AnyRefNode &Org = ....Segments.L3Seg.MultifidusLumborumL3S2NodeR;
    AnyRefNode &Via = ....Segments.SacrumSeg.MultifidusLumborumL3S2NodeViaR;
    AnyRefNode &Ins = ....Segments.SacrumSeg.MultifidusLumborumL3S2NodeR;
    viewMuscle = {#include "../DrawSettings/MusDrawSettings.any"};
    viewForce.Visible ??= Off;
  };

  AnyMuscleViaPoint MultifidusLumborumL4S2 = {
    AnyMuscleModel &MusMdl = ....MuscleModels.Right.Multifidi.MultifidusLumborumL4S2;
    AnyRefNode &Org = ....Segments.L4Seg.MultifidusLumborumL4S2NodeR;
    AnyRefNode &Via = ....Segments.SacrumSeg.MultifidusLumborumL4S2ViaNodeR;
    AnyRefNode &Ins = ....Segments.SacrumSeg.MultifidusLumborumL4S2NodeR;
    viewMuscle = {#include "../DrawSettings/MusDrawSettings.any"};
    viewForce.Visible ??= Off;
  };

  AnyMuscleViaPoint MultifidusLumborumL5S3 = {
    AnyMuscleModel &MusMdl = ....MuscleModels.Right.Multifidi.MultifidusLumborumL5S3;
    AnyRefNode &Org = ....Segments.L5Seg.MultifidusLumborumL5S3NodeR;
    AnyRefNode &Via = ....Segments.SacrumSeg.MultifidusLumborumL5S3ViaNodeR;
    AnyRefNode &Ins = ....Segments.SacrumSeg.MultifidusLumborumL5S3NodeR;
    viewMuscle = {#include "../DrawSettings/MusDrawSettings.any"};
    viewForce.Visible ??= Off;
  };

  AnyMuscleViaPoint MultifidusLumborumtL1IC = {
    AnyMuscleModel &MusMdl = ....MuscleModels.Right.Multifidi.MultifidusLumborumtL1IC;
    AnyRefNode &Org = ....Segments.L1Seg.MultifidusLumborumtL1ICNodeR;
    AnyRefNode &Via = ....Segments.PelvisSeg.MultifidusLumborumtL1ICViaNodeR;
    AnyRefNode &Ins = ....Segments.PelvisSeg.MultifidusLumborumtL1ICNodeR;
    viewMuscle = {#include "../DrawSettings/MusDrawSettings.any"};
    viewForce.Visible ??= Off;
  };

  AnyMuscleViaPoint MultifidusLumborumtL2IC = {
    AnyMuscleModel &MusMdl = ....MuscleModels.Right.Multifidi.MultifidusLumborumtL2IC;
    AnyRefNode &Org = ....Segments.L2Seg.MultifidusLumborumtL2ICNodeR;
    AnyRefNode &Via = ....Segments.PelvisSeg.MultifidusLumborumtL2ICViaNodeR;
    AnyRefNode &Ins = ....Segments.PelvisSeg.MultifidusLumborumtL2ICNodeR;
    viewMuscle = {#include "../DrawSettings/MusDrawSettings.any"};
    viewForce.Visible ??= Off;
  };
};

MuscleGroup MultifidusThoracis = {
  #if BM_TRUNK_THORACIC_MODEL == _THORACIC_MODEL_FLEXIBLE_
  AnyMuscleViaPoint MultifidusThoracisT4T1 =   {
    AnyMuscleModel &MusMdl = ....MuscleModels.Right.ThoracicMultifidi.MultifidusThoracisT4T1;
    AnyRefFrame &Org = ....Segments.T4Seg.MultifidusThoracisTtifidusThoracisT4T1NodeROrg;
    AnyRefFrame &Ins = ....Segments.T1Seg.MultifidusThoracisTtifidusThoracisT4T1NodeRIns;
    viewMuscle = {#include "../DrawSettings/MusDrawSettings.any"};
    viewForce.Visible ??= Off;
  };

  AnyMuscleViaPoint MultifidusThoracisT5T1 =   {
    AnyMuscleModel &MusMdl = ....MuscleModels.Right.ThoracicMultifidi.MultifidusThoracisT5T1;
    AnyRefFrame &Org = ....Segments.T5Seg.MultifidusThoracisT5T1NodeROrg;
    AnyRefFrame &Ins = ....Segments.T1Seg.MultifidusThoracisT5T1NodeRIns;
    viewMuscle = {#include "../DrawSettings/MusDrawSettings.any"};
    viewForce.Visible ??= Off;
  };

  AnyMuscleViaPoint MultifidusThoracisT5T2 =   {
    AnyMuscleModel &MusMdl = ....MuscleModels.Right.ThoracicMultifidi.MultifidusThoracisT5T2;
    AnyRefFrame &Org = ....Segments.T5Seg.MultifidusThoracisT5T2NodeROrg;
    AnyRefFrame &Ins = ....Segments.T2Seg.MultifidusThoracisT5T2NodeRIns;
    viewMuscle = {#include "../DrawSettings/MusDrawSettings.any"};
    viewForce.Visible ??= Off;
  };

  AnyMuscleViaPoint MultifidusThoracisT6T1 =   {
    AnyMuscleModel &MusMdl = ....MuscleModels.Right.ThoracicMultifidi.MultifidusThoracisT6T1;
    AnyRefFrame &Org = ....Segments.T6Seg.MultifidusThoracisT6T1NodeROrg;
    AnyRefFrame &Ins = ....Segments.T1Seg.MultifidusThoracisT6T1NodeRIns;
    viewMuscle = {#include "../DrawSettings/MusDrawSettings.any"};
    viewForce.Visible ??= Off;
  };

  AnyMuscleViaPoint MultifidusThoracisT6T2 =   {
    AnyMuscleModel &MusMdl = ....MuscleModels.Right.ThoracicMultifidi.MultifidusThoracisT6T2;
    AnyRefFrame &Org = ....Segments.T6Seg.MultifidusThoracisT6T2NodeROrg;
    AnyRefFrame &Ins = ....Segments.T2Seg.MultifidusThoracisT6T2NodeRIns;
    viewMuscle = {#include "../DrawSettings/MusDrawSettings.any"};
    viewForce.Visible ??= Off;
  };

  AnyMuscleViaPoint MultifidusThoracisT6T3 =   {
    AnyMuscleModel &MusMdl = ....MuscleModels.Right.ThoracicMultifidi.MultifidusThoracisT6T3;
    AnyRefFrame &Org = ....Segments.T6Seg.MultifidusThoracisT6T3NodeROrg;
    AnyRefFrame &Ins = ....Segments.T3Seg.MultifidusThoracisT6T3NodeRIns;
    viewMuscle = {#include "../DrawSettings/MusDrawSettings.any"};
    viewForce.Visible ??= Off;
  };

  AnyMuscleViaPoint MultifidusThoracisT7T2 =   {
    AnyMuscleModel &MusMdl = ....MuscleModels.Right.ThoracicMultifidi.MultifidusThoracisT7T2;
    AnyRefFrame &Org = ....Segments.T7Seg.MultifidusThoracisT7T2NodeROrg;
    AnyRefFrame &Ins = ....Segments.T2Seg.MultifidusThoracisT7T2NodeRIns;
    viewMuscle = {#include "../DrawSettings/MusDrawSettings.any"};
    viewForce.Visible ??= Off;
  };

  AnyMuscleViaPoint MultifidusThoracisT7T3 =   {
    AnyMuscleModel &MusMdl = ....MuscleModels.Right.ThoracicMultifidi.MultifidusThoracisT7T3;
    AnyRefFrame &Org = ....Segments.T7Seg.MultifidusThoracisT7T3NodeROrg;
    AnyRefFrame &Ins = ....Segments.T3Seg.MultifidusThoracisT7T3NodeRIns;
    viewMuscle = {#include "../DrawSettings/MusDrawSettings.any"};
    viewForce.Visible ??= Off;
  };

  AnyMuscleViaPoint MultifidusThoracisT7T4 =   {
    AnyMuscleModel &MusMdl = ....MuscleModels.Right.ThoracicMultifidi.MultifidusThoracisT7T4;
    AnyRefFrame &Org = ....Segments.T7Seg.MultifidusThoracisT7T4NodeROrg;
    AnyRefFrame &Ins = ....Segments.T4Seg.MultifidusThoracisT7T4NodeRIns;
    viewMuscle = {#include "../DrawSettings/MusDrawSettings.any"};
    viewForce.Visible ??= Off;
  };

  AnyMuscleViaPoint MultifidusThoracisT8T3 =   {
    AnyMuscleModel &MusMdl = ....MuscleModels.Right.ThoracicMultifidi.MultifidusThoracisT8T3;
    AnyRefFrame &Org = ....Segments.T8Seg.MultifidusThoracisT8T3NodeROrg;
    AnyRefFrame &Ins = ....Segments.T3Seg.MultifidusThoracisT8T3NodeRIns;
    viewMuscle = {#include "../DrawSettings/MusDrawSettings.any"};
    viewForce.Visible ??= Off;
  };

  AnyMuscleViaPoint MultifidusThoracisT8T4 =   {
    AnyMuscleModel &MusMdl = ....MuscleModels.Right.ThoracicMultifidi.MultifidusThoracisT8T4;
    AnyRefFrame &Org = ....Segments.T8Seg.MultifidusThoracisT8T4NodeROrg;
    AnyRefFrame &Ins = ....Segments.T4Seg.MultifidusThoracisT8T4NodeRIns;
    viewMuscle = {#include "../DrawSettings/MusDrawSettings.any"};
    viewForce.Visible ??= Off;
  };

  AnyMuscleViaPoint MultifidusThoracisT8T5 =   {
    AnyMuscleModel &MusMdl = ....MuscleModels.Right.ThoracicMultifidi.MultifidusThoracisT8T5;
    AnyRefFrame &Org = ....Segments.T8Seg.MultifidusThoracisT8T5NodeROrg;
    AnyRefFrame &Ins = ....Segments.T5Seg.MultifidusThoracisT8T5NodeRIns;
    viewMuscle = {#include "../DrawSettings/MusDrawSettings.any"};
    viewForce.Visible ??= Off;
  };

  AnyMuscleViaPoint MultifidusThoracisT9T4 =   {
    AnyMuscleModel &MusMdl = ....MuscleModels.Right.ThoracicMultifidi.MultifidusThoracisT9T4;
    AnyRefFrame &Org = ....Segments.T9Seg.MultifidusThoracisT9T4NodeROrg;
    AnyRefFrame &Ins = ....Segments.T4Seg.MultifidusThoracisT9T4NodeRIns;
    viewMuscle = {#include "../DrawSettings/MusDrawSettings.any"};
    viewForce.Visible ??= Off;
  };

  AnyMuscleViaPoint MultifidusThoracisT9T5 =   {
    AnyMuscleModel &MusMdl = ....MuscleModels.Right.ThoracicMultifidi.MultifidusThoracisT9T5;
    AnyRefFrame &Org = ....Segments.T9Seg.MultifidusThoracisT9T5NodeROrg;
    AnyRefFrame &Ins = ....Segments.T5Seg.MultifidusThoracisT9T5NodeRIns;
    viewMuscle = {#include "../DrawSettings/MusDrawSettings.any"};
    viewForce.Visible ??= Off;
  };

  AnyMuscleViaPoint MultifidusThoracisT9T6 =   {
    AnyMuscleModel &MusMdl = ....MuscleModels.Right.ThoracicMultifidi.MultifidusThoracisT9T6;
    AnyRefFrame &Org = ....Segments.T9Seg.MultifidusThoracisT9T6NodeROrg;
    AnyRefFrame &Ins = ....Segments.T6Seg.MultifidusThoracisT9T6NodeRIns;
    viewMuscle = {#include "../DrawSettings/MusDrawSettings.any"};
    viewForce.Visible ??= Off;
  };

  AnyMuscleViaPoint MultifidusThoracisT10T5 =   {
    AnyMuscleModel &MusMdl = ....MuscleModels.Right.ThoracicMultifidi.MultifidusThoracisT10T5;
    AnyRefFrame &Org = ....Segments.T10Seg.MultifidusThoracisT10T5NodeROrg;
    AnyRefFrame &Ins = ....Segments.T5Seg.MultifidusThoracisT10T5NodeRIns;
    viewMuscle = {#include "../DrawSettings/MusDrawSettings.any"};
    viewForce.Visible ??= Off;
  };

  AnyMuscleViaPoint MultifidusThoracisT10T6 =   {
    AnyMuscleModel &MusMdl = ....MuscleModels.Right.ThoracicMultifidi.MultifidusThoracisT10T6;
    AnyRefFrame &Org = ....Segments.T10Seg.MultifidusThoracisT10T6NodeROrg;
    AnyRefFrame &Ins = ....Segments.T6Seg.MultifidusThoracisT10T6NodeRIns;
    viewMuscle = {#include "../DrawSettings/MusDrawSettings.any"};
    viewForce.Visible ??= Off;
  };

  AnyMuscleViaPoint MultifidusThoracisT10T7 =   {
    AnyMuscleModel &MusMdl = ....MuscleModels.Right.ThoracicMultifidi.MultifidusThoracisT10T7;
    AnyRefFrame &Org = ....Segments.T10Seg.MultifidusThoracisT10T7NodeROrg;
    AnyRefFrame &Ins = ....Segments.T7Seg.MultifidusThoracisT10T7NodeRIns;
    viewMuscle = {#include "../DrawSettings/MusDrawSettings.any"};
    viewForce.Visible ??= Off;
  };

  AnyMuscleViaPoint MultifidusThoracisT11T6 =   {
    AnyMuscleModel &MusMdl = ....MuscleModels.Right.ThoracicMultifidi.MultifidusThoracisT11T6;
    AnyRefFrame &Org = ....Segments.T11Seg.MultifidusThoracisT11T6NodeROrg;
    AnyRefFrame &Ins = ....Segments.T6Seg.MultifidusThoracisT11T6NodeRIns;
    viewMuscle = {#include "../DrawSettings/MusDrawSettings.any"};
    viewForce.Visible ??= Off;
  };

  AnyMuscleViaPoint MultifidusThoracisT11T7 =   {
    AnyMuscleModel &MusMdl = ....MuscleModels.Right.ThoracicMultifidi.MultifidusThoracisT11T7;
    AnyRefFrame &Org = ....Segments.T11Seg.MultifidusThoracisT11T7NodeROrg;
    AnyRefFrame &Ins = ....Segments.T7Seg.MultifidusThoracisT11T7NodeRIns;
    viewMuscle = {#include "../DrawSettings/MusDrawSettings.any"};
    viewForce.Visible ??= Off;
  };

  AnyMuscleViaPoint MultifidusThoracisT11T8 =   {
    AnyMuscleModel &MusMdl = ....MuscleModels.Right.ThoracicMultifidi.MultifidusThoracisT11T8;
    AnyRefFrame &Org = ....Segments.T11Seg.MultifidusThoracisT11T8NodeROrg;
    AnyRefFrame &Ins = ....Segments.T8Seg.MultifidusThoracisT11T8NodeRIns;
    viewMuscle = {#include "../DrawSettings/MusDrawSettings.any"};
    viewForce.Visible ??= Off;
  };

  AnyMuscleViaPoint MultifidusThoracisT12T7 =   {
    AnyMuscleModel &MusMdl = ....MuscleModels.Right.ThoracicMultifidi.MultifidusThoracisT12T7;
    AnyRefFrame &Org = ....Segments.T12Seg.MultifidusThoracisT12T7NodeROrg;
    AnyRefFrame &Ins = ....Segments.T7Seg.MultifidusThoracisT12T7NodeRIns;
    viewMuscle = {#include "../DrawSettings/MusDrawSettings.any"};
    viewForce.Visible ??= Off;
  };

  AnyMuscleViaPoint MultifidusThoracisT12T8 =   {
    AnyMuscleModel &MusMdl = ....MuscleModels.Right.ThoracicMultifidi.MultifidusThoracisT12T8;
    AnyRefFrame &Org = ....Segments.T12Seg.MultifidusThoracisT12T8NodeROrg;
    AnyRefFrame &Ins = ....Segments.T8Seg.MultifidusThoracisT12T8NodeRIns;
    viewMuscle = {#include "../DrawSettings/MusDrawSettings.any"};
    viewForce.Visible ??= Off;
  };

  AnyMuscleViaPoint MultifidusThoracisT12T9 =   {
    AnyMuscleModel &MusMdl = ....MuscleModels.Right.ThoracicMultifidi.MultifidusThoracisT12T9;
    AnyRefFrame &Org = ....Segments.T12Seg.MultifidusThoracisT12T9NodeROrg;
    AnyRefFrame &Ins = ....Segments.T9Seg.MultifidusThoracisT12T9NodeRIns;
    viewMuscle = {#include "../DrawSettings/MusDrawSettings.any"};
    viewForce.Visible ??= Off;
  };
  #endif
  AnyMuscleViaPoint MultifidusThoracisL1T8 =   {
    AnyMuscleModel &MusMdl = ....MuscleModels.Right.ThoracicMultifidi.MultifidusThoracisL1T8;
    AnyRefFrame &Org = ....Segments.L1Seg.MultifidusThoracisL1T8NodeROrg;
    AnyRefFrame &Ins = ....Segments.T8Seg.MultifidusThoracisL1T8NodeRIns;
    viewMuscle = {#include "../DrawSettings/MusDrawSettings.any"};
    viewForce.Visible ??= Off;
  };

  AnyMuscleViaPoint MultifidusThoracisL1T9 =   {
    AnyMuscleModel &MusMdl = ....MuscleModels.Right.ThoracicMultifidi.MultifidusThoracisL1T9;
    AnyRefFrame &Org = ....Segments.L1Seg.MultifidusThoracisL1T9NodeROrg;
    AnyRefFrame &Ins = ....Segments.T9Seg.MultifidusThoracisL1T9NodeRIns;
    viewMuscle = {#include "../DrawSettings/MusDrawSettings.any"};
    viewForce.Visible ??= Off;

  };

  AnyMuscleViaPoint MultifidusThoracisL1T10 =   {
    AnyMuscleModel &MusMdl = ....MuscleModels.Right.ThoracicMultifidi.MultifidusThoracisL1T10;
    AnyRefFrame &Org = ....Segments.L1Seg.MultifidusThoracisL1T10NodeROrg;
    AnyRefFrame &Ins = ....Segments.T10Seg.MultifidusThoracisL1T10NodeRIns;
    viewMuscle = {#include "../DrawSettings/MusDrawSettings.any"};
    viewForce.Visible ??= Off;

  };

  AnyMuscleViaPoint MultifidusThoracisL2T9 =   {
    AnyMuscleModel &MusMdl = ....MuscleModels.Right.ThoracicMultifidi.MultifidusThoracisL2T9;
    AnyRefFrame &Org = ....Segments.L2Seg.MultifidusThoracisL2T9NodeROrg;
    AnyRefFrame &Ins = ....Segments.T9Seg.MultifidusThoracisL2T9NodeRIns;
    viewMuscle = {#include "../DrawSettings/MusDrawSettings.any"};
    viewForce.Visible ??= Off;

  };

  AnyMuscleViaPoint MultifidusThoracisL2T10 =   {
    AnyMuscleModel &MusMdl = ....MuscleModels.Right.ThoracicMultifidi.MultifidusThoracisL2T10;
    AnyRefFrame &Org = ....Segments.L2Seg.MultifidusThoracisL2T10NodeROrg;
    AnyRefFrame &Ins = ....Segments.T10Seg.MultifidusThoracisL2T10NodeRIns;
    viewMuscle = {#include "../DrawSettings/MusDrawSettings.any"};
    viewForce.Visible ??= Off;

  };

  AnyMuscleViaPoint MultifidusThoracisL2T11 =   {
    AnyMuscleModel &MusMdl = ....MuscleModels.Right.ThoracicMultifidi.MultifidusThoracisL2T11;
    AnyRefFrame &Org = ....Segments.L2Seg.MultifidusThoracisL2T11NodeROrg;
    AnyRefFrame &Ins = ....Segments.T11Seg.MultifidusThoracisL2T11NodeRIns;
    viewMuscle = {#include "../DrawSettings/MusDrawSettings.any"};
    viewForce.Visible ??= Off;

  };

  AnyMuscleViaPoint MultifidusThoracisL3T10 =   {
    AnyMuscleModel &MusMdl = ....MuscleModels.Right.ThoracicMultifidi.MultifidusThoracisL3T10;
    AnyRefFrame &Org = ....Segments.L3Seg.MultifidusThoracisL3T10NodeROrg;
    AnyRefFrame &Ins = ....Segments.T10Seg.MultifidusThoracisL3T10NodeRIns;
    viewMuscle = {#include "../DrawSettings/MusDrawSettings.any"};
    viewForce.Visible ??= Off;

  };

  AnyMuscleViaPoint MultifidusThoracisL3T11 =   {
    AnyMuscleModel &MusMdl = ....MuscleModels.Right.ThoracicMultifidi.MultifidusThoracisL3T11;
    AnyRefFrame &Org = ....Segments.L3Seg.MultifidusThoracisL3T11NodeROrg;
    AnyRefFrame &Ins = ....Segments.T11Seg.MultifidusThoracisL3T11NodeRIns;
    viewMuscle = {#include "../DrawSettings/MusDrawSettings.any"};
    viewForce.Visible ??= Off;

  };

  AnyMuscleViaPoint MultifidusThoracisL3T12 =   {
    AnyMuscleModel &MusMdl = ....MuscleModels.Right.ThoracicMultifidi.MultifidusThoracisL3T12;
    AnyRefFrame &Org = ....Segments.L3Seg.MultifidusThoracisL3T12NodeROrg;
    AnyRefFrame &Ins = ....Segments.T12Seg.MultifidusThoracisL3T12NodeRIns;
    viewMuscle = {#include "../DrawSettings/MusDrawSettings.any"};
    viewForce.Visible ??= Off;

  };

  AnyMuscleViaPoint MultifidusThoracisL4T11 =   {
    AnyMuscleModel &MusMdl = ....MuscleModels.Right.ThoracicMultifidi.MultifidusThoracisL4T11;
    AnyRefFrame &Org = ....Segments.L4Seg.MultifidusThoracisL4T11NodeROrg;
    AnyRefFrame &Ins = ....Segments.T11Seg.MultifidusThoracisL4T11NodeRIns;
    viewMuscle = {#include "../DrawSettings/MusDrawSettings.any"};
    viewForce.Visible ??= Off;

  };

  AnyMuscleViaPoint MultifidusThoracisL4T12 =   {
    AnyMuscleModel &MusMdl = ....MuscleModels.Right.ThoracicMultifidi.MultifidusThoracisL4T12;
    AnyRefFrame &Org = ....Segments.L4Seg.MultifidusThoracisL4T12NodeROrg;
    AnyRefFrame &Ins = ....Segments.T12Seg.MultifidusThoracisL4T12NodeRIns;
    viewMuscle = {#include "../DrawSettings/MusDrawSettings.any"};
    viewForce.Visible ??= Off;

  };

  AnyMuscleViaPoint MultifidusThoracisL5T12 =   {
    AnyMuscleModel &MusMdl = ....MuscleModels.Right.ThoracicMultifidi.MultifidusThoracisL5T12;
    AnyRefFrame &Org = ....Segments.L5Seg.MultifidusThoracisL5T12NodeROrg;
    AnyRefFrame &Ins = ....Segments.T12Seg.MultifidusThoracisL5T12NodeRIns;
    viewMuscle = {#include "../DrawSettings/MusDrawSettings.any"};
    viewForce.Visible ??= Off;

  };
};

MuscleGroup ObliquusExternus = {

  #if BM_TRUNK_CAVITY_MODEL == _CAVITY_MODEL_VOLUME_


  #ifdef OBLIQUUS_WRAP_ON_CYLS

  AnyMuscleShortestPath ObliquusExternusR6Abd = {
    AnyMuscleModel &MusMdl = ....MuscleModels.Right.ObliquusExternus.ObliquusExternusR6Abd;
    AnyRefNode &Org = ....Segments.Right.R6Seg.ObliquusExternusNode;
    AnyRefNode &Ins = ....Abdominal.Layer_L1.BaseSegAnterior.mid;

    #if BM_TRUNK_THORACIC_STERNUM_TOPOLOGY == 4
    AnyParamSurf &srf1 =....Segments.Right.CostalCartilageSeg.WrappingTorusR10.Surf;
    #else
    AnyParamSurf &srf1 =....Segments.SternalBodySeg.Right.ObliquusWrapping.Surf;
    #endif

    SPLine.StringMesh=60;

    SPLine = {
      AnyMatrix InitWrapPos = {
        transf3D({0,.srf1.MajorRadius+.srf1.MinorRadius, 0}, &.srf1)
      };
      InitWrapPosVecArr = {&InitWrapPos};
    };
    viewMuscle = {#include "../DrawSettings/MusDrawSettings.any"};
    viewForce.Visible ??= Off;
  };

  AnyMuscleShortestPath ObliquusExternusR7Abd = {
    AnyMuscleModel &MusMdl = ....MuscleModels.Right.ObliquusExternus.ObliquusExternusR7Abd;
    AnyRefNode &Org = ....Segments.Right.R7Seg.ObliquusExternusNode;
    AnyRefNode &Ins = ....Abdominal.Layer_L2.BaseSegAnterior.mid;

    #if BM_TRUNK_THORACIC_STERNUM_TOPOLOGY == 4
    AnyParamSurf &srf1 =....Segments.Right.CostalCartilageSeg.WrappingTorusR10.Surf;
    #else
    AnyParamSurf &srf1 =....Segments.SternalBodySeg.Right.ObliquusWrapping.Surf;
    #endif

    SPLine.StringMesh=60;

    SPLine = {
      AnyMatrix InitWrapPos = {
        transf3D({0,.srf1.MajorRadius+.srf1.MinorRadius, 0}, &.srf1)
      };
      InitWrapPosVecArr = {&InitWrapPos};
    };
    viewMuscle = {#include "../DrawSettings/MusDrawSettings.any"};
    viewForce.Visible ??= Off;
  };


  AnyMuscleShortestPath ObliquusExternusR8Abd = {
    AnyMuscleModel &MusMdl = ....MuscleModels.Right.ObliquusExternus.ObliquusExternusR8Abd;
    AnyRefNode &Org = ....Segments.Right.R8Seg.ObliquusExternusNode;
    AnyRefNode &Ins = ....Abdominal.Layer_L3.BaseSegAnterior.mid;

    #if BM_TRUNK_THORACIC_STERNUM_TOPOLOGY == 4
    AnyParamSurf &srf1 =....Segments.Right.CostalCartilageSeg.WrappingTorusR10.Surf;
    #else
    AnyParamSurf &srf1 =....Segments.SternalBodySeg.Right.ObliquusWrapping.Surf;
    #endif

    SPLine.StringMesh=60;

    SPLine = {
      AnyMatrix InitWrapPos = {
        transf3D({0,.srf1.MajorRadius+.srf1.MinorRadius, 0}, &.srf1)
      };
      InitWrapPosVecArr = {&InitWrapPos};
    };
    viewMuscle = {#include "../DrawSettings/MusDrawSettings.any"};
    viewForce.Visible ??= Off;
  };


  AnyMuscleShortestPath ObliquusExternusR9Abd_1 = {
    AnyMuscleModel &MusMdl = ....MuscleModels.Right.ObliquusExternus.ObliquusExternusR9Abd_1;
    AnyRefNode &Org = ....Segments.Right.R9Seg.ObliquusExternusNode;
    AnyRefNode &Ins = ....Abdominal.Layer_L4.BaseSegAnterior.mid;

    #if BM_TRUNK_THORACIC_STERNUM_TOPOLOGY == 4
    AnyParamSurf &srf1 =....Segments.Right.CostalCartilageSeg.WrappingTorusR10.Surf;
    #else
    AnyParamSurf &srf1 =....Segments.SternalBodySeg.Right.ObliquusWrapping.Surf;
    #endif

    SPLine.StringMesh=60;

    SPLine = {
      AnyMatrix InitWrapPos = {
        transf3D({0,.srf1.MajorRadius+.srf1.MinorRadius, 0}, &.srf1)
      };
      InitWrapPosVecArr = {&InitWrapPos};
    };
    viewMuscle = {#include "../DrawSettings/MusDrawSettings.any"};
    viewForce.Visible ??= Off;
  };


  AnyMuscleShortestPath  ObliquusExternusR9Abd_2= {
    AnyMuscleModel &MusMdl = ....MuscleModels.Right.ObliquusExternus.ObliquusExternusR9Abd_2;
    AnyRefNode &Org = ....Segments.Right.R9Seg.ObliquusExternusNode_1;
    AnyRefNode &Ins = ....Abdominal.Layer_L5.BaseSegAnterior.mid;

    #if BM_TRUNK_THORACIC_STERNUM_TOPOLOGY == 4
    AnyParamSurf &srf0 =....Segments.Right.CostalCartilageSeg.WrappingTorusR10.Surf;
    #else
    AnyParamSurf &srf0 =....Segments.SternalBodySeg.Right.ObliquusWrapping.Surf;
    #endif
    AnyParamSurf  &srf1 =....Abdominal.ObliquusWrapping.WrappingSeg.Layer4WrappingPoints.Right.nn09.Translate.OutwardCyl;
    AnyParamSurf  &srf2 =....Abdominal.ObliquusWrapping.WrappingSeg.Layer5WrappingPoints.Right.nn10.Translate.OutwardCyl;

    SPLine.StringMesh=60;

    SPLine = {
      AnyMatrix InitWrapPos = {
        transf3D({0,-.srf1.radius, 0.5*.srf1.Length}, &.srf1),
        transf3D({0,-.srf2.radius, 0.5*.srf2.Length}, &.srf2)
      };
      InitWrapPosVecArr = {&InitWrapPos};
    };
    viewMuscle = {#include "../DrawSettings/MusDrawSettings.any"};
    viewForce.Visible ??= Off;
  };


  AnyMuscleShortestPath ObliquusExternusR10Abd_1 = {
    AnyMuscleModel &MusMdl = ....MuscleModels.Right.ObliquusExternus.ObliquusExternusR10Abd_1;
    AnyRefNode &Org = ....Segments.Right.R10Seg.ObliquusExternusNode_1;
    AnyRefNode &Ins =     ....Abdominal.Layer_Pelvic2.BaseSegAnterior.VolumePoints.Right.nn11;

    // AnyParamSurf &srf1 =....Abdominal.ObliquusWrapping.WrappingSeg.Layer4WrappingPoints.Right.nn09.Translate.VerticalCyl;
    AnyParamSurf &srf2 =....Abdominal.ObliquusWrapping.WrappingSeg.Layer4WrappingPoints.Right.nn10.Translate.OutwardCyl;

    SPLine.StringMesh=240;

    SPLine = {
      AnyMatrix InitWrapPos = {
        // transf3D({0,-.srf1.radius, 0.5*.srf1.Length}, &.srf1),
        transf3D({0,-1.1*.srf2.radius, 0.5*.srf2.Length}, &.srf2),
      };
      InitWrapPosVecArr = {&InitWrapPos};
    };

    viewMuscle = {#include "../DrawSettings/MusDrawSettings.any" };
    viewForce.Visible ??= Off;
  };


  AnyMuscleShortestPath ObliquusExternusR10Abd_2 = {
    AnyMuscleModel &MusMdl = ....MuscleModels.Right.ObliquusExternus.ObliquusExternusR10Abd_2;
    AnyRefNode &Org = ....Segments.Right.R10Seg.ObliquusExternusNode_2;
    AnyRefNode &Ins =     ....Abdominal.Layer_Pelvic2.BaseSegAnterior.VolumePoints.Right.nn10;

    // AnyParamSurf &srf1 =....Abdominal.ObliquusWrapping.WrappingSeg.Layer4WrappingPoints.Right.nn08.Translate.VerticalCyl;
    AnyParamSurf &srf2 =....Abdominal.ObliquusWrapping.WrappingSeg.Layer4WrappingPoints.Right.nn09.Translate.OutwardCyl;

    SPLine.StringMesh=240;

    SPLine = {
      AnyMatrix InitWrapPos = {
        // transf3D({0,-1.1*.srf1.radius, 0.5*.srf1.Length}, &.srf1),
        transf3D({0,-1.1*.srf2.radius, 0.5*.srf2.Length}, &.srf2),
      };
      InitWrapPosVecArr = {&InitWrapPos};
    };

    viewMuscle = {#include "../DrawSettings/MusDrawSettings.any"};
    viewForce.Visible ??= Off;
  };


  AnyMuscleViaPoint ObliquusExternusR10IC_1= {
    AnyMuscleModel &MusMdl = ....MuscleModels.Right.ObliquusExternus.ObliquusExternusR10IC_1;
    AnyRefNode &Org = ....Segments.Right.R10Seg.ObliquusExternusNode_00;
    AnyRefNode &Ins =    ....Segments.PelvisSeg.Right.ObliquusInternusNode_8;
    viewMuscle = {#include "../DrawSettings/MusDrawSettings.any"};
    viewForce.Visible ??= Off;
  };


  AnyMuscleViaPoint ObliquusExternusR10IC_2= {
    AnyMuscleModel &MusMdl = ....MuscleModels.Right.ObliquusExternus.ObliquusExternusR10IC_2;
    AnyRefNode &Org = ....Segments.Right.R10Seg.ObliquusExternusNode_0;
    AnyRefNode &Ins =    ....Segments.PelvisSeg.Right.ObliquusInternusNode_9;
    viewMuscle = {#include "../DrawSettings/MusDrawSettings.any"};
    viewForce.Visible ??= Off;
  };


  AnyMuscleViaPoint ObliquusExternusR11IC_1 = {
    AnyMuscleModel &MusMdl = ....MuscleModels.Right.ObliquusExternus.ObliquusExternusR11IC_1;
    AnyRefNode &Org = ....Segments.Right.R11Seg.ObliquusExternusNode;
    AnyRefNode &Ins =    ....Segments.PelvisSeg.Right.ObliquusInternusNode_7;
    viewMuscle = {#include "../DrawSettings/MusDrawSettings.any"};
    viewForce.Visible ??= Off;
  };


  AnyMuscleViaPoint ObliquusExternusR11IC_2 = {
    AnyMuscleModel &MusMdl = ....MuscleModels.Right.ObliquusExternus.ObliquusExternusR11IC_2;
    AnyRefNode &Org = ....Segments.Right.R11Seg.ObliquusExternusNode1;
    AnyRefNode &Ins =    ....Segments.PelvisSeg.Right.ObliquusInternusNode_5;
    viewMuscle = {#include "../DrawSettings/MusDrawSettings.any"};
    viewForce.Visible ??= Off;
  };


  AnyMuscleViaPoint ObliquusExternusR12IC = {
    AnyMuscleModel &MusMdl = ....MuscleModels.Right.ObliquusExternus.ObliquusExternusR12IC;
    AnyRefNode &Org = ....Segments.Right.R12Seg.ObliquusExternusNode;
    AnyRefNode &Ins =    ....Segments.PelvisSeg.Right.ObliquusInternusNode_4;
    viewMuscle = {#include "../DrawSettings/MusDrawSettings.any"};
    viewForce.Visible ??= Off;
  };

  #endif

  #ifndef OBLIQUUS_WRAP_ON_CYLS


  AnyMuscleShortestPath ObliquusExternusR6Abd = {
    AnyMuscleModel &MusMdl = ....MuscleModels.Right.ObliquusExternus.ObliquusExternusR6Abd;
    AnyRefNode &Org = ....Segments.Right.R6Seg.ObliquusExternusNode;
    AnyRefNode &Ins = ....Abdominal.Layer_L1.BaseSegAnterior.mid;

    #if BM_TRUNK_THORACIC_STERNUM_TOPOLOGY == 4
    AnyParamSurf &srf1 =....Segments.Right.CostalCartilageSeg.WrappingTorusR10.Surf;
    #else
    AnyParamSurf &srf1 =....Segments.SternalBodySeg.Right.ObliquusWrapping.Surf;
    #endif

    SPLine.StringMesh=60;

    SPLine = {
      AnyMatrix InitWrapPos = {
        transf3D({0,.srf1.MajorRadius+.srf1.MinorRadius, 0}, &.srf1)
      };


      InitWrapPosVecArr = {&InitWrapPos};
    };
    viewMuscle = {#include "../DrawSettings/MusDrawSettings.any"};
    viewForce.Visible ??= Off;
    #include "MusclesSharedCode_SPLine.any"
  };

  AnyMuscleShortestPath ObliquusExternusR7Abd = {
    AnyMuscleModel &MusMdl = ....MuscleModels.Right.ObliquusExternus.ObliquusExternusR7Abd;
    AnyRefNode &Org = ....Segments.Right.R7Seg.ObliquusExternusNode;
    AnyRefNode &Ins = ....Abdominal.Layer_L2.BaseSegAnterior.mid;

    #if BM_TRUNK_THORACIC_STERNUM_TOPOLOGY == 4
    AnyParamSurf &srf1 =....Segments.Right.CostalCartilageSeg.WrappingTorusR10.Surf;
    #else
    AnyParamSurf &srf1 =....Segments.SternalBodySeg.Right.ObliquusWrapping.Surf;
    #endif

    SPLine.StringMesh=60;

    SPLine = {
      AnyMatrix InitWrapPos = {
        transf3D({0,.srf1.MajorRadius+.srf1.MinorRadius, 0}, &.srf1)
      };
      InitWrapPosVecArr = {&InitWrapPos};
    };
    viewMuscle = {#include "../DrawSettings/MusDrawSettings.any"};
    viewForce.Visible ??= Off;
    #include "MusclesSharedCode_SPLine.any"
  };


  AnyMuscleShortestPath ObliquusExternusR8Abd = {
    AnyMuscleModel &MusMdl = ....MuscleModels.Right.ObliquusExternus.ObliquusExternusR8Abd;
    AnyRefNode &Org = ....Segments.Right.R8Seg.ObliquusExternusNode;
    AnyRefNode &Ins = ....Abdominal.Layer_L3.BaseSegAnterior.mid;

    #if BM_TRUNK_THORACIC_STERNUM_TOPOLOGY == 4
    AnyParamSurf &srf1 =....Segments.Right.CostalCartilageSeg.WrappingTorusR10.Surf;
    #else
    AnyParamSurf &srf1 =....Segments.SternalBodySeg.Right.ObliquusWrapping.Surf;
    #endif


    //  #if MESH_TYPE == "ELLIPSOID_SIDE"
    //  AnySurfEllipsoid &mesh2 = Main.HumanModel.BodyModel.Trunk.Abdominal.Layer_L2.BaseSegAnterior.Right.mesh;
    //  #else
    //  AnySurfTriCylMesh &mesh2 = Main.HumanModel.BodyModel.Trunk.Abdominal.Layer_L2.BaseSegAnterior.mesh;
    //  #endif
    AnySurfEllipsoid &mesh2 = Main.HumanModel.BodyModel.Trunk.Abdominal.Layer_L2.BaseSegAnterior.mesh3;


    SPLine.StringMesh=60;


    SPLine = {


      //   #if MESH_TYPE == "ELLIPSOID"
      //    AnyMatrix InitWrapPos = {
      //      transf3D({0,.srf1.MajorRadius+.srf1.MinorRadius, 0}, &.srf1),
      //      transf3D({.mesh2.Radius[0],0,0}, &.mesh2),
      //    };
      //    #endif
      //
      //    #if MESH_TYPE == "ELLIPSOID_SIDE"
      //    AnyMatrix InitWrapPos = {
      //       transf3D({0,.srf1.MajorRadius+.srf1.MinorRadius, 0}, &.srf1),
      //
      //      transf3D({0,.mesh2.Radius[1],0}, &.mesh2),
      //
      //    };
      //    #endif
      //
      //    #if MESH_TYPE == "QUAD"
      //    AnyMatrix InitWrapPos = {
      //      transf3D({0,.srf1.MajorRadius+.srf1.MinorRadius, 0}, &.srf1),
      //      transf3D(.mesh2.Points[floor(.mesh2.MeshSize*0.9)+2*.mesh2.MeshSize*6]+{0.02,0,0}, &.mesh2),
      //    };
      //    #endif


      AnyMatrix InitWrapPos = {
        transf3D({0,.srf1.MajorRadius+.srf1.MinorRadius, 0}, &.srf1),
        transf3D({.mesh2.Radius[0],0,0}, &.mesh2),
      };


      InitWrapPosVecArr = {&InitWrapPos};
    };
    viewMuscle = {#include "../DrawSettings/MusDrawSettings.any"};
    viewForce.Visible ??= Off;
    #include "MusclesSharedCode_SPLine.any"
  };


  AnyMuscleShortestPath ObliquusExternusR9Abd_1 = {
    AnyMuscleModel &MusMdl = ....MuscleModels.Right.ObliquusExternus.ObliquusExternusR9Abd_1;
    AnyRefNode &Org = ....Segments.Right.R9Seg.ObliquusExternusNode;
    AnyRefNode &Ins = ....Abdominal.Layer_L4.BaseSegAnterior.mid;


    #if BM_TRUNK_THORACIC_STERNUM_TOPOLOGY == 4
    AnyParamSurf &srf1 =....Segments.Right.CostalCartilageSeg.WrappingTorusR10.Surf;
    #else
    AnyParamSurf &srf1 =....Segments.SternalBodySeg.Right.ObliquusWrapping.Surf;
    #endif


    //  #if MESH_TYPE == "ELLIPSOID_SIDE"
    //  //AnySurfTriCylMesh &mesh2 = Main.HumanModel.BodyModel.Trunk.Abdominal.Layer_L2.BaseSegAnterior.mesh;
    //  AnySurfEllipsoid &mesh3 = Main.HumanModel.BodyModel.Trunk.Abdominal.Layer_L3.BaseSegAnterior.Right.mesh;
    //  //AnySurfTriCylMesh &mesh4 = Main.HumanModel.BodyModel.Trunk.Abdominal.Layer_L4.BaseSegAnterior.mesh;
    //  #else
    //  //AnySurfTriCylMesh &mesh2 = Main.HumanModel.BodyModel.Trunk.Abdominal.Layer_L2.BaseSegAnterior.mesh;
    //  AnySurfTriCylMesh &mesh3 = Main.HumanModel.BodyModel.Trunk.Abdominal.Layer_L3.BaseSegAnterior.mesh;
    //  //AnySurfTriCylMesh &mesh4 = Main.HumanModel.BodyModel.Trunk.Abdominal.Layer_L4.BaseSegAnterior.mesh;
    //  #endif
    AnySurfEllipsoid &mesh3 = Main.HumanModel.BodyModel.Trunk.Abdominal.Layer_L3.BaseSegAnterior.mesh3;

    SPLine.StringMesh=60;

    SPLine = {

      //    #if MESH_TYPE == "ELLIPSOID"
      //     AnyMatrix InitWrapPos = {
      //        transf3D({0,.srf1.MajorRadius+.srf1.MinorRadius, 0}, &.srf1),
      //      //transf3D({.mesh2.Radius[0],0,0}, &.mesh2),
      //        transf3D({.mesh3.Radius[0],0,0}, &.mesh3),
      //      //transf3D({.mesh4.Radius[0],0,0}, &.mesh4),
      //     };
      //    #endif
      //    #if MESH_TYPE == "ELLIPSOID_SIDE"
      //    AnyMatrix InitWrapPos = {
      //      transf3D({0,.srf1.MajorRadius+.srf1.MinorRadius, 0}, &.srf1),
      //      transf3D({0,.mesh3.Radius[1],0}, &.mesh3),
      //    };
      //    #endif
      //
      //    #if MESH_TYPE == "QUAD"
      //AnyMatrix InitWrapPos = {
      //      transf3D({0,.srf1.MajorRadius+.srf1.MinorRadius, 0}, &.srf1),
      //
      //     //  transf3D(.mesh2.Points[floor(.mesh2.MeshSize*0.85)+2*.mesh2.MeshSize*6]+{0.02,0,0}, &.mesh2),
      //     //  transf3D(.mesh3.Points[floor(.mesh3.MeshSize*0.95)+2*.mesh3.MeshSize*6]+{0.02,0,0}, &.mesh3)
      //       transf3D(.mesh4.Points[floor(.mesh4.MeshSize*0.95)+2*.mesh4.MeshSize*6]+{0.02,0,0}, &.mesh4)
      //
      //
      //    };
      //    #endif
      AnyMatrix InitWrapPos = {
        transf3D({0,.srf1.MajorRadius+.srf1.MinorRadius, 0}, &.srf1),
        //transf3D({.mesh2.Radius[0],0,0}, &.mesh2),
        transf3D({.mesh3.Radius[0],0,0}, &.mesh3),
        //transf3D({.mesh4.Radius[0],0,0}, &.mesh4),
      };

      InitWrapPosVecArr = {&InitWrapPos};
    };
    viewMuscle = {#include "../DrawSettings/MusDrawSettings.any"};
    viewForce.Visible ??= Off;
    #include "MusclesSharedCode_SPLine.any"
  };


  AnyMuscleShortestPath  ObliquusExternusR9Abd_2= {
    AnyMuscleModel &MusMdl = ....MuscleModels.Right.ObliquusExternus.ObliquusExternusR9Abd_2;
    AnyRefNode &Org = ....Segments.Right.R9Seg.ObliquusExternusNode_1;
    AnyRefNode &Ins = ....Abdominal.Layer_L5.BaseSegAnterior.mid;

    #if BM_TRUNK_THORACIC_STERNUM_TOPOLOGY == 4
    AnyParamSurf &srf0 =....Segments.Right.CostalCartilageSeg.WrappingTorusR10.Surf;
    #else
    AnyParamSurf &srf0 =....Segments.SternalBodySeg.Right.ObliquusWrapping.Surf;
    #endif

    //  AnySurfTriCylMesh &mesh3 = Main.HumanModel.BodyModel.Trunk.Abdominal.Layer_L3.BaseSegAnterior.mesh;


    //  #if MESH_TYPE == "ELLIPSOID_SIDE"
    //  AnySurfEllipsoid &mesh4 = Main.HumanModel.BodyModel.Trunk.Abdominal.Layer_L4.BaseSegAnterior.Right.mesh;
    //  #else
    //  AnySurfTriCylMesh &mesh4 = Main.HumanModel.BodyModel.Trunk.Abdominal.Layer_L4.BaseSegAnterior.mesh;
    //  #endif
    AnySurfEllipsoid &mesh3 = Main.HumanModel.BodyModel.Trunk.Abdominal.Layer_L3.BaseSegAnterior.mesh3;
    AnySurfEllipsoid &mesh4 = Main.HumanModel.BodyModel.Trunk.Abdominal.Layer_L4.BaseSegAnterior.mesh3;


    SPLine.StringMesh=240;

    SPLine = {

      //     #if MESH_TYPE == "ELLIPSOID"
      //    AnyMatrix InitWrapPos = {
      //     transf3D({0,.srf0.MajorRadius+.srf0.MinorRadius, 0}, &.srf0),
      //  //    transf3D({.mesh3.Radius[0],0,0}, &.mesh3),
      //        transf3D({.mesh4.Radius[0],0,0}, &.mesh4),
      //    };
      //    #endif
      //    #if MESH_TYPE == "ELLIPSOID_SIDE"
      //    AnyMatrix InitWrapPos = {
      //       transf3D({0,.srf0.MajorRadius+.srf0.MinorRadius, 0}, &.srf0),
      //
      //      transf3D({0,.mesh4.Radius[1],0}, &.mesh4),
      //
      //    };
      //    #endif
      //
      //
      //
      //    #if MESH_TYPE == "QUAD"
      //AnyMatrix InitWrapPos = {
      // transf3D({0,.srf0.MajorRadius+.srf0.MinorRadius, 0}, &.srf0),
      // //transf3D(.mesh3.Points[floor(.mesh3.MeshSize*0.85)+2*.mesh3.MeshSize*6]+{0.02,0,0}, &.mesh3),
      //       transf3D(.mesh4.Points[floor(.mesh4.MeshSize*0.85)+2*.mesh4.MeshSize*6]+{0.02,0,0}, &.mesh4)
      //    };
      //        #endif
      AnyMatrix InitWrapPos = {
        transf3D({0,.srf0.MajorRadius+.srf0.MinorRadius, 0}, &.srf0),
        transf3D({.mesh3.Radius[0],0,0}, &.mesh3),
        transf3D({.mesh4.Radius[0],0,0}, &.mesh4),
      };

      InitWrapPosVecArr = {&InitWrapPos};
    };
    viewMuscle = {#include "../DrawSettings/MusDrawSettings.any"};
    viewForce.Visible ??= Off;
    #include "MusclesSharedCode_SPLine.any"
  };

  //
  AnyMuscleShortestPath ObliquusExternusR10Abd_1 = {
    AnyMuscleModel &MusMdl = ....MuscleModels.Right.ObliquusExternus.ObliquusExternusR10Abd_1;
    AnyRefNode &Org = ....Segments.Right.R10Seg.ObliquusExternusNode_1;
    AnyRefNode &Ins =     ....Abdominal.Layer_Pelvic2.BaseSegAnterior.VolumePoints.Right.nn11;
    //AnySurfTriCylMesh &mesh4= Main.HumanModel.BodyModel.Trunk.Abdominal.Layer_L4.BaseSegAnterior.mesh;
    //  AnySurfTriCylMesh &mesh5 = Main.HumanModel.BodyModel.Trunk.Abdominal.Layer_L5.BaseSegAnterior.mesh;

    //   #if MESH_TYPE == "ELLIPSOID_SIDE"
    //  AnySurfEllipsoid &mesh5 = Main.HumanModel.BodyModel.Trunk.Abdominal.Layer_L5.BaseSegAnterior.Right.mesh;
    //  #else
    //  AnySurfTriCylMesh &mesh5 = Main.HumanModel.BodyModel.Trunk.Abdominal.Layer_L5.BaseSegAnterior.mesh;
    //  #endif
    AnySurfEllipsoid &mesh4 = Main.HumanModel.BodyModel.Trunk.Abdominal.Layer_L4.BaseSegAnterior.mesh3;
    AnySurfEllipsoid &mesh5 = Main.HumanModel.BodyModel.Trunk.Abdominal.Layer_L5.BaseSegAnterior.mesh3;


    SPLine.StringMesh=240;

    SPLine = {
      //      #if MESH_TYPE == "ELLIPSOID"
      //    AnyMatrix InitWrapPos = {
      //    //    transf3D({.mesh4.Radius[0],0,0}, &.mesh4),
      //        transf3D({.mesh5.Radius[0],0,0}, &.mesh5),
      //    };
      //    #endif
      //
      //    #if MESH_TYPE == "ELLIPSOID_SIDE"
      //    AnyMatrix InitWrapPos = {
      //               transf3D({0,.mesh5.Radius[1],0}, &.mesh5),
      //
      //    };
      //    #endif
      //
      //
      //
      //    #if MESH_TYPE == "QUAD"
      //
      //    AnyMatrix InitWrapPos = {
      //      // transf3D(.mesh4.Points[floor(.mesh4.MeshSize*0.8)+2*.mesh4.MeshSize*6]+{0.02,0,0}, &.mesh4),
      //       transf3D(.mesh5.Points[floor(.mesh5.MeshSize*0.85)+2*.mesh5.MeshSize*6]+{0.02,0,0}, &.mesh5)
      //
      //   };
      //        #endif
      AnyMatrix InitWrapPos = {
        transf3D({.mesh4.Radius[0],0,.mesh4.Radius[2]}, &.mesh4),
        transf3D({.mesh5.Radius[0],0,.mesh5.Radius[2]}, &.mesh5),
      };


      InitWrapPosVecArr = {&InitWrapPos};
    };

    viewMuscle = {#include "../DrawSettings/MusDrawSettings.any" };
    viewForce.Visible ??= Off;
    #include "MusclesSharedCode_SPLine.any"
  };


  AnyMuscleShortestPath ObliquusExternusR10Abd_2 = {
    AnyMuscleModel &MusMdl = ....MuscleModels.Right.ObliquusExternus.ObliquusExternusR10Abd_2;
    AnyRefNode &Org = ....Segments.Right.R10Seg.ObliquusExternusNode_2;
    AnyRefNode &Ins =     ....Abdominal.Layer_Pelvic2.BaseSegAnterior.VolumePoints.Right.nn10;
    // AnySurfTriCylMesh &mesh0 = Main.HumanModel.BodyModel.Trunk.Abdominal.Layer_L2.BaseSegAnterior.mesh;
    // AnySurfTriCylMesh &mesh1 = Main.HumanModel.BodyModel.Trunk.Abdominal.Layer_L3.BaseSegAnterior.mesh;
    //  AnySurfTriCylMesh &mesh4 = Main.HumanModel.BodyModel.Trunk.Abdominal.Layer_L4.BaseSegAnterior.mesh;
    //  AnySurfTriCylMesh &mesh5 = Main.HumanModel.BodyModel.Trunk.Abdominal.Layer_L5.BaseSegAnterior.mesh;
    //
    //   #if MESH_TYPE == "ELLIPSOID_SIDE"
    //   AnySurfEllipsoid &mesh4 = Main.HumanModel.BodyModel.Trunk.Abdominal.Layer_L4.BaseSegAnterior.Right.mesh;
    //   AnySurfEllipsoid  &mesh5 = Main.HumanModel.BodyModel.Trunk.Abdominal.Layer_L5.BaseSegAnterior.Right.mesh;
    //  #else
    //  AnySurfTriCylMesh &mesh4 = Main.HumanModel.BodyModel.Trunk.Abdominal.Layer_L4.BaseSegAnterior.mesh;
    //  AnySurfTriCylMesh &mesh5 = Main.HumanModel.BodyModel.Trunk.Abdominal.Layer_L5.BaseSegAnterior.mesh;
    //  #endif

    //   AnySurfEllipsoid &mesh3 = Main.HumanModel.BodyModel.Trunk.Abdominal.Layer_L3.BaseSegAnterior.mesh3;
    AnySurfEllipsoid &mesh4 = Main.HumanModel.BodyModel.Trunk.Abdominal.Layer_L4.BaseSegAnterior.mesh3;
    AnySurfEllipsoid  &mesh5 = Main.HumanModel.BodyModel.Trunk.Abdominal.Layer_L5.BaseSegAnterior.mesh3;


    SPLine.StringMesh=240;
    SPLine = {

      //    #if MESH_TYPE == "ELLIPSOID"
      //    AnyMatrix InitWrapPos = {
      //      transf3D({.mesh4.Radius[0],0,0}, &.mesh4),
      //      transf3D({.mesh5.Radius[0],0,0}, &.mesh5),
      //    };
      //    #endif
      //
      //   #if MESH_TYPE == "ELLIPSOID_SIDE"
      //    AnyMatrix InitWrapPos = {
      //            transf3D({0,.mesh4.Radius[1],0}, &.mesh4),
      //               transf3D({0,.mesh5.Radius[1],0}, &.mesh5),
      //
      //    };
      //    #endif
      //
      //
      //    #if MESH_TYPE == "QUAD"
      //
      //    AnyMatrix InitWrapPos = {
      //      transf3D(.mesh4.Points[floor(.mesh4.MeshSize*0.8)+2*20*4]+{0.01,0,0}, &.mesh4),
      //      transf3D(.mesh5.Points[floor(.mesh5.MeshSize*0.85)+2*20*4]+{0.01,0,0}, &.mesh5)
      //    };
      //    #endif

      AnyMatrix InitWrapPos = {
        //      transf3D({.mesh3.Radius[0],0,0}, &.mesh3),
        transf3D({.mesh4.Radius[0],0,.mesh4.Radius[2]}, &.mesh4),
        transf3D({.mesh5.Radius[0],0,.mesh5.Radius[2]}, &.mesh5),
      };

      InitWrapPosVecArr = {&InitWrapPos};
    };
    viewMuscle = {#include "../DrawSettings/MusDrawSettings.any"};
    viewForce.Visible ??= Off;
    #include "MusclesSharedCode_SPLine.any"
  };


  AnyMuscleViaPoint ObliquusExternusR10IC_1= {
    AnyMuscleModel &MusMdl = ....MuscleModels.Right.ObliquusExternus.ObliquusExternusR10IC_1;
    AnyRefNode &Org = ....Segments.Right.R10Seg.ObliquusExternusNode_00;
    AnyRefNode &Ins =    ....Segments.PelvisSeg.Right.ObliquusInternusNode_8;
    viewMuscle = {#include "../DrawSettings/MusDrawSettings.any"};
    viewForce.Visible ??= Off;
    #include "MusclesSharedCode.any"
  };


  AnyMuscleViaPoint ObliquusExternusR10IC_2= {
    AnyMuscleModel &MusMdl = ....MuscleModels.Right.ObliquusExternus.ObliquusExternusR10IC_2;
    AnyRefNode &Org = ....Segments.Right.R10Seg.ObliquusExternusNode_0;
    AnyRefNode &Ins =    ....Segments.PelvisSeg.Right.ObliquusInternusNode_9;
    viewMuscle = {#include "../DrawSettings/MusDrawSettings.any"};
    viewForce.Visible ??= Off;
    #include "MusclesSharedCode.any"
  };


  AnyMuscleViaPoint ObliquusExternusR11IC_1 = {
    AnyMuscleModel &MusMdl = ....MuscleModels.Right.ObliquusExternus.ObliquusExternusR11IC_1;
    AnyRefNode &Org = ....Segments.Right.R11Seg.ObliquusExternusNode;
    AnyRefNode &Ins =    ....Segments.PelvisSeg.Right.ObliquusInternusNode_7;
    viewMuscle = {#include "../DrawSettings/MusDrawSettings.any"};
    viewForce.Visible ??= Off;
    #include "MusclesSharedCode.any"
  };


  AnyMuscleViaPoint ObliquusExternusR11IC_2 = {
    AnyMuscleModel &MusMdl = ....MuscleModels.Right.ObliquusExternus.ObliquusExternusR11IC_2;
    AnyRefNode &Org = ....Segments.Right.R11Seg.ObliquusExternusNode1;
    AnyRefNode &Ins =    ....Segments.PelvisSeg.Right.ObliquusInternusNode_5;
    viewMuscle = {#include "../DrawSettings/MusDrawSettings.any"};
    viewForce.Visible ??= Off;
    #include "MusclesSharedCode.any"
  };


  AnyMuscleViaPoint ObliquusExternusR12IC = {
    AnyMuscleModel &MusMdl = ....MuscleModels.Right.ObliquusExternus.ObliquusExternusR12IC;
    AnyRefNode &Org = ....Segments.Right.R12Seg.ObliquusExternusNode;
    AnyRefNode &Ins =    ....Segments.PelvisSeg.Right.ObliquusInternusNode_4;
    viewMuscle = {#include "../DrawSettings/MusDrawSettings.any"};
    viewForce.Visible ??= Off;
    #include "MusclesSharedCode.any"
  };


  #endif

  #endif


  #if BM_TRUNK_CAVITY_MODEL == _CAVITY_MODEL_BUCKLE_
  AnyMuscleViaPoint ObliquusExternusR6Abd = {
    AnyMuscleModel &MusMdl = ....MuscleModels.Right.ObliquusExternus.ObliquusExternusR6Abd;
    AnyRefNode &Org = ....Segments.Right.R6Seg.ObliquusExternusNode;
    AnyRefNode &Ins = ....Buckle.Segments.BuckleSeg.Right.ObliquusExternusNode_1;
    viewMuscle = {#include "../DrawSettings/MusDrawSettings.any"};
    viewForce.Visible ??= Off;
  };
  AnyMuscleViaPoint ObliquusExternusR7Abd = {
    AnyMuscleModel &MusMdl = ....MuscleModels.Right.ObliquusExternus.ObliquusExternusR7Abd;
    AnyRefNode &Org = ....Segments.Right.R7Seg.ObliquusExternusNode;
    AnyRefNode &Ins = ....Buckle.Segments.BuckleSeg.Right.ObliquusExternusNode_2;
    viewMuscle = {#include "../DrawSettings/MusDrawSettings.any"};
    viewForce.Visible ??= Off;
  };
  AnyMuscleViaPoint ObliquusExternusR8Abd = {
    AnyMuscleModel &MusMdl = ....MuscleModels.Right.ObliquusExternus.ObliquusExternusR8Abd;
    AnyRefNode &Org = ....Segments.Right.R8Seg.ObliquusExternusNode;
    AnyRefNode &Ins = ....Buckle.Segments.BuckleSeg.Right.ObliquusExternusNode_3;
    viewMuscle = {#include "../DrawSettings/MusDrawSettings.any"};
    viewForce.Visible ??= Off;
  };
  AnyMuscleViaPoint ObliquusExternusR9Abd = {
    AnyMuscleModel &MusMdl = ....MuscleModels.Right.ObliquusExternus.ObliquusExternusR9Abd;
    AnyRefNode &Org = ....Segments.Right.R9Seg.ObliquusExternusNode;
    AnyRefNode &Ins = ....Buckle.Segments.BuckleSeg.Right.ObliquusExternusNode_4;
    viewMuscle = {#include "../DrawSettings/MusDrawSettings.any"};
    viewForce.Visible ??= Off;
  };
  AnyMuscleViaPoint ObliquusExternusR10Abd_1 = {
    AnyMuscleModel &MusMdl = ....MuscleModels.Right.ObliquusExternus.ObliquusExternusR10Abd_1;
    AnyRefNode &Org = ....Segments.Right.R10Seg.ObliquusExternusNode_1;
    AnyRefNode &Ins = ....Buckle.Segments.BuckleSeg.Right.ObliquusExternusNode_5;
    viewMuscle = {#include "../DrawSettings/MusDrawSettings.any"};
    viewForce.Visible ??= Off;
  };
  AnyMuscleViaPoint ObliquusExternusR10Abd_2 = {
    AnyMuscleModel &MusMdl = ....MuscleModels.Right.ObliquusExternus.ObliquusExternusR10Abd_2;
    AnyRefNode &Org = ....Segments.Right.R10Seg.ObliquusExternusNode_2;
    AnyRefNode &Ins = ....Segments.PelvisSeg.Right.ObliquusExternusNode_1;
    viewMuscle = {#include "../DrawSettings/MusDrawSettings.any"};
    viewForce.Visible ??= Off;
  };
  AnyMuscleViaPoint ObliquusExternusR11IC = {
    AnyMuscleModel &MusMdl = ....MuscleModels.Right.ObliquusExternus.ObliquusExternusR11IC;
    AnyRefNode &Org = ....Segments.Right.R11Seg.ObliquusExternusNode;
    AnyRefNode &Ins = ....Segments.PelvisSeg.Right.ObliquusExternusNode_2;
    viewMuscle = {#include "../DrawSettings/MusDrawSettings.any"};
    viewForce.Visible ??= Off;
  };
  AnyMuscleViaPoint ObliquusExternusR12IC= {
    AnyMuscleModel &MusMdl = ....MuscleModels.Right.ObliquusExternus.ObliquusExternusR12IC;
    AnyRefNode &Org = ....Segments.Right.R12Seg.ObliquusExternusNode;
    AnyRefNode &Ins = ....Segments.PelvisSeg.Right.ObliquusExternusNode_3;
    viewMuscle = {#include "../DrawSettings/MusDrawSettings.any"};
    viewForce.Visible ??= Off;
  };
  #endif
};
MuscleGroup ObliquusInternus = {

  #if BM_TRUNK_CAVITY_MODEL == _CAVITY_MODEL_VOLUME_

  #ifdef OBLIQUUS_WRAP_ON_CYLS


  AnyMuscleViaPoint ObliquusInternusR12 = {
    AnyMuscleModel &MusMdl = ....MuscleModels.Right.ObliquusInternus.ObliquusInternusR12;
    AnyRefNode &Org = ....Segments.Right.R12Seg.ObliquusExternusNode;
    AnyRefNode &Ins = ....Segments.PelvisSeg.Right.ObliquusInternusNode_1;
    viewMuscle = {#include "../DrawSettings/MusDrawSettings.any"};
    viewForce.Visible ??= Off;
  };


  AnyMuscleViaPoint ObliquusInternusR11_1 = {
    AnyMuscleModel &MusMdl = ....MuscleModels.Right.ObliquusInternus.ObliquusInternusR11_1;
    AnyRefNode &Org = ....Segments.Right.R11Seg.ObliquusExternusNode1;
    AnyRefNode &Ins = ....Segments.PelvisSeg.Right.ObliquusInternusNode_2;
    viewMuscle = {#include "../DrawSettings/MusDrawSettings.any"};
    viewForce.Visible ??= Off;
  };


  AnyMuscleViaPoint ObliquusInternusR11_2 = {
    AnyMuscleModel &MusMdl = ....MuscleModels.Right.ObliquusInternus.ObliquusInternusR11_2;
    AnyRefNode &Org = ....Segments.Right.R11Seg.ObliquusExternusNode;
    AnyRefNode &Ins = ....Segments.PelvisSeg.Right.ObliquusInternusNode_3;
    viewMuscle = {#include "../DrawSettings/MusDrawSettings.any"};
    viewForce.Visible ??= Off;
  };


  AnyMuscleViaPoint ObliquusInternusR10_1 = {
    AnyMuscleModel &MusMdl = ....MuscleModels.Right.ObliquusInternus.ObliquusInternusR10_1;
    AnyRefNode &Org = ....Segments.Right.R10Seg.ObliquusExternusNode_2;
    AnyRefNode &Ins = ....Segments.PelvisSeg.Right.ObliquusInternusNode_4;
    viewMuscle = {#include "../DrawSettings/MusDrawSettings.any"};
    viewForce.Visible ??= Off;
  };


  AnyMuscleViaPoint ObliquusInternusR10_2 = {
    AnyMuscleModel &MusMdl = ....MuscleModels.Right.ObliquusInternus.ObliquusInternusR10_2;
    AnyRefNode &Org = ....Segments.Right.R10Seg.ObliquusExternusNode_1;
    AnyRefNode &Ins = ....Segments.PelvisSeg.Right.ObliquusInternusNode_4_1;
    viewMuscle = {#include "../DrawSettings/MusDrawSettings.any"};
    viewForce.Visible ??= Off;
  };


  AnyMuscleShortestPath ObliquusInternusCC_1 = {
    AnyMuscleModel &MusMdl = ....MuscleModels.Right.ObliquusInternus.ObliquusInternusCC_1;
    #if BM_TRUNK_THORACIC_STERNUM_TOPOLOGY == 4
    AnyRefNode &Org = ....Segments.Right.CostalCartilageSeg.ObliquusInternus_1;
    #else
    AnyRefNode &Org = ....Segments.SternalBodySeg.Right.ObliquusInternusNode_1;
    #endif
    AnyRefNode &Ins = ....Segments.PelvisSeg.Right.ObliquusInternusNode_5;

    AnyParamSurf &srf4 =....Abdominal.ObliquusWrapping.WrappingSeg.Layer4WrappingPoints.Right.nn04.Translate.InwardCyl;

    SPLine.StringMesh=60;

    SPLine = {
      AnyMatrix InitWrapPos = {
        transf3D({0,-.srf4.radius, 0.5*.srf4.Length}, &.srf4)
      };
      InitWrapPosVecArr = {&InitWrapPos};
    };

    viewMuscle = {#include "../DrawSettings/MusDrawSettings.any"};
    viewForce.Visible ??= Off;
  };


  AnyMuscleShortestPath ObliquusInternusCC_2 = {
    AnyMuscleModel &MusMdl = ....MuscleModels.Right.ObliquusInternus.ObliquusInternusCC_2;
    #if BM_TRUNK_THORACIC_STERNUM_TOPOLOGY == 4
    AnyRefNode &Org = ....Segments.Right.CostalCartilageSeg.ObliquusInternus_2;
    #else
    AnyRefNode &Org = ....Segments.SternalBodySeg.Right.ObliquusInternusNode_2;
    #endif
    AnyRefNode &Ins = ....Segments.PelvisSeg.Right.ObliquusInternusNode_5;

    AnyParamSurf &srf3 =....Abdominal.ObliquusWrapping.WrappingSeg.Layer3WrappingPoints.Right.nn08.Translate.InwardCyl;

    SPLine.StringMesh=60;

    SPLine = {
      AnyMatrix InitWrapPos = {
        transf3D({0,-.srf3.radius, 0.5*.srf3.Length}, &.srf3)
      };
      InitWrapPosVecArr = {&InitWrapPos};
    };

    viewMuscle = {#include "../DrawSettings/MusDrawSettings.any"};
    viewForce.Visible ??= Off;
  };


  AnyMuscleShortestPath ObliquusInternusCC_3 = {
    AnyMuscleModel &MusMdl = ....MuscleModels.Right.ObliquusInternus.ObliquusInternusCC_3;
    //  AnyRefNode &Org = ....Segments.SternalBodySeg.DiaphragmXiphoidNodeR;
    //  AnyRefNode &Ins = ....Segments.PelvisSeg.Right.ObliquusInternusNode_6;
    AnyRefNode &Org = ....Segments.SternalBodySeg.DiaphragmXiphoidNodeR;
    AnyRefNode &Via = Main.HumanModel.BodyModel.Trunk.Abdominal.Layer_L1.BaseSegAnterior.TransversusPoints.Right.nn06;

    AnyRefNode &Ins = ....Segments.PelvisSeg.Right.ObliquusInternusNode_6;

    AnyParamSurf &srf2 =....Abdominal.ObliquusWrapping.WrappingSeg.Layer2WrappingPoints.Right.nn10.Translate.InwardCyl;
    AnyParamSurf &srf3 =....Abdominal.ObliquusWrapping.WrappingSeg.Layer3WrappingPoints.Right.nn08.Translate.InwardCyl;

    SPLine.StringMesh=240;

    SPLine = {
      AnyMatrix InitWrapPos = {
        transf3D({0,-.srf2.radius, 0.5*.srf2.Length}, &.srf2),
        transf3D({0,-.srf3.radius, 0.5*.srf3.Length}, &.srf3)
      };
      InitWrapPosVecArr = {&InitWrapPos};
    };
    viewMuscle = {#include "../DrawSettings/MusDrawSettings.any"};
    viewForce.Visible ??= Off;
  };


  AnyMuscleShortestPath ObliquusInternusCC_3_extra = {
    AnyMuscleModel &MusMdl = ....MuscleModels.Right.ObliquusInternus.ObliquusInternusCC_3;
    AnyRefNode &Org = ....Segments.SternalBodySeg.RACP_Via_2_R;
    AnyRefNode &Ins = ....Segments.PelvisSeg.Right.ObliquusInternusNode_6;

    AnyParamSurf &srf2 =....Abdominal.ObliquusWrapping.WrappingSeg.Layer2WrappingPoints.Right.nn10.Translate.InwardCyl;
    AnyParamSurf &srf3 =....Abdominal.ObliquusWrapping.WrappingSeg.Layer3WrappingPoints.Right.nn08.Translate.InwardCyl;

    SPLine.StringMesh=240;

    SPLine = {
      AnyMatrix InitWrapPos = {
        transf3D({0,-.srf2.radius, 0.5*.srf2.Length}, &.srf2),
        transf3D({0,-.srf3.radius, 0.5*.srf3.Length}, &.srf3)
      };
      InitWrapPosVecArr = {&InitWrapPos};
    };
    viewMuscle = {#include "../DrawSettings/MusDrawSettings.any"};
    viewForce.Visible ??= Off;
  };


  AnyMuscleShortestPath ObliquusInternusXiphoid = {
    AnyMuscleModel &MusMdl = ....MuscleModels.Right.ObliquusInternus.ObliquusInternusXiphoid;
    AnyRefNode &Org =      ....Abdominal.Layer_L1.BaseSegAnterior.mid;
    AnyRefNode &Ins = ....Segments.PelvisSeg.Right.ObliquusInternusNode_6;

    //AnyParamSurf &srf1 =....Abdominal.ObliquusWrapping.WrappingSeg.Layer2WrappingPoints.Right.nn11.Translate.InwardCyl;
    AnyParamSurf &srf2 =....Abdominal.ObliquusWrapping.WrappingSeg.Layer3WrappingPoints.Right.nn10.Translate.InwardCyl;
    AnyParamSurf &srf3 =....Abdominal.ObliquusWrapping.WrappingSeg.Layer4WrappingPoints.Right.nn09.Translate.InwardCyl;

    SPLine.StringMesh=60;

    SPLine = {
      AnyMatrix InitWrapPos = {
        // transf3D({0,-.srf1.radius, 0.5*.srf1.Length}, &.srf1),
        transf3D({0,-.srf2.radius, 0.5*.srf2.Length}, &.srf2),
        transf3D({0,-.srf3.radius, 0.5*.srf3.Length}, &.srf3)
      };
      InitWrapPosVecArr = {&InitWrapPos};
    };

    viewMuscle = {#include "../DrawSettings/MusDrawSettings.any"};
    viewForce.Visible ??= Off;
  };

  AnyMuscleShortestPath ObliquusInternusAbd_1 = {
    AnyMuscleModel &MusMdl = ....MuscleModels.Right.ObliquusInternus.ObliquusInternusAbd_1;
    AnyRefNode &Org =      ....Abdominal.Layer_L2.BaseSegAnterior.mid;
    AnyRefNode &Ins = ....Segments.PelvisSeg.Right.ObliquusInternusNode_6;

    AnyParamSurf &srf1 =....Abdominal.ObliquusWrapping.WrappingSeg.Layer3WrappingPoints.Right.nn11.Translate.InwardCyl;
    AnyParamSurf &srf2 =....Abdominal.ObliquusWrapping.WrappingSeg.Layer4WrappingPoints.Right.nn09.Translate.InwardCyl;

    SPLine.StringMesh=60;

    SPLine = {
      AnyMatrix InitWrapPos = {
        transf3D({0,-.srf1.radius, 0.5*.srf1.Length}, &.srf1),
        transf3D({0,-.srf2.radius, 0.5*.srf2.Length}, &.srf2)
      };
      InitWrapPosVecArr = {&InitWrapPos};
    };

    viewMuscle = {#include "../DrawSettings/MusDrawSettings.any"};
    viewForce.Visible ??= Off;
  };


  AnyMuscleShortestPath ObliquusInternusAbd_2 = {
    AnyMuscleModel &MusMdl = ....MuscleModels.Right.ObliquusInternus.ObliquusInternusAbd_2;
    AnyRefNode &Org = ....Abdominal.Layer_L3.BaseSegAnterior.mid;
    AnyRefNode &Ins = ....Segments.PelvisSeg.Right.ObliquusInternusNode_7;

    AnyParamSurf &srf1 =....Abdominal.ObliquusWrapping.WrappingSeg.Layer4WrappingPoints.Right.nn11.Translate.InwardCyl;
    AnyParamSurf &srf2 =....Abdominal.ObliquusWrapping.WrappingSeg.Layer5WrappingPoints.Right.nn08.Translate.InwardCyl;

    SPLine.StringMesh=60;

    SPLine = {
      AnyMatrix InitWrapPos = {
        transf3D({0,-.srf1.radius, 0.5*.srf1.Length}, &.srf1),
        transf3D({0,-.srf2.radius, 0.5*.srf2.Length}, &.srf2)
      };
      InitWrapPosVecArr = {&InitWrapPos};
    };

    viewMuscle = {#include "../DrawSettings/MusDrawSettings.any"};
    viewForce.Visible ??= Off;
  };


  AnyMuscleShortestPath ObliquusInternusAbd_3 = {
    AnyMuscleModel &MusMdl = ....MuscleModels.Right.ObliquusInternus.ObliquusInternusAbd_3;
    AnyRefNode &Org =      ....Abdominal.Layer_L4.BaseSegAnterior.mid;
    AnyRefNode &Ins = ....Segments.PelvisSeg.Right.ObliquusInternusNode_7;

    AnyParamSurf &srf1 =....Abdominal.ObliquusWrapping.WrappingSeg.Layer5WrappingPoints.Right.nn09.Translate.InwardCyl;

    SPLine.StringMesh=60;

    SPLine = {
      AnyMatrix InitWrapPos = {
        transf3D({0,-.srf1.radius, 0.5*.srf1.Length}, &.srf1)
      };
      InitWrapPosVecArr = {&InitWrapPos};
    };

    viewMuscle = {#include "../DrawSettings/MusDrawSettings.any"};
    viewForce.Visible ??= Off;
  };

  AnyMuscleShortestPath  ObliquusInternusAbd_4= {
    AnyMuscleModel &MusMdl = ....MuscleModels.Right.ObliquusInternus.ObliquusInternusAbd_4;
    AnyRefNode &Org = ....Abdominal.Layer_L5.BaseSegAnterior.mid;
    AnyRefNode &Ins = ....Segments.PelvisSeg.Right.ObliquusInternusNode_8;

    AnyParamSurf &srf1 =....Abdominal.ObliquusWrapping.WrappingSeg.Layer5WrappingPoints.Right.nn11.Translate.InwardCyl;

    SPLine.StringMesh=60;

    SPLine = {
      AnyMatrix InitWrapPos = {
        transf3D({0,-.srf1.radius, 0.5*.srf1.Length}, &.srf1)
      };
      InitWrapPosVecArr = {&InitWrapPos};
    };

    viewMuscle = {#include "../DrawSettings/MusDrawSettings.any"};
    viewForce.Visible ??= Off;
  };


  #endif

  #ifndef OBLIQUUS_WRAP_ON_CYLS
  AnyMuscleViaPoint ObliquusInternusR12 = {
    AnyMuscleModel &MusMdl = ....MuscleModels.Right.ObliquusInternus.ObliquusInternusR12;
    AnyRefNode &Org = ....Segments.Right.R12Seg.ObliquusExternusNode;
    AnyRefNode &Ins = ....Segments.PelvisSeg.Right.ObliquusInternusNode_1;
    viewMuscle = {#include "../DrawSettings/MusDrawSettings.any"};
    viewForce.Visible ??= Off;
    #include "MusclesSharedCode.any"
  };


  AnyMuscleViaPoint ObliquusInternusR11_1 = {
    AnyMuscleModel &MusMdl = ....MuscleModels.Right.ObliquusInternus.ObliquusInternusR11_1;
    AnyRefNode &Org = ....Segments.Right.R11Seg.ObliquusExternusNode1;
    AnyRefNode &Ins = ....Segments.PelvisSeg.Right.ObliquusInternusNode_2;
    viewMuscle = {#include "../DrawSettings/MusDrawSettings.any"};
    viewForce.Visible ??= Off;
    #include "MusclesSharedCode.any"
  };


  AnyMuscleViaPoint ObliquusInternusR11_2 = {
    AnyMuscleModel &MusMdl = ....MuscleModels.Right.ObliquusInternus.ObliquusInternusR11_2;
    AnyRefNode &Org = ....Segments.Right.R11Seg.ObliquusExternusNode;
    AnyRefNode &Ins = ....Segments.PelvisSeg.Right.ObliquusInternusNode_3;
    viewMuscle = {#include "../DrawSettings/MusDrawSettings.any"};
    viewForce.Visible ??= Off;
    #include "MusclesSharedCode.any"
  };


  AnyMuscleViaPoint ObliquusInternusR10_1 = {
    AnyMuscleModel &MusMdl = ....MuscleModels.Right.ObliquusInternus.ObliquusInternusR10_1;
    AnyRefNode &Org = ....Segments.Right.R10Seg.ObliquusExternusNode_2;
    AnyRefNode &Ins = ....Segments.PelvisSeg.Right.ObliquusInternusNode_4;
    viewMuscle = {#include "../DrawSettings/MusDrawSettings.any"};
    viewForce.Visible ??= Off;
    #include "MusclesSharedCode.any"
  };


  AnyMuscleViaPoint ObliquusInternusR10_2 = {
    AnyMuscleModel &MusMdl = ....MuscleModels.Right.ObliquusInternus.ObliquusInternusR10_2;
    AnyRefNode &Org = ....Segments.Right.R10Seg.ObliquusExternusNode_1;
    AnyRefNode &Ins = ....Segments.PelvisSeg.Right.ObliquusInternusNode_4_1;
    viewMuscle = {#include "../DrawSettings/MusDrawSettings.any"};
    viewForce.Visible ??= Off;
    #include "MusclesSharedCode.any"
  };


  AnyMuscleShortestPath ObliquusInternusCC_1 = {
    AnyMuscleModel &MusMdl = ....MuscleModels.Right.ObliquusInternus.ObliquusInternusCC_1;
    #if BM_TRUNK_THORACIC_STERNUM_TOPOLOGY == 4
    AnyRefNode &Org = ....Segments.Right.CostalCartilageSeg.ObliquusInternus_1;
    #else
    AnyRefNode &Org = ....Segments.SternalBodySeg.Right.ObliquusInternusNode_1;
    #endif
    AnyRefNode &Ins = ....Segments.PelvisSeg.Right.ObliquusInternusNode_5;
    // AnySurfTriCylMesh &mesh2 = Main.HumanModel.BodyModel.Trunk.Abdominal.Layer_L2.BaseSegAnterior.mesh;
    // AnySurfTriCylMesh &mesh3 = Main.HumanModel.BodyModel.Trunk.Abdominal.Layer_L3.BaseSegAnterior.mesh;
    //AnySurfTriCylMesh &mesh4 = Main.HumanModel.BodyModel.Trunk.Abdominal.Layer_L4.BaseSegAnterior.mesh;
    //AnySurfTriCylMesh  &mesh5 = Main.HumanModel.BodyModel.Trunk.Abdominal.Layer_L5.BaseSegAnterior.mesh;

    //  #if MESH_TYPE == "ELLIPSOID_SIDE"
    //    AnySurfEllipsoid &mesh3 = Main.HumanModel.BodyModel.Trunk.Abdominal.Layer_L3.BaseSegAnterior.Right.mesh;
    //  #else
    //    AnySurfTriCylMesh &mesh3 = Main.HumanModel.BodyModel.Trunk.Abdominal.Layer_L3.BaseSegAnterior.mesh;
    //  #endif
    AnySurfEllipsoid &mesh3 = Main.HumanModel.BodyModel.Trunk.Abdominal.Layer_L3.BaseSegAnterior.mesh3;

    SPLine.StringMesh=60;

    SPLine = {

      //  #if MESH_TYPE == "ELLIPSOID"
      //    AnyMatrix InitWrapPos = {
      //   //   transf3D({.mesh2.Radius[0],0,0}, &.mesh2),
      //      transf3D({.mesh3.Radius[0],0,0}, &.mesh3),
      //    //  transf3D({.mesh4.Radius[0],0,0}, &.mesh4),
      //     // transf3D({.mesh5.Radius[0],0,0}, &.mesh5),
      //    };
      //    #endif
      //       #if MESH_TYPE == "ELLIPSOID_SIDE"
      //    AnyMatrix InitWrapPos = {
      //
      //      transf3D({0,.mesh3.Radius[1],0}, &.mesh3),
      //      //transf3D({0,.mesh4.Radius[1],0}, &.mesh4),
      //    };
      //    #endif
      //
      //
      //    #if MESH_TYPE == "QUAD"
      //    AnyMatrix InitWrapPos = {
      //     // transf3D(.mesh2.Points[floor(.mesh2.MeshSize*0.75)+2*.mesh2.MeshSize*6]+{0.02,0,0}, &.mesh2),
      //      transf3D(.mesh3.Points[floor(.mesh3.MeshSize*0.75)+2*.mesh3.MeshSize*6]+{0.02,0,0}, &.mesh3),
      //      transf3D(.mesh4.Points[floor(.mesh4.MeshSize*0.7)+2*.mesh4.MeshSize*6]+{0.02,0,0}, &.mesh4),
      //     // transf3D(.mesh5.Points[floor(.mesh5.MeshSize*0.65)+2*.mesh5.MeshSize*6]+{0.02,0,0}, &.mesh5)
      //    };
      //    #endif

      AnyMatrix InitWrapPos = {
        transf3D({.mesh3.Radius[0],0,.mesh3.Radius[2]}, &.mesh3),
      };

      InitWrapPosVecArr = {&InitWrapPos};
    };
    viewMuscle = {#include "../DrawSettings/MusDrawSettings.any"};
    viewForce.Visible ??= Off;
    #include "MusclesSharedCode_SPLine.any"
  };

  AnyMuscleShortestPath ObliquusInternusCC_2 = {
    AnyMuscleModel &MusMdl = ....MuscleModels.Right.ObliquusInternus.ObliquusInternusCC_2;
    #if BM_TRUNK_THORACIC_STERNUM_TOPOLOGY == 4
    AnyRefNode &Org = ....Segments.Right.CostalCartilageSeg.ObliquusInternus_2;
    #else
    AnyRefNode &Org = ....Segments.SternalBodySeg.Right.ObliquusInternusNode_2;
    #endif
    AnyRefNode &Ins = ....Segments.PelvisSeg.Right.ObliquusInternusNode_5;

    ////  AnySurfTriCylMesh &mesh2 = Main.HumanModel.BodyModel.Trunk.Abdominal.Layer_L2.BaseSegAnterior.mesh;
    ////  AnySurfTriCylMesh &mesh3 = Main.HumanModel.BodyModel.Trunk.Abdominal.Layer_L3.BaseSegAnterior.mesh;
    ////  AnySurfTriCylMesh &mesh4 = Main.HumanModel.BodyModel.Trunk.Abdominal.Layer_L4.BaseSegAnterior.mesh;
    //// AnySurfTriCylMesh &mesh5 = Main.HumanModel.BodyModel.Trunk.Abdominal.Layer_L5.BaseSegAnterior.mesh;
    // #if MESH_TYPE == "ELLIPSOID_SIDE"
    //   AnySurfEllipsoid &mesh2 = Main.HumanModel.BodyModel.Trunk.Abdominal.Layer_L2.BaseSegAnterior.Right.mesh;
    //   AnySurfEllipsoid &mesh3 = Main.HumanModel.BodyModel.Trunk.Abdominal.Layer_L3.BaseSegAnterior.Right.mesh;
    //   AnySurfEllipsoid &mesh3_extra = Main.HumanModel.BodyModel.Trunk.Abdominal.Layer_L3.BaseSegAnterior.Right.mesh2;
    //   AnySurfEllipsoid &mesh4 = Main.HumanModel.BodyModel.Trunk.Abdominal.Layer_L4.BaseSegAnterior.Right.mesh;
    // #else
    //    AnySurfTriCylMesh &mesh2 = Main.HumanModel.BodyModel.Trunk.Abdominal.Layer_L2.BaseSegAnterior.mesh;
    //    AnySurfTriCylMesh &mesh3 = Main.HumanModel.BodyModel.Trunk.Abdominal.Layer_L3.BaseSegAnterior.mesh;
    //    AnySurfTriCylMesh &mesh4 = Main.HumanModel.BodyModel.Trunk.Abdominal.Layer_L4.BaseSegAnterior.mesh;
    //  #endif

    //   AnySurfEllipsoid &mesh2 = Main.HumanModel.BodyModel.Trunk.Abdominal.Layer_L2.BaseSegAnterior.mesh3;
    AnySurfEllipsoid &mesh3 = Main.HumanModel.BodyModel.Trunk.Abdominal.Layer_L3.BaseSegAnterior.mesh3;
    AnySurfEllipsoid &mesh4 = Main.HumanModel.BodyModel.Trunk.Abdominal.Layer_L4.BaseSegAnterior.mesh3;

    SPLine.StringMesh=240;

    SPLine = {

      //   #if MESH_TYPE == "ELLIPSOID"
      //    AnyMatrix InitWrapPos = {
      //      transf3D({.mesh2.Radius[0],0,0}, &.mesh2),
      //      transf3D({.mesh3.Radius[0],0,0}, &.mesh3),
      //      transf3D({.mesh4.Radius[0],0,0}, &.mesh4),
      //    //  transf3D({.mesh5.Radius[0],0,0}, &.mesh5),
      //    };
      //    #endif
      //
      //       #if MESH_TYPE == "ELLIPSOID_SIDE"
      //    AnyMatrix InitWrapPos = {
      //      transf3D({0,.mesh2.Radius[1],0}, &.mesh2),
      //      transf3D({0,.mesh3.Radius[1],0}, &.mesh3),
      ////      transf3D({0,.mesh3_extra.Radius[1],0}, &.mesh3_extra),
      //      transf3D({0,.mesh4.Radius[1],0}, &.mesh4),
      //    };
      //    #endif
      //
      //    #if MESH_TYPE == "QUAD"
      //    AnyMatrix InitWrapPos = {
      //      transf3D(.mesh2.Points[floor(.mesh2.MeshSize*0.75)+2*.mesh2.MeshSize*6]+{0.02,0,0}, &.mesh2),
      //      transf3D(.mesh3.Points[floor(.mesh3.MeshSize*0.75)+2*.mesh3.MeshSize*6]+{0.02,0,0}, &.mesh3),
      //      transf3D(.mesh4.Points[floor(.mesh4.MeshSize*0.7)+2*.mesh4.MeshSize*6]+{0.02,0,0}, &.mesh4),
      //     // transf3D(.mesh5.Points[floor(.mesh5.MeshSize*0.65)+2*.mesh5.MeshSize*6]+{0.02,0,0}, &.mesh5)
      //    };
      //    #endif
      AnyMatrix InitWrapPos = {
        //      transf3D({.mesh2.Radius[0],0,0}, &.mesh2),
        transf3D({.mesh3.Radius[0],0,.mesh3.Radius[2]}, &.mesh3),
        transf3D({.mesh4.Radius[0],0,.mesh4.Radius[2]}, &.mesh4),
        //  transf3D({.mesh5.Radius[0],0,0}, &.mesh5),
      };

      InitWrapPosVecArr = {&InitWrapPos};
    };
    viewMuscle = {#include "../DrawSettings/MusDrawSettings.any"};
    viewForce.Visible ??= Off;
    #include "MusclesSharedCode_SPLine.any"
  };


  AnyMuscleShortestPath ObliquusInternusCC_3 = {
    AnyMuscleModel &MusMdl = ....MuscleModels.Right.ObliquusInternus.ObliquusInternusCC_3;
    AnyRefNode &Org = ....Segments.SternalBodySeg.RACP_Via_2_R;
    // AnyRefNode &Via = Main.HumanModel.BodyModel.Trunk.Abdominal.Layer_L1.BaseSegAnterior.TransversusPoints.Right.nn05;

    AnyRefNode &Ins = ....Segments.PelvisSeg.Right.ObliquusInternusNode_6;
    //// AnySurfTriCylMesh &mesh2 = Main.HumanModel.BodyModel.Trunk.Abdominal.Layer_L2.BaseSegAnterior.mesh;
    //// AnySurfTriCylMesh &mesh3 = Main.HumanModel.BodyModel.Trunk.Abdominal.Layer_L3.BaseSegAnterior.mesh;
    //// AnySurfTriCylMesh &mesh4 = Main.HumanModel.BodyModel.Trunk.Abdominal.Layer_L4.BaseSegAnterior.mesh;
    // #if MESH_TYPE == "ELLIPSOID_SIDE"
    //   AnySurfEllipsoid &mesh2 = Main.HumanModel.BodyModel.Trunk.Abdominal.Layer_L2.BaseSegAnterior.Right.mesh;
    //   AnySurfEllipsoid &mesh3 = Main.HumanModel.BodyModel.Trunk.Abdominal.Layer_L3.BaseSegAnterior.Right.mesh;
    //   AnySurfEllipsoid &mesh3_extra = Main.HumanModel.BodyModel.Trunk.Abdominal.Layer_L3.BaseSegAnterior.Right.mesh2;
    //   AnySurfEllipsoid &mesh4 = Main.HumanModel.BodyModel.Trunk.Abdominal.Layer_L4.BaseSegAnterior.Right.mesh;
    // #else
    //    AnySurfTriCylMesh &mesh2 = Main.HumanModel.BodyModel.Trunk.Abdominal.Layer_L2.BaseSegAnterior.mesh;
    //    AnySurfTriCylMesh &mesh3 = Main.HumanModel.BodyModel.Trunk.Abdominal.Layer_L3.BaseSegAnterior.mesh;
    //    AnySurfTriCylMesh &mesh4 = Main.HumanModel.BodyModel.Trunk.Abdominal.Layer_L4.BaseSegAnterior.mesh;
    //  #endif
    //   AnySurfEllipsoid &mesh1 = Main.HumanModel.BodyModel.Trunk.Abdominal.Layer_L1.BaseSegAnterior.mesh3;
    //   AnySurfEllipsoid &mesh2 = Main.HumanModel.BodyModel.Trunk.Abdominal.Layer_L2.BaseSegAnterior.mesh3;
    AnySurfEllipsoid &mesh3 = Main.HumanModel.BodyModel.Trunk.Abdominal.Layer_L3.BaseSegAnterior.mesh3;
    AnySurfEllipsoid &mesh4 = Main.HumanModel.BodyModel.Trunk.Abdominal.Layer_L4.BaseSegAnterior.mesh3;


    SPLine.StringMesh=240;

    SPLine = {
      //    SolverVersion=3;
      // StringSurfaceMap= {{Off,Off,Off,Off},{On,On,On,On}};  //no wrap before after via


      //  #if MESH_TYPE == "ELLIPSOID"
      //    AnyMatrix InitWrapPos = {
      //      transf3D({.mesh2.Radius[0],0,0}, &.mesh2),
      //      transf3D({.mesh3.Radius[0],0,0}, &.mesh3),
      //      transf3D({.mesh4.Radius[0],0,0}, &.mesh4),
      //    };
      //    #endif
      //       #if MESH_TYPE == "ELLIPSOID_SIDE"
      //    AnyMatrix InitWrapPos = {
      //      transf3D({0,.mesh2.Radius[1],0}, &.mesh2),
      //      transf3D({0,.mesh3.Radius[1],0},&.mesh3),
      ////      transf3D({0,.mesh3_extra.Radius[1],0},&.mesh3_extra),
      //      transf3D({0,.mesh4.Radius[1],0}, &.mesh4),
      //    };
      //    #endif
      //
      //    #if MESH_TYPE == "QUAD"
      //  AnyMatrix InitWrapPos = {
      //    //      transf3D({0.0,2*.srf1.MajorRadius,-.srf1.MajorRadius}, &.srf1),
      //    //      transf3D(.mesh1.Points[52]+{0.03,0,0}, &.mesh1),
      //    //   transf3D(.mesh1.Points[floor(.mesh2.MeshSize*0.8)+2*.mesh2.MeshSize*4]+{0.01,0,0}, &.mesh1),
      //    transf3D(.mesh2.Points[floor(.mesh2.MeshSize*0.75)+2*.mesh2.MeshSize*6]+{0.02,0,0}, &.mesh2),
      //    transf3D(.mesh3.Points[floor(.mesh3.MeshSize*0.7)+2*.mesh3.MeshSize*6]+{0.02,0,0}, &.mesh3),
      //     transf3D(.mesh4.Points[floor(.mesh4.MeshSize*0.65)+2*.mesh4.MeshSize*6]+{0.02,0,0}, &.mesh4),
      ////     transf3D(mesh.Points[floor(.mesh.MeshSize*4]+{0.01,0,0}, &.mesh),
      //
      //   //      transf3D(.mesh5.Points[floor(.mesh5.MeshSize*0.65)+2*.mesh5.MeshSize*6]+{0.02,0,0}, &.mesh5)
      //  };
      //
      //    #endif
      AnyMatrix InitWrapPos = {
        //      transf3D({.mesh1.Radius[0],0,0}, &.mesh1),
        //      transf3D({.mesh2.Radius[0],0,0}, &.mesh2),
        transf3D({.mesh3.Radius[0],0,.mesh3.Radius[2]}, &.mesh3),
        transf3D({.mesh4.Radius[0],0,.mesh4.Radius[2]}, &.mesh4),
      };


      InitWrapPosVecArr = {&InitWrapPos};


    };
    viewMuscle = {#include "../DrawSettings/MusDrawSettings.any"};
    viewForce.Visible ??= Off;
    #include "MusclesSharedCode_SPLine.any"
  };

  AnyMuscleShortestPath ObliquusInternusXiphoid = {
    AnyMuscleModel &MusMdl = ....MuscleModels.Right.ObliquusInternus.ObliquusInternusXiphoid;
    AnyRefNode &Org = ....Segments.SternalBodySeg.DiaphragmXiphoidNodeR;
    AnyRefNode &Via = Main.HumanModel.BodyModel.Trunk.Abdominal.Layer_L1.BaseSegAnterior.TransversusPoints.Right.nn06;

    AnyRefNode &Ins = ....Segments.PelvisSeg.Right.ObliquusInternusNode_6;

    //AnySurfTriCylMesh &mesh2 = Main.HumanModel.BodyModel.Trunk.Abdominal.Layer_L2.BaseSegAnterior.mesh;
    //AnySurfTriCylMesh &mesh3 = Main.HumanModel.BodyModel.Trunk.Abdominal.Layer_L3.BaseSegAnterior.mesh;
    //AnySurfTriCylMesh &mesh4 = Main.HumanModel.BodyModel.Trunk.Abdominal.Layer_L4.BaseSegAnterior.mesh;
    // AnySurfTriCylMesh &mesh5 = Main.HumanModel.BodyModel.Trunk.Abdominal.Layer_L5.BaseSegAnterior.mesh;
    //#ifndef WRAPPING_TEST
    // #if MESH_TYPE == "ELLIPSOID_SIDE"
    //   AnySurfEllipsoid &mesh2 = Main.HumanModel.BodyModel.Trunk.Abdominal.Layer_L2.BaseSegAnterior.Right.mesh;
    //   AnySurfEllipsoid &mesh3 = Main.HumanModel.BodyModel.Trunk.Abdominal.Layer_L3.BaseSegAnterior.Right.mesh;
    //   AnySurfEllipsoid &mesh3_extra = Main.HumanModel.BodyModel.Trunk.Abdominal.Layer_L3.BaseSegAnterior.Right.mesh2;
    //   AnySurfEllipsoid &mesh4 = Main.HumanModel.BodyModel.Trunk.Abdominal.Layer_L4.BaseSegAnterior.Right.mesh;
    // #else
    //    AnySurfTriCylMesh &mesh2 = Main.HumanModel.BodyModel.Trunk.Abdominal.Layer_L2.BaseSegAnterior.mesh;
    //    AnySurfTriCylMesh &mesh3 = Main.HumanModel.BodyModel.Trunk.Abdominal.Layer_L3.BaseSegAnterior.mesh;
    //    AnySurfTriCylMesh &mesh4 = Main.HumanModel.BodyModel.Trunk.Abdominal.Layer_L4.BaseSegAnterior.mesh;
    //  #endif
    //#else
    //   AnySurfEllipsoid &mesh2 = Main.HumanModel.BodyModel.Trunk.Abdominal.Layer_L2.BaseSegAnterior.mesh3;
    AnySurfEllipsoid &mesh3 = Main.HumanModel.BodyModel.Trunk.Abdominal.Layer_L3.BaseSegAnterior.mesh3;
    AnySurfEllipsoid &mesh4 = Main.HumanModel.BodyModel.Trunk.Abdominal.Layer_L4.BaseSegAnterior.mesh3;
    //#endif


    SPLine.StringMesh=240;
    //  #ifndef WRAPPING_TEST

    SPLine = {
      //    StringSurfaceMap= {{Off,Off,Off,Off},{On,On,On,On}};  //no wrap before after via
      //    StringSurfaceMap= {{Off,Off,Off},{On,On,On}};  //no wrap before after via
      StringSurfaceMap= {{Off,Off},{On,On}};  //no wrap before after via

      //    #if MESH_TYPE == "ELLIPSOID"
      //    AnyMatrix InitWrapPos = {
      //      transf3D({.mesh2.Radius[0],0,0}, &.mesh2),
      //      transf3D({.mesh3.Radius[0],0,0}, &.mesh3),
      //      transf3D({.mesh4.Radius[0],0,0}, &.mesh4),
      //      //    transf3D({.mesh5.Radius[0],0,0}, &.mesh5),
      //    };
      //    #endif
      //    #if MESH_TYPE == "ELLIPSOID_SIDE"
      //    AnyMatrix InitWrapPos = {
      //      transf3D({0,.mesh2.Radius[1],0}, &.mesh2),
      //      transf3D({0,.mesh3.Radius[1],0}, &.mesh3),
      ////      transf3D({0,.mesh3_extra.Radius[1],0}, &.mesh3_extra),
      //      transf3D({0,.mesh4.Radius[1],0}, &.mesh4),
      //    };
      //    #endif
      //
      //    #if MESH_TYPE == "QUAD"
      //    AnyMatrix InitWrapPos = {
      //      transf3D(.mesh2.Points[floor(.mesh2.MeshSize*0.8)+2*.mesh2.MeshSize*6]+{0.02,0,0}, &.mesh2),
      //      transf3D(.mesh3.Points[floor(.mesh3.MeshSize*0.7)+2*.mesh3.MeshSize*6]+{0.02,0,0}, &.mesh3),
      //      transf3D(.mesh4.Points[floor(.mesh4.MeshSize*0.6)+2*.mesh4.MeshSize*6]+{0.02,0,0}, &.mesh4),
      //      //    transf3D(.mesh5.Points[floor(.mesh5.MeshSize*0.6)+2*.mesh5.MeshSize*6]+{0.02,0,0}, &.mesh5)
      //    };
      //    #endif
      AnyMatrix InitWrapPos = {
        //      transf3D({.mesh2.Radius[0],0,0}, &.mesh2),
        transf3D({.mesh3.Radius[0],0,.mesh3.Radius[2]}, &.mesh3),
        transf3D({.mesh4.Radius[0],0,.mesh4.Radius[2]}, &.mesh4),
        //    transf3D({.mesh5.Radius[0],0,0}, &.mesh5),
      };

      InitWrapPosVecArr = {None,&InitWrapPos};
    };

    //    #else
    //    SPLine = {
    //      StringSurfaceMap= {{Off},{On}};  //no wrap before after via
    //
    //      #if MESH_TYPE == "ELLIPSOID_SIDE"
    //      AnyMatrix InitWrapPos = {
    //        transf3D({0,.mesh3_extra.Radius[1],0}, &.mesh3_extra),
    //      };
    //      #endif
    //
    //
    //
    //    InitWrapPosVecArr = {None,&InitWrapPos};
    //  };
    //  #endif
    viewMuscle = {#include "../DrawSettings/MusDrawSettings.any"};
    viewForce.Visible ??= Off;
    #include "MusclesSharedCode_SPLine.any"
  };

  AnyMuscleShortestPath ObliquusInternusAbd_1 = {
    AnyMuscleModel &MusMdl = ....MuscleModels.Right.ObliquusInternus.ObliquusInternusAbd_1;
    AnyRefNode &Org =      ....Abdominal.Layer_L1.BaseSegAnterior.mid;
    AnyRefNode &Ins = ....Segments.PelvisSeg.Right.ObliquusInternusNode_6;

    //  AnySurfTriCylMesh &mesh2 = Main.HumanModel.BodyModel.Trunk.Abdominal.Layer_L2.BaseSegAnterior.mesh;
    //  AnySurfTriCylMesh &mesh3 = Main.HumanModel.BodyModel.Trunk.Abdominal.Layer_L3.BaseSegAnterior.mesh;
    // AnySurfTriCylMesh &mesh4 = Main.HumanModel.BodyModel.Trunk.Abdominal.Layer_L4.BaseSegAnterior.mesh;
    //AnySurfTriCylMesh &mesh5 = Main.HumanModel.BodyModel.Trunk.Abdominal.Layer_L5.BaseSegAnterior.mesh;


    //   #if MESH_TYPE == "ELLIPSOID_SIDE"
    //   AnySurfEllipsoid &mesh2 = Main.HumanModel.BodyModel.Trunk.Abdominal.Layer_L2.BaseSegAnterior.Right.mesh;
    //   AnySurfEllipsoid &mesh3 = Main.HumanModel.BodyModel.Trunk.Abdominal.Layer_L3.BaseSegAnterior.Right.mesh;
    //   AnySurfEllipsoid &mesh4 = Main.HumanModel.BodyModel.Trunk.Abdominal.Layer_L4.BaseSegAnterior.Right.mesh;
    ////   AnySurfEllipsoid &meshpelvis = Main.HumanModel.BodyModel.Trunk.Abdominal.Layer_Pelvic1.BaseSegAnterior.mesh;
    // #else
    //    AnySurfTriCylMesh &mesh2 = Main.HumanModel.BodyModel.Trunk.Abdominal.Layer_L2.BaseSegAnterior.mesh;
    //    AnySurfTriCylMesh &mesh3 = Main.HumanModel.BodyModel.Trunk.Abdominal.Layer_L3.BaseSegAnterior.mesh;
    //    AnySurfTriCylMesh &mesh4 = Main.HumanModel.BodyModel.Trunk.Abdominal.Layer_L4.BaseSegAnterior.mesh;
    //  #endif

    AnySurfEllipsoid &mesh2 = Main.HumanModel.BodyModel.Trunk.Abdominal.Layer_L2.BaseSegAnterior.mesh3;
    AnySurfEllipsoid &mesh3 = Main.HumanModel.BodyModel.Trunk.Abdominal.Layer_L3.BaseSegAnterior.mesh3;
    AnySurfEllipsoid &mesh4 = Main.HumanModel.BodyModel.Trunk.Abdominal.Layer_L4.BaseSegAnterior.mesh3;


    SPLine.StringMesh=240;

    SPLine = {


      //    #if MESH_TYPE == "ELLIPSOID"
      //    AnyMatrix InitWrapPos = {
      //      transf3D({.mesh2.Radius[0],0,0}, &.mesh2),
      //      transf3D({.mesh3.Radius[0],0,0}, &.mesh3),
      //      transf3D({.mesh4.Radius[0],0,0}, &.mesh4),
      //   //   transf3D({.mesh5.Radius[0],0,0}, &.mesh5),
      //
      //    };
      //    #endif
      //
      //
      //   #if MESH_TYPE == "ELLIPSOID_SIDE"
      //    AnyMatrix InitWrapPos = {
      //      transf3D({0,.mesh2.Radius[1],0}, &.mesh2),
      //      transf3D({0,.mesh3.Radius[1],0}, &.mesh3),
      //      transf3D({0,.mesh4.Radius[1],0}, &.mesh4),
      //    };
      //    #endif
      //
      //
      //
      //    #if MESH_TYPE == "QUAD"
      //    AnyMatrix InitWrapPos = {
      //      transf3D(.mesh2.Points[floor(.mesh2.MeshSize*0.75)+2*.mesh2.MeshSize*6]+{0.02,0,0}, &.mesh2),
      //      transf3D(.mesh3.Points[floor(.mesh3.MeshSize*0.7) +2*.mesh3.MeshSize*6]+{0.02,0,0}, &.mesh3),
      //      transf3D(.mesh4.Points[floor(.mesh4.MeshSize*0.65)+2*.mesh4.MeshSize*6]+{0.02,0,0}, &.mesh4),
      //   //   transf3D(.mesh5.Points[floor(.mesh5.MeshSize*0.6) +2*.mesh5.MeshSize*6]+{0.02,0,0}, &.mesh5)
      //    };
      //    #endif
      AnyMatrix InitWrapPos = {
        transf3D({.mesh2.Radius[0],0,.mesh2.Radius[2]}, &.mesh2),
        transf3D({.mesh3.Radius[0],0,.mesh3.Radius[2]}, &.mesh3),
        transf3D({.mesh4.Radius[0],0,.mesh4.Radius[2]}, &.mesh4),
        //   transf3D({.mesh5.Radius[0],0,0}, &.mesh5),

      };

      InitWrapPosVecArr = {&InitWrapPos};
    };

    viewMuscle = {#include "../DrawSettings/MusDrawSettings.any"};
    viewForce.Visible ??= Off;
    #include "MusclesSharedCode_SPLine.any"
  };


  AnyMuscleShortestPath ObliquusInternusAbd_2 = {
    AnyMuscleModel &MusMdl = ....MuscleModels.Right.ObliquusInternus.ObliquusInternusAbd_2;
    AnyRefNode &Org =      ....Abdominal.Layer_L2.BaseSegAnterior.mid;
    AnyRefNode &Ins = ....Segments.PelvisSeg.Right.ObliquusInternusNode_6;

    ////  AnySurfTriCylMesh &mesh3 = Main.HumanModel.BodyModel.Trunk.Abdominal.Layer_L3.BaseSegAnterior.mesh;
    ////  AnySurfTriCylMesh &mesh4 = Main.HumanModel.BodyModel.Trunk.Abdominal.Layer_L4.BaseSegAnterior.mesh;
    ////  AnySurfTriCylMesh &mesh5 = Main.HumanModel.BodyModel.Trunk.Abdominal.Layer_L5.BaseSegAnterior.mesh;
    //
    //   #if MESH_TYPE == "ELLIPSOID_SIDE"
    //   AnySurfEllipsoid &mesh3 = Main.HumanModel.BodyModel.Trunk.Abdominal.Layer_L3.BaseSegAnterior.Right.mesh;
    //   AnySurfEllipsoid &mesh4 = Main.HumanModel.BodyModel.Trunk.Abdominal.Layer_L4.BaseSegAnterior.Right.mesh;
    //   AnySurfEllipsoid &mesh5 = Main.HumanModel.BodyModel.Trunk.Abdominal.Layer_L5.BaseSegAnterior.Right.mesh;
    ////   AnySurfEllipsoid &meshpelvis = Main.HumanModel.BodyModel.Trunk.Abdominal.Layer_Pelvic1.BaseSegAnterior.mesh;
    //
    //   #else
    //    AnySurfTriCylMesh &mesh3 = Main.HumanModel.BodyModel.Trunk.Abdominal.Layer_L3.BaseSegAnterior.mesh;
    //    AnySurfTriCylMesh &mesh4 = Main.HumanModel.BodyModel.Trunk.Abdominal.Layer_L4.BaseSegAnterior.mesh;
    //    AnySurfTriCylMesh &mesh5 = Main.HumanModel.BodyModel.Trunk.Abdominal.Layer_L5.BaseSegAnterior.mesh;
    //
    //    #endif

    AnySurfEllipsoid &mesh3 = Main.HumanModel.BodyModel.Trunk.Abdominal.Layer_L3.BaseSegAnterior.mesh3;
    AnySurfEllipsoid &mesh4 = Main.HumanModel.BodyModel.Trunk.Abdominal.Layer_L4.BaseSegAnterior.mesh3;
    //   AnySurfEllipsoid &mesh5 = Main.HumanModel.BodyModel.Trunk.Abdominal.Layer_L5.BaseSegAnterior.mesh3;


    SPLine.StringMesh=300;


    SPLine = {


      //    #if MESH_TYPE == "ELLIPSOID"
      //    AnyMatrix InitWrapPos = {
      //
      //      transf3D({.mesh3.Radius[0],0,0}, &.mesh3),
      //      transf3D({.mesh4.Radius[0],0,0}, &.mesh4),
      //      transf3D({.mesh5.Radius[0],0,0}, &.mesh5),
      //
      //    };
      //    #endif
      //
      //
      //
      //  #if MESH_TYPE == "ELLIPSOID_SIDE"
      //    AnyMatrix InitWrapPos = {
      //           transf3D({0,.mesh3.Radius[1],0}, &.mesh3),
      //            transf3D({0,.mesh4.Radius[1],0}, &.mesh4),
      //            transf3D({0,.mesh5.Radius[1],0}, &.mesh5),
      //
      //          };
      //    #endif
      //
      //
      //
      //    #if MESH_TYPE == "QUAD"
      //    AnyMatrix InitWrapPos = {
      //
      //      transf3D(.mesh3.Points[floor(.mesh3.MeshSize*0.75)+2*.mesh3.MeshSize*6]+{0.02,0,0}, &.mesh3),
      //      transf3D(.mesh4.Points[floor(.mesh4.MeshSize*0.7)+2*.mesh4.MeshSize*6]+{0.02,0,0}, &.mesh4),
      //      transf3D(.mesh5.Points[floor(.mesh5.MeshSize*0.65)+2*.mesh5.MeshSize*6]+{0.02,0,0}, &.mesh5)
      //    };
      //    #endif
      AnyMatrix InitWrapPos = {

        transf3D({.mesh3.Radius[0],0,.mesh3.Radius[2]}, &.mesh3),
        transf3D({.mesh4.Radius[0],0,.mesh4.Radius[2]}, &.mesh4),
        //      transf3D({.mesh5.Radius[0],0,0}, &.mesh5),

      };


      InitWrapPosVecArr = {&InitWrapPos};
    };

    viewMuscle = {#include "../DrawSettings/MusDrawSettings.any"};
    viewForce.Visible ??= Off;
    #include "MusclesSharedCode_SPLine.any"
  };


  //

  AnyMuscleShortestPath ObliquusInternusAbd_3 = {
    AnyMuscleModel &MusMdl = ....MuscleModels.Right.ObliquusInternus.ObliquusInternusAbd_3;
    AnyRefNode &Org = ....Abdominal.Layer_L3.BaseSegAnterior.mid;
    AnyRefNode &Ins = ....Segments.PelvisSeg.Right.ObliquusInternusNode_7;

    //  AnyParamSurf &srf1 =....Abdominal.ObliquusWrapping.WrappingSeg.Layer4WrappingPoints.Right.nn11.Translate.InwardCyl;
    //  AnyParamSurf &srf2 =....Abdominal.ObliquusWrapping.WrappingSeg.Layer5WrappingPoints.Right.nn08.Translate.InwardCyl;
    //  AnySurfTriCylMesh &mesh4 = Main.HumanModel.BodyModel.Trunk.Abdominal.Layer_L4.BaseSegAnterior.mesh;
    //  AnySurfTriCylMesh &mesh5 = Main.HumanModel.BodyModel.Trunk.Abdominal.Layer_L5.BaseSegAnterior.mesh;

    // #if MESH_TYPE == "ELLIPSOID_SIDE"
    //   AnySurfEllipsoid &mesh4 = Main.HumanModel.BodyModel.Trunk.Abdominal.Layer_L4.BaseSegAnterior.Right.mesh;
    //   AnySurfEllipsoid &mesh5 = Main.HumanModel.BodyModel.Trunk.Abdominal.Layer_L5.BaseSegAnterior.Right.mesh;
    ////   AnySurfEllipsoid &meshpelvis = Main.HumanModel.BodyModel.Trunk.Abdominal.Layer_Pelvic1.BaseSegAnterior.mesh;
    //
    //   #else
    //    AnySurfTriCylMesh &mesh4 = Main.HumanModel.BodyModel.Trunk.Abdominal.Layer_L4.BaseSegAnterior.mesh;
    //    AnySurfTriCylMesh &mesh5 = Main.HumanModel.BodyModel.Trunk.Abdominal.Layer_L5.BaseSegAnterior.mesh;
    //
    //    #endif
    AnySurfEllipsoid &mesh4 = Main.HumanModel.BodyModel.Trunk.Abdominal.Layer_L4.BaseSegAnterior.mesh3;
    AnySurfEllipsoid &mesh5 = Main.HumanModel.BodyModel.Trunk.Abdominal.Layer_L5.BaseSegAnterior.mesh3;


    SPLine.StringMesh=240;

    SPLine = {


      //    #if MESH_TYPE == "ELLIPSOID"
      //    AnyMatrix InitWrapPos = {
      //
      //      transf3D({.mesh4.Radius[0],0,0}, &.mesh4),
      //      transf3D({.mesh5.Radius[0],0,0}, &.mesh5),
      //
      //    };
      //    #endif
      //
      //       #if MESH_TYPE == "ELLIPSOID_SIDE"
      //    AnyMatrix InitWrapPos = {
      //           transf3D({0,.mesh4.Radius[1],0}, &.mesh4),
      //            transf3D({0,.mesh5.Radius[1],0}, &.mesh5),
      //    };
      //    #endif
      //
      //    #if MESH_TYPE == "QUAD"
      //    AnyMatrix InitWrapPos = {
      //
      //      transf3D(.mesh4.Points[floor(.mesh4.MeshSize*0.75)+2*.mesh4.MeshSize*6]+{0.02,0,0}, &.mesh4),
      //      transf3D(.mesh5.Points[floor(.mesh5.MeshSize*0.65)+2*.mesh5.MeshSize*6]+{0.02,0,0}, &.mesh5)
      //    };
      //
      //    #endif
      AnyMatrix InitWrapPos = {

        transf3D({.mesh4.Radius[0],0,.mesh4.Radius[2]}, &.mesh4),
        transf3D({.mesh5.Radius[0],0,.mesh5.Radius[2]}, &.mesh5),

      };

      InitWrapPosVecArr = {&InitWrapPos};
    };
    viewMuscle = {#include "../DrawSettings/MusDrawSettings.any"};
    viewForce.Visible ??= Off;
    #include "MusclesSharedCode_SPLine.any"
  };


  AnyMuscleShortestPath ObliquusInternusAbd_4 = {
    AnyMuscleModel &MusMdl = ....MuscleModels.Right.ObliquusInternus.ObliquusInternusAbd_4;
    AnyRefNode &Org =      ....Abdominal.Layer_L4.BaseSegAnterior.mid;
    AnyRefNode &Ins = ....Segments.PelvisSeg.Right.ObliquusInternusNode_7;


    //  AnySurfTriCylMesh &mesh5 = Main.HumanModel.BodyModel.Trunk.Abdominal.Layer_L5.BaseSegAnterior.mesh;

    //   #if MESH_TYPE == "ELLIPSOID_SIDE"
    //   AnySurfEllipsoid &mesh5 = Main.HumanModel.BodyModel.Trunk.Abdominal.Layer_L5.BaseSegAnterior.Right.mesh;
    ////   AnySurfEllipsoid &meshpelvis = Main.HumanModel.BodyModel.Trunk.Abdominal.Layer_Pelvic1.BaseSegAnterior.mesh;
    //   #else
    //    AnySurfTriCylMesh &mesh5 = Main.HumanModel.BodyModel.Trunk.Abdominal.Layer_L5.BaseSegAnterior.mesh;
    //
    //    #endif
    AnySurfEllipsoid &mesh5 = Main.HumanModel.BodyModel.Trunk.Abdominal.Layer_L5.BaseSegAnterior.mesh3;


    SPLine.StringMesh=60;

    SPLine = {


      //    #if MESH_TYPE == "ELLIPSOID"
      //    AnyMatrix InitWrapPos = {
      //      transf3D({.mesh5.Radius[0],0,0}, &.mesh5),
      //    };
      //    #endif
      //       #if MESH_TYPE == "ELLIPSOID_SIDE"
      //    AnyMatrix InitWrapPos = {
      //      transf3D({0,.mesh5.Radius[1],0}, &.mesh5),
      //    };
      //    #endif
      //
      //    #if MESH_TYPE == "QUAD"
      //    AnyMatrix InitWrapPos = {
      //
      //      transf3D(.mesh5.Points[floor(.mesh5.MeshSize*0.65)+2*.mesh5.MeshSize*6]+{0.02,0,0}, &.mesh5)
      //    };
      //
      //    #endif
      AnyMatrix InitWrapPos = {
        transf3D({.mesh5.Radius[0],0,.mesh5.Radius[2]}, &.mesh5),
      };

      InitWrapPosVecArr = {&InitWrapPos};
    };

    viewMuscle = {#include "../DrawSettings/MusDrawSettings.any"};
    viewForce.Visible ??= Off;
    #include "MusclesSharedCode_SPLine.any"
  };

  AnyMuscleViaPoint  ObliquusInternusAbd_5= {
    AnyMuscleModel &MusMdl = ....MuscleModels.Right.ObliquusInternus.ObliquusInternusAbd_5;
    AnyRefNode &Org = ....Abdominal.Layer_L5.BaseSegAnterior.mid;
    AnyRefNode &Ins = ....Segments.PelvisSeg.Right.ObliquusInternusNode_8;

    //  AnySurfTriCylMesh &mesh5 = Main.HumanModel.BodyModel.Trunk.Abdominal.Layer_L5.BaseSegAnterior.mesh;
    //
    //  SPLine.StringMesh=60;
    //
    //  SPLine = {
    //    AnyMatrix InitWrapPos = {
    //      transf3D(.mesh5.Points[floor(.mesh5.MeshSize*0.65)+2*.mesh5.MeshSize*4]+{0.01,0,0}, &.mesh5)
    //
    //    };
    //    InitWrapPosVecArr = {&InitWrapPos};
    //  };
    //
    viewMuscle = {#include "../DrawSettings/MusDrawSettings.any"};
    viewForce.Visible ??= Off;
    #include "MusclesSharedCode.any"
  };
  #endif


  #endif

  #if BM_TRUNK_CAVITY_MODEL == _CAVITY_MODEL_BUCKLE_
  AnyMuscleViaPoint ObliquusInternusR11 = {
    AnyMuscleModel &MusMdl = ....MuscleModels.Right.ObliquusInternus.ObliquusInternusR11;
    AnyRefNode &Org = ....Segments.Right.R11Seg.ObliquusInternusNode;
    AnyRefNode &Ins = ....Segments.PelvisSeg.Right.ObliquusInternusNode_1;
    viewMuscle = {#include "../DrawSettings/MusDrawSettings.any"};
    viewForce.Visible ??= Off;
  };

  AnyMuscleViaPoint ObliquusInternusR10_1 = {
    AnyMuscleModel &MusMdl = ....MuscleModels.Right.ObliquusInternus.ObliquusInternusR10_1;
    AnyRefNode &Org = ....Segments.Right.R10Seg.ObliquusInternusNode_2;
    AnyRefNode &Ins = ....Segments.PelvisSeg.Right.ObliquusInternusNode_2;
    viewMuscle = {#include "../DrawSettings/MusDrawSettings.any"};
    viewForce.Visible ??= Off;
  };

  AnyMuscleViaPoint ObliquusInternusR10_2 = {
    AnyMuscleModel &MusMdl = ....MuscleModels.Right.ObliquusInternus.ObliquusInternusR10_2;
    AnyRefNode &Org = ....Segments.Right.R10Seg.ObliquusInternusNode_1;
    AnyRefNode &Ins = ....Segments.PelvisSeg.Right.ObliquusInternusNode_3;
    viewMuscle = {#include "../DrawSettings/MusDrawSettings.any"};
    viewForce.Visible ??= Off;
  };

  AnyMuscleViaPoint ObliquusInternusCC_1 = {
    AnyMuscleModel &MusMdl = ....MuscleModels.Right.ObliquusInternus.ObliquusInternusCC_1;
    AnyRefNode &Org = ....Segments.SternalBodySeg.Right.ObliquusInternusNode_1;
    AnyRefNode &Ins = ....Segments.PelvisSeg.Right.ObliquusInternusNode_4;
    viewMuscle = {#include "../DrawSettings/MusDrawSettings.any"};
    viewForce.Visible ??= Off;
  };

  AnyMuscleViaPoint ObliquusInternusCC_2 = {
    AnyMuscleModel &MusMdl = ....MuscleModels.Right.ObliquusInternus.ObliquusInternusCC_2;
    AnyRefNode &Org = ....Segments.SternalBodySeg.Right.ObliquusInternusNode_2;
    AnyRefNode &Ins = ....Segments.PelvisSeg.Right.ObliquusInternusNode_5;
    viewMuscle = {#include "../DrawSettings/MusDrawSettings.any"};
    viewForce.Visible ??= Off;
  };

  AnyMuscleViaPoint ObliquusInternusAbd_1 = {
    AnyMuscleModel &MusMdl = ....MuscleModels.Right.ObliquusInternus.ObliquusInternusAbd_1;
    AnyRefNode &Org = ....Buckle.Segments.BuckleSeg.Right.ObliquusInternusNode_1;
    AnyRefNode &Ins = ....Segments.PelvisSeg.Right.ObliquusInternusNode_6;
    viewMuscle = {#include "../DrawSettings/MusDrawSettings.any"};
    viewForce.Visible ??= Off;
  };

  AnyMuscleViaPoint ObliquusInternusAbd_2 = {
    AnyMuscleModel &MusMdl = ....MuscleModels.Right.ObliquusInternus.ObliquusInternusAbd_2;
    AnyRefNode &Org = ....Buckle.Segments.BuckleSeg.Right.ObliquusInternusNode_2;
    AnyRefNode &Ins = ....Segments.PelvisSeg.Right.ObliquusInternusNode_7;
    viewMuscle = {#include "../DrawSettings/MusDrawSettings.any"};
    viewForce.Visible ??= Off;
  };

  AnyMuscleViaPoint ObliquusInternusAbd_3 = {
    AnyMuscleModel &MusMdl = ....MuscleModels.Right.ObliquusInternus.ObliquusInternusAbd_3;
    AnyRefNode &Org = ....Buckle.Segments.BuckleSeg.Right.ObliquusInternusNode_3;
    AnyRefNode &Ins = ....Segments.PelvisSeg.Right.ObliquusInternusNode_8;
    viewMuscle = {#include "../DrawSettings/MusDrawSettings.any"};
    viewForce.Visible ??= Off;
  };

  AnyMuscleViaPoint ObliquusInternusAbd_4 = {
    AnyMuscleModel &MusMdl = ....MuscleModels.Right.ObliquusInternus.ObliquusInternusAbd_4;
    AnyRefNode &Org = ....Buckle.Segments.BuckleSeg.Right.ObliquusInternusNode_4;
    AnyRefNode &Ins = ....Segments.PelvisSeg.Right.ObliquusInternusNode_9;
    viewMuscle = {#include "../DrawSettings/MusDrawSettings.any"};
    viewForce.Visible ??= Off;
  };

  AnyMuscleViaPoint ObliquusInternusAbd_5 = {
    AnyMuscleModel &MusMdl = ....MuscleModels.Right.ObliquusInternus.ObliquusInternusAbd_5;
    AnyRefNode &Org = ....Buckle.Segments.BuckleSeg.Right.ObliquusInternusNode_5;
    AnyRefNode &Ins = ....Segments.PelvisSeg.Right.ObliquusInternusNode_10;
    viewMuscle = {#include "../DrawSettings/MusDrawSettings.any"};
    viewForce.Visible ??= Off;
  };
  #endif
};

// Psoas is separated since it is used by the legs in certain BM configurations
#include "PsoasMajorRight.any"

#if BM_TRUNK_MUSCLES & BM_TRUNK_CAVITY_MODEL == _CAVITY_MODEL_VOLUME_
MuscleGroup Pupococcygeus = {
  AnyMuscleViaPoint Pubococcygeus_1= {
    AnyMuscleModel &MusMdl = ....MuscleModels.Right.Pupococcygeus.Pupococcygeus_1;
    AnyRefNode &Org = ....Segments.PelvisSeg.Pubococcygeus_1NodeR;
    AnyRefNode &Ins = ....Segments.SacrumSeg.Pubococcygeus_1NodeR;
    viewMuscle = {#include "../DrawSettings/MusDrawSettings.any"};
    viewForce.Visible ??= Off;
  };
  AnyMuscleViaPoint Pubococcygeus_2= {
    AnyMuscleModel &MusMdl = ....MuscleModels.Right.Pupococcygeus.Pupococcygeus_2;
    AnyRefNode &Org = ....Segments.PelvisSeg.Pubococcygeus_2NodeR;
    AnyRefNode &Ins = ....Segments.SacrumSeg.Pubococcygeus_2NodeR;
    viewMuscle = {#include "../DrawSettings/MusDrawSettings.any"};
    viewForce.Visible ??= Off;
  };
};

MuscleGroup Puporectalis = {
  AnyMuscleViaPoint Puborectalis_1= {
    AnyMuscleModel &MusMdl = ....MuscleModels.Right.Puporectalis.Puporectalis_1;
    AnyRefNode &Org = ....Segments.PelvisSeg.Puborectalis_1NodeR;
    AnyRefNode &Ins = ....Segments.SacrumSeg.Puborectalis_1NodeR;
    viewMuscle = {#include "../DrawSettings/MusDrawSettings.any"};
    viewForce.Visible ??= Off;
  };
  AnyMuscleViaPoint Puborectalis_2= {
    AnyMuscleModel &MusMdl = ....MuscleModels.Right.Puporectalis.Puporectalis_2;
    AnyRefNode &Org = ....Segments.PelvisSeg.Puborectalis_2NodeR;
    AnyRefNode &Ins = ....Segments.SacrumSeg.Puborectalis_2NodeR;
    viewMuscle = {#include "../DrawSettings/MusDrawSettings.any"};
    viewForce.Visible ??= Off;
  };
};

#endif

MuscleGroup QuadratusLumborum = {
  AnyMuscleViaPoint QuadratusLumborumR12IC_1 = {
    AnyMuscleModel &MusMdl = ....MuscleModels.Right.QuadratusLumborum.QuadratusLumborumR12IC_1;
    AnyRefNode &Org = ....Segments.Right.R12Seg.QLC12Lat_CINode1R;
    AnyRefNode &Ins = ....Segments.PelvisSeg.QLLatNode1R;
    viewMuscle = {#include "../DrawSettings/MusDrawSettings.any"};
    viewForce.Visible ??= Off;
  };
  AnyMuscleViaPoint QuadratusLumborumR12IC_2 = {
    AnyMuscleModel &MusMdl = ....MuscleModels.Right.QuadratusLumborum.QuadratusLumborumR12IC_2;
    AnyRefNode &Org = ....Segments.Right.R12Seg.QLC12Lat_CINode3R;
    AnyRefNode &Ins = ....Segments.PelvisSeg.QLLatNode2R;
    viewMuscle = {#include "../DrawSettings/MusDrawSettings.any"};


  };
  AnyMuscleViaPoint QuadratusLumborumR12IC_3 = {
    AnyMuscleModel &MusMdl = ....MuscleModels.Right.QuadratusLumborum.QuadratusLumborumR12IC_3;
    AnyRefNode &Org = ....Segments.Right.R12Seg.QLC12InterMedian_CINode1R;
    AnyRefNode &Ins = ....Segments.PelvisSeg.QLLatNode3R;
    viewMuscle = {#include "../DrawSettings/MusDrawSettings.any"};


  };

  AnyMuscleViaPoint QuadratusLumborumR12IC_4 = {
    AnyMuscleModel &MusMdl = ....MuscleModels.Right.QuadratusLumborum.QuadratusLumborumR12IC_4;
    AnyRefNode &Org = ....Segments.Right.R12Seg.QLC12InterMedian_CINode3R;
    AnyRefNode &Ins = ....Segments.PelvisSeg.QLLatNode5R;
    viewMuscle = {#include "../DrawSettings/MusDrawSettings.any"};


  };
  AnyMuscleViaPoint QuadratusLumborumR12IC_5 = {
    AnyMuscleModel &MusMdl = ....MuscleModels.Right.QuadratusLumborum.QuadratusLumborumR12IC_5;
    AnyRefNode &Org = ....Segments.Right.R12Seg.QLC12Median_CINode1R;
    AnyRefNode &Ins = ....Segments.PelvisSeg.QLInterMedianNode1R;
    viewMuscle = {#include "../DrawSettings/MusDrawSettings.any"};


  };

  AnyMuscleViaPoint QuadratusLumborumT12IC_1 = {
    AnyMuscleModel &MusMdl = ....MuscleModels.Right.QuadratusLumborum.QuadratusLumborumT12IC_1;
    AnyRefNode &Org = ....Segments.T12Seg.QLT12_CINodeR;
    AnyRefNode &Ins = ....Segments.PelvisSeg.QLLatNode3R;
    viewMuscle = {#include "../DrawSettings/MusDrawSettings.any"};


  };

  AnyMuscleViaPoint QuadratusLumborumL1IC_1 = {
    AnyMuscleModel &MusMdl = ....MuscleModels.Right.QuadratusLumborum.QuadratusLumborumL1IC_1;
    AnyRefNode &Org = ....Segments.L1Seg.QLL1_CINodeR;
    AnyRefNode &Ins = ....Segments.PelvisSeg.QLLatNode4R;
    viewMuscle = {#include "../DrawSettings/MusDrawSettings.any"};
    viewForce.Visible ??= Off;
  };

  AnyMuscleViaPoint QuadratusLumborumL2IC_1 = {
    AnyMuscleModel &MusMdl = ....MuscleModels.Right.QuadratusLumborum.QuadratusLumborumL2IC_1;
    AnyRefNode &Org = ....Segments.L2Seg.QLL2_CINodeR;
    AnyRefNode &Ins = ....Segments.PelvisSeg.QLLatNode4R;
    viewMuscle = {#include "../DrawSettings/MusDrawSettings.any"};
    viewForce.Visible ??= Off;
  };

  AnyMuscleViaPoint QuadratusLumborumL3IC_1 = {
    AnyMuscleModel &MusMdl = ....MuscleModels.Right.QuadratusLumborum.QuadratusLumborumL3IC_1;
    AnyRefNode &Org = ....Segments.L3Seg.QLL3_CINodeR;
    AnyRefNode &Ins = ....Segments.PelvisSeg.QLLatNode5R;
    viewMuscle = {#include "../DrawSettings/MusDrawSettings.any"};
    viewForce.Visible ??= Off;
  };

  AnyMuscleViaPoint QuadratusLumborumT12IC_2 = {
    AnyMuscleModel &MusMdl = ....MuscleModels.Right.QuadratusLumborum.QuadratusLumborumT12IC_2;
    AnyRefNode &Org = ....Segments.T12Seg.QLT12_CINodeR;
    AnyRefNode &Ins = ....Segments.PelvisSeg.QLInterMedianNode1R;
    viewMuscle = {#include "../DrawSettings/MusDrawSettings.any"};


  };

  AnyMuscleViaPoint QuadratusLumborumL1IC_2 = {
    AnyMuscleModel &MusMdl = ....MuscleModels.Right.QuadratusLumborum.QuadratusLumborumL1IC_2;
    AnyRefNode &Org = ....Segments.L1Seg.QLL1_CINodeR;
    AnyRefNode &Ins = ....Segments.PelvisSeg.QLInterMedianNode2R;
    viewMuscle = {#include "../DrawSettings/MusDrawSettings.any"};


  };

  AnyMuscleViaPoint QuadratusLumborumL2IC_2 = {
    AnyMuscleModel &MusMdl = ....MuscleModels.Right.QuadratusLumborum.QuadratusLumborumL2IC_2;
    AnyRefNode &Org = ....Segments.L2Seg.QLL2_CINodeR;
    AnyRefNode &Ins = ....Segments.PelvisSeg.QLInterMedianNode2R;
    viewMuscle = {#include "../DrawSettings/MusDrawSettings.any"};


  };

  AnyMuscleViaPoint QuadratusLumborumL3IC_2 = {
    AnyMuscleModel &MusMdl = ....MuscleModels.Right.QuadratusLumborum.QuadratusLumborumL3IC_2;
    AnyRefNode &Org = ....Segments.L3Seg.QLL3_CINodeR;
    AnyRefNode &Ins = ....Segments.PelvisSeg.QLInterMedianNode3R;
    viewMuscle = {#include "../DrawSettings/MusDrawSettings.any"};


  };

  AnyMuscleViaPoint QuadratusLumborumL4IC_1 = {
    AnyMuscleModel &MusMdl = ....MuscleModels.Right.QuadratusLumborum.QuadratusLumborumL4IC_1;
    AnyRefNode &Org = ....Segments.L4Seg.QLL4_CINodeR;
    AnyRefNode &Ins = ....Segments.PelvisSeg.QLInterMedianNode3R;
    viewMuscle = {#include "../DrawSettings/MusDrawSettings.any"};
    viewForce.Visible ??= Off;
  };

  AnyMuscleViaPoint QuadratusLumborumT12IC_3 = {
    AnyMuscleModel &MusMdl = ....MuscleModels.Right.QuadratusLumborum.QuadratusLumborumT12IC_3;
    AnyRefNode &Org = ....Segments.T12Seg.QLT12_CINodeR;
    AnyRefNode &Ins = ....Segments.PelvisSeg.QLInterMedianNode4R;
    viewMuscle = {#include "../DrawSettings/MusDrawSettings.any"};


  };

  AnyMuscleViaPoint QuadratusLumborumL1IC_3 = {
    AnyMuscleModel &MusMdl = ....MuscleModels.Right.QuadratusLumborum.QuadratusLumborumL1IC_3;
    AnyRefNode &Org = ....Segments.L1Seg.QLL1_CINodeR;
    AnyRefNode &Ins = ....Segments.PelvisSeg.QLInterMedianNode4R;
    viewMuscle = {#include "../DrawSettings/MusDrawSettings.any"};


  };

  AnyMuscleViaPoint QuadratusLumborumL2IC_3 = {
    AnyMuscleModel &MusMdl = ....MuscleModels.Right.QuadratusLumborum.QuadratusLumborumL2IC_3;
    AnyRefNode &Org = ....Segments.L2Seg.QLL2_CINodeR;
    AnyRefNode &Ins = ....Segments.PelvisSeg.QLInterMedianNode5R;
    viewMuscle = {#include "../DrawSettings/MusDrawSettings.any"};


  };

  AnyMuscleViaPoint QuadratusLumborumL3IC_3 = {
    AnyMuscleModel &MusMdl = ....MuscleModels.Right.QuadratusLumborum.QuadratusLumborumL3IC_3;
    AnyRefNode &Org = ....Segments.L3Seg.QLL3_CINodeR;
    AnyRefNode &Ins = ....Segments.PelvisSeg.QLInterMedianNode5R;
    viewMuscle = {#include "../DrawSettings/MusDrawSettings.any"};


  };

  AnyMuscleViaPoint QuadratusLumborumL4IC_2 = {
    AnyMuscleModel &MusMdl = ....MuscleModels.Right.QuadratusLumborum.QuadratusLumborumL4IC_2;
    AnyRefNode &Org = ....Segments.L4Seg.QLL4_CINodeR;
    AnyRefNode &Ins = ....Segments.PelvisSeg.QLMedianNodeR;
    viewMuscle = {#include "../DrawSettings/MusDrawSettings.any"};


  };

  AnyMuscleViaPoint QuadratusLumborumR12L4_1 = {
    AnyMuscleModel &MusMdl = ....MuscleModels.Right.QuadratusLumborum.QuadratusLumborumR12L4_1;
    AnyRefNode &Org = ....Segments.L4Seg.QLL4_CINodeR;
    AnyRefNode &Ins = ....Segments.Right.R12Seg.QLC12Lat_CINode2R;
    viewMuscle = {#include "../DrawSettings/MusDrawSettings.any"};


  };
  AnyMuscleViaPoint QuadratusLumborumR12L3_1 = {
    AnyMuscleModel &MusMdl = ....MuscleModels.Right.QuadratusLumborum.QuadratusLumborumR12L3_1;
    AnyRefNode &Org = ....Segments.L3Seg.QLL3_CINodeR;
    AnyRefNode &Ins = ....Segments.Right.R12Seg.QLC12Lat_CINode4R;
    viewMuscle = {#include "../DrawSettings/MusDrawSettings.any"};


  };
  AnyMuscleViaPoint QuadratusLumborumR12L2_1 = {
    AnyMuscleModel &MusMdl = ....MuscleModels.Right.QuadratusLumborum.QuadratusLumborumR12L2_1;
    AnyRefNode &Org = ....Segments.L2Seg.QLL2_CINodeR;
    AnyRefNode &Ins = ....Segments.Right.R12Seg.QLC12Lat_CINode5R;
    viewMuscle = {#include "../DrawSettings/MusDrawSettings.any"};


  };

  AnyMuscleViaPoint QuadratusLumborumR12L4_2 = {
    AnyMuscleModel &MusMdl = ....MuscleModels.Right.QuadratusLumborum.QuadratusLumborumR12L4_2;
    AnyRefNode &Org = ....Segments.L4Seg.QLL4_CINodeR;
    AnyRefNode &Ins = ....Segments.Right.R12Seg.QLC12InterMedian_CINode2R;
    viewMuscle = {#include "../DrawSettings/MusDrawSettings.any"};


  };
  AnyMuscleViaPoint QuadratusLumborumR12L3_2 = {
    AnyMuscleModel &MusMdl = ....MuscleModels.Right.QuadratusLumborum.QuadratusLumborumR12L3_2;
    AnyRefNode &Org = ....Segments.L3Seg.QLL3_CINodeR;
    AnyRefNode &Ins = ....Segments.Right.R12Seg.QLC12InterMedian_CINode4R;
    viewMuscle = {#include "../DrawSettings/MusDrawSettings.any"};


  };
  AnyMuscleViaPoint QuadratusLumborumR12L2_2 = {
    AnyMuscleModel &MusMdl = ....MuscleModels.Right.QuadratusLumborum.QuadratusLumborumR12L2_2;
    AnyRefNode &Org = ....Segments.L2Seg.QLL2_CINodeR;
    AnyRefNode &Ins = ....Segments.Right.R12Seg.QLC12InterMedian_CINode5R;
    viewMuscle = {#include "../DrawSettings/MusDrawSettings.any"};


  };

  AnyMuscleViaPoint QuadratusLumborumR12L4_3 = {
    AnyMuscleModel &MusMdl = ....MuscleModels.Right.QuadratusLumborum.QuadratusLumborumR12L4_3;
    AnyRefNode &Org = ....Segments.L4Seg.QLL4_CINodeR;
    AnyRefNode &Ins = ....Segments.Right.R12Seg.QLC12Median_CINode2R;
    viewMuscle = {#include "../DrawSettings/MusDrawSettings.any"};


  };
  AnyMuscleViaPoint QuadratusLumborumR12L3_3 = {
    AnyMuscleModel &MusMdl = ....MuscleModels.Right.QuadratusLumborum.QuadratusLumborumR12L3_3;
    AnyRefNode &Org = ....Segments.L3Seg.QLL3_CINodeR;
    AnyRefNode &Ins = ....Segments.Right.R12Seg.QLC12Median_CINode3R;
    viewMuscle = {#include "../DrawSettings/MusDrawSettings.any"};


  };
  AnyMuscleViaPoint QuadratusLumborumR12L2_3 = {
    AnyMuscleModel &MusMdl = ....MuscleModels.Right.QuadratusLumborum.QuadratusLumborumR12L2_3;
    AnyRefNode &Org = ....Segments.L2Seg.QLL2_CINodeR;
    AnyRefNode &Ins = ....Segments.Right.R12Seg.QLC12Median_CINode4R;
    viewMuscle = {#include "../DrawSettings/MusDrawSettings.any"};


  };

};

MuscleGroup RectusAbdominis = {

  #if BM_TRUNK_CAVITY_MODEL == _CAVITY_MODEL_BUCKLE_

  AnyMuscleViaPoint RectusAbdominis_1= {
    AnyMuscleModel &MusMdl = ....MuscleModels.Right.RectusAbdominis.RectusAbdominis_1;
    AnyRefNode &Org = ....Segments.SternalBodySeg.RACP_CO6_2_R;
    AnyRefNode& Via3 = ....Segments.PelvisSeg.RectusAbdominis_1_ViaR;
    AnyRefNode &Ins = ....Segments.PelvisSeg.RectusAbdominis_1_R;
    viewMuscle = {#include "../DrawSettings/MusDrawSettings.any"};
    viewForce.Visible ??= Off;
  };

  AnyMuscleViaPoint RectusAbdominis_2 = {
    AnyMuscleModel &MusMdl = ....MuscleModels.Right.RectusAbdominis.RectusAbdominis_2;
    AnyRefNode &Org = ....Segments.SternalBodySeg.RACP_CO5_2_R;
    AnyRefNode &Via1 = ....Segments.SternalBodySeg.RACP_Via_2_R;
    AnyRefNode& Via3 = ....Segments.PelvisSeg.RectusAbdominis_2_ViaR;
    AnyRefNode &Ins = ....Segments.PelvisSeg.RectusAbdominis_2_R;
    viewMuscle = {#include "../DrawSettings/MusDrawSettings.any"};
    viewForce.Visible ??= Off;
  };
  #endif

  #if BM_TRUNK_CAVITY_MODEL == _CAVITY_MODEL_VOLUME_

  #if BM_TRUNK_EXPERIMENTAL_RECTUS_ABDOMINIS == ON


  #if RECTUS_MUSCLE_LINE == SP

  AnyMuscleShortestPath RectusAbdominis_1 = {
    AnyRefNode &Org = ....Segments.SternalBodySeg.RACP_CO6_2_R;

    AnySurfEllipsoid &mesh1 = Main.HumanModel.BodyModel.Trunk.Abdominal.Layer_L1.BaseSegAnterior.mesh;
    AnySurfEllipsoid &mesh2 = Main.HumanModel.BodyModel.Trunk.Abdominal.Layer_L2.BaseSegAnterior.mesh;
    AnySurfEllipsoid &mesh3 = Main.HumanModel.BodyModel.Trunk.Abdominal.Layer_L3.BaseSegAnterior.mesh;
    AnySurfEllipsoid &mesh4 = Main.HumanModel.BodyModel.Trunk.Abdominal.Layer_L4.BaseSegAnterior.mesh;
    AnySurfEllipsoid &mesh5 = Main.HumanModel.BodyModel.Trunk.Abdominal.Layer_L5.BaseSegAnterior.mesh;


    SPLine.StringMesh=100;
    SPLine = {
      AnyMatrix InitWrapPos = {
        transf3D({.mesh1.Radius,0,0}, &.mesh1),
        transf3D({.mesh2.Radius,0,0}, &.mesh2),
        transf3D({.mesh3.Radius,0,0}, &.mesh3),
        transf3D({.mesh4.Radius,0,0}, &.mesh4),
        transf3D({.mesh5.Radius,0,0}, &.mesh5),
      };
    };


    AnyRefNode &Ins = ....Segments.PelvisSeg.RectusAbdominis_1_R;
    viewMuscle = {#include "../DrawSettings/MusDrawSettings.any"};
    viewForce.Visible ??= Off;
    AnyMuscleModel& MusMdl = ....MuscleModels.Right.RectusAbdominis.RectusAbdominis_1;
  };

  AnyMuscleViaPoint RectusAbdominis_2_1 = {
    AnyRefNode &Org = ....Segments.SternalBodySeg.RACP_CO5_2_R;
    #if BM_TRUNK_THORACIC_STERNUM_TOPOLOGY == 4
    AnyRefNode &Via1 = ....Segments.Right.CostalCartilageSeg.RACP_Via_2_R;
    #else
    AnyRefNode &Via1 = ....Segments.SternalBodySeg.RACP_Via_2_R;
    #endif
    AnyRefNode &Ins = ....Abdominal.Layer_L1.BaseSegAnterior.rectus2R;
    viewMuscle = {#include "../DrawSettings/MusDrawSettings.any"};
    viewForce.Visible ??= Off;
    /// The rectus abdominis in the cavity model needs use simple muscle models
    /// since the muscle is attached between the abdominal layers which leads to
    /// short muscle length.
    AnyMuscleModel MusMdl = {
      Lf0 = .....MuscleModels.Right.RectusAbdominis.RectusAbdominis_2.Lf0/6;
      Vol0 = .....MuscleModels.Right.RectusAbdominis.RectusAbdominis_2.Vol0/6;
      F0 =  .....MuscleModels.Right.RectusAbdominis.RectusAbdominis_2.F0;
    };
  };

  AnyMuscleViaPoint RectusAbdominis_2_2 = {
    AnyRefNode &Org = ....Abdominal.Layer_L1.BaseSegAnterior.rectus2R;
    AnyRefNode &Ins = ....Abdominal.Layer_L2.BaseSegAnterior.rectus2R;
    viewMuscle = {#include "../DrawSettings/MusDrawSettings.any"};
    viewForce.Visible ??= Off;
    /// The rectus abdominis in the cavity model needs use simple muscle models
    /// since the muscle is attached between the abdominal layers which leads to
    /// short muscle length.
    AnyMuscleModel MusMdl = {
      Lf0 = .....MuscleModels.Right.RectusAbdominis.RectusAbdominis_2.Lf0/6;
      Vol0 = .....MuscleModels.Right.RectusAbdominis.RectusAbdominis_2.Vol0/6;
      F0 =  .....MuscleModels.Right.RectusAbdominis.RectusAbdominis_2.F0;
    };
  };

  AnyMuscleViaPoint RectusAbdominis_2_3 = {
    AnyRefNode &Org = ....Abdominal.Layer_L2.BaseSegAnterior.rectus2R;
    AnyRefNode &Ins = ....Abdominal.Layer_L3.BaseSegAnterior.rectus2R;
    viewMuscle = {#include "../DrawSettings/MusDrawSettings.any"};
    viewForce.Visible ??= Off;
    /// The rectus abdominis in the cavity model needs use simple muscle models
    /// since the muscle is attached between the abdominal layers which leads to
    /// short muscle length.
    AnyMuscleModel MusMdl = {
      Lf0 = .....MuscleModels.Right.RectusAbdominis.RectusAbdominis_2.Lf0/6;
      Vol0 = .....MuscleModels.Right.RectusAbdominis.RectusAbdominis_2.Vol0/6;
      F0 =  .....MuscleModels.Right.RectusAbdominis.RectusAbdominis_2.F0;
    };
  };

  AnyMuscleViaPoint RectusAbdominis_2_4 = {
    AnyRefNode &Org = ....Abdominal.Layer_L3.BaseSegAnterior.rectus2R;
    AnyRefNode &Ins = ....Abdominal.Layer_L4.BaseSegAnterior.rectus2R;
    viewMuscle = {#include "../DrawSettings/MusDrawSettings.any"};
    viewForce.Visible ??= Off;
    /// The rectus abdominis in the cavity model needs use simple muscle models
    /// since the muscle is attached between the abdominal layers which leads to
    /// short muscle length.
    AnyMuscleModel MusMdl = {
      Lf0 = .....MuscleModels.Right.RectusAbdominis.RectusAbdominis_2.Lf0/6;
      Vol0 = .....MuscleModels.Right.RectusAbdominis.RectusAbdominis_2.Vol0/6;
      F0 =  .....MuscleModels.Right.RectusAbdominis.RectusAbdominis_2.F0;
    };
  };

  AnyMuscleViaPoint RectusAbdominis_2_5 = {
    AnyRefNode &Org = ....Abdominal.Layer_L4.BaseSegAnterior.rectus2R;
    AnyRefNode &Ins = ....Abdominal.Layer_L5.BaseSegAnterior.rectus2R;
    viewMuscle = {#include "../DrawSettings/MusDrawSettings.any"};
    viewForce.Visible ??= Off;
    /// The rectus abdominis in the cavity model needs use simple muscle models
    /// since the muscle is attached between the abdominal layers which leads to
    /// short muscle length.
    AnyMuscleModel MusMdl = {
      Lf0 = .....MuscleModels.Right.RectusAbdominis.RectusAbdominis_2.Lf0/6;
      Vol0 = .....MuscleModels.Right.RectusAbdominis.RectusAbdominis_2.Vol0/6;
      F0 =  .....MuscleModels.Right.RectusAbdominis.RectusAbdominis_2.F0;
    };
  };

  AnyMuscleViaPoint RectusAbdominis_2_6 = {
    AnyRefNode &Org = ....Abdominal.Layer_L5.BaseSegAnterior.rectus2R;
    AnyRefNode &Ins = ....Segments.PelvisSeg.RectusAbdominis_2_R;
    viewMuscle = {#include "../DrawSettings/MusDrawSettings.any"};
    viewForce.Visible ??= Off;
    /// The rectus abdominis in the cavity model needs use simple muscle models
    /// since the muscle is attached between the abdominal layers which leads to
    /// short muscle length.
    AnyMuscleModel MusMdl = {
      Lf0 = .....MuscleModels.Right.RectusAbdominis.RectusAbdominis_2.Lf0/6;
      Vol0 = .....MuscleModels.Right.RectusAbdominis.RectusAbdominis_2.Vol0/6;
      F0 =  .....MuscleModels.Right.RectusAbdominis.RectusAbdominis_2.F0;
    };
  };

  #else


  //   #if RECTUS_MUSCLE_LINE == VIA

  AnyMuscleViaPoint RectusAbdominis_1 = {
    AnyRefNode &Org = ....Segments.SternalBodySeg.RACP_CO6_2_R;


    viewMuscle = {#include "../DrawSettings/MusDrawSettings.any"};
    viewForce.Visible ??= Off;
    AnyMuscleModel& MusMdl = ....MuscleModels.Right.RectusAbdominis.RectusAbdominis_1;

    AnyRefNode &Via2 = ....Abdominal.Layer_L1.BaseSegAnterior.rectus1R;
    AnyRefNode &Via3 = ....Abdominal.Layer_L2.BaseSegAnterior.rectus1R;
    AnyRefNode &Via4 = ....Abdominal.Layer_L3.BaseSegAnterior.rectus1R;
    AnyRefNode &Via5 = ....Abdominal.Layer_L4.BaseSegAnterior.rectus1R;
    AnyRefNode &Via6 = ....Abdominal.Layer_L5.BaseSegAnterior.rectus1R;
    AnyRefNode &Ins = ....Segments.PelvisSeg.RectusAbdominis_1_R;
  };

  AnyMuscleViaPoint RectusAbdominis_2 = {
    viewMuscle = {#include "../DrawSettings/MusDrawSettings.any"};
    viewForce.Visible ??= Off;
    AnyMuscleModel& MusMdl = ....MuscleModels.Right.RectusAbdominis.RectusAbdominis_2;

    AnyRefNode &Org = ....Segments.SternalBodySeg.RACP_CO5_2_R;
    AnyRefNode &Via2 = ....Abdominal.Layer_L1.BaseSegAnterior.rectus2R;
    AnyRefNode &Via3 = ....Abdominal.Layer_L2.BaseSegAnterior.rectus2R;
    AnyRefNode &Via4 = ....Abdominal.Layer_L3.BaseSegAnterior.rectus2R;
    AnyRefNode &Via5 = ....Abdominal.Layer_L4.BaseSegAnterior.rectus2R;
    AnyRefNode &Via6 = ....Abdominal.Layer_L5.BaseSegAnterior.rectus2R;
    AnyRefNode &Ins = ....Segments.PelvisSeg.RectusAbdominis_2_R;
  };
  #endif

  #endif


  #if BM_TRUNK_EXPERIMENTAL_RECTUS_ABDOMINIS == OFF

  AnyMuscleViaPoint RectusAbdominis_1_1 = {
    AnyRefNode &Org = ....Segments.SternalBodySeg.RACP_CO6_2_R;
    //      #if BM_TRUNK_THORACIC_STERNUM_TOPOLOGY == 4
    //        AnyRefNode &Via1 = ....Segments.Right.CostalCartilageSeg.RACP_Via_2_R;
    //      #else
    //        AnyRefNode &Via1 = ....Segments.SternalBodySeg.RACP_Via_2_R;
    //      #endif

    AnyRefNode &Ins = ....Abdominal.Layer_L1.BaseSegAnterior.rectus1R;
    viewMuscle = {#include "../DrawSettings/MusDrawSettings.any"};
    viewForce.Visible ??= Off;

    /// The rectus abdominis in the cavity model needs use simple muscle models
    /// since the muscle is attached between the abdominal layers which leads to
    /// short muscle length.
    AnyMuscleModel MusMdl = {
      Lf0 = .....MuscleModels.Right.RectusAbdominis.RectusAbdominis_1.Lf0/6;
      Vol0 = .....MuscleModels.Right.RectusAbdominis.RectusAbdominis_1.Vol0/6;
      F0 =  .....MuscleModels.Right.RectusAbdominis.RectusAbdominis_1.F0;
    };
  };

  AnyMuscleViaPoint RectusAbdominis_1_2 = {
    AnyRefNode &Org = ....Abdominal.Layer_L1.BaseSegAnterior.rectus1R;
    AnyRefNode &Ins = ....Abdominal.Layer_L2.BaseSegAnterior.rectus1R;
    viewMuscle = {#include "../DrawSettings/MusDrawSettings.any"};
    viewForce.Visible ??= Off;
    /// The rectus abdominis in the cavity model needs use simple muscle models
    /// since the muscle is attached between the abdominal layers which leads to
    /// short muscle length.
    AnyMuscleModel MusMdl = {
      Lf0 = .....MuscleModels.Right.RectusAbdominis.RectusAbdominis_1.Lf0/6;
      Vol0 = .....MuscleModels.Right.RectusAbdominis.RectusAbdominis_1.Vol0/6;
      F0 =  .....MuscleModels.Right.RectusAbdominis.RectusAbdominis_1.F0;
    };
  };

  AnyMuscleViaPoint RectusAbdominis_1_3 = {
    AnyRefNode &Org = ....Abdominal.Layer_L2.BaseSegAnterior.rectus1R;
    AnyRefNode &Ins = ....Abdominal.Layer_L3.BaseSegAnterior.rectus1R;
    viewMuscle = {#include "../DrawSettings/MusDrawSettings.any"};
    viewForce.Visible ??= Off;
    /// The rectus abdominis in the cavity model needs use simple muscle models
    /// since the muscle is attached between the abdominal layers which leads to
    /// short muscle length.
    AnyMuscleModel MusMdl = {
      Lf0 = .....MuscleModels.Right.RectusAbdominis.RectusAbdominis_1.Lf0/6;
      Vol0 = .....MuscleModels.Right.RectusAbdominis.RectusAbdominis_1.Vol0/6;
      F0 =  .....MuscleModels.Right.RectusAbdominis.RectusAbdominis_1.F0;
    };
  };

  AnyMuscleViaPoint RectusAbdominis_1_4 = {
    AnyRefNode &Org = ....Abdominal.Layer_L3.BaseSegAnterior.rectus1R;
    AnyRefNode &Ins = ....Abdominal.Layer_L4.BaseSegAnterior.rectus1R;
    viewMuscle = {#include "../DrawSettings/MusDrawSettings.any"};
    viewForce.Visible ??= Off;
    /// The rectus abdominis in the cavity model needs use simple muscle models
    /// since the muscle is attached between the abdominal layers which leads to
    /// short muscle length.
    AnyMuscleModel MusMdl = {
      Lf0 = .....MuscleModels.Right.RectusAbdominis.RectusAbdominis_1.Lf0/6;
      Vol0 = .....MuscleModels.Right.RectusAbdominis.RectusAbdominis_1.Vol0/6;
      F0 =  .....MuscleModels.Right.RectusAbdominis.RectusAbdominis_1.F0;
    };
  };

  AnyMuscleViaPoint RectusAbdominis_1_5 = {
    AnyRefNode &Org = ....Abdominal.Layer_L4.BaseSegAnterior.rectus1R;
    AnyRefNode &Ins = ....Abdominal.Layer_L5.BaseSegAnterior.rectus1R;
    viewMuscle = {#include "../DrawSettings/MusDrawSettings.any"};
    viewForce.Visible ??= Off;
    /// The rectus abdominis in the cavity model needs use simple muscle models
    /// since the muscle is attached between the abdominal layers which leads to
    /// short muscle length.
    AnyMuscleModel MusMdl = {
      Lf0 = .....MuscleModels.Right.RectusAbdominis.RectusAbdominis_1.Lf0/6;
      Vol0 = .....MuscleModels.Right.RectusAbdominis.RectusAbdominis_1.Vol0/6;
      F0 =  .....MuscleModels.Right.RectusAbdominis.RectusAbdominis_1.F0;
    };
  };

  AnyMuscleViaPoint RectusAbdominis_1_6 = {
    AnyRefNode &Org = ....Abdominal.Layer_L5.BaseSegAnterior.rectus1R;
    AnyRefNode &Ins = ....Segments.PelvisSeg.RectusAbdominis_1_R;
    viewMuscle = {#include "../DrawSettings/MusDrawSettings.any"};
    viewForce.Visible ??= Off;
    /// The rectus abdominis in the cavity model needs use simple muscle models
    /// since the muscle is attached between the abdominal layers which leads to
    /// short muscle length.
    AnyMuscleModel MusMdl = {
      Lf0 = .....MuscleModels.Right.RectusAbdominis.RectusAbdominis_1.Lf0/6;
      Vol0 = .....MuscleModels.Right.RectusAbdominis.RectusAbdominis_1.Vol0/6;
      F0 =  .....MuscleModels.Right.RectusAbdominis.RectusAbdominis_1.F0;
    };
  };

  AnyMuscleViaPoint RectusAbdominis_2_1 = {
    AnyRefNode &Org = ....Segments.SternalBodySeg.RACP_CO5_2_R;
    #if BM_TRUNK_THORACIC_STERNUM_TOPOLOGY == 4
    AnyRefNode &Via1 = ....Segments.Right.CostalCartilageSeg.RACP_Via_2_R;
    #else
    AnyRefNode &Via1 = ....Segments.SternalBodySeg.RACP_Via_2_R;
    #endif
    AnyRefNode &Ins = ....Abdominal.Layer_L1.BaseSegAnterior.rectus2R;
    viewMuscle = {#include "../DrawSettings/MusDrawSettings.any"};
    viewForce.Visible ??= Off;
    /// The rectus abdominis in the cavity model needs use simple muscle models
    /// since the muscle is attached between the abdominal layers which leads to
    /// short muscle length.
    AnyMuscleModel MusMdl = {
      Lf0 = .....MuscleModels.Right.RectusAbdominis.RectusAbdominis_2.Lf0/6;
      Vol0 = .....MuscleModels.Right.RectusAbdominis.RectusAbdominis_2.Vol0/6;
      F0 =  .....MuscleModels.Right.RectusAbdominis.RectusAbdominis_2.F0;
    };
  };

  AnyMuscleViaPoint RectusAbdominis_2_2 = {
    AnyRefNode &Org = ....Abdominal.Layer_L1.BaseSegAnterior.rectus2R;
    AnyRefNode &Ins = ....Abdominal.Layer_L2.BaseSegAnterior.rectus2R;
    viewMuscle = {#include "../DrawSettings/MusDrawSettings.any"};
    viewForce.Visible ??= Off;
    /// The rectus abdominis in the cavity model needs use simple muscle models
    /// since the muscle is attached between the abdominal layers which leads to
    /// short muscle length.
    AnyMuscleModel MusMdl = {
      Lf0 = .....MuscleModels.Right.RectusAbdominis.RectusAbdominis_2.Lf0/6;
      Vol0 = .....MuscleModels.Right.RectusAbdominis.RectusAbdominis_2.Vol0/6;
      F0 =  .....MuscleModels.Right.RectusAbdominis.RectusAbdominis_2.F0;
    };
  };

  AnyMuscleViaPoint RectusAbdominis_2_3 = {
    AnyRefNode &Org = ....Abdominal.Layer_L2.BaseSegAnterior.rectus2R;
    AnyRefNode &Ins = ....Abdominal.Layer_L3.BaseSegAnterior.rectus2R;
    viewMuscle = {#include "../DrawSettings/MusDrawSettings.any"};
    viewForce.Visible ??= Off;
    /// The rectus abdominis in the cavity model needs use simple muscle models
    /// since the muscle is attached between the abdominal layers which leads to
    /// short muscle length.
    AnyMuscleModel MusMdl = {
      Lf0 = .....MuscleModels.Right.RectusAbdominis.RectusAbdominis_2.Lf0/6;
      Vol0 = .....MuscleModels.Right.RectusAbdominis.RectusAbdominis_2.Vol0/6;
      F0 =  .....MuscleModels.Right.RectusAbdominis.RectusAbdominis_2.F0;
    };
  };

  AnyMuscleViaPoint RectusAbdominis_2_4 = {
    AnyRefNode &Org = ....Abdominal.Layer_L3.BaseSegAnterior.rectus2R;
    AnyRefNode &Ins = ....Abdominal.Layer_L4.BaseSegAnterior.rectus2R;
    viewMuscle = {#include "../DrawSettings/MusDrawSettings.any"};
    viewForce.Visible ??= Off;
    /// The rectus abdominis in the cavity model needs use simple muscle models
    /// since the muscle is attached between the abdominal layers which leads to
    /// short muscle length.
    AnyMuscleModel MusMdl = {
      Lf0 = .....MuscleModels.Right.RectusAbdominis.RectusAbdominis_2.Lf0/6;
      Vol0 = .....MuscleModels.Right.RectusAbdominis.RectusAbdominis_2.Vol0/6;
      F0 =  .....MuscleModels.Right.RectusAbdominis.RectusAbdominis_2.F0;
    };
  };

  AnyMuscleViaPoint RectusAbdominis_2_5 = {
    AnyRefNode &Org = ....Abdominal.Layer_L4.BaseSegAnterior.rectus2R;
    AnyRefNode &Ins = ....Abdominal.Layer_L5.BaseSegAnterior.rectus2R;
    viewMuscle = {#include "../DrawSettings/MusDrawSettings.any"};
    viewForce.Visible ??= Off;
    /// The rectus abdominis in the cavity model needs use simple muscle models
    /// since the muscle is attached between the abdominal layers which leads to
    /// short muscle length.
    AnyMuscleModel MusMdl = {
      Lf0 = .....MuscleModels.Right.RectusAbdominis.RectusAbdominis_2.Lf0/6;
      Vol0 = .....MuscleModels.Right.RectusAbdominis.RectusAbdominis_2.Vol0/6;
      F0 =  .....MuscleModels.Right.RectusAbdominis.RectusAbdominis_2.F0;
    };
  };

  AnyMuscleViaPoint RectusAbdominis_2_6 = {
    AnyRefNode &Org = ....Abdominal.Layer_L5.BaseSegAnterior.rectus2R;
    AnyRefNode &Ins = ....Segments.PelvisSeg.RectusAbdominis_2_R;
    viewMuscle = {#include "../DrawSettings/MusDrawSettings.any"};
    viewForce.Visible ??= Off;
    /// The rectus abdominis in the cavity model needs use simple muscle models
    /// since the muscle is attached between the abdominal layers which leads to
    /// short muscle length.
    AnyMuscleModel MusMdl = {
      Lf0 = .....MuscleModels.Right.RectusAbdominis.RectusAbdominis_2.Lf0/6;
      Vol0 = .....MuscleModels.Right.RectusAbdominis.RectusAbdominis_2.Vol0/6;
      F0 =  .....MuscleModels.Right.RectusAbdominis.RectusAbdominis_2.F0;
    };
  };
  #endif

  #endif
};

MuscleGroup RotatoresBrevis = {
  AnyMuscleViaPoint RotatoresBrevisT1C7 =   {
    AnyMuscleModel &MusMdl = ....MuscleModels.Right.RotatoresBrevis.RotatoresBrevisT1C7;
    AnyRefFrame &Org = ....Segments.T1Seg.Right.RotatoresBrevisT1C7Node;
    AnyRefFrame &Ins = ....Segments.C7Seg.Right.RotatoresBrevisT1C7Node;
    viewMuscle = {#include "../DrawSettings/MusDrawSettings.any"};
    viewForce.Visible ??= Off;
  };
  #if BM_TRUNK_THORACIC_MODEL == _THORACIC_MODEL_FLEXIBLE_
  AnyMuscleViaPoint RotatoresBrevisT2T1 =   {
    AnyMuscleModel &MusMdl = ....MuscleModels.Right.RotatoresBrevis.RotatoresBrevisT2T1;
    AnyRefFrame &Org = ....Segments.T2Seg.Right.RotatoresBrevisT2T1Node;
    AnyRefFrame &Ins = ....Segments.T1Seg.Right.RotatoresBrevisT2T1Node;
    viewMuscle = {#include "../DrawSettings/MusDrawSettings.any"};
    viewForce.Visible ??= Off;
  };
  AnyMuscleViaPoint RotatoresBrevisT3T2 =   {
    AnyMuscleModel &MusMdl = ....MuscleModels.Right.RotatoresBrevis.RotatoresBrevisT3T2;
    AnyRefFrame &Org = ....Segments.T3Seg.Right.RotatoresBrevisT3T2Node;
    AnyRefFrame &Ins = ....Segments.T2Seg.Right.RotatoresBrevisT3T2Node;
    viewMuscle = {#include "../DrawSettings/MusDrawSettings.any"};
    viewForce.Visible ??= Off;
  };
  AnyMuscleViaPoint RotatoresBrevisT4T3 =   {
    AnyMuscleModel &MusMdl = ....MuscleModels.Right.RotatoresBrevis.RotatoresBrevisT4T3;
    AnyRefFrame &Org = ....Segments.T4Seg.Right.RotatoresBrevisT4T3Node;
    AnyRefFrame &Ins = ....Segments.T3Seg.Right.RotatoresBrevisT4T3Node;
    viewMuscle = {#include "../DrawSettings/MusDrawSettings.any"};
    viewForce.Visible ??= Off;
  };
  AnyMuscleViaPoint RotatoresBrevisT5T4 =   {
    AnyMuscleModel &MusMdl = ....MuscleModels.Right.RotatoresBrevis.RotatoresBrevisT5T4;
    AnyRefFrame &Org = ....Segments.T5Seg.Right.RotatoresBrevisT5T4Node;
    AnyRefFrame &Ins = ....Segments.T4Seg.Right.RotatoresBrevisT5T4Node;
    viewMuscle = {#include "../DrawSettings/MusDrawSettings.any"};
    viewForce.Visible ??= Off;
  };
  AnyMuscleViaPoint RotatoresBrevisT6T5 =   {
    AnyMuscleModel &MusMdl = ....MuscleModels.Right.RotatoresBrevis.RotatoresBrevisT6T5;
    AnyRefFrame &Org = ....Segments.T6Seg.Right.RotatoresBrevisT6T5Node;
    AnyRefFrame &Ins = ....Segments.T5Seg.Right.RotatoresBrevisT6T5Node;
    viewMuscle = {#include "../DrawSettings/MusDrawSettings.any"};
    viewForce.Visible ??= Off;
  };
  AnyMuscleViaPoint RotatoresBrevisT7T6 =   {
    AnyMuscleModel &MusMdl = ....MuscleModels.Right.RotatoresBrevis.RotatoresBrevisT7T6;
    AnyRefFrame &Org = ....Segments.T7Seg.Right.RotatoresBrevisT7T6Node;
    AnyRefFrame &Ins = ....Segments.T6Seg.Right.RotatoresBrevisT7T6Node;
    viewMuscle = {#include "../DrawSettings/MusDrawSettings.any"};
    viewForce.Visible ??= Off;
  };
  AnyMuscleViaPoint RotatoresBrevisT8T7 =   {
    AnyMuscleModel &MusMdl = ....MuscleModels.Right.RotatoresBrevis.RotatoresBrevisT8T7;
    AnyRefFrame &Org = ....Segments.T8Seg.Right.RotatoresBrevisT8T7Node;
    AnyRefFrame &Ins = ....Segments.T7Seg.Right.RotatoresBrevisT8T7Node;
    viewMuscle = {#include "../DrawSettings/MusDrawSettings.any"};
    viewForce.Visible ??= Off;
  };
  AnyMuscleViaPoint RotatoresBrevisT9T8 =   {
    AnyMuscleModel &MusMdl = ....MuscleModels.Right.RotatoresBrevis.RotatoresBrevisT9T8;
    AnyRefFrame &Org = ....Segments.T9Seg.Right.RotatoresBrevisT9T8Node;
    AnyRefFrame &Ins = ....Segments.T8Seg.Right.RotatoresBrevisT9T8Node;
    viewMuscle = {#include "../DrawSettings/MusDrawSettings.any"};
    viewForce.Visible ??= Off;
  };
  AnyMuscleViaPoint RotatoresBrevisT10T9 =   {
    AnyMuscleModel &MusMdl = ....MuscleModels.Right.RotatoresBrevis.RotatoresBrevisT10T9;
    AnyRefFrame &Org = ....Segments.T10Seg.Right.RotatoresBrevisT10T9Node;
    AnyRefFrame &Ins = ....Segments.T9Seg.Right.RotatoresBrevisT10T9Node;
    viewMuscle = {#include "../DrawSettings/MusDrawSettings.any"};
    viewForce.Visible ??= Off;
  };
  AnyMuscleViaPoint RotatoresBrevisT11T10 =   {
    AnyMuscleModel &MusMdl = ....MuscleModels.Right.RotatoresBrevis.RotatoresBrevisT11T10;
    AnyRefFrame &Org = ....Segments.T11Seg.Right.RotatoresBrevisT11T10Node;
    AnyRefFrame &Ins = ....Segments.T10Seg.Right.RotatoresBrevisT11T10Node;
    viewMuscle = {#include "../DrawSettings/MusDrawSettings.any"};
    viewForce.Visible ??= Off;
  };
  AnyMuscleViaPoint RotatoresBrevisT12T11 =   {
    AnyMuscleModel &MusMdl = ....MuscleModels.Right.RotatoresBrevis.RotatoresBrevisT12T11;
    AnyRefFrame &Org = ....Segments.T12Seg.Right.RotatoresBrevisT12T11Node;
    AnyRefFrame &Ins = ....Segments.T11Seg.Right.RotatoresBrevisT12T11Node;
    viewMuscle = {#include "../DrawSettings/MusDrawSettings.any"};
    viewForce.Visible ??= Off;
  };
  #endif
};

MuscleGroup RotatoresLongus = {
  AnyMuscleViaPoint RotatoresLongusT2C7 =   {
    AnyMuscleModel &MusMdl = ....MuscleModels.Right.RotatoresLongus.RotatoresLongusT2C7;
    AnyRefFrame &Org = ....Segments.T2Seg.Right.RotatoresLongusT2C7Node;
    AnyRefFrame &Ins = ....Segments.C7Seg.Right.RotatoresLongusT2C7Node;
    viewMuscle = {#include "../DrawSettings/MusDrawSettings.any"};
    viewForce.Visible ??= Off;
  };
  #if BM_TRUNK_THORACIC_MODEL == _THORACIC_MODEL_FLEXIBLE_
  AnyMuscleViaPoint RotatoresLongusT3T1 =   {
    AnyMuscleModel &MusMdl = ....MuscleModels.Right.RotatoresLongus.RotatoresLongusT3T1;
    AnyRefFrame &Org = ....Segments.T3Seg.Right.RotatoresLongusT3T1Node;
    AnyRefFrame &Ins = ....Segments.T1Seg.Right.RotatoresLongusT3T1Node;
    viewMuscle = {#include "../DrawSettings/MusDrawSettings.any"};
    viewForce.Visible ??= Off;
  };
  AnyMuscleViaPoint RotatoresLongusT4T2 =   {
    AnyMuscleModel &MusMdl = ....MuscleModels.Right.RotatoresLongus.RotatoresLongusT4T2;
    AnyRefFrame &Org = ....Segments.T4Seg.Right.RotatoresLongusT4T2Node;
    AnyRefFrame &Ins = ....Segments.T2Seg.Right.RotatoresLongusT4T2Node;
    viewMuscle = {#include "../DrawSettings/MusDrawSettings.any"};
    viewForce.Visible ??= Off;
  };
  AnyMuscleViaPoint RotatoresLongusT5T3 =   {
    AnyMuscleModel &MusMdl = ....MuscleModels.Right.RotatoresLongus.RotatoresLongusT5T3;
    AnyRefFrame &Org = ....Segments.T5Seg.Right.RotatoresLongusT5T3Node;
    AnyRefFrame &Ins = ....Segments.T3Seg.Right.RotatoresLongusT5T3Node;
    viewMuscle = {#include "../DrawSettings/MusDrawSettings.any"};
    viewForce.Visible ??= Off;
  };
  AnyMuscleViaPoint RotatoresLongusT6T4 =   {
    AnyMuscleModel &MusMdl = ....MuscleModels.Right.RotatoresLongus.RotatoresLongusT6T4;
    AnyRefFrame &Org = ....Segments.T6Seg.Right.RotatoresLongusT6T4Node;
    AnyRefFrame &Ins = ....Segments.T4Seg.Right.RotatoresLongusT6T4Node;
    viewMuscle = {#include "../DrawSettings/MusDrawSettings.any"};
    viewForce.Visible ??= Off;
  };
  AnyMuscleViaPoint RotatoresLongusT7T5 =   {
    AnyMuscleModel &MusMdl = ....MuscleModels.Right.RotatoresLongus.RotatoresLongusT7T5;
    AnyRefFrame &Org = ....Segments.T7Seg.Right.RotatoresLongusT7T5Node;
    AnyRefFrame &Ins = ....Segments.T5Seg.Right.RotatoresLongusT7T5Node;
    viewMuscle = {#include "../DrawSettings/MusDrawSettings.any"};
    viewForce.Visible ??= Off;
  };
  AnyMuscleViaPoint RotatoresLongusT8T6 =   {
    AnyMuscleModel &MusMdl = ....MuscleModels.Right.RotatoresLongus.RotatoresLongusT8T6;
    AnyRefFrame &Org = ....Segments.T8Seg.Right.RotatoresLongusT8T6Node;
    AnyRefFrame &Ins = ....Segments.T6Seg.Right.RotatoresLongusT8T6Node;
    viewMuscle = {#include "../DrawSettings/MusDrawSettings.any"};
    viewForce.Visible ??= Off;
  };
  AnyMuscleViaPoint RotatoresLongusT9T7 =   {
    AnyMuscleModel &MusMdl = ....MuscleModels.Right.RotatoresLongus.RotatoresLongusT9T7;
    AnyRefFrame &Org = ....Segments.T9Seg.Right.RotatoresLongusT9T7Node;
    AnyRefFrame &Ins = ....Segments.T7Seg.Right.RotatoresLongusT9T7Node;
    viewMuscle = {#include "../DrawSettings/MusDrawSettings.any"};
    viewForce.Visible ??= Off;
  };
  AnyMuscleViaPoint RotatoresLongusT10T8 =   {
    AnyMuscleModel &MusMdl = ....MuscleModels.Right.RotatoresLongus.RotatoresLongusT10T8;
    AnyRefFrame &Org = ....Segments.T10Seg.Right.RotatoresLongusT10T8Node;
    AnyRefFrame &Ins = ....Segments.T8Seg.Right.RotatoresLongusT10T8Node;
    viewMuscle = {#include "../DrawSettings/MusDrawSettings.any"};
    viewForce.Visible ??= Off;
  };
  AnyMuscleViaPoint RotatoresLongusT11T9 =   {
    AnyMuscleModel &MusMdl = ....MuscleModels.Right.RotatoresLongus.RotatoresLongusT11T9;
    AnyRefFrame &Org = ....Segments.T11Seg.Right.RotatoresLongusT11T9Node;
    AnyRefFrame &Ins = ....Segments.T9Seg.Right.RotatoresLongusT11T9Node;
    viewMuscle = {#include "../DrawSettings/MusDrawSettings.any"};
    viewForce.Visible ??= Off;
  };
  AnyMuscleViaPoint RotatoresLongusT12T10 =   {
    AnyMuscleModel &MusMdl = ....MuscleModels.Right.RotatoresLongus.RotatoresLongusT12T10;
    AnyRefFrame &Org = ....Segments.T12Seg.Right.RotatoresLongusT12T10Node;
    AnyRefFrame &Ins = ....Segments.T10Seg.Right.RotatoresLongusT12T10Node;
    viewMuscle = {#include "../DrawSettings/MusDrawSettings.any"};
    viewForce.Visible ??= Off;
  };
  #endif
};

MuscleGroup ScalenusAnterior = {
  AnyMuscleViaPoint ScalenusAnteriorR1C6 = {
    AnyMuscleModel &MusMdl= ....MuscleModels.Right.Scalenus.ScalenusAnteriorR1C6;
    AnyRefNode &Org = ....Segments.C6Seg.Right.ScalenusAnteriorR1C6Node;
    AnyRefNode &Ins = ....Segments.Right.R1Seg.ScalenusAnteriorR1C6Node;
    viewMuscle = {#include "../DrawSettings/MusDrawSettings.any"};
    viewForce.Visible ??= Off;
  };
  AnyMuscleViaPoint ScalenusAnteriorR1C5 = {
    AnyMuscleModel &MusMdl= ....MuscleModels.Right.Scalenus.ScalenusAnteriorR1C5;
    AnyRefNode &Org = ....Segments.C5Seg.Right.ScalenusAnteriorR1C5Node;
    AnyRefNode &Ins = ....Segments.Right.R1Seg.ScalenusAnteriorR1C5Node;
    viewMuscle = {#include "../DrawSettings/MusDrawSettings.any"};
    viewForce.Visible ??= Off;
  };
  AnyMuscleViaPoint ScalenusAnteriorR1C4 = {
    AnyMuscleModel &MusMdl= ....MuscleModels.Right.Scalenus.ScalenusAnteriorR1C4;
    AnyRefNode &Org = ....Segments.C4Seg.Right.ScalenusAnteriorR1C4Node;
    AnyRefNode &Ins = ....Segments.Right.R1Seg.ScalenusAnteriorR1C4Node;
    viewMuscle = {#include "../DrawSettings/MusDrawSettings.any"};
    viewForce.Visible ??= Off;
  };
  AnyMuscleViaPoint ScalenusAnteriorR1C3 = {
    AnyMuscleModel &MusMdl= ....MuscleModels.Right.Scalenus.ScalenusAnteriorR1C3;
    AnyRefNode &Org = ....Segments.C3Seg.Right.ScalenusAnteriorR1C3Node;
    AnyRefNode &Ins = ....Segments.Right.R1Seg.ScalenusAnteriorR1C3Node;
    viewMuscle = {#include "../DrawSettings/MusDrawSettings.any"};
    viewForce.Visible ??= Off;
  };
};
MuscleGroup ScalenusMedius = {
  AnyMuscleViaPoint ScalenusMediusR1C7 = {
    AnyMuscleModel &MusMdl =....MuscleModels.Right.Scalenus.ScalenusMediusR1C7;
    AnyRefNode &Org = ....Segments.C7Seg.Right.ScalenusMediusR1C7Node;
    AnyRefNode &Ins = ....Segments.Right.R1Seg.ScalenusMediusR1C7Node;
    viewMuscle = {#include "../DrawSettings/MusDrawSettings.any"};
    viewForce.Visible ??= Off;
  };
  AnyMuscleViaPoint ScalenusMediusR1C6 = {
    AnyMuscleModel &MusMdl =....MuscleModels.Right.Scalenus.ScalenusMediusR1C6;
    AnyRefNode &Org = ....Segments.C6Seg.Right.ScalenusMediusR1C6Node;
    AnyRefNode &Ins = ....Segments.Right.R1Seg.ScalenusMediusR1C6Node;
    viewMuscle = {#include "../DrawSettings/MusDrawSettings.any"};
    viewForce.Visible ??= Off;
  };
  AnyMuscleViaPoint ScalenusMediusR1C5 = {
    AnyMuscleModel &MusMdl =....MuscleModels.Right.Scalenus.ScalenusMediusR1C5;
    AnyRefNode &Org = ....Segments.C5Seg.Right.ScalenusMediusR1C5Node;
    AnyRefNode &Ins = ....Segments.Right.R1Seg.ScalenusMediusR1C5Node;
    viewMuscle = {#include "../DrawSettings/MusDrawSettings.any"};
    viewForce.Visible ??= Off;
  };
  AnyMuscleViaPoint ScalenusMediusR1C4 = {
    AnyMuscleModel &MusMdl =....MuscleModels.Right.Scalenus.ScalenusMediusR1C4;
    AnyRefNode &Org = ....Segments.C4Seg.Right.ScalenusMediusR1C4Node;
    AnyRefNode &Ins = ....Segments.Right.R1Seg.ScalenusMediusR1C4Node;
    viewMuscle = {#include "../DrawSettings/MusDrawSettings.any"};
    viewForce.Visible ??= Off;
  };
  AnyMuscleViaPoint ScalenusMediusR1C3 = {
    AnyMuscleModel &MusMdl =....MuscleModels.Right.Scalenus.ScalenusMediusR1C3;
    AnyRefNode &Org = ....Segments.C3Seg.Right.ScalenusMediusR1C3Node;
    AnyRefNode &Ins = ....Segments.Right.R1Seg.ScalenusMediusR1C3Node;
    viewMuscle = {#include "../DrawSettings/MusDrawSettings.any"};
    viewForce.Visible ??= Off;
  };
  AnyMuscleViaPoint ScalenusMediusR1C2 = {
    AnyMuscleModel &MusMdl =....MuscleModels.Right.Scalenus.ScalenusMediusR1C2;
    AnyRefNode &Org = ....Segments.C2Seg.Right.ScalenusMediusR1C2Node;
    AnyRefNode &Ins = ....Segments.Right.R1Seg.ScalenusMediusR1C2Node;
    viewMuscle = {#include "../DrawSettings/MusDrawSettings.any"};
    viewForce.Visible ??= Off;
  };
};
MuscleGroup ScalenusPosterior = {
  AnyMuscleViaPoint ScalenusPosteriorR2C7 = {
    AnyMuscleModel &MusMdl =....MuscleModels.Right.Scalenus.ScalenusPosteriorR2C7;
    AnyRefNode &Org = ....Segments.C7Seg.Right.ScalenusPosteriorR2C7Node;
    AnyRefNode &Ins = ....Segments.Right.R2Seg.ScalenusPosteriorR2C7Node;
    viewMuscle = {#include "../DrawSettings/MusDrawSettings.any"};
    viewForce.Visible ??= Off;
  };
  AnyMuscleViaPoint ScalenusPosteriorR2C6 = {
    AnyMuscleModel &MusMdl =....MuscleModels.Right.Scalenus.ScalenusPosteriorR2C6;
    AnyRefNode &Org = ....Segments.C6Seg.Right.ScalenusPosteriorR2C6Node;
    AnyRefNode &Ins = ....Segments.Right.R2Seg.ScalenusPosteriorR2C6Node;
    viewMuscle = {#include "../DrawSettings/MusDrawSettings.any"};
    viewForce.Visible ??= Off;
  };
  AnyMuscleViaPoint ScalenusPosteriorR2C5 = {
    AnyMuscleModel &MusMdl =....MuscleModels.Right.Scalenus.ScalenusPosteriorR2C5;
    AnyRefNode &Org = ....Segments.C5Seg.Right.ScalenusPosteriorR2C5Node;
    AnyRefNode &Ins = ....Segments.Right.R2Seg.ScalenusPosteriorR2C5Node;
    viewMuscle = {#include "../DrawSettings/MusDrawSettings.any"};
    viewForce.Visible ??= Off;
  };
};

MuscleGroup SemispinalisCapitis = {
  AnyMuscleViaPoint SemispinalisCapitisC4C0 = {
    AnyMuscleModel &MusMdl = ....MuscleModels.Right.SemispinalisCapitis.SemispinalisCapitisC4C0;
    AnyRefNode &Org = ....Segments.C4Seg.SemispinalisCapitisC4C0NodeR;
    AnyRefNode &Ins = ....Segments.SkullSeg.SemispinalisCapitisNodeR;
    viewMuscle = {#include "../DrawSettings/MusDrawSettings.any"};
    viewForce.Visible ??= Off;
  };

  AnyMuscleViaPoint SemispinalisCapitisC5C0 = {
    AnyMuscleModel &MusMdl = ....MuscleModels.Right.SemispinalisCapitis.SemispinalisCapitisC5C0;
    AnyRefNode &Org = ....Segments.C5Seg.SemispinalisCapitisC5C0NodeR;
    AnyRefNode &Ins = ....Segments.SkullSeg.SemispinalisCapitisNodeR;
    viewMuscle = {#include "../DrawSettings/MusDrawSettings.any"};
    viewForce.Visible ??= Off;
  };

  AnyMuscleViaPoint SemispinalisCapitisC6C0 = {
    AnyMuscleModel &MusMdl = ....MuscleModels.Right.SemispinalisCapitis.SemispinalisCapitisC6C0;
    AnyRefNode &Org = ....Segments.C6Seg.SemispinalisCapitisC6C0NodeR;
    AnyRefNode &Ins = ....Segments.SkullSeg.SemispinalisCapitisNodeR;
    viewMuscle = {#include "../DrawSettings/MusDrawSettings.any"};
    viewForce.Visible ??= Off;
  };

  AnyMuscleViaPoint SemispinalisCapitisC7C0 = {
    AnyMuscleModel &MusMdl = ....MuscleModels.Right.SemispinalisCapitis.SemispinalisCapitisC7C0;
    AnyRefNode &Org = ....Segments.C7Seg.SemispinalisCapitisC7C0NodeR;
    AnyRefNode &Ins = ....Segments.SkullSeg.SemispinalisCapitisNodeR;
    viewMuscle = {#include "../DrawSettings/MusDrawSettings.any"};
    viewForce.Visible ??= Off;
  };

  AnyMuscleViaPoint SemispinalisCapitisT1C0 = {
    AnyMuscleModel &MusMdl = ....MuscleModels.Right.SemispinalisCapitis.SemispinalisCapitisT1C0;
    AnyRefNode &Org = ....Segments.T1Seg.Right.SemispinalisCapitisT1C0Node;
    AnyRefNode &Ins = ....Segments.SkullSeg.SemispinalisCapitisNodeR;
    viewMuscle = {#include "../DrawSettings/MusDrawSettings.any"};
    viewForce.Visible ??= Off;
  };
  AnyMuscleViaPoint SemispinalisCapitisT2C0 = {
    AnyMuscleModel &MusMdl = ....MuscleModels.Right.SemispinalisCapitis.SemispinalisCapitisT2C0;
    AnyRefNode &Org = ....Segments.T2Seg.Right.SemispinalisCapitisT2C0Node;
    AnyRefNode &Ins = ....Segments.SkullSeg.SemispinalisCapitisNodeR;
    viewMuscle = {#include "../DrawSettings/MusDrawSettings.any"};
    viewForce.Visible ??= Off;
  };
  AnyMuscleViaPoint SemispinalisCapitisT3C0 = {
    AnyMuscleModel &MusMdl = ....MuscleModels.Right.SemispinalisCapitis.SemispinalisCapitisT3C0;
    AnyRefNode &Org = ....Segments.T3Seg.Right.SemispinalisCapitisT3C0Node;
    AnyRefNode &Ins = ....Segments.SkullSeg.SemispinalisCapitisNodeR;
    viewMuscle = {#include "../DrawSettings/MusDrawSettings.any"};
    viewForce.Visible ??= Off;
  };
  AnyMuscleViaPoint SemispinalisCapitisT4C0 = {
    AnyMuscleModel &MusMdl = ....MuscleModels.Right.SemispinalisCapitis.SemispinalisCapitisT4C0;
    AnyRefNode &Org = ....Segments.T4Seg.Right.SemispinalisCapitisT4C0Node;
    AnyRefNode &Ins = ....Segments.SkullSeg.SemispinalisCapitisNodeR;
    viewMuscle = {#include "../DrawSettings/MusDrawSettings.any"};
    viewForce.Visible ??= Off;
  };
  AnyMuscleViaPoint SemispinalisCapitisT5C0 = {
    AnyMuscleModel &MusMdl = ....MuscleModels.Right.SemispinalisCapitis.SemispinalisCapitisT5C0;
    AnyRefNode &Org = ....Segments.T5Seg.Right.SemispinalisCapitisT5C0Node;
    AnyRefNode &Ins = ....Segments.SkullSeg.SemispinalisCapitisNodeR;
    viewMuscle = {#include "../DrawSettings/MusDrawSettings.any"};
    viewForce.Visible ??= Off;
  };
  AnyMuscleViaPoint SemispinalisCapitisT6C0 = {
    AnyMuscleModel &MusMdl = ....MuscleModels.Right.SemispinalisCapitis.SemispinalisCapitisT6C0;
    AnyRefNode &Org = ....Segments.T6Seg.Right.SemispinalisCapitisT6C0Node;
    AnyRefNode &Ins = ....Segments.SkullSeg.SemispinalisCapitisNodeR;
    viewMuscle = {#include "../DrawSettings/MusDrawSettings.any"};
    viewForce.Visible ??= Off;
  };
};

MuscleGroup SemispinalisCervicis = {
  AnyMuscleViaPoint SemispinalisCervicisT1C2 = {
    AnyMuscleModel &MusMdl = ....MuscleModels.Right.SemispinalisCervicis.SemispinalisCervicisT1C2;
    AnyRefNode &Org = ....Segments.T1Seg.SemispinalisCervicisT1C2NodeR;
    AnyRefNode &Ins = ....Segments.C2Seg.SemispinalisCervicisT1C2NodeR;
    viewMuscle = {#include "../DrawSettings/MusDrawSettings.any"};
    viewForce.Visible ??= Off;
  };

  AnyMuscleViaPoint SemispinalisCervicisT2C3 = {
    AnyMuscleModel &MusMdl = ....MuscleModels.Right.SemispinalisCervicis.SemispinalisCervicisT2C3;
    AnyRefNode &Org = ....Segments.T2Seg.SemispinalisCervicisT2C3NodeR;
    AnyRefNode &Ins = ....Segments.C3Seg.SemispinalisCervicisT2C3NodeR;
    viewMuscle = {#include "../DrawSettings/MusDrawSettings.any"};
    viewForce.Visible ??= Off;
  };

  AnyMuscleViaPoint SemispinalisCervicisT3C4 = {
    AnyMuscleModel &MusMdl = ....MuscleModels.Right.SemispinalisCervicis.SemispinalisCervicisT3C4;
    AnyRefNode &Org = ....Segments.T3Seg.SemispinalisCervicisT3C4NodeR;
    AnyRefNode &Ins = ....Segments.C4Seg.SemispinalisCervicisT3C4NodeR;
    viewMuscle = {#include "../DrawSettings/MusDrawSettings.any"};
    viewForce.Visible ??= Off;
  };

  AnyMuscleViaPoint SemispinalisCervicisT4C5 = {
    AnyMuscleModel &MusMdl = ....MuscleModels.Right.SemispinalisCervicis.SemispinalisCervicisT4C5;
    AnyRefNode &Org = ....Segments.T4Seg.SemispinalisCervicisT4C5NodeR;
    AnyRefNode &Ins = ....Segments.C5Seg.SemispinalisCervicisT4C5NodeR;
    viewMuscle = {#include "../DrawSettings/MusDrawSettings.any"};
    viewForce.Visible ??= Off;
  };

  AnyMuscleViaPoint SemispinalisCervicisT5C6 = {
    AnyMuscleModel &MusMdl = ....MuscleModels.Right.SemispinalisCervicis.SemispinalisCervicisT5C6;
    AnyRefNode &Org = ....Segments.T5Seg.SemispinalisCervicisT5C6NodeR;
    AnyRefNode &Ins = ....Segments.C6Seg.SemispinalisCervicisT5C6NodeR;
    viewMuscle = {#include "../DrawSettings/MusDrawSettings.any"};
    viewForce.Visible ??= Off;
  };

  AnyMuscleViaPoint SemispinalisCervicisT6C7 = {
    AnyMuscleModel &MusMdl = ....MuscleModels.Right.SemispinalisCervicis.SemispinalisCervicisT6C7;
    AnyRefNode &Org = ....Segments.T6Seg.SemispinalisCervicisT6C7NodeR;
    AnyRefNode &Ins = ....Segments.C7Seg.SemispinalisCervicisT6C7NodeR;
    viewMuscle = {#include "../DrawSettings/MusDrawSettings.any"};
    viewForce.Visible ??= Off;
  };
};

MuscleGroup SemispinalisThoracis = {

  #if BM_TRUNK_THORACIC_MODEL == _THORACIC_MODEL_FLEXIBLE_
  AnyMuscleViaPoint SemispinalisThoracisT12T4 =
  {
    AnyMuscleModel &MusMdl = ....MuscleModels.Right.SemispinalisThoracis.SemispinalisThoracisT12T4;
    AnyRefFrame &Org = ....Segments.T12Seg.SemispinalisThoracisT12TransversusR;
    AnyRefNode &Via1 = ....Segments.T11Seg.SemispinalisThoracisT11ViaNodeR;
    AnyRefNode &Via2 = ....Segments.T10Seg.SemispinalisThoracisT10ViaNodeR;
    AnyRefNode &Via3 = ....Segments.T9Seg.SemispinalisThoracisT9ViaNodeR;
    AnyRefNode &Via4 = ....Segments.T8Seg.SemispinalisThoracisT8ViaNodeR;
    AnyRefNode &Via5 = ....Segments.T7Seg.SemispinalisThoracisT4ViaNodeR;
    AnyRefFrame &Ins = ....Segments.T4Seg.SemispinalisThoracisT4Spinous;
    viewMuscle = {#include "../DrawSettings/MusDrawSettings.any"};
    viewForce.Visible ??= Off;
  };

  AnyMuscleViaPoint SemispinalisThoracisT11T3 =
  {
    AnyMuscleModel &MusMdl = ....MuscleModels.Right.SemispinalisThoracis.SemispinalisThoracisT11T3;
    AnyRefFrame &Org = ....Segments.T11Seg.SemispinalisThoracisT11TransversusR;
    AnyRefNode &Via2 = ....Segments.T10Seg.SemispinalisThoracisT10ViaNodeR;
    AnyRefNode &Via3 = ....Segments.T9Seg.SemispinalisThoracisT9ViaNodeR;
    AnyRefNode &Via4 = ....Segments.T8Seg.SemispinalisThoracisT8ViaNodeR;
    AnyRefNode &Via5 = ....Segments.T7Seg.SemispinalisThoracisT3ViaNodeR;
    AnyRefFrame &Ins = ....Segments.T3Seg.SemispinalisThoracisT3Spinous;
    viewMuscle = {#include "../DrawSettings/MusDrawSettings.any"};
    viewForce.Visible ??= Off;
  };

  AnyMuscleViaPoint SemispinalisThoracisT10T2 =
  {
    AnyMuscleModel &MusMdl = ....MuscleModels.Right.SemispinalisThoracis.SemispinalisThoracisT10T2;
    AnyRefFrame &Org = ....Segments.T10Seg.SemispinalisThoracisT10TransversusR;
    AnyRefNode &Via3 = ....Segments.T9Seg.SemispinalisThoracisT9ViaNodeR;
    AnyRefNode &Via4 = ....Segments.T8Seg.SemispinalisThoracisT8ViaNodeR;
    AnyRefNode &Via5 = ....Segments.T7Seg.SemispinalisThoracisT2ViaNodeR;
    AnyRefFrame &Ins = ....Segments.T2Seg.SemispinalisThoracisT2Spinous;
    viewMuscle = {#include "../DrawSettings/MusDrawSettings.any"};
    viewForce.Visible ??= Off;
  };

  AnyMuscleViaPoint SemispinalisThoracisT9T1 =
  {
    AnyMuscleModel &MusMdl = ....MuscleModels.Right.SemispinalisThoracis.SemispinalisThoracisT9T1;
    AnyRefFrame &Org = ....Segments.T9Seg.SemispinalisThoracisT9TransversusR;
    AnyRefNode &Via4 = ....Segments.T8Seg.SemispinalisThoracisT9T4ViaNodeR;
    AnyRefNode &Via5 = ....Segments.T7Seg.SemispinalisThoracisT9T1ViaNodeR;
    AnyRefFrame &Ins = ....Segments.T1Seg.SemispinalisThoracisT1Spinous;
    viewMuscle = {#include "../DrawSettings/MusDrawSettings.any"};
    viewForce.Visible ??= Off;
  };
  #endif
  AnyMuscleViaPoint SemispinalisThoracisT8C7 =
  {
    AnyMuscleModel &MusMdl = ....MuscleModels.Right.SemispinalisThoracis.SemispinalisThoracisT8C7;
    AnyRefFrame &Org = ....Segments.T8Seg.SemispinalisThoracisT8TransversusR;
    AnyRefNode &Via5 = ....Segments.T7Seg.SemispinalisThoracisT8T4ViaNodeR;
    AnyRefFrame &Ins = ....Segments.C7Seg.SemispinalisThoracisC7Spinous;
    viewMuscle = {#include "../DrawSettings/MusDrawSettings.any"};
    viewForce.Visible ??= Off;
  };

  AnyMuscleViaPoint SemispinalisThoracisT7C6 =
  {
    AnyMuscleModel &MusMdl = ....MuscleModels.Right.SemispinalisThoracis.SemispinalisThoracisT7C6;
    AnyRefFrame &Org = ....Segments.T7Seg.SemispinalisThoracisT7TransversusR;
    AnyRefFrame &Ins = ....Segments.C6Seg.SemispinalisThoracisC6Spinous;
    viewMuscle = {#include "../DrawSettings/MusDrawSettings.any"};
    viewForce.Visible ??= Off;
  };
};
MuscleGroup SerratusPosteriorInferior = {

  AnyMuscleViaPoint SerratusPosteriorInferiorL2R12 = {
    AnyMuscleModel &MusMdl = ....MuscleModels.Right.SerratusPosteriorInferior.SerratusPosteriorInferiorL2R12;
    AnyRefNode &L2 = ....Segments.L2Seg.O_serratus_posterior_inferior_R;
    AnyRefNode &Via1 = ....Segments.L2Seg.O_serratus_posterior_inferior_L2R12ViaNode_R;
    AnyRefNode &R12 = ....Segments.Right.R12Seg.O_serratus_posterior_inferior_R12R;
    viewMuscle = {#include "../DrawSettings/MusDrawSettings.any"};
    viewForce.Visible ??= Off;
  };

  AnyMuscleViaPoint SerratusPosteriorInferiorL1R11 = {
    AnyMuscleModel &MusMdl = ....MuscleModels.Right.SerratusPosteriorInferior.SerratusPosteriorInferiorL1R11;
    AnyRefNode &L1 = ....Segments.L1Seg.O_serratus_posterior_inferior_R;
    AnyRefNode &Via1 = ....Segments.L1Seg.O_serratus_posterior_inferior_L1R11ViaNode_R;
    AnyRefNode &R11 = ....Segments.Right.R11Seg.O_serratus_posterior_inferior_R11R;
    viewMuscle = {#include "../DrawSettings/MusDrawSettings.any"};
    viewForce.Visible ??= Off;
  };
  #if BM_TRUNK_THORACIC_MODEL == _THORACIC_MODEL_FLEXIBLE_
  AnyMuscleViaPoint SerratusPosteriorInferiorT12R10 = {
    AnyMuscleModel &MusMdl = ....MuscleModels.Right.SerratusPosteriorInferior.SerratusPosteriorInferiorT12R10;
    AnyRefNode &T12 = ....Segments.T12Seg.O_serratus_posterior_inferior_T12R;
    AnyRefNode &Via1 = ....Segments.T12Seg.O_serratus_posterior_inferior_T12R10ViaNodeR;
    AnyRefNode &R10 = ....Segments.Right.R10Seg.O_serratus_posterior_inferior_R10R;
    viewMuscle = {#include "../DrawSettings/MusDrawSettings.any"};
    viewForce.Visible ??= Off;
  };

  AnyMuscleViaPoint SerratusPosteriorInferiorT11R9 = {
    AnyMuscleModel &MusMdl = ....MuscleModels.Right.SerratusPosteriorInferior.SerratusPosteriorInferiorT11R9;
    AnyRefNode &T11 = ....Segments.T11Seg.O_serratus_posterior_inferior_T11R;
    AnyRefNode &Via1 = ....Segments.T11Seg.O_serratus_posterior_inferior_T11R9ViaNodeR;
    AnyRefNode &R9 = ....Segments.Right.R9Seg.O_serratus_posterior_inferior_R9R;
    viewMuscle = {#include "../DrawSettings/MusDrawSettings.any"};
    viewForce.Visible ??= Off;
  };
  #endif
};

MuscleGroup SerratusPosteriorSuperior = {

  AnyMuscleViaPoint SerratusPosteriorSuperiorR2C7 = {
    AnyMuscleModel &MusMdl = ....MuscleModels.Right.SerratusPosteriorSuperior.SerratusPosteriorSuperiorR2C7;
    AnyRefNode &C7 = ....Segments.C7Seg.O_serratus_posterior_superior_1C7NodeR;
    AnyRefNode &R2 = ....Segments.Right.R2Seg.O_serratus_posterior_superior_1R;
    viewMuscle = {#include "../DrawSettings/MusDrawSettings.any"};
    viewForce.Visible ??= Off;
  };

  #if BM_TRUNK_THORACIC_MODEL == _THORACIC_MODEL_FLEXIBLE_
  AnyMuscleViaPoint SerratusPosteriorSuperiorR3T1 = {
    AnyMuscleModel &MusMdl = ....MuscleModels.Right.SerratusPosteriorSuperior.SerratusPosteriorSuperiorR3T1;
    AnyRefNode &T1 = ....Segments.T1Seg.O_serratus_posterior_superior_T1R;
    AnyRefNode &R3 = ....Segments.Right.R3Seg.O_serratus_posterior_superior_2R;
    viewMuscle = {#include "../DrawSettings/MusDrawSettings.any"};
    viewForce.Visible ??= Off;
  };

  AnyMuscleViaPoint SerratusPosteriorSuperiorR4T2 = {
    AnyMuscleModel &MusMdl = ....MuscleModels.Right.SerratusPosteriorSuperior.SerratusPosteriorSuperiorR4T2;
    AnyRefNode &T2 = ....Segments.T2Seg.O_serratus_posterior_superior_T2R;
    AnyRefNode &R4 = ....Segments.Right.R4Seg.O_serratus_posterior_superior_3R;
    viewMuscle = {#include "../DrawSettings/MusDrawSettings.any"};
    viewForce.Visible ??= Off;
  };

  AnyMuscleViaPoint SerratusPosteriorSuperiorR5T3 = {
    AnyMuscleModel &MusMdl = ....MuscleModels.Right.SerratusPosteriorSuperior.SerratusPosteriorSuperiorR5T3;
    AnyRefNode &T3 = ....Segments.T3Seg.O_serratus_posterior_superior_T3R;
    AnyRefNode &R5 = ....Segments.Right.R5Seg.O_serratus_posterior_superior_4R;
    viewMuscle = {#include "../DrawSettings/MusDrawSettings.any"};
    viewForce.Visible ??= Off;
  };
  #endif
};

MuscleGroup SpleniusCapitis = {
  AnyMuscleViaPoint SpleniusCapitisC7 = {
    AnyMuscleModel &MusMdl = ....MuscleModels.Right.SpleniusCapitis.SpleniusCapitisC7;
    AnyRefNode &Org = ....Segments.SkullSeg.SpleniusCapitisNodeR;
    AnyRefNode &Ins = ....Segments.C7Seg.SpleniusCapitisC7NodeR;
    viewMuscle = {#include "../DrawSettings/MusDrawSettings.any"};
    viewForce.Visible ??= Off;
  };
  AnyMuscleViaPoint SpleniusCapitisT1 = {
    AnyMuscleModel &MusMdl = ....MuscleModels.Right.SpleniusCapitis.SpleniusCapitisT1;
    AnyRefNode &Org = ....Segments.SkullSeg.SpleniusCapitisNodeR;
    AnyRefNode &Ins = ....Segments.T1Seg.Right.SpleniusCapitisT1Node;
    viewMuscle = {#include "../DrawSettings/MusDrawSettings.any"};
    viewForce.Visible ??= Off;
  };
  AnyMuscleViaPoint SpleniusCapitisT2 = {
    AnyMuscleModel &MusMdl = ....MuscleModels.Right.SpleniusCapitis.SpleniusCapitisT2;
    AnyRefNode &Org = ....Segments.SkullSeg.SpleniusCapitisNodeR;
    AnyRefNode &Ins = ....Segments.T2Seg.Right.SpleniusCapitisT2Node;
    viewMuscle = {#include "../DrawSettings/MusDrawSettings.any"};
    viewForce.Visible ??= Off;
  };
  AnyMuscleViaPoint SpleniusCapitis3 = {
    AnyMuscleModel &MusMdl = ....MuscleModels.Right.SpleniusCapitis.SpleniusCapitis3;
    AnyRefNode &Org = ....Segments.SkullSeg.SpleniusCapitisNodeR;
    AnyRefNode &Ins = ....Segments.T3Seg.Right.SpleniusCapitis3Node;
    viewMuscle = {#include "../DrawSettings/MusDrawSettings.any"};
    viewForce.Visible ??= Off;
  };
};

MuscleGroup SpleniusCervicis = {
  AnyMuscleViaPoint SpleniusCervicisT3C1 = {
    AnyMuscleModel &MusMdl = ....MuscleModels.Right.SpleniusCervicis.SpleniusCervicisT3C1;
    AnyRefNode &Org = ....Segments.T3Seg.Right.SpleniusCervicisNode;
    AnyRefNode &Ins = ....Segments.C1Seg.Right.SpleniusCervicisT3C1Node;
    viewMuscle = {#include "../DrawSettings/MusDrawSettings.any"};
    viewForce.Visible ??= Off;
  };
  AnyMuscleViaPoint SpleniusCervicisT4C2 = {
    AnyMuscleModel &MusMdl = ....MuscleModels.Right.SpleniusCervicis.SpleniusCervicisT4C2;
    AnyRefNode &Org = ....Segments.T4Seg.Right.SpleniusCervicisNode;
    AnyRefNode &Ins = ....Segments.C2Seg.Right.SpleniusCervicisT4C2Node;
    viewMuscle = {#include "../DrawSettings/MusDrawSettings.any"};
    viewForce.Visible ??= Off;
  };

  AnyMuscleViaPoint SpleniusCervicisT5C3 = {
    AnyMuscleModel &MusMdl = ....MuscleModels.Right.SpleniusCervicis.SpleniusCervicisT5C3;
    AnyRefNode &Org = ....Segments.T5Seg.Right.SpleniusCervicisNode;
    AnyRefNode &Ins = ....Segments.C3Seg.Right.SpleniusCervicisT5C3Node;
    viewMuscle = {#include "../DrawSettings/MusDrawSettings.any"};
    viewForce.Visible ??= Off;
  };
  AnyMuscleViaPoint SpleniusCervicisT6C3 = {
    AnyMuscleModel &MusMdl = ....MuscleModels.Right.SpleniusCervicis.SpleniusCervicisT6C3;
    AnyRefNode &Org = ....Segments.T6Seg.Right.SpleniusCervicisNode;
    AnyRefNode &Ins = ....Segments.C3Seg.Right.SpleniusCervicisT6C3Node;
    viewMuscle = {#include "../DrawSettings/MusDrawSettings.any"};
    viewForce.Visible ??= Off;
  };
};

#if BM_TRUNK_THORACIC_MODEL == _THORACIC_MODEL_FLEXIBLE_
MuscleGroup Subcostalis = {
  AnyMuscleViaPoint SubcostalisR1R3 = {
    AnyMuscleModel &MusMdl = ....MuscleModels.Right.Subcostalis.SubcostalisR1R3;
    AnyRefNode &R1 = ....Segments.Right.R1Seg.SubcostalisR1R3_R_Org;
    AnyRefNode &R3 = ....Segments.Right.R3Seg.SubcostalisR1R3_R_Ins;
    viewMuscle = {#include "../DrawSettings/MusDrawSettings.any"};
    viewForce.Visible ??= Off;
  };

  AnyMuscleViaPoint SubcostalisR1R4 = {
    AnyMuscleModel &MusMdl = ....MuscleModels.Right.Subcostalis.SubcostalisR1R4;
    AnyRefNode &R1 = ....Segments.Right.R1Seg.SubcostalisR1R4_R_Org;
    AnyRefNode &R3 = ....Segments.Right.R4Seg.SubcostalisR1R4_R_Ins;
    viewMuscle = {#include "../DrawSettings/MusDrawSettings.any"};
    viewForce.Visible ??= Off;
  };

  AnyMuscleViaPoint SubcostalisR2R4 = {
    AnyMuscleModel &MusMdl = ....MuscleModels.Right.Subcostalis.SubcostalisR2R4;
    AnyRefNode &R2 = ....Segments.Right.R2Seg.SubcostalisR2R4_R_Org;
    AnyRefNode &R4 = ....Segments.Right.R4Seg.SubcostalisR2R4_R_Ins;
    viewMuscle = {#include "../DrawSettings/MusDrawSettings.any"};
    viewForce.Visible ??= Off;
  };

  AnyMuscleViaPoint SubcostalisR2R5 = {
    AnyMuscleModel &MusMdl = ....MuscleModels.Right.Subcostalis.SubcostalisR2R5;
    AnyRefNode &R2 = ....Segments.Right.R2Seg.SubcostalisR2R5_R_Org;
    AnyRefNode &R4 = ....Segments.Right.R5Seg.SubcostalisR2R5_R_Ins;
    viewMuscle = {#include "../DrawSettings/MusDrawSettings.any"};
    viewForce.Visible ??= Off;
  };

  AnyMuscleViaPoint SubcostalisR3R5 = {
    AnyMuscleModel &MusMdl = ....MuscleModels.Right.Subcostalis.SubcostalisR3R5;
    AnyRefNode &R3 = ....Segments.Right.R3Seg.SubcostalisR3R5_R_Org;
    AnyRefNode &R5 = ....Segments.Right.R5Seg.SubcostalisR3R5_R_Ins;
    viewMuscle = {#include "../DrawSettings/MusDrawSettings.any"};
    viewForce.Visible ??= Off;
  };

  AnyMuscleViaPoint SubcostalisR3R6 = {
    AnyMuscleModel &MusMdl = ....MuscleModels.Right.Subcostalis.SubcostalisR3R6;
    AnyRefNode &R3 = ....Segments.Right.R3Seg.SubcostalisR3R6_R_Org;
    AnyRefNode &R5 = ....Segments.Right.R6Seg.SubcostalisR3R6_R_Ins;
    viewMuscle = {#include "../DrawSettings/MusDrawSettings.any"};
    viewForce.Visible ??= Off;
  };

  AnyMuscleViaPoint SubcostalisR4R6 = {
    AnyMuscleModel &MusMdl = ....MuscleModels.Right.Subcostalis.SubcostalisR4R6;
    AnyRefNode &R4 = ....Segments.Right.R4Seg.SubcostalisR4R6_R_Org;
    AnyRefNode &R6 = ....Segments.Right.R6Seg.SubcostalisR4R6_R_Ins;
    viewMuscle = {#include "../DrawSettings/MusDrawSettings.any"};
    viewForce.Visible ??= Off;
  };

  AnyMuscleViaPoint SubcostalisR4R7 = {
    AnyMuscleModel &MusMdl = ....MuscleModels.Right.Subcostalis.SubcostalisR4R7;
    AnyRefNode &R4 = ....Segments.Right.R4Seg.SubcostalisR4R7_R_Org;
    AnyRefNode &R6 = ....Segments.Right.R7Seg.SubcostalisR4R7_R_Ins;
    viewMuscle = {#include "../DrawSettings/MusDrawSettings.any"};
    viewForce.Visible ??= Off;
  };

  AnyMuscleViaPoint SubcostalisR5R7 = {
    AnyMuscleModel &MusMdl = ....MuscleModels.Right.Subcostalis.SubcostalisR5R7;
    AnyRefNode &R5 = ....Segments.Right.R5Seg.SubcostalisR5R7_R_Org;
    AnyRefNode &R7 = ....Segments.Right.R7Seg.SubcostalisR5R7_R_Ins;
    viewMuscle = {#include "../DrawSettings/MusDrawSettings.any"};
    viewForce.Visible ??= Off;
  };

  AnyMuscleViaPoint SubcostalisR5R8 = {
    AnyMuscleModel &MusMdl = ....MuscleModels.Right.Subcostalis.SubcostalisR5R8;
    AnyRefNode &R5 = ....Segments.Right.R5Seg.SubcostalisR5R8_R_Org;
    AnyRefNode &R7 = ....Segments.Right.R8Seg.SubcostalisR5R8_R_Ins;
    viewMuscle = {#include "../DrawSettings/MusDrawSettings.any"};
    viewForce.Visible ??= Off;
  };

  AnyMuscleViaPoint SubcostalisR6R8 = {
    AnyMuscleModel &MusMdl = ....MuscleModels.Right.Subcostalis.SubcostalisR6R8;
    AnyRefNode &R6 = ....Segments.Right.R6Seg.SubcostalisR6R8_R_Org;
    AnyRefNode &R8 = ....Segments.Right.R8Seg.SubcostalisR6R8_R_Ins;
    viewMuscle = {#include "../DrawSettings/MusDrawSettings.any"};
    viewForce.Visible ??= Off;
  };

  AnyMuscleViaPoint SubcostalisR6R9 = {
    AnyMuscleModel &MusMdl = ....MuscleModels.Right.Subcostalis.SubcostalisR6R9;
    AnyRefNode &R6 = ....Segments.Right.R6Seg.SubcostalisR6R9_R_Org;
    AnyRefNode &R8 = ....Segments.Right.R9Seg.SubcostalisR6R9_R_Ins;
    viewMuscle = {#include "../DrawSettings/MusDrawSettings.any"};
    viewForce.Visible ??= Off;
  };

  AnyMuscleViaPoint SubcostalisR7R9 = {
    AnyMuscleModel &MusMdl = ....MuscleModels.Right.Subcostalis.SubcostalisR7R9;
    AnyRefNode &R7 = ....Segments.Right.R7Seg.SubcostalisR7R9_R_Org;
    AnyRefNode &R9 = ....Segments.Right.R9Seg.SubcostalisR7R9_R_Ins;
    viewMuscle = {#include "../DrawSettings/MusDrawSettings.any"};
    viewForce.Visible ??= Off;
  };

  AnyMuscleViaPoint SubcostalisR7R10 = {
    AnyMuscleModel &MusMdl = ....MuscleModels.Right.Subcostalis.SubcostalisR7R10;
    AnyRefNode &R7 = ....Segments.Right.R7Seg.SubcostalisR7R10_R_Org;
    AnyRefNode &R9 = ....Segments.Right.R10Seg.SubcostalisR7R10_R_Ins;
    viewMuscle = {#include "../DrawSettings/MusDrawSettings.any"};
    viewForce.Visible ??= Off;
  };

  AnyMuscleViaPoint SubcostalisR8R10 = {
    AnyMuscleModel &MusMdl = ....MuscleModels.Right.Subcostalis.SubcostalisR8R10;
    AnyRefNode &R8 = ....Segments.Right.R8Seg.SubcostalisR8R10_R_Org;
    AnyRefNode &R10 = ....Segments.Right.R10Seg.SubcostalisR8R10_R_Ins;
    viewMuscle = {#include "../DrawSettings/MusDrawSettings.any"};
    viewForce.Visible ??= Off;
  };

  AnyMuscleViaPoint SubcostalisR8R11 = {
    AnyMuscleModel &MusMdl = ....MuscleModels.Right.Subcostalis.SubcostalisR8R11;
    AnyRefNode &R8 = ....Segments.Right.R8Seg.SubcostalisR8R11_R_Ins;
    AnyRefNode &R11 = ....Segments.Right.R11Seg.SubcostalisR8R11_R_Org;
    viewMuscle = {#include "../DrawSettings/MusDrawSettings.any"};
    viewForce.Visible ??= Off;
  };

  AnyMuscleViaPoint SubcostalisR9R11 = {
    AnyMuscleModel &MusMdl = ....MuscleModels.Right.Subcostalis.SubcostalisR9R11;
    AnyRefNode &R9 = ....Segments.Right.R9Seg.SubcostalisR9R11_R_Ins;
    AnyRefNode &R11 = ....Segments.Right.R11Seg.SubcostalisR9R11_R_Org;
    viewMuscle = {#include "../DrawSettings/MusDrawSettings.any"};
    viewForce.Visible ??= Off;
  };
};
#endif

#if BM_TRUNK_CAVITY_MODEL == _CAVITY_MODEL_VOLUME_
MuscleGroup TransversusAbdominis = {
  AnyMuscleViaPoint TransversusAbdominisL1 = {
    AnyMuscleModel &MusMdl = ....MuscleModels.Right.TransversusAbdominis.TransversusAbdominisL1;
    AnyRefNode &Org = ....Segments.L1Seg.TransversusInsNode_R;
    AnyRefNode &Via01 = ....Abdominal.Layer_L1.BaseSegPosterior.TransversusPoints.Right.nn03;
    AnyRefNode &Via02 = ....Abdominal.Layer_L1.BaseSegAnterior.TransversusPoints.Right.nn01;
    AnyRefNode &Via03 = ....Abdominal.Layer_L1.BaseSegAnterior.TransversusPoints.Right.nn02;
    AnyRefNode &Via04 = ....Abdominal.Layer_L1.BaseSegAnterior.TransversusPoints.Right.nn03;
    AnyRefNode &Via05 = ....Abdominal.Layer_L1.BaseSegAnterior.TransversusPoints.Right.nn04;
    AnyRefNode &Via06 = ....Abdominal.Layer_L1.BaseSegAnterior.TransversusPoints.Right.nn05;
    AnyRefNode &Via07 = ....Abdominal.Layer_L1.BaseSegAnterior.TransversusPoints.Right.nn06;
    AnyRefNode &Ins = ....Abdominal.Layer_L1.BaseSegAnterior.TransversusPoints.Center;
    viewMuscle = {#include "../DrawSettings/MusDrawSettings.any"};
  };

  AnyMuscleViaPoint TransversusAbdominisL2 = {
    AnyMuscleModel &MusMdl = ....MuscleModels.Right.TransversusAbdominis.TransversusAbdominisL2;
    AnyRefNode &Org = ....Segments.L2Seg.TransversusInsNode_R;
    AnyRefNode &Via01 = ....Abdominal.Layer_L2.BaseSegPosterior.TransversusPoints.Right.nn03;
    AnyRefNode &Via02 = ....Abdominal.Layer_L2.BaseSegAnterior.TransversusPoints.Right.nn01;
    AnyRefNode &Via03 = ....Abdominal.Layer_L2.BaseSegAnterior.TransversusPoints.Right.nn02;
    AnyRefNode &Via04 = ....Abdominal.Layer_L2.BaseSegAnterior.TransversusPoints.Right.nn03;
    AnyRefNode &Via05 = ....Abdominal.Layer_L2.BaseSegAnterior.TransversusPoints.Right.nn04;
    AnyRefNode &Via06 = ....Abdominal.Layer_L2.BaseSegAnterior.TransversusPoints.Right.nn05;
    AnyRefNode &Via07 = ....Abdominal.Layer_L2.BaseSegAnterior.TransversusPoints.Right.nn06;
    viewMuscle = {#include "../DrawSettings/MusDrawSettings.any"};
  };

  AnyMuscleViaPoint TransversusAbdominisL3 = {
    AnyMuscleModel &MusMdl = ....MuscleModels.Right.TransversusAbdominis.TransversusAbdominisL3;
    AnyRefNode &Org = ....Segments.L3Seg.TransversusInsNode_R;
    AnyRefNode &Via01 = ....Abdominal.Layer_L3.BaseSegPosterior.TransversusPoints.Right.nn03;
    AnyRefNode &Via02 = ....Abdominal.Layer_L3.BaseSegAnterior.TransversusPoints.Right.nn01;
    AnyRefNode &Via03 = ....Abdominal.Layer_L3.BaseSegAnterior.TransversusPoints.Right.nn02;
    AnyRefNode &Via04 = ....Abdominal.Layer_L3.BaseSegAnterior.TransversusPoints.Right.nn03;
    AnyRefNode &Via05 = ....Abdominal.Layer_L3.BaseSegAnterior.TransversusPoints.Right.nn04;
    AnyRefNode &Via06 = ....Abdominal.Layer_L3.BaseSegAnterior.TransversusPoints.Right.nn05;
    AnyRefNode &Via07 = ....Abdominal.Layer_L3.BaseSegAnterior.TransversusPoints.Right.nn06;
    viewMuscle = {#include "../DrawSettings/MusDrawSettings.any"};
  };

  AnyMuscleViaPoint TransversusAbdominisL4 = {
    AnyMuscleModel &MusMdl = ....MuscleModels.Right.TransversusAbdominis.TransversusAbdominisL4;
    AnyRefNode &Org = ....Segments.L4Seg.TransversusInsNode_R;
    AnyRefNode &Via01 = ....Abdominal.Layer_L4.BaseSegPosterior.TransversusPoints.Right.nn03;
    AnyRefNode &Via02 = ....Abdominal.Layer_L4.BaseSegAnterior.TransversusPoints.Right.nn01;
    AnyRefNode &Via03 = ....Abdominal.Layer_L4.BaseSegAnterior.TransversusPoints.Right.nn02;
    AnyRefNode &Via04 = ....Abdominal.Layer_L4.BaseSegAnterior.TransversusPoints.Right.nn03;
    AnyRefNode &Via05 = ....Abdominal.Layer_L4.BaseSegAnterior.TransversusPoints.Right.nn04;
    AnyRefNode &Via06 = ....Abdominal.Layer_L4.BaseSegAnterior.TransversusPoints.Right.nn05;
    AnyRefNode &Via07 = ....Abdominal.Layer_L4.BaseSegAnterior.TransversusPoints.Right.nn06;
    viewMuscle = {#include "../DrawSettings/MusDrawSettings.any"};
  };

  AnyMuscleViaPoint TransversusAbdominisL5 = {
    AnyMuscleModel &MusMdl = ....MuscleModels.Right.TransversusAbdominis.TransversusAbdominisL5;
    AnyRefNode &Org = ....Segments.L5Seg.TransversusInsNode_R;
    AnyRefNode &Via01 = ....Abdominal.Layer_L5.BaseSegPosterior.TransversusPoints.Right.nn03;
    AnyRefNode &Via02 = ....Abdominal.Layer_L5.BaseSegAnterior.TransversusPoints.Right.nn01;
    AnyRefNode &Via03 = ....Abdominal.Layer_L5.BaseSegAnterior.TransversusPoints.Right.nn02;
    AnyRefNode &Via04 = ....Abdominal.Layer_L5.BaseSegAnterior.TransversusPoints.Right.nn03;
    AnyRefNode &Via05 = ....Abdominal.Layer_L5.BaseSegAnterior.TransversusPoints.Right.nn04;
    AnyRefNode &Via06 = ....Abdominal.Layer_L5.BaseSegAnterior.TransversusPoints.Right.nn05;
    AnyRefNode &Via07 = ....Abdominal.Layer_L5.BaseSegAnterior.TransversusPoints.Right.nn06;
    viewMuscle = {#include "../DrawSettings/MusDrawSettings.any"};
  };
};
#endif

#if BM_TRUNK_THORACIC_MODEL == _THORACIC_MODEL_FLEXIBLE_
MuscleGroup TransversusThoracis = {
  AnyMuscleViaPoint TransversusThoracisR2St = {
    AnyMuscleModel &MusMdl = ....MuscleModels.Right.TransversusThoracis.TransversusThoracisR2St;
    AnyRefNode &R2 = ....Segments.Right.R2Seg.TransversusThoracisR2StNodeROrg;
    AnyRefNode &S = ....Segments.SternalBodySeg.TransversusThoracisR2StNodeRIns;
    viewMuscle = {#include "../DrawSettings/MusDrawSettings.any"};
    viewForce.Visible ??= Off;
  };

  AnyMuscleViaPoint TransversusThoracisR2R4 = {
    AnyMuscleModel &MusMdl = ....MuscleModels.Right.TransversusThoracis.TransversusThoracisR2R4;
    AnyRefNode &R4 = ....Segments.Right.R2Seg.TransversusThoracisR2R4NodeROrg;
    AnyRefNode &S = ....Segments.Right.R4Seg.TransversusThoracisR2R4NodeRIns;
    viewMuscle = {#include "../DrawSettings/MusDrawSettings.any"};
    viewForce.Visible ??= Off;
  };

  AnyMuscleViaPoint TransversusThoracisR3St = {
    AnyMuscleModel &MusMdl = ....MuscleModels.Right.TransversusThoracis.TransversusThoracisR3St;
    AnyRefNode &R3 = ....Segments.Right.R3Seg.TransversusThoracisR3StNodeROrg;
    AnyRefNode &S = ....Segments.SternalBodySeg.TransversusThoracisR3StNodeRIns;
    viewMuscle = {#include "../DrawSettings/MusDrawSettings.any"};
    viewForce.Visible ??= Off;
  };

  AnyMuscleViaPoint TransversusThoracisR3R5 = {
    AnyMuscleModel &MusMdl = ....MuscleModels.Right.TransversusThoracis.TransversusThoracisR3R5;
    AnyRefNode &R3 = ....Segments.Right.R3Seg.TransversusThoracisR3R5NodeROrg;
    AnyRefNode &S = ....Segments.Right.R5Seg.TransversusThoracisR3R5NodeRIns;
    viewMuscle = {#include "../DrawSettings/MusDrawSettings.any"};
    viewForce.Visible ??= Off;
  };

  AnyMuscleViaPoint TransversusThoracisR4St = {
    AnyMuscleModel &MusMdl = ....MuscleModels.Right.TransversusThoracis.TransversusThoracisR4St;
    AnyRefNode &R4 = ....Segments.Right.R4Seg.TransversusThoracisR4StNodeROrg;
    AnyRefNode &S = ....Segments.SternalBodySeg.TransversusThoracisR4StNodeRIns;
    viewMuscle = {#include "../DrawSettings/MusDrawSettings.any"};
    viewForce.Visible ??= Off;
  };

  AnyMuscleViaPoint TransversusThoracisR4R6 = {
    AnyMuscleModel &MusMdl = ....MuscleModels.Right.TransversusThoracis.TransversusThoracisR4R6;
    AnyRefNode &R4 = ....Segments.Right.R4Seg.TransversusThoracisR4R6NodeROrg;
    AnyRefNode &S = ....Segments.Right.R6Seg.TransversusThoracisR4R6NodeRIns;
    viewMuscle = {#include "../DrawSettings/MusDrawSettings.any"};
    viewForce.Visible ??= Off;
  };

  AnyMuscleViaPoint TransversusThoracisR5St = {
    AnyMuscleModel &MusMdl = ....MuscleModels.Right.TransversusThoracis.TransversusThoracisR5St;
    AnyRefNode &R5 = ....Segments.Right.R5Seg.TransversusThoracisR5StNodeROrg;
    AnyRefNode &S = ....Segments.SternalBodySeg.TransversusThoracisR5StNodeRIns;
    viewMuscle = {#include "../DrawSettings/MusDrawSettings.any"};
    viewForce.Visible ??= Off;
  };

  AnyMuscleViaPoint TransversusThoracisR5R7 = {
    AnyMuscleModel &MusMdl = ....MuscleModels.Right.TransversusThoracis.TransversusThoracisR5R7;
    AnyRefNode &R4 = ....Segments.Right.R5Seg.TransversusThoracisR5R7NodeROrg;
    AnyRefNode &S56 = ....Segments.Right.R7Seg.TransversusThoracisR5R7NodeRIns;
    viewMuscle = {#include "../DrawSettings/MusDrawSettings.any"};
    viewForce.Visible ??= Off;
  };

  AnyMuscleViaPoint TransversusThoracisR6St = {
    AnyMuscleModel &MusMdl = ....MuscleModels.Right.TransversusThoracis.TransversusThoracisR6St;
    AnyRefNode &R4 = ....Segments.Right.R6Seg.TransversusThoracisR6StNodeROrg;
    AnyRefNode &S56 = ....Segments.SternalBodySeg.TransversusThoracisR6StNodeRIns;
    viewMuscle = {#include "../DrawSettings/MusDrawSettings.any"};
    viewForce.Visible ??= Off;
  };

  AnyMuscleViaPoint TransversusThoracisR7St = {
    AnyMuscleModel &MusMdl = ....MuscleModels.Right.TransversusThoracis.TransversusThoracisR7St;
    AnyRefNode &R7 = ....Segments.Right.R7Seg.TransversusThoracisR7StNodeROrg;
    AnyRefNode &S8 = ....Segments.SternalBodySeg.TransversusThoracisNodeRIns;
    viewMuscle = {#include "../DrawSettings/MusDrawSettings.any"};
    viewForce.Visible ??= Off;
  };

  AnyMuscleViaPoint TransversusThoracisR8St = {
    AnyMuscleModel &MusMdl = ....MuscleModels.Right.TransversusThoracis.TransversusThoracisR8St;
    AnyRefNode &R8 = ....Segments.Right.R8Seg.TransversusThoracisR8StNodeROrg;
    AnyRefNode &S8 = ....Segments.SternalBodySeg.TransversusThoracisNodeRIns;
    viewMuscle = {#include "../DrawSettings/MusDrawSettings.any"};
    viewForce.Visible ??= Off;
  };

  AnyMuscleViaPoint TransversusThoracisR9St = {
    AnyMuscleModel &MusMdl = ....MuscleModels.Right.TransversusThoracis.TransversusThoracisR9St;
    AnyRefNode &R9 = ....Segments.Right.R9Seg.TransversusThoracisR9StNodeROrg;
    AnyRefNode &S8 = ....Segments.SternalBodySeg.TransversusThoracisNodeRIns;
    viewMuscle = {#include "../DrawSettings/MusDrawSettings.any"};
    viewForce.Visible ??= Off;
  };

  AnyMuscleViaPoint TransversusThoracisR10St = {
    AnyMuscleModel &MusMdl = ....MuscleModels.Right.TransversusThoracis.TransversusThoracisR10St;
    AnyRefNode &R10 = ....Segments.Right.R10Seg.TransversusThoracisR10StNodeROrg;
    AnyRefNode &S8 = ....Segments.SternalBodySeg.TransversusThoracisNodeRIns;
    viewMuscle = {#include "../DrawSettings/MusDrawSettings.any"};
    viewForce.Visible ??= Off;
  };
};
#endif

#endif
