/**
Definitions of Segment nodes

Abbrevitations:
ILpl = Iliocostalis Lumborum pars lumborum (part of Erector Spinae)
LTpl = Longissimus Thoracis pars lumborum (part of Erector Spinae)
ILpt = Iliocostalis Lumborum pars thoracis (part of Erector Spinae)
LTpt = Longissimus Thoracis pars thoracis (part of Erector Spinae)
PM = Psoas Major
QL = Quadratus Lumborum
RA = Rectus Abdominis
OE = Obliquus Externus
OI = Obliquus Internus

C = Costae
CI = Crista Iliaca
CP = Crista Pubica
SIPS = Spina iliaca posterior superior
SIPI = Spina iliaca Posterior inferior
T = Thoracal hvirvel
L = Lumbal hvirvel
S = Sacral segment
*/
 Segments.L1Seg = {
  AnyRefNode MultifidusThoracisL1T8NodeROrg  = {sRel = .Scale(.Data.Right.MultifidusThoracisL1T8Node_pos); };
  AnyRefNode MultifidusThoracisL1T8NodeLOrg  = {sRel = .Scale(.Data.Left.MultifidusThoracisL1T8Node_pos); };
  AnyRefNode MultifidusThoracisL1T9NodeROrg  = {sRel = .Scale(.Data.Right.MultifidusThoracisL1T9Node_pos); };
  AnyRefNode MultifidusThoracisL1T9NodeLOrg  = {sRel = .Scale(.Data.Left.MultifidusThoracisL1T9Node_pos); };
  AnyRefNode MultifidusThoracisL1T10NodeROrg = {sRel = .Scale(.Data.Right.MultifidusThoracisL1T10Node_pos); };
  AnyRefNode MultifidusThoracisL1T10NodeLOrg = {sRel = .Scale(.Data.Left.MultifidusThoracisL1T10Node_pos); };
  AnyRefNode SpinalisL1T3NodeOrg = {sRel = .Scale(.Data.SpinalisL1T3Node_pos);};
  AnyRefNode SpinalisL1T4NodeOrg = {sRel = .Scale(.Data.SpinalisL1T4Node_pos);};
  AnyRefNode SpinalisL1T5NodeOrg = {sRel = .Scale(.Data.SpinalisL1T5Node_pos);};
  AnyRefNode SpinalisL1T2NodeOrg  = {  sRel= .Scale(.Data.SpinalisL1T2Node_pos);};
  AnyRefNode SpinalisL2T1Via1Node = {  sRel= .Scale(.Data.SpinalisL2T1Node_pos);};
  AnyRefNode O_serratus_posterior_inferior_R = {sRel = .Scale(.Data.Right.O_serratus_posterior_inferior_pos);};
  AnyRefNode O_serratus_posterior_inferior_L = {sRel = .Scale(.Data.Left.O_serratus_posterior_inferior_pos);};
  AnyRefNode O_serratus_posterior_inferior_L1R11ViaNode_R = {sRel = .Scale(.Data.Right.O_serratus_posterior_inferior_L1R11ViaNodepos);};
  AnyRefNode O_serratus_posterior_inferior_L1R11ViaNode_L = {sRel = .Scale(.Data.Left.O_serratus_posterior_inferior_L1R11ViaNodepos);};
  AnyRefNode SpinousProcess = {sRel = .Scale(.Data.SupraSpinous_superior_points[0]);};
};

Segments.L2Seg = {
  AnyRefNode MultifidusThoracisL2T9NodeROrg  = {sRel = .Scale(.Data.Right.MultifidusThoracisL2T9Node_pos);};
  AnyRefNode MultifidusThoracisL2T9NodeLOrg  = {sRel = .Scale(.Data.Left.MultifidusThoracisL2T9Node_pos);};
  AnyRefNode MultifidusThoracisL2T10NodeROrg = {sRel = .Scale(.Data.Right.MultifidusThoracisL2T10Node_pos);};
  AnyRefNode MultifidusThoracisL2T10NodeLOrg = {sRel = .Scale(.Data.Left.MultifidusThoracisL2T10Node_pos);};
  AnyRefNode MultifidusThoracisL2T11NodeROrg = {sRel = .Scale(.Data.Right.MultifidusThoracisL2T11Node_pos);};
  AnyRefNode MultifidusThoracisL2T11NodeLOrg = {sRel = .Scale(.Data.Left.MultifidusThoracisL2T11Node_pos);};
  AnyRefNode SpinalisL2T1NodeOrg =   {sRel = .Scale(.Data.SpinalisL2T1Node_pos);};
  AnyRefNode O_serratus_posterior_inferior_R = {sRel = .Scale(.Data.Right.O_serratus_posterior_inferior_pos);};
  AnyRefNode O_serratus_posterior_inferior_L = {sRel = .Scale(.Data.Left.O_serratus_posterior_inferior_pos);};
  AnyRefNode O_serratus_posterior_inferior_L2R12ViaNode_R = {sRel = .Scale(.Data.Right.O_serratus_posterior_inferior_L2R12ViaNodepos);};
  AnyRefNode O_serratus_posterior_inferior_L2R12ViaNode_L = {sRel = .Scale(.Data.Left.O_serratus_posterior_inferior_L2R12ViaNodepos);};
  AnyRefNode SpinousProcess = {sRel = .Scale(.Data.SupraSpinous_superior_points[0]);};
};

Segments.L3Seg = {
  AnyRefNode MultifidusThoracisL3T10NodeROrg = {sRel = .Scale(.Data.Right.MultifidusThoracisL3T10Node_pos);};
  AnyRefNode MultifidusThoracisL3T10NodeLOrg = {sRel = .Scale(.Data.Left.MultifidusThoracisL3T10Node_pos);};
  AnyRefNode MultifidusThoracisL3T11NodeROrg = {sRel = .Scale(.Data.Right.MultifidusThoracisL3T11Node_pos);};
  AnyRefNode MultifidusThoracisL3T11NodeLOrg = {sRel = .Scale(.Data.Left.MultifidusThoracisL3T11Node_pos);};
  AnyRefNode MultifidusThoracisL3T12NodeROrg = {sRel = .Scale(.Data.Right.MultifidusThoracisL3T12Node_pos);};
  AnyRefNode MultifidusThoracisL3T12NodeLOrg = {sRel = .Scale(.Data.Left.MultifidusThoracisL3T12Node_pos);};
  AnyRefNode SpinousProcess = {sRel = .Scale(.Data.SupraSpinous_superior_points[0]);};
};

Segments.L4Seg = {
  AnyRefNode MultifidusThoracisL4T11NodeROrg = {sRel = .Scale(.Data.Right.MultifidusThoracisL4T11Node_pos);};
  AnyRefNode MultifidusThoracisL4T11NodeLOrg = {sRel = .Scale(.Data.Left.MultifidusThoracisL4T11Node_pos);};
  AnyRefNode MultifidusThoracisL4T12NodeROrg = {sRel = .Scale(.Data.Right.MultifidusThoracisL4T12Node_pos);};
  AnyRefNode MultifidusThoracisL4T12NodeLOrg = {sRel = .Scale(.Data.Left.MultifidusThoracisL4T12Node_pos);};
  AnyRefNode SpinousProcess = {sRel = .Scale(.Data.SupraSpinous_superior_points[0]);};
};

Segments.L5Seg = {
  AnyRefNode MultifidusThoracisL5T12NodeROrg = {sRel = .Scale(.Data.Right.MultifidusThoracisL5T12Node_pos);};
  AnyRefNode MultifidusThoracisL5T12NodeLOrg = {sRel = .Scale(.Data.Left.MultifidusThoracisL5T12Node_pos);};
  AnyRefNode SpinousProcess = {sRel = .Scale(.Data.SupraSpinous_superior_points[0]);};
};

Segments.T1Seg = {
  AnyRefNode MultifidusThoracisT6T1NodeRIns = {sRel = .Scale(.Data.T1.Right.MultifidusThoracisT6T1NodeIns_pos );};
  AnyRefNode MultifidusThoracisT5T1NodeRIns = {sRel = .Scale(.Data.T1.Right.MultifidusThoracisT5T1NodeIns_pos );};
  AnyRefNode MultifidusThoracisT4T1NodeRIns = {sRel = .Scale(.Data.T1.Right.MultifidusThoracisT4T1NodeIns_pos );};
  AnyRefNode MultifidusThoracisT6T1NodeLIns = {sRel = .Scale(.Data.T1.Left.MultifidusThoracisT6T1NodeIns_pos );};
  AnyRefNode MultifidusThoracisT5T1NodeLIns = {sRel = .Scale(.Data.T1.Left.MultifidusThoracisT5T1NodeIns_pos );};
  AnyRefNode MultifidusThoracisT4T1NodeLIns = {sRel = .Scale(.Data.T1.Left.MultifidusThoracisT4T1NodeIns_pos );};
  AnyRefNode SET5T1NodeRIns = {sRel = .Scale(.Data.T1.Right.SET5T1NodeIns_pos );};
  AnyRefNode SET4T1NodeRIns = {sRel = .Scale(.Data.T1.Right.SET4T1NodeIns_pos );};
  AnyRefNode SET3T1NodeRIns = {sRel = .Scale(.Data.T1.Right.SET3T1NodeIns_pos );};
  AnyRefNode SET5T1NodeLIns = {sRel = .Scale(.Data.T1.Left.SET5T1NodeIns_pos );};
  AnyRefNode SET4T1NodeLIns = {sRel = .Scale(.Data.T1.Left.SET4T1NodeIns_pos );};
  AnyRefNode SET3T1NodeLIns = {sRel = .Scale(.Data.T1.Left.SET3T1NodeIns_pos );};
  AnyRefNode SpinalisL2T1NodeIns =  {sRel= .Scale(.Data.T1.SpinalisL2T1NodeIns_pos );};

  AnyRefNode SemispinalisThoracisT1Spinous = {sRel = .Scale(.Data.T1.SemispinalisThoracisSpinous_pos); };
  // Longissimus
  AnyRefNode LongissimusThoracisT1L1NodeR = {sRel = .Scale(.Data.Thorax.Right.LongissimusThoracisT1L1Node_pos);};
  AnyRefNode LongissimusThoracisT1L1NodeL = {sRel = .Scale(.Data.Thorax.Left.LongissimusThoracisT1L1Node_pos);};
  //Scalenus Posterior nodes
  AnyRefNode LumpedHyoidStC0NodeROrg        =     {sRel = .Scale(.Data.T1.Right.LumpedHyoidStC0Org_pos);};
  AnyRefNode LumpedHyoidStC0NodeLOrg        =     {sRel = .Scale(.Data.T1.Left.LumpedHyoidStC0Org_pos);};
  AnyRefNode LevatorCostarumT1R2ROrg                   =     {sRel =  .Scale(.Data.T1.Right.LevatorCostarumT1R2_pos);};
  AnyRefNode LevatorCostarumT1R2LOrg                   =     {sRel =  .Scale(.Data.T1.Left.LevatorCostarumT1R2_pos);};
  AnyRefNode MultifidusCervicisT1C4NodeR = {sRel = .Scale(.Data.Thorax.Right.MultifidusCervicisT1C4Node_pos);};
  AnyRefNode MultifidusCervicisT1C4NodeL = {sRel = .Scale(.Data.Thorax.Left.MultifidusCervicisT1C4Node_pos);};
  AnyRefNode MultifidusCervicisT1C5NodeR = {sRel = .Scale(.Data.Thorax.Right.MultifidusCervicisT1C5Node_pos);};
  AnyRefNode MultifidusCervicisT1C5NodeL = {sRel = .Scale(.Data.Thorax.Left.MultifidusCervicisT1C5Node_pos);};
  AnyRefNode SemispinalisCervicisT1C2NodeR = {sRel = .Scale(.Data.Thorax.Right.SemispinalisCervicisT1C2Node_pos);};
  AnyRefNode SemispinalisCervicisT1C2NodeL = {sRel = .Scale(.Data.Thorax.Left.SemispinalisCervicisT1C2Node_pos);};
  AnyRefNode O_serratus_posterior_superior_T1R = {sRel = .Scale(.Data.T1.O_serratus_posterior_superior_pos);};
  AnyRefNode O_serratus_posterior_superior_T1L = {sRel = .Scale(.Data.T1.O_serratus_posterior_superior_pos);};
  AnyRefNode C7Tip ={sRel= .Scale(.Data.T1.C7Tip_pos);};
  AnyRefNode SpinousProcess = {sRel = .Scale(.Data.T1.SupraSpinous_superior_points[0]);};
  //Longi Colli node
  Right = {
    AnyRefNode LongusColliT3C6Node = {sRel = .Scale(..Data.T1.Right.LongusColliT3C6Node_pos);};
    AnyRefNode LongusColliT2C5Node = {sRel = .Scale(..Data.T1.Right.LongusColliT2C5Node_pos);};
    AnyRefNode LongusColliT1C4Node = {sRel = .Scale(..Data.T1.Right.LongusColliT1C4Node_pos);};
    //Semispinalis Capitis node
    AnyRefNode SemispinalisCapitisT1C0Node = {sRel = ..Scale(..Data.Thorax.Right.SemispinalisCapitisT1C0Node_pos);};
    //Longissimus Capitis
    AnyRefNode LongissimusCapitisT1Node = {sRel = ..Scale(..Data.Thorax.Right.LongissimusCapitisT1Node_pos);};
    //Longissimus cervicis nodes
    AnyRefNode LongissimusCervicisT1Node = {sRel = ..Scale(..Data.Thorax.Right.LongissimusCervicisT1Node_pos);};
    //Splenius Capitis
    AnyRefNode SpleniusCapitisT1Node = {sRel = ..Scale(..Data.Thorax.Right.SpleniusCapitisT1Node_pos);};
    //Rotatores
    AnyRefNode RotatoresBrevisT1C7Node = {sRel = ..Scale(..Data.Thorax.Right.RotatoresBrevisT1C7OrgNode_pos);};
    AnyRefNode RotatoresBrevisT2T1Node = {sRel = ..Scale(..Data.Thorax.Right.RotatoresBrevisT2T1InsNode_pos);};
    AnyRefNode RotatoresLongusT3T1Node = {sRel = ..Scale(..Data.Thorax.Right.RotatoresLongusT3T1InsNode_pos);};
  };
  Left = {
    AnyRefNode LongusColliT3C6Node = {sRel = .Scale(..Data.T1.Left.LongusColliT3C6Node_pos);};
    AnyRefNode LongusColliT2C5Node = {sRel = .Scale(..Data.T1.Left.LongusColliT2C5Node_pos);};
    AnyRefNode LongusColliT1C4Node = {sRel = .Scale(..Data.T1.Left.LongusColliT1C4Node_pos);};
    //Semispinalis Capitis node
    AnyRefNode SemispinalisCapitisT1C0Node = {sRel = ..Scale(..Data.Thorax.Left.SemispinalisCapitisT1C0Node_pos);};
    //Longissimus Capitis
    AnyRefNode LongissimusCapitisT1Node = {sRel = ..Scale(..Data.Thorax.Left.LongissimusCapitisT1Node_pos);};
    //Longissimus cervicis nodes
    AnyRefNode LongissimusCervicisT1Node = {sRel = ..Scale(..Data.Thorax.Left.LongissimusCervicisT1Node_pos);};
    //Splenius Capitis
    AnyRefNode SpleniusCapitisT1Node = {sRel = ..Scale(..Data.Thorax.Left.SpleniusCapitisT1Node_pos);};
    //Rotatores
    AnyRefNode RotatoresBrevisT1C7Node = {sRel = ..Scale(..Data.Thorax.Left.RotatoresBrevisT1C7OrgNode_pos);};
    AnyRefNode RotatoresBrevisT2T1Node = {sRel = ..Scale(..Data.Thorax.Left.RotatoresBrevisT2T1InsNode_pos);};
    AnyRefNode RotatoresLongusT3T1Node = {sRel = ..Scale(..Data.Thorax.Left.RotatoresLongusT3T1InsNode_pos);};
  };

  #if BM_TRUNK_CAVITY_MODEL == _CAVITY_MODEL_VOLUME_ | BM_TRUNK_THORACIC_MODEL == _THORACIC_MODEL_FLEXIBLE_ | BM_TRUNK_THORACIC_MODEL == _THORACIC_MODEL_FLEXIBLE_KINEMATIC_ONLY_
  AnyRefNode ThoracicCavityNodes = {
    CavityPoints Level01(data=....Data.unscaled.ModelParameters.ThoracicCavity.Level01, scale_fun=..Scale) = {
      Right.points_generator = {
        amount = ......Data.unscaled.ModelParameters.ThoracicCavity.DiscretizationFactorThoracic;
        start = ..data.Right.T_StartStop[0];
        end = ..data.Right.T_StartStop[1];
      };
      Left.points_generator = {
        amount = ......Data.unscaled.ModelParameters.ThoracicCavity.DiscretizationFactorThoracic;
        start = ..data.Left.T_StartStop[0];
        end = ..data.Left.T_StartStop[1];
      };
    };

    //This is the closing points of the volume, they are constructed by repeating the midpoint of the first points in Level01.
    AnyRefNode Level00= {
      AnyRefNodeGroup Right= {
        NodeAmount = CAVITY_DISCRETIZATION; // number nodes in group
        NodeName = "nn"; // base name for
        AnyFloat point      =     0.5*(..Level01.Right.nn01.sRel + ..Level01.Left.nn01.sRel ); // translate the whole group's base no
        Node_sRels =  reshape(repmat(NodeAmount, point),{NodeAmount,3});
        AnyObjectPtrArray NodePointers = ObjSelect("nn*");
        CreateMotionOutput = {r=On;rDot=Off;rDDot=Off;Axes=Off;EulerPar=Off;omega=Off;omegaDot=Off;};
        NodeDefaults.CreateMotionOutput = {r=On;rDot=Off;rDDot=Off;Axes=Off;EulerPar=Off;omega=Off;omegaDot=Off;};
      };
      AnyRefNodeGroup Left= {
        NodeAmount = CAVITY_DISCRETIZATION; // number nodes in group
        NodeName = "nn"; // base name for
        AnyFloat point      =     0.5*(..Level01.Right.nn01.sRel + ..Level01.Left.nn01.sRel ); // translate the whole group's base no
        Node_sRels =  reshape(repmat(NodeAmount, point),{NodeAmount,3});
        AnyObjectPtrArray NodePointers = ObjSelect("nn*");
        CreateMotionOutput = {r=On;rDot=Off;rDDot=Off;Axes=Off;EulerPar=Off;omega=Off;omegaDot=Off;};
        NodeDefaults.CreateMotionOutput = {r=On;rDot=Off;rDDot=Off;Axes=Off;EulerPar=Off;omega=Off;omegaDot=Off;};
      };
    };
  };
  #endif
};

Segments.T2Seg = {
  AnyRefNode SemispinalisThoracisT2Spinous = {sRel = .Scale(.Data.T2.SemispinalisThoracisSpinous_pos ); };
  AnyRefNode MultifidusThoracisT7T2NodeRIns = {sRel = .Scale(.Data.T2.Right.MultifidusThoracisT7T2NodeIns_pos );};
  AnyRefNode MultifidusThoracisT6T2NodeRIns = {sRel = .Scale(.Data.T2.Right.MultifidusThoracisT6T2NodeIns_pos );};
  AnyRefNode MultifidusThoracisT5T2NodeRIns = {sRel = .Scale(.Data.T2.Right.MultifidusThoracisT5T2NodeIns_pos );};
  AnyRefNode MultifidusThoracisT7T2NodeLIns = {sRel = .Scale(.Data.T2.Left.MultifidusThoracisT7T2NodeIns_pos );};
  AnyRefNode MultifidusThoracisT6T2NodeLIns = {sRel = .Scale(.Data.T2.Left.MultifidusThoracisT6T2NodeIns_pos );};
  AnyRefNode MultifidusThoracisT5T2NodeLIns = {sRel = .Scale(.Data.T2.Left.MultifidusThoracisT5T2NodeIns_pos );};
  AnyRefNode SET6T2NodeRIns = {sRel = .Scale(.Data.T2.Right.SET6T2NodeIns_pos );};
  AnyRefNode SET5T2NodeRIns = {sRel = .Scale(.Data.T2.Right.SET5T2NodeIns_pos );};
  AnyRefNode SET4T2NodeRIns = {sRel = .Scale(.Data.T2.Right.SET4T2NodeIns_pos );};
  AnyRefNode SET6T2NodeLIns = {sRel = .Scale(.Data.T2.Left.SET6T2NodeIns_pos );};
  AnyRefNode SET5T2NodeLIns = {sRel = .Scale(.Data.T2.Left.SET5T2NodeIns_pos );};
  AnyRefNode SET4T2NodeLIns = {sRel = .Scale(.Data.T2.Left.SET4T2NodeIns_pos );};
  AnyRefNode SpinalisL1T2NodeIns =  {sRel= .Scale(.Data.T2.SpinalisL1T2NodeIns_pos );};
  AnyRefNode SpinalisL2T1Via12Node ={sRel= .Scale(.Data.T2.SpinalisL2T1Via12Node_pos );};
  // Longissimus
  AnyRefNode LongissimusThoracisT1L1Via1NodeR = {sRel = .Scale(.Data.Thorax.Right.LongissimusThoracisT1L1Via1Node_pos);};
  AnyRefNode LongissimusThoracisT1L1Via1NodeL = {sRel = .Scale(.Data.Thorax.Left.LongissimusThoracisT1L1Via1Node_pos);};
  AnyRefNode LongissimusThoracisT2L2NodeR     = {sRel = .Scale(.Data.Thorax.Right.LongissimusThoracisT2L2Node_pos);};
  AnyRefNode LongissimusThoracisT2L2NodeL     = {sRel = .Scale(.Data.Thorax.Left.LongissimusThoracisT2L2Node_pos);};
  AnyRefNode LevatorCostarumT2R3ROrg = {    sRel =  .Scale(.Data.T2.Right.LevatorCostarumT2R3_pos);};
  AnyRefNode LevatorCostarumT2R3LOrg = {    sRel =  .Scale(.Data.T2.Left.LevatorCostarumT2R3_pos);};
  AnyRefNode SemispinalisCervicisT2C3NodeR = {sRel = .Scale(.Data.Thorax.Right.SemispinalisCervicisT2C3Node_pos);};
  AnyRefNode SemispinalisCervicisT2C3NodeL = {sRel = .Scale(.Data.Thorax.Left.SemispinalisCervicisT2C3Node_pos);};
  AnyRefNode MultifidusCervicisT2C5NodeR = {sRel = .Scale(.Data.Thorax.Right.MultifidusCervicisT2C5Node_pos);};
  AnyRefNode MultifidusCervicisT2C5NodeL = {sRel = .Scale(.Data.Thorax.Left.MultifidusCervicisT2C5Node_pos);};
  AnyRefNode MultifidusCervicisT2C6NodeR = {sRel = .Scale(.Data.Thorax.Right.MultifidusCervicisT2C6Node_pos);};
  AnyRefNode MultifidusCervicisT2C6NodeL = {sRel = .Scale(.Data.Thorax.Left.MultifidusCervicisT2C6Node_pos);};
  AnyRefNode O_serratus_posterior_superior_T2R = {sRel = .Scale(.Data.T2.O_serratus_posterior_superior_pos);};
  AnyRefNode O_serratus_posterior_superior_T2L = {sRel = .Scale(.Data.T2.O_serratus_posterior_superior_pos);};
  AnyRefNode SpinousProcess = {sRel = .Scale(.Data.T2.SupraSpinous_superior_points[0]);};
  //Longi Colli node
  Right = {
    AnyRefNode LongusColliT3C6Node = {sRel = .Scale(..Data.T2.Right.LongusColliT3C6Node_pos);};
    AnyRefNode LongusColliT2C5Node = {sRel = .Scale(..Data.T2.Right.LongusColliT2C5Node_pos);};
    //Semispinalis Capitis node
    AnyRefNode SemispinalisCapitisT2C0Node = {sRel = ..Scale(..Data.Thorax.Right.SemispinalisCapitisT2C0Node_pos);};
    //Longissimus Capitis
    AnyRefNode LongissimusCapitisT2Node = {sRel = ..Scale(..Data.Thorax.Right.LongissimusCapitisT2Node_pos);};
    //Longissimus cervicis nodes
    AnyRefNode LongissimusCervicisT2Node = {sRel = ..Scale(..Data.Thorax.Right.LongissimusCervicisT2Node_pos);};
    //Splenius Capitis
    AnyRefNode SpleniusCapitisT2Node = {sRel = ..Scale(..Data.Thorax.Right.SpleniusCapitisT2Node_pos);};
    //Rotatores
    AnyRefNode RotatoresBrevisT2T1Node = {sRel = ..Scale(..Data.Thorax.Right.RotatoresBrevisT2T1OrgNode_pos);};
    AnyRefNode RotatoresBrevisT3T2Node = {sRel = ..Scale(..Data.Thorax.Right.RotatoresBrevisT3T2InsNode_pos);};
    AnyRefNode RotatoresLongusT2C7Node = {sRel = ..Scale(..Data.Thorax.Right.RotatoresLongusT2C7OrgNode_pos);};
    AnyRefNode RotatoresLongusT4T2Node = {sRel = ..Scale(..Data.Thorax.Right.RotatoresLongusT4T2InsNode_pos);};
  };
  Left = {
    AnyRefNode LongusColliT3C6Node = {sRel = .Scale(..Data.T2.Left.LongusColliT3C6Node_pos);};
    AnyRefNode LongusColliT2C5Node = {sRel = .Scale(..Data.T2.Left.LongusColliT2C5Node_pos);};
    //Semispinalis Capitis node
    AnyRefNode SemispinalisCapitisT2C0Node = {sRel = ..Scale(..Data.Thorax.Left.SemispinalisCapitisT2C0Node_pos);};
    //Longissimus Capitis
    AnyRefNode LongissimusCapitisT2Node = {sRel = ..Scale(..Data.Thorax.Left.LongissimusCapitisT2Node_pos);};
    //Longissimus cervicis nodes
    AnyRefNode LongissimusCervicisT2Node = {sRel = ..Scale(..Data.Thorax.Left.LongissimusCervicisT2Node_pos);};
    //Splenius Capitis
    AnyRefNode SpleniusCapitisT2Node = {sRel = ..Scale(..Data.Thorax.Left.SpleniusCapitisT2Node_pos);};
    //Rotatores
    AnyRefNode RotatoresBrevisT2T1Node = {sRel = ..Scale(..Data.Thorax.Left.RotatoresBrevisT2T1OrgNode_pos);};
    AnyRefNode RotatoresBrevisT3T2Node = {sRel = ..Scale(..Data.Thorax.Left.RotatoresBrevisT3T2InsNode_pos);};
    AnyRefNode RotatoresLongusT2C7Node = {sRel = ..Scale(..Data.Thorax.Left.RotatoresLongusT2C7OrgNode_pos);};
    AnyRefNode RotatoresLongusT4T2Node = {sRel = ..Scale(..Data.Thorax.Left.RotatoresLongusT4T2InsNode_pos);};
  };

  #if BM_TRUNK_CAVITY_MODEL == _CAVITY_MODEL_VOLUME_ | BM_TRUNK_THORACIC_MODEL == _THORACIC_MODEL_FLEXIBLE_ | BM_TRUNK_THORACIC_MODEL == _THORACIC_MODEL_FLEXIBLE_KINEMATIC_ONLY_
    AnyRefNode ThoracicCavityNodes = {
      CavityPoints Level02(data=....Data.unscaled.ModelParameters.ThoracicCavity.Level02, scale_fun=..Scale) = {
        Right.points_generator = {
          amount = ......Data.unscaled.ModelParameters.ThoracicCavity.DiscretizationFactorThoracic;
          start = ..data.Right.T_StartStop[0];
          end = ..data.Right.T_StartStop[1];
        };
        Left.points_generator = {
          amount = ......Data.unscaled.ModelParameters.ThoracicCavity.DiscretizationFactorThoracic;
          start = ..data.Left.T_StartStop[0];
          end = ..data.Left.T_StartStop[1];
        };
      };
    };
  #endif
};

Segments.T3Seg = {
  AnyRefNode SemispinalisThoracisT3Spinous = {sRel = .Scale(.Data.T3.SemispinalisThoracisSpinous_pos ); };
  AnyRefNode SpinalisL1T3NodeIns   = {sRel = .Scale(.Data.Thorax.SpinalisL1T3Node_pos);};
  AnyRefNode SpinalisL1T2Via10Node = {sRel= .Scale(.Data.T3.SpinalisL1T2Via10Node_pos );};
  AnyRefNode SpinalisL2T1Via11Node = {sRel= .Scale(.Data.T3.SpinalisL2T1Via11Node_pos );};
  AnyRefNode MultifidusThoracisT8T3NodeRIns = {sRel = .Scale(.Data.T3.Right.MultifidusThoracisT8T3NodeIns_pos );};
  AnyRefNode MultifidusThoracisT7T3NodeRIns = {sRel = .Scale(.Data.T3.Right.MultifidusThoracisT7T3NodeIns_pos );};
  AnyRefNode MultifidusThoracisT6T3NodeRIns = {sRel = .Scale(.Data.T3.Right.MultifidusThoracisT6T3NodeIns_pos );};
  AnyRefNode MultifidusThoracisT8T3NodeLIns = {sRel = .Scale(.Data.T3.Left.MultifidusThoracisT8T3NodeIns_pos );};
  AnyRefNode MultifidusThoracisT7T3NodeLIns = {sRel = .Scale(.Data.T3.Left.MultifidusThoracisT7T3NodeIns_pos );};
  AnyRefNode MultifidusThoracisT6T3NodeLIns = {sRel = .Scale(.Data.T3.Left.MultifidusThoracisT6T3NodeIns_pos );};
  AnyRefNode SET3T1NodeROrg = {sRel = .Scale(.Data.T3.Right.SET3T1NodeOrg_pos );};
  AnyRefNode SET3T1NodeLOrg = {sRel = .Scale(.Data.T3.Left.SET3T1NodeOrg_pos );};
  AnyRefNode SET7T3NodeRIns = {sRel = .Scale(.Data.T3.Right.SET7T3NodeIns_pos );};
  AnyRefNode SET6T3NodeRIns = {sRel = .Scale(.Data.T3.Right.SET6T3NodeIns_pos );};
  AnyRefNode SET5T3NodeRIns = {sRel = .Scale(.Data.T3.Right.SET5T3NodeIns_pos );};
  AnyRefNode SET7T3NodeLIns = {sRel = .Scale(.Data.T3.Left.SET7T3NodeIns_pos );};
  AnyRefNode SET6T3NodeLIns = {sRel = .Scale(.Data.T3.Left.SET6T3NodeIns_pos );};
  AnyRefNode SET5T3NodeLIns = {sRel = .Scale(.Data.T3.Left.SET5T3NodeIns_pos );};
  AnyRefNode LevatorCostarumT3R4ROrg = {    sRel =  .Scale(.Data.T3.Right.LevatorCostarumT3R4_pos);};
  AnyRefNode LevatorCostarumT3R4LOrg = {    sRel =  .Scale(.Data.T3.Left.LevatorCostarumT3R4_pos);};

  AnyRefNode SemispinalisCervicisT3C4NodeR = {sRel = .Scale(.Data.Thorax.Right.SemispinalisCervicisT3C4Node_pos);};
  AnyRefNode SemispinalisCervicisT3C4NodeL = {sRel = .Scale(.Data.Thorax.Left.SemispinalisCervicisT3C4Node_pos);};
  AnyRefNode MultifidusCervicisT3C6NodeR = {sRel = .Scale(.Data.Thorax.Right.MultifidusCervicisT3C6Node_pos);};
  AnyRefNode MultifidusCervicisT3C6NodeL = {sRel = .Scale(.Data.Thorax.Left.MultifidusCervicisT3C6Node_pos);};
  AnyRefNode MultifidusCervicisT3C7NodeR = {sRel = .Scale(.Data.Thorax.Right.MultifidusCervicisT3C7Node_pos);};
  AnyRefNode MultifidusCervicisT3C7NodeL = {sRel = .Scale(.Data.Thorax.Left.MultifidusCervicisT3C7Node_pos);};
  // Longissimus
  AnyRefNode LongissimusThoracisT1L1Via2NodeR = {sRel = .Scale(.Data.Thorax.Right.LongissimusThoracisT1L1Via2Node_pos);};
  AnyRefNode LongissimusThoracisT1L1Via2NodeL = {sRel = .Scale(.Data.Thorax.Left.LongissimusThoracisT1L1Via2Node_pos);};
  AnyRefNode LongissimusThoracisT2L2Via1NodeR = {sRel = .Scale(.Data.Thorax.Right.LongissimusThoracisT2L2Via1Node_pos);};
  AnyRefNode LongissimusThoracisT2L2Via1NodeL = {sRel = .Scale(.Data.Thorax.Left.LongissimusThoracisT2L2Via1Node_pos);};
  AnyRefNode LongissimusThoracisT3L3NodeR  = { sRel =  .Scale(.Data.Thorax.Right.LongissimusThoracisT3L3Node_pos);  };
  AnyRefNode LongissimusThoracisT3L3NodeL  = { sRel =  .Scale(.Data.Thorax.Left.LongissimusThoracisT3L3Node_pos);  };
//  AnyRefNode LongissimusThoracisR3L3NodeR  = { sRel =  .Scale(.Data.Thorax.Right.LongissimusThoracisR3L3Node_pos);  };
//  AnyRefNode LongissimusThoracisR3L3NodeL  = { sRel =  .Scale(.Data.Thorax.Left.LongissimusThoracisR3L3Node_pos);  };
  AnyRefNode O_serratus_posterior_superior_T3R = {sRel = .Scale(.Data.T3.O_serratus_posterior_superior_pos);};
  AnyRefNode O_serratus_posterior_superior_T3L = {sRel = .Scale(.Data.T3.O_serratus_posterior_superior_pos);};
  AnyRefNode SpinousProcess = {sRel = .Scale(.Data.T3.SupraSpinous_superior_points[0]);};

  Right = {
    //Longi Colli node
    AnyRefNode LongusColliT3C6Node = {sRel = .Scale(..Data.T3.Right.LongusColliT3C6Node_pos);};
    //Semispinalis Capitis node
    AnyRefNode SemispinalisCapitisT3C0Node = {sRel = ..Scale(..Data.Thorax.Right.SemispinalisCapitisT3C0Node_pos);};
    //Longissimus Capitis
    AnyRefNode LongissimusCapitisT3Node = {sRel = ..Scale(..Data.Thorax.Right.LongissimusCapitisT3Node_pos);};
    //Longissimus cervicis nodes
    AnyRefNode LongissimusCervicisT3Node = {sRel = ..Scale(..Data.Thorax.Right.LongissimusCervicisT3Node_pos);};
    //Splenius Capitis
    AnyRefNode SpleniusCapitisT3Node = {sRel = ..Scale(..Data.Thorax.Right.SpleniusCapitisT3Node_pos);};
    //Splenius Cervicis
    AnyRefNode SpleniusCervicisNode = {sRel = ..Scale(..Data.Thorax.Right.SpleniusCervicisT3Node_pos);};
    //Rotatores
    AnyRefNode RotatoresBrevisT3T2Node = {sRel = ..Scale(..Data.Thorax.Right.RotatoresBrevisT3T2OrgNode_pos);};
    AnyRefNode RotatoresBrevisT4T3Node = {sRel = ..Scale(..Data.Thorax.Right.RotatoresBrevisT4T3InsNode_pos);};
    AnyRefNode RotatoresLongusT3T1Node = {sRel = ..Scale(..Data.Thorax.Right.RotatoresLongusT3T1OrgNode_pos);};
    AnyRefNode RotatoresLongusT5T3Node = {sRel = ..Scale(..Data.Thorax.Right.RotatoresLongusT5T3InsNode_pos);};
  };
  Left = {
    //Longi Colli node
    AnyRefNode LongusColliT3C6Node = {sRel = .Scale(..Data.T3.Left.LongusColliT3C6Node_pos);};
    //Semispinalis Capitis node
    AnyRefNode SemispinalisCapitisT3C0Node = {sRel = ..Scale(..Data.Thorax.Left.SemispinalisCapitisT3C0Node_pos);};
    //Longissimus Capitis
    AnyRefNode LongissimusCapitisT3Node = {sRel = ..Scale(..Data.Thorax.Left.LongissimusCapitisT3Node_pos);};
    //Longissimus cervicis nodes
    AnyRefNode LongissimusCervicisT3Node = {sRel = ..Scale(..Data.Thorax.Left.LongissimusCervicisT3Node_pos);};
    //Splenius Capitis
    AnyRefNode SpleniusCapitisT3Node = {sRel = ..Scale(..Data.Thorax.Left.SpleniusCapitisT3Node_pos);};
    //Splenius Cervicis
    AnyRefNode SpleniusCervicisNode = {sRel = ..Scale(..Data.Thorax.Left.SpleniusCervicisT3Node_pos);};
    //Rotatores
    AnyRefNode RotatoresBrevisT3T2Node = {sRel = ..Scale(..Data.Thorax.Left.RotatoresBrevisT3T2OrgNode_pos);};
    AnyRefNode RotatoresBrevisT4T3Node = {sRel = ..Scale(..Data.Thorax.Left.RotatoresBrevisT4T3InsNode_pos);};
    AnyRefNode RotatoresLongusT3T1Node = {sRel = ..Scale(..Data.Thorax.Left.RotatoresLongusT3T1OrgNode_pos);};
    AnyRefNode RotatoresLongusT5T3Node = {sRel = ..Scale(..Data.Thorax.Left.RotatoresLongusT5T3InsNode_pos);};
  };

  #if BM_TRUNK_CAVITY_MODEL == _CAVITY_MODEL_VOLUME_ | BM_TRUNK_THORACIC_MODEL == _THORACIC_MODEL_FLEXIBLE_ | BM_TRUNK_THORACIC_MODEL == _THORACIC_MODEL_FLEXIBLE_KINEMATIC_ONLY_
    AnyRefNode ThoracicCavityNodes = {
        CavityPoints Level03(data=....Data.unscaled.ModelParameters.ThoracicCavity.Level03, scale_fun=..Scale) = {
          Right.points_generator = {
            amount = ......Data.unscaled.ModelParameters.ThoracicCavity.DiscretizationFactorThoracic;
            start = ..data.Right.T_StartStop[0];
            end = ..data.Right.T_StartStop[1];
          };
          Left.points_generator = {
            amount = ......Data.unscaled.ModelParameters.ThoracicCavity.DiscretizationFactorThoracic;
            start = ..data.Left.T_StartStop[0];
            end = ..data.Left.T_StartStop[1];
          };
        };
      };
    #endif
};

Segments.T4Seg = {
  AnyRefNode SemispinalisThoracisT4Spinous = {sRel = .Scale(.Data.T4.SemispinalisThoracisSpinous_pos ); };
  AnyRefNode SpinalisL1T4NodeIns  = {sRel = .Scale(.Data.Thorax.SpinalisL1T4Node_pos);};
  AnyRefNode SpinalisT12T4NodeIns = {sRel= .Scale(.Data.T4.SpinalisT12T4NodeIns_pos );};
  AnyRefNode SpinalisL1T3Via9Node = {sRel= .Scale(.Data.T4.SpinalisL1T3Via9Node_pos );};
  AnyRefNode SpinalisL1T2Via9Node = {sRel= .Scale(.Data.T4.SpinalisL1T2Via9Node_pos );};
  AnyRefNode SpinalisL2T1Via10Node= {sRel= .Scale(.Data.T4.SpinalisL2T1Via10Node_pos );};
  AnyRefNode MultifidusThoracisT4T1NodeROrg = {sRel = .Scale(.Data.T4.Right.MultifidusThoracisT4T1NodeOrg_pos );};
  AnyRefNode MultifidusThoracisT4T1NodeLOrg = {sRel = .Scale(.Data.T4.Left.MultifidusThoracisT4T1NodeOrg_pos );};
  AnyRefNode MultifidusThoracisT9T4NodeRIns = {sRel = .Scale(.Data.T4.Right.MultifidusThoracisT9T4NodeIns_pos );};
  AnyRefNode MultifidusThoracisT8T4NodeRIns = {sRel = .Scale(.Data.T4.Right.MultifidusThoracisT8T4NodeIns_pos );};
  AnyRefNode MultifidusThoracisT7T4NodeRIns = {sRel = .Scale(.Data.T4.Right.MultifidusThoracisT7T4NodeIns_pos );};
  AnyRefNode MultifidusThoracisT9T4NodeLIns = {sRel = .Scale(.Data.T4.Left.MultifidusThoracisT9T4NodeIns_pos );};
  AnyRefNode MultifidusThoracisT8T4NodeLIns = {sRel = .Scale(.Data.T4.Left.MultifidusThoracisT8T4NodeIns_pos );};
  AnyRefNode MultifidusThoracisT7T4NodeLIns = {sRel = .Scale(.Data.T4.Left.MultifidusThoracisT7T4NodeIns_pos );};
  AnyRefNode SET4T1NodeROrg = {sRel = .Scale(.Data.T4.Right.SET4T1NodeOrg_pos );};
  AnyRefNode SET4T2NodeROrg = {sRel = .Scale(.Data.T4.Right.SET4T2NodeOrg_pos );};
  AnyRefNode SET4T1NodeLOrg = {sRel = .Scale(.Data.T4.Left.SET4T1NodeOrg_pos );};
  AnyRefNode SET4T2NodeLOrg = {sRel = .Scale(.Data.T4.Left.SET4T2NodeOrg_pos );};
  AnyRefNode SET8T4NodeRIns = {sRel = .Scale(.Data.T4.Right.SET8T4NodeIns_pos );};
  AnyRefNode SET7T4NodeRIns = {sRel = .Scale(.Data.T4.Right.SET7T4NodeIns_pos );};
  AnyRefNode SET6T4NodeRIns = {sRel = .Scale(.Data.T4.Right.SET6T4NodeIns_pos );};
  AnyRefNode SET8T4NodeLIns = {sRel = .Scale(.Data.T4.Left.SET8T4NodeIns_pos );};
  AnyRefNode SET7T4NodeLIns = {sRel = .Scale(.Data.T4.Left.SET7T4NodeIns_pos );};
  AnyRefNode SET6T4NodeLIns = {sRel = .Scale(.Data.T4.Left.SET6T4NodeIns_pos );};
  AnyRefNode SemispinalisCervicisT4C5NodeR = {sRel = .Scale(.Data.Thorax.Right.SemispinalisCervicisT4C5Node_pos);};
  AnyRefNode SemispinalisCervicisT4C5NodeL = {sRel = .Scale(.Data.Thorax.Left.SemispinalisCervicisT4C5Node_pos);};
  // Longissimus
  AnyRefNode LevatorCostarumT4R5ROrg = {    sRel = .Scale(.Data.T4.Right.LevatorCostarumT4R5_pos);};
  AnyRefNode LevatorCostarumT4R5LOrg = {    sRel = .Scale(.Data.T4.Left.LevatorCostarumT4R5_pos);};
  AnyRefNode LongissimusThoracisT1L1Via3NodeR = {sRel = .Scale(.Data.Thorax.Right.LongissimusThoracisT1L1Via3Node_pos);};
  AnyRefNode LongissimusThoracisT1L1Via3NodeL = {sRel = .Scale(.Data.Thorax.Left.LongissimusThoracisT1L1Via3Node_pos);};
  AnyRefNode LongissimusThoracisT2L2Via2NodeR = {sRel = .Scale(.Data.Thorax.Right.LongissimusThoracisT2L2Via2Node_pos);};
  AnyRefNode LongissimusThoracisT2L2Via2NodeL = {sRel = .Scale(.Data.Thorax.Left.LongissimusThoracisT2L2Via2Node_pos);};
  AnyRefNode LongissimusThoracisT3L3Via1NodeR= { sRel =  .Scale(.Data.Thorax.Right.LongissimusThoracisT3L3Via1Node_pos);};
  AnyRefNode LongissimusThoracisT3L3Via1NodeL= { sRel =  .Scale(.Data.Thorax.Left.LongissimusThoracisT3L3Via1Node_pos);};
  AnyRefNode LongissimusThoracisT4L4NodeR    = { sRel =  .Scale(.Data.Thorax.Right.LongissimusThoracisT4L4Node_pos);};
  AnyRefNode LongissimusThoracisT4L4NodeL    = { sRel =  .Scale(.Data.Thorax.Left.LongissimusThoracisT4L4Node_pos);};
//  AnyRefNode LongissimusThoracisR3L3Via1NodeR= { sRel =  .Scale(.Data.Thorax.Right.LongissimusThoracisR3L3Via1Node_pos);};
//  AnyRefNode LongissimusThoracisR3L3Via1NodeL= { sRel =  .Scale(.Data.Thorax.Left.LongissimusThoracisR3L3Via1Node_pos);};
//  AnyRefNode LongissimusThoracisR4L4NodeR    = { sRel =  .Scale(.Data.Thorax.Right.LongissimusThoracisR4L4Node_pos);};
//  AnyRefNode LongissimusThoracisR4L4NodeL    = { sRel =  .Scale(.Data.Thorax.Left.LongissimusThoracisR4L4Node_pos);};
  AnyRefNode MultifidusCervicisT4C7NodeR = {sRel = .Scale(.Data.Thorax.Right.MultifidusCervicisT4C7Node_pos);};
  AnyRefNode MultifidusCervicisT4C7NodeL = {sRel = .Scale(.Data.Thorax.Left.MultifidusCervicisT4C7Node_pos);};
  AnyRefNode SpinousProcess = {sRel = .Scale(.Data.T4.SupraSpinous_superior_points[0]);};

  Right = {
    //Semispinalis Capitis node
    AnyRefNode SemispinalisCapitisT4C0Node = {sRel = ..Scale(..Data.Thorax.Right.SemispinalisCapitisT4C0Node_pos);};
    //Longissimus Capitis
    AnyRefNode LongissimusCapitisT4Node = {sRel = ..Scale(..Data.Thorax.Right.LongissimusCapitisT4Node_pos);};
    //Longissimus cervicis nodes
    AnyRefNode LongissimusCervicisT4Node = {sRel = ..Scale(..Data.Thorax.Right.LongissimusCervicisT4Node_pos);};
    //Splenius Cervicis
    AnyRefNode SpleniusCervicisNode = {sRel = ..Scale(..Data.Thorax.Right.SpleniusCervicisT4Node_pos);};
    //Rotatores
    AnyRefNode RotatoresBrevisT4T3Node = {sRel = ..Scale(..Data.Thorax.Right.RotatoresBrevisT4T3OrgNode_pos);};
    AnyRefNode RotatoresBrevisT5T4Node = {sRel = ..Scale(..Data.Thorax.Right.RotatoresBrevisT5T4InsNode_pos);};
    AnyRefNode RotatoresLongusT4T2Node = {sRel = ..Scale(..Data.Thorax.Right.RotatoresLongusT4T2OrgNode_pos);};
    AnyRefNode RotatoresLongusT6T4Node = {sRel = ..Scale(..Data.Thorax.Right.RotatoresLongusT6T4InsNode_pos);};
  };
  Left = {
    //Semispinalis Capitis node
    AnyRefNode SemispinalisCapitisT4C0Node = {sRel = ..Scale(..Data.Thorax.Left.SemispinalisCapitisT4C0Node_pos);};
    //Longissimus Capitis
    AnyRefNode LongissimusCapitisT4Node = {sRel = ..Scale(..Data.Thorax.Left.LongissimusCapitisT4Node_pos);};
    //Longissimus cervicis nodes
    AnyRefNode LongissimusCervicisT4Node = {sRel = ..Scale(..Data.Thorax.Left.LongissimusCervicisT4Node_pos);};
    //Splenius Cervicis
    AnyRefNode SpleniusCervicisNode = {sRel = ..Scale(..Data.Thorax.Left.SpleniusCervicisT4Node_pos);};
    //Rotatores
    AnyRefNode RotatoresBrevisT4T3Node = {sRel = ..Scale(..Data.Thorax.Left.RotatoresBrevisT4T3OrgNode_pos);};
    AnyRefNode RotatoresBrevisT5T4Node = {sRel = ..Scale(..Data.Thorax.Left.RotatoresBrevisT5T4InsNode_pos);};
    AnyRefNode RotatoresLongusT4T2Node = {sRel = ..Scale(..Data.Thorax.Left.RotatoresLongusT4T2OrgNode_pos);};
    AnyRefNode RotatoresLongusT6T4Node = {sRel = ..Scale(..Data.Thorax.Left.RotatoresLongusT6T4InsNode_pos);};
  };

  #if BM_TRUNK_CAVITY_MODEL == _CAVITY_MODEL_VOLUME_ | BM_TRUNK_THORACIC_MODEL == _THORACIC_MODEL_FLEXIBLE_ | BM_TRUNK_THORACIC_MODEL == _THORACIC_MODEL_FLEXIBLE_KINEMATIC_ONLY_
    AnyRefNode ThoracicCavityNodes = {
      CavityPoints Level04(data=....Data.unscaled.ModelParameters.ThoracicCavity.Level04, scale_fun=..Scale) = {
        Right.points_generator = {
          amount = ......Data.unscaled.ModelParameters.ThoracicCavity.DiscretizationFactorThoracic;
          start = ..data.Right.T_StartStop[0];
          end = ..data.Right.T_StartStop[1];
        };
        Left.points_generator = {
          amount = ......Data.unscaled.ModelParameters.ThoracicCavity.DiscretizationFactorThoracic;
          start = ..data.Left.T_StartStop[0];
          end = ..data.Left.T_StartStop[1];
        };
      };
    };
  #endif
};

Segments.T5Seg = {
  AnyRefNode MultifidusThoracisT5T1NodeROrg = {sRel = .Scale(.Data.T5.Right.MultifidusThoracisT5T1NodeOrg_pos );};
  AnyRefNode MultifidusThoracisT5T2NodeROrg = {sRel = .Scale(.Data.T5.Right.MultifidusThoracisT5T2NodeOrg_pos );};
  AnyRefNode MultifidusThoracisT5T1NodeLOrg = {sRel = .Scale(.Data.T5.Left.MultifidusThoracisT5T1NodeOrg_pos );};
  AnyRefNode MultifidusThoracisT5T2NodeLOrg = {sRel = .Scale(.Data.T5.Left.MultifidusThoracisT5T2NodeOrg_pos );};
  AnyRefNode MultifidusThoracisT10T5NodeRIns = {sRel = .Scale(.Data.T5.Right.MultifidusThoracisT10T5NodeIns_pos );};
  AnyRefNode MultifidusThoracisT9T5NodeRIns  = {sRel = .Scale(.Data.T5.Right.MultifidusThoracisT9T5NodeIns_pos );};
  AnyRefNode MultifidusThoracisT8T5NodeRIns  = {sRel = .Scale(.Data.T5.Right.MultifidusThoracisT8T5NodeIns_pos );};
  AnyRefNode MultifidusThoracisT10T5NodeLIns = {sRel = .Scale(.Data.T5.Left.MultifidusThoracisT10T5NodeIns_pos );};
  AnyRefNode MultifidusThoracisT9T5NodeLIns  = {sRel = .Scale(.Data.T5.Left.MultifidusThoracisT9T5NodeIns_pos );};
  AnyRefNode MultifidusThoracisT8T5NodeLIns  = {sRel = .Scale(.Data.T5.Left.MultifidusThoracisT8T5NodeIns_pos );};
  AnyRefNode SET5T1NodeR = {sRel = .Scale(.Data.T5.Right.SET5T1Node_pos );};
  AnyRefNode SET5T2NodeR = {sRel = .Scale(.Data.T5.Right.SET5T2Node_pos );};
  AnyRefNode SET5T3NodeR = {sRel = .Scale(.Data.T5.Right.SET5T3Node_pos );};
  AnyRefNode SET5T1NodeL = {sRel = .Scale(.Data.T5.Left.SET5T1Node_pos );};
  AnyRefNode SET5T2NodeL = {sRel = .Scale(.Data.T5.Left.SET5T2Node_pos );};
  AnyRefNode SET5T3NodeL = {sRel = .Scale(.Data.T5.Left.SET5T3Node_pos );};
  AnyRefNode SET9T5NodeRIns = {sRel = .Scale(.Data.T5.Right.SET9T5NodeIns_pos );};
  AnyRefNode SET8T5NodeRIns = {sRel = .Scale(.Data.T5.Right.SET8T5NodeIns_pos );};
  AnyRefNode SET7T5NodeRIns = {sRel = .Scale(.Data.T5.Right.SET7T5NodeIns_pos );};
  AnyRefNode SET9T5NodeLIns = {sRel = .Scale(.Data.T5.Left.SET9T5NodeIns_pos );};
  AnyRefNode SET8T5NodeLIns = {sRel = .Scale(.Data.T5.Left.SET8T5NodeIns_pos );};
  AnyRefNode SET7T5NodeLIns = {sRel = .Scale(.Data.T5.Left.SET7T5NodeIns_pos );};
  AnyRefNode SpinalisL1T5NodeIns   = {sRel = .Scale(.Data.Thorax.SpinalisL1T5Node_pos );};
  AnyRefNode SpinalisT12T5NodeIns = {sRel= .Scale(.Data.T5.SpinalisT12T5NodeIns_pos );};
  AnyRefNode SpinalisT12T4Via7Node = {sRel= .Scale(.Data.T5.SpinalisT12T4Via7Node_pos );};
  AnyRefNode SpinalisL1T3Via8Node = {sRel= .Scale(.Data.T5.SpinalisL1T3Via8Node_pos );};
  AnyRefNode SpinalisL1T2Via8Node = {sRel= .Scale(.Data.T5.SpinalisL1T2Via8Node_pos );};
  AnyRefNode SpinalisL2T1Via9Node = {sRel= .Scale(.Data.T5.SpinalisL2T1Via9Node_pos );};
  AnyRefNode LongissimusThoracisT1L1Via4NodeR = {sRel = .Scale(.Data.Thorax.Right.LongissimusThoracisT1L1Via4Node_pos);};
  AnyRefNode LongissimusThoracisT1L1Via4NodeL = {sRel = .Scale(.Data.Thorax.Left.LongissimusThoracisT1L1Via4Node_pos);};
  AnyRefNode LongissimusThoracisT2L2Via3NodeR = {sRel = .Scale(.Data.Thorax.Right.LongissimusThoracisT2L2Via3Node_pos);};
  AnyRefNode LongissimusThoracisT2L2Via3NodeL = {sRel = .Scale(.Data.Thorax.Left.LongissimusThoracisT2L2Via3Node_pos);};
  AnyRefNode LongissimusThoracisT3L3Via2NodeR= { sRel =  .Scale(.Data.Thorax.Right.LongissimusThoracisT3L3Via2Node_pos);};
  AnyRefNode LongissimusThoracisT3L3Via2NodeL= { sRel =  .Scale(.Data.Thorax.Left.LongissimusThoracisT3L3Via2Node_pos);};
  AnyRefNode LongissimusThoracisT4L4Via1NodeR= { sRel =  .Scale(.Data.Thorax.Right.LongissimusThoracisT4L4Via1Node_pos);};
  AnyRefNode LongissimusThoracisT4L4Via1NodeL= { sRel =  .Scale(.Data.Thorax.Left.LongissimusThoracisT4L4Via1Node_pos);};
  AnyRefNode LongissimusThoracisT5L5NodeR    = { sRel =  .Scale(.Data.Thorax.Right.LongissimusThoracisT5L5Node_pos);};
  AnyRefNode LongissimusThoracisT5L5NodeL    = { sRel =  .Scale(.Data.Thorax.Left.LongissimusThoracisT5L5Node_pos);};
  AnyRefNode LongissimusThoracisR3L3Via2NodeR= { sRel =  .Scale(.Data.Thorax.Right.LongissimusThoracisR3L3Via2Node_pos);};
  AnyRefNode LongissimusThoracisR3L3Via2NodeL= { sRel =  .Scale(.Data.Thorax.Left.LongissimusThoracisR3L3Via2Node_pos);};
  AnyRefNode LongissimusThoracisR4L4Via1NodeR= { sRel =  .Scale(.Data.Thorax.Right.LongissimusThoracisR4L4Via1Node_pos);};
  AnyRefNode LongissimusThoracisR4L4Via1NodeL= { sRel =  .Scale(.Data.Thorax.Left.LongissimusThoracisR4L4Via1Node_pos);};
  AnyRefNode LongissimusThoracisR5L5NodeR    = { sRel =  .Scale(.Data.Thorax.Right.LongissimusThoracisR5L5Node_pos);};
  AnyRefNode LongissimusThoracisR5L5NodeL    = { sRel =  .Scale(.Data.Thorax.Left.LongissimusThoracisR5L5Node_pos);};
  AnyRefNode SemispinalisCervicisT5C6NodeR = {sRel = .Scale(.Data.Thorax.Right.SemispinalisCervicisT5C6Node_pos);};
  AnyRefNode SemispinalisCervicisT5C6NodeL = {sRel = .Scale(.Data.Thorax.Left.SemispinalisCervicisT5C6Node_pos);};
  AnyRefNode LevatorCostarumT5R6ROrg = {    sRel =  .Scale(.Data.T5.Right.LevatorCostarumT5R6_pos);};
  AnyRefNode LevatorCostarumT5R6LOrg = {    sRel =  .Scale(.Data.T5.Left.LevatorCostarumT5R6_pos);};
  AnyRefNode LevatorCostarumT5R7ROrg = {    sRel =  .Scale(.Data.T5.Right.LevatorCostarumT5R7_pos);};
  AnyRefNode LevatorCostarumT5R7LOrg = {    sRel =  .Scale(.Data.T5.Left.LevatorCostarumT5R7_pos);};
  AnyRefNode SpinousProcess = {sRel = .Scale(.Data.T5.SupraSpinous_superior_points[0]);};

  Right = {
    //Semispinalis Capitis node
    AnyRefNode SemispinalisCapitisT5C0Node = {sRel = ..Scale(..Data.Thorax.Right.SemispinalisCapitisT5C0Node_pos);};
    //Longissimus Capitis
    AnyRefNode LongissimusCapitisT5Node = {sRel = ..Scale(..Data.Thorax.Right.LongissimusCapitisT5Node_pos);};
    //Longissimus cervicis nodes
    AnyRefNode LongissimusCervicisT5Node = {sRel = ..Scale(..Data.Thorax.Right.LongissimusCervicisT5Node_pos);};
    //Splenius Cervicis
    AnyRefNode SpleniusCervicisNode = {sRel = ..Scale(..Data.Thorax.Right.SpleniusCervicisT5Node_pos);};
    //Rotatores
    AnyRefNode RotatoresBrevisT5T4Node = {sRel = ..Scale(..Data.Thorax.Right.RotatoresBrevisT5T4OrgNode_pos);};
    AnyRefNode RotatoresBrevisT6T5Node = {sRel = ..Scale(..Data.Thorax.Right.RotatoresBrevisT6T5InsNode_pos);};
    AnyRefNode RotatoresLongusT5T3Node = {sRel = ..Scale(..Data.Thorax.Right.RotatoresLongusT5T3OrgNode_pos);};
    AnyRefNode RotatoresLongusT7T5Node = {sRel = ..Scale(..Data.Thorax.Right.RotatoresLongusT7T5InsNode_pos);};
  };
  Left = {
    //Semispinalis Capitis node
    AnyRefNode SemispinalisCapitisT5C0Node = {sRel = ..Scale(..Data.Thorax.Left.SemispinalisCapitisT5C0Node_pos);};
    //Longissimus Capitis
    AnyRefNode LongissimusCapitisT5Node = {sRel = ..Scale(..Data.Thorax.Left.LongissimusCapitisT5Node_pos);};
    //Longissimus cervicis nodes
    AnyRefNode LongissimusCervicisT5Node = {sRel = ..Scale(..Data.Thorax.Left.LongissimusCervicisT5Node_pos);};
    //Splenius Cervicis
    AnyRefNode SpleniusCervicisNode = {sRel = ..Scale(..Data.Thorax.Left.SpleniusCervicisT5Node_pos);};
    //Rotatores
    AnyRefNode RotatoresBrevisT5T4Node = {sRel = ..Scale(..Data.Thorax.Left.RotatoresBrevisT5T4OrgNode_pos);};
    AnyRefNode RotatoresBrevisT6T5Node = {sRel = ..Scale(..Data.Thorax.Left.RotatoresBrevisT6T5InsNode_pos);};
    AnyRefNode RotatoresLongusT5T3Node = {sRel = ..Scale(..Data.Thorax.Left.RotatoresLongusT5T3OrgNode_pos);};
    AnyRefNode RotatoresLongusT7T5Node = {sRel = ..Scale(..Data.Thorax.Left.RotatoresLongusT7T5InsNode_pos);};
  };

  #if BM_TRUNK_CAVITY_MODEL == _CAVITY_MODEL_VOLUME_ | BM_TRUNK_THORACIC_MODEL == _THORACIC_MODEL_FLEXIBLE_ | BM_TRUNK_THORACIC_MODEL == _THORACIC_MODEL_FLEXIBLE_KINEMATIC_ONLY_
    AnyRefNode ThoracicCavityNodes = {
      CavityPoints Level05(data=....Data.unscaled.ModelParameters.ThoracicCavity.Level05, scale_fun=..Scale) = {
        Right.points_generator = {
          amount = ......Data.unscaled.ModelParameters.ThoracicCavity.DiscretizationFactorThoracic;
          start = ..data.Right.T_StartStop[0];
          end = ..data.Right.T_StartStop[1];
        };
        Left.points_generator = {
          amount = ......Data.unscaled.ModelParameters.ThoracicCavity.DiscretizationFactorThoracic;
          start = ..data.Left.T_StartStop[0];
          end = ..data.Left.T_StartStop[1];
        };
      };
    };
  #endif
};

Segments.T6Seg = {
  AnyRefNode MultifidusThoracisT6T1NodeROrg = {sRel = .Scale(.Data.T6.Right.MultifidusThoracisT6T1NodeOrg_pos );};
  AnyRefNode MultifidusThoracisT6T2NodeROrg = {sRel = .Scale(.Data.T6.Right.MultifidusThoracisT6T2NodeOrg_pos );};
  AnyRefNode MultifidusThoracisT6T3NodeROrg = {sRel = .Scale(.Data.T6.Right.MultifidusThoracisT6T3NodeOrg_pos );};
  AnyRefNode MultifidusThoracisT6T1NodeLOrg = {sRel = .Scale(.Data.T6.Left.MultifidusThoracisT6T1NodeOrg_pos );};
  AnyRefNode MultifidusThoracisT6T2NodeLOrg = {sRel = .Scale(.Data.T6.Left.MultifidusThoracisT6T2NodeOrg_pos );};
  AnyRefNode MultifidusThoracisT6T3NodeLOrg = {sRel = .Scale(.Data.T6.Left.MultifidusThoracisT6T3NodeOrg_pos );};
  AnyRefNode MultifidusThoracisT11T6NodeRIns = {sRel = .Scale(.Data.T6.Right.MultifidusThoracisT11T6NodeIns_pos );};
  AnyRefNode MultifidusThoracisT10T6NodeRIns = {sRel = .Scale(.Data.T6.Right.MultifidusThoracisT10T6NodeIns_pos );};
  AnyRefNode MultifidusThoracisT9T6NodeRIns  = {sRel = .Scale(.Data.T6.Right.MultifidusThoracisT9T6NodeIns_pos );};
  AnyRefNode MultifidusThoracisT11T6NodeLIns = {sRel = .Scale(.Data.T6.Left.MultifidusThoracisT11T6NodeIns_pos );};
  AnyRefNode MultifidusThoracisT10T6NodeLIns = {sRel = .Scale(.Data.T6.Left.MultifidusThoracisT10T6NodeIns_pos );};
  AnyRefNode MultifidusThoracisT9T6NodeLIns  = {sRel = .Scale(.Data.T6.Left.MultifidusThoracisT9T6NodeIns_pos );};
  AnyRefNode SET6T2NodeROrg = {sRel = .Scale(.Data.T6.Right.SET6T2NodeOrg_pos );};
  AnyRefNode SET6T3NodeROrg = {sRel = .Scale(.Data.T6.Right.SET6T3NodeOrg_pos );};
  AnyRefNode SET6T4NodeROrg = {sRel = .Scale(.Data.T6.Right.SET6T4NodeOrg_pos );};
  AnyRefNode SET6T2NodeLOrg = {sRel = .Scale(.Data.T6.Left.SET6T2NodeOrg_pos );};
  AnyRefNode SET6T3NodeLOrg = {sRel = .Scale(.Data.T6.Left.SET6T3NodeOrg_pos );};
  AnyRefNode SET6T4NodeLOrg = {sRel = .Scale(.Data.T6.Left.SET6T4NodeOrg_pos );};
  AnyRefNode SET10T6NodeRIns = {sRel = .Scale(.Data.T6.Right.SET10T6NodeIns_pos );};
  AnyRefNode SET9T6NodeRIns  = {sRel = .Scale(.Data.T6.Right.SET9T6NodeIns_pos );};
  AnyRefNode SET8T6NodeRIns  = {sRel = .Scale(.Data.T6.Right.SET8T6NodeIns_pos );};
  AnyRefNode SET10T6NodeLIns = {sRel = .Scale(.Data.T6.Left.SET10T6NodeIns_pos );};
  AnyRefNode SET9T6NodeLIns  = {sRel = .Scale(.Data.T6.Left.SET9T6NodeIns_pos );};
  AnyRefNode SET8T6NodeLIns  = {sRel = .Scale(.Data.T6.Left.SET8T6NodeIns_pos );};
  AnyRefNode SpinalisT11T6NodeIns = {sRel= .Scale(.Data.T6.SpinalisT11T6NodeIns_pos );};
  AnyRefNode SpinalisT12T5Via6Node = {sRel= .Scale(.Data.T6.SpinalisT12T5Via6Node_pos );};
  AnyRefNode SpinalisT12T4Via6Node = {sRel= .Scale(.Data.T6.SpinalisT12T4Via6Node_pos );};
  AnyRefNode SpinalisL1T3Via7Node = {sRel= .Scale(.Data.T6.SpinalisL1T3Via7Node_pos );};
  AnyRefNode SpinalisL1T2Via7Node = {sRel= .Scale(.Data.T6.SpinalisL1T2Via7Node_pos );};
  AnyRefNode SpinalisL2T1Via8Node = {sRel= .Scale(.Data.T6.SpinalisL2T1Via8Node_pos );};
  // Longissimus
  AnyRefNode LongissimusThoracisT1L1Via5NodeR = {sRel = .Scale(.Data.Thorax.Right.LongissimusThoracisT1L1Via5Node_pos);};
  AnyRefNode LongissimusThoracisT1L1Via5NodeL = {sRel = .Scale(.Data.Thorax.Left.LongissimusThoracisT1L1Via5Node_pos);};
  AnyRefNode LongissimusThoracisT2L2Via4NodeR = {sRel = .Scale(.Data.Thorax.Right.LongissimusThoracisT2L2Via4Node_pos);};
  AnyRefNode LongissimusThoracisT2L2Via4NodeL = {sRel = .Scale(.Data.Thorax.Left.LongissimusThoracisT2L2Via4Node_pos);};
  AnyRefNode LongissimusThoracisT3L3Via3NodeR   = { sRel =  .Scale(.Data.Thorax.Right.LongissimusThoracisT3L3Via3Node_pos);};
  AnyRefNode LongissimusThoracisT3L3Via3NodeL   = { sRel =  .Scale(.Data.Thorax.Left.LongissimusThoracisT3L3Via3Node_pos);};
  AnyRefNode LongissimusThoracisT4L4Via2NodeR   = { sRel =  .Scale(.Data.Thorax.Right.LongissimusThoracisT4L4Via2Node_pos);};
  AnyRefNode LongissimusThoracisT4L4Via2NodeL   = { sRel =  .Scale(.Data.Thorax.Left.LongissimusThoracisT4L4Via2Node_pos);};
  AnyRefNode LongissimusThoracisT5L5Via1NodeR   = { sRel =  .Scale(.Data.Thorax.Right.LongissimusThoracisT5L5Via1Node_pos);};
  AnyRefNode LongissimusThoracisT5L5Via1NodeL   = { sRel =  .Scale(.Data.Thorax.Left.LongissimusThoracisT5L5Via1Node_pos);};
  AnyRefNode LongissimusThoracisT6S1NodeR       = { sRel =  .Scale(.Data.Thorax.Right.LongissimusThoracisT6S1Node_pos);};
  AnyRefNode LongissimusThoracisT6S1NodeL       = { sRel =  .Scale(.Data.Thorax.Left.LongissimusThoracisT6S1Node_pos);};
  AnyRefNode LongissimusThoracisR3L3Via3NodeR   = { sRel =  .Scale(.Data.Thorax.Right.LongissimusThoracisR3L3Via3Node_pos);};
  AnyRefNode LongissimusThoracisR3L3Via3NodeL   = { sRel =  .Scale(.Data.Thorax.Left.LongissimusThoracisR3L3Via3Node_pos);};
  AnyRefNode LongissimusThoracisR4L4Via2NodeR   = { sRel =  .Scale(.Data.Thorax.Right.LongissimusThoracisR4L4Via2Node_pos);};
  AnyRefNode LongissimusThoracisR4L4Via2NodeL   = { sRel =  .Scale(.Data.Thorax.Left.LongissimusThoracisR4L4Via2Node_pos);};
  AnyRefNode LongissimusThoracisR5L5Via1NodeR   = { sRel =  .Scale(.Data.Thorax.Right.LongissimusThoracisR5L5Via1Node_pos);};
  AnyRefNode LongissimusThoracisR5L5Via1NodeL   = { sRel =  .Scale(.Data.Thorax.Left.LongissimusThoracisR5L5Via1Node_pos);};
  AnyRefNode LongissimusThoracisR6S1NodeR       = { sRel =  .Scale(.Data.Thorax.Right.LongissimusThoracisR6S1Node_pos);};
  AnyRefNode LongissimusThoracisR6S1NodeL       = { sRel =  .Scale(.Data.Thorax.Left.LongissimusThoracisR6S1Node_pos);};
  AnyRefNode SemispinalisCervicisT6C7NodeR = {sRel = .Scale(.Data.Thorax.Right.SemispinalisCervicisT6C7Node_pos);};
  AnyRefNode SemispinalisCervicisT6C7NodeL = {sRel = .Scale(.Data.Thorax.Left.SemispinalisCervicisT6C7Node_pos);};
  AnyRefNode LevatorCostarumT6R7ROrg = {    sRel =  .Scale(.Data.T6.Right.LevatorCostarumT6R7_pos);};
  AnyRefNode LevatorCostarumT6R7LOrg = {    sRel =  .Scale(.Data.T6.Left.LevatorCostarumT6R7_pos);};
  AnyRefNode LevatorCostarumT6R8ROrg = {    sRel = .Scale(.Data.T6.Right.LevatorCostarumT6R8_pos);};
  AnyRefNode LevatorCostarumT6R8LOrg = {    sRel = .Scale(.Data.T6.Left.LevatorCostarumT6R8_pos);};
  AnyRefNode SpinousProcess = {sRel = .Scale(.Data.T6.SupraSpinous_superior_points[0]);};

  Right = {
    //Semispinalis Capitis node
    AnyRefNode SemispinalisCapitisT6C0Node = {sRel = ..Scale(..Data.Thorax.Right.SemispinalisCapitisT6C0Node_pos);};
    //Splenius Cervicis
    AnyRefNode SpleniusCervicisNode = {sRel = ..Scale(..Data.Thorax.Right.SpleniusCervicisT6Node_pos);};
    //Rotatores
    AnyRefNode RotatoresBrevisT6T5Node = {sRel = ..Scale(..Data.Thorax.Right.RotatoresBrevisT6T5OrgNode_pos);};
    AnyRefNode RotatoresBrevisT7T6Node = {sRel = ..Scale(..Data.Thorax.Right.RotatoresBrevisT7T6InsNode_pos);};
    AnyRefNode RotatoresLongusT6T4Node = {sRel = ..Scale(..Data.Thorax.Right.RotatoresLongusT6T4OrgNode_pos);};
    AnyRefNode RotatoresLongusT8T6Node = {sRel = ..Scale(..Data.Thorax.Right.RotatoresLongusT8T6InsNode_pos);};
  };
  Left = {
    //Semispinalis Capitis node
    AnyRefNode SemispinalisCapitisT6C0Node = {sRel = ..Scale(..Data.Thorax.Left.SemispinalisCapitisT6C0Node_pos);};
    //Splenius Cervicis
    AnyRefNode SpleniusCervicisNode = {sRel = ..Scale(..Data.Thorax.Left.SpleniusCervicisT6Node_pos);};
    //Rotatores
    AnyRefNode RotatoresBrevisT6T5Node = {sRel = ..Scale(..Data.Thorax.Left.RotatoresBrevisT6T5OrgNode_pos);};
    AnyRefNode RotatoresBrevisT7T6Node = {sRel = ..Scale(..Data.Thorax.Left.RotatoresBrevisT7T6InsNode_pos);};
    AnyRefNode RotatoresLongusT6T4Node = {sRel = ..Scale(..Data.Thorax.Left.RotatoresLongusT6T4OrgNode_pos);};
    AnyRefNode RotatoresLongusT8T6Node = {sRel = ..Scale(..Data.Thorax.Left.RotatoresLongusT8T6InsNode_pos);};
  };

  #if BM_TRUNK_CAVITY_MODEL == _CAVITY_MODEL_VOLUME_ | BM_TRUNK_THORACIC_MODEL == _THORACIC_MODEL_FLEXIBLE_ | BM_TRUNK_THORACIC_MODEL == _THORACIC_MODEL_FLEXIBLE_KINEMATIC_ONLY_
    AnyRefNode ThoracicCavityNodes = {
      CavityPoints Level06(data=....Data.unscaled.ModelParameters.ThoracicCavity.Level06, scale_fun=..Scale) = {
        Right.points_generator = {
          amount = ......Data.unscaled.ModelParameters.ThoracicCavity.DiscretizationFactorThoracic;
          start = ..data.Right.T_StartStop[0];
          end = ..data.Right.T_StartStop[1];
        };
        Left.points_generator = {
          amount = ......Data.unscaled.ModelParameters.ThoracicCavity.DiscretizationFactorThoracic;
          start = ..data.Left.T_StartStop[0];
          end = ..data.Left.T_StartStop[1];
        };
      };
    };
  #endif
};

Segments.T7Seg = {
  AnyRefNode SemispinalisThoracisT7TransversusR = {sRel = .Scale(.Data.T7.Right.SemispinalisThoracisTransversus_pos );};
  AnyRefNode SemispinalisThoracisT7TransversusL = {sRel = .Scale(.Data.T7.Left.SemispinalisThoracisTransversus_pos );};
  AnyRefNode SemispinalisThoracisT4ViaNodeR = {sRel = .Scale(.Data.T7.Right.SemispinalisThoracisT4ViaNode_pos );};
  AnyRefNode SemispinalisThoracisT3ViaNodeR = {sRel = .Scale(.Data.T7.Right.SemispinalisThoracisT3ViaNode_pos );};
  AnyRefNode SemispinalisThoracisT2ViaNodeR = {sRel = .Scale(.Data.T7.Right.SemispinalisThoracisT2ViaNode_pos );};
  AnyRefNode SemispinalisThoracisT7ViaNodeR = {sRel = .Scale(.Data.T7.Right.SemispinalisThoracisViaNode_pos );};
  AnyRefNode SemispinalisThoracisC7ViaNodeR = {sRel = .Scale(.Data.T7.Right.SemispinalisThoracisC7ViaNode_pos );};
  AnyRefNode SemispinalisThoracisT7C6ViaNodeR = {sRel = .Scale(.Data.T7.Right.SemispinalisThoracisT7C6ViaNode_pos );};
  AnyRefNode SemispinalisThoracisT7T9T4ViaNodeR = {sRel = .Scale(.Data.T7.Right.SemispinalisThoracisT7T9T4ViaNode_pos );};
  AnyRefNode SemispinalisThoracisT9T1ViaNodeR = {sRel = .Scale(.Data.T7.Right.SemispinalisThoracisT9T1ViaNode_pos );};
  AnyRefNode SemispinalisThoracisT8T4ViaNodeR = {sRel = .Scale(.Data.T7.Right.SemispinalisThoracisT8T4ViaNode_pos );};
  AnyRefNode SemispinalisThoracisT4ViaNodeL = {sRel = .Scale(.Data.T7.Left.SemispinalisThoracisT4ViaNode_pos );};
  AnyRefNode SemispinalisThoracisT3ViaNodeL = {sRel = .Scale(.Data.T7.Left.SemispinalisThoracisT3ViaNode_pos );};
  AnyRefNode SemispinalisThoracisT2ViaNodeL = {sRel = .Scale(.Data.T7.Left.SemispinalisThoracisT2ViaNode_pos );};
  AnyRefNode SemispinalisThoracisT7ViaNodeL = {sRel = .Scale(.Data.T7.Left.SemispinalisThoracisViaNode_pos );};
  AnyRefNode SemispinalisThoracisC7ViaNodeL = {sRel = .Scale(.Data.T7.Left.SemispinalisThoracisC7ViaNode_pos );};
  AnyRefNode SemispinalisThoracisT7C6ViaNodeL = {sRel = .Scale(.Data.T7.Left.SemispinalisThoracisT7C6ViaNode_pos );};
  AnyRefNode SemispinalisThoracisT7T9T4ViaNodeL = {sRel = .Scale(.Data.T7.Left.SemispinalisThoracisT7T9T4ViaNode_pos );};
  AnyRefNode SemispinalisThoracisT9T1ViaNodeL = {sRel = .Scale(.Data.T7.Left.SemispinalisThoracisT9T1ViaNode_pos );};
  AnyRefNode SemispinalisThoracisT8T4ViaNodeL = {sRel = .Scale(.Data.T7.Left.SemispinalisThoracisT8T4ViaNode_pos);};
  AnyRefNode MultifidusThoracisT7T2NodeROrg = {sRel = .Scale(.Data.T7.Right.MultifidusThoracisT7T2NodeOrg_pos );};
  AnyRefNode MultifidusThoracisT7T3NodeROrg = {sRel = .Scale(.Data.T7.Right.MultifidusThoracisT7T3NodeOrg_pos );};
  AnyRefNode MultifidusThoracisT7T4NodeROrg = {sRel = .Scale(.Data.T7.Right.MultifidusThoracisT7T4NodeOrg_pos );};
  AnyRefNode MultifidusThoracisT7T2NodeLOrg = {sRel = .Scale(.Data.T7.Left.MultifidusThoracisT7T2NodeOrg_pos );};
  AnyRefNode MultifidusThoracisT7T3NodeLOrg = {sRel = .Scale(.Data.T7.Left.MultifidusThoracisT7T3NodeOrg_pos );};
  AnyRefNode MultifidusThoracisT7T4NodeLOrg = {sRel = .Scale(.Data.T7.Left.MultifidusThoracisT7T4NodeOrg_pos );};
  AnyRefNode MultifidusThoracisT12T7NodeRIns = {sRel = .Scale(.Data.T7.Right.MultifidusThoracisT12T7NodeIns_pos );};
  AnyRefNode MultifidusThoracisT11T7NodeRIns = {sRel = .Scale(.Data.T7.Right.MultifidusThoracisT11T7NodeIns_pos );};
  AnyRefNode MultifidusThoracisT10T7NodeRIns = {sRel = .Scale(.Data.T7.Right.MultifidusThoracisT10T7NodeIns_pos );};
  AnyRefNode MultifidusThoracisT12T7NodeLIns = {sRel = .Scale(.Data.T7.Left.MultifidusThoracisT12T7NodeIns_pos );};
  AnyRefNode MultifidusThoracisT11T7NodeLIns = {sRel = .Scale(.Data.T7.Left.MultifidusThoracisT11T7NodeIns_pos );};
  AnyRefNode MultifidusThoracisT10T7NodeLIns = {sRel = .Scale(.Data.T7.Left.MultifidusThoracisT10T7NodeIns_pos );};
  AnyRefNode SET7T3NodeROrg = {sRel = .Scale(.Data.T7.Right.SET7T3NodeOrg_pos );};
  AnyRefNode SET7T4NodeROrg = {sRel = .Scale(.Data.T7.Right.SET7T4NodeOrg_pos );};
  AnyRefNode SET7T5NodeROrg = {sRel = .Scale(.Data.T7.Right.SET7T5NodeOrg_pos );};
  AnyRefNode SET7T3NodeLOrg = {sRel = .Scale(.Data.T7.Left.SET7T3NodeOrg_pos );};
  AnyRefNode SET7T4NodeLOrg = {sRel = .Scale(.Data.T7.Left.SET7T4NodeOrg_pos );};
  AnyRefNode SET7T5NodeLOrg = {sRel = .Scale(.Data.T7.Left.SET7T5NodeOrg_pos );};
  AnyRefNode SET11T7NodeRIns = {sRel = .Scale(.Data.T7.Right.SET11T7NodeIns_pos );};
  AnyRefNode SET10T7NodeRIns = {sRel = .Scale(.Data.T7.Right.SET10T7NodeIns_pos );};
  AnyRefNode SET9T7NodeRIns  = {sRel = .Scale(.Data.T7.Right.SET9T7NodeIns_pos );};
  AnyRefNode SET11T7NodeLIns = {sRel = .Scale(.Data.T7.Left.SET11T7NodeIns_pos );};
  AnyRefNode SET10T7NodeLIns = {sRel = .Scale(.Data.T7.Left.SET10T7NodeIns_pos );};
  AnyRefNode SET9T7NodeLIns  = {sRel = .Scale(.Data.T7.Left.SET9T7NodeIns_pos );};
  AnyRefNode SpinalisT11T6Via4Node = {sRel= .Scale(.Data.T7.SpinalisT11T6Via4Node_pos );};
  AnyRefNode SpinalisT12T5Via5Node = {sRel= .Scale(.Data.T7.SpinalisT12T5Via5Node_pos );};
  AnyRefNode SpinalisT12T4Via5Node = {sRel= .Scale(.Data.T7.SpinalisT12T4Via5Node_pos );};
  AnyRefNode SpinalisL1T3Via6Node = {sRel= .Scale(.Data.T7.SpinalisL1T3Via6Node_pos );};
  AnyRefNode SpinalisL1T2Via6Node = {sRel= .Scale(.Data.T7.SpinalisL1T2Via6Node_pos );};
  AnyRefNode SpinalisL2T1Via7Node = {sRel= .Scale(.Data.T7.SpinalisL2T1Via7Node_pos );};
  AnyRefNode LevatorCostarumT7R8ROrg = {    sRel =  .Scale(.Data.T7.Right.LevatorCostarumT7R8_pos);};
  AnyRefNode LevatorCostarumT7R8LOrg = {    sRel =  .Scale(.Data.T7.Left.LevatorCostarumT7R8_pos);};
  AnyRefNode LevatorCostarumT7R9ROrg = {    sRel = .Scale(.Data.T7.Right.LevatorCostarumT7R9_pos);};
  AnyRefNode LevatorCostarumT7R9LOrg = {    sRel = .Scale(.Data.T7.Left.LevatorCostarumT7R9_pos);};
  AnyRefNode LongissimusThoracisT1L1Via6NodeR = {sRel = .Scale(.Data.Thorax.Right.LongissimusThoracisT1L1Via6Node_pos);};
  AnyRefNode LongissimusThoracisT1L1Via6NodeL = {sRel = .Scale(.Data.Thorax.Left.LongissimusThoracisT1L1Via6Node_pos);};
  AnyRefNode LongissimusThoracisT2L2Via5NodeR = {sRel = .Scale(.Data.Thorax.Right.LongissimusThoracisT2L2Via5Node_pos);};
  AnyRefNode LongissimusThoracisT2L2Via5NodeL = {sRel = .Scale(.Data.Thorax.Left.LongissimusThoracisT2L2Via5Node_pos);};
  AnyRefNode LongissimusThoracisT3L3Via4NodeR   = { sRel =  .Scale(.Data.Thorax.Right.LongissimusThoracisT3L3Via4Node_pos);};
  AnyRefNode LongissimusThoracisT3L3Via4NodeL   = { sRel =  .Scale(.Data.Thorax.Left.LongissimusThoracisT3L3Via4Node_pos);};
  AnyRefNode LongissimusThoracisT4L4Via3NodeR   = { sRel =  .Scale(.Data.Thorax.Right.LongissimusThoracisT4L4Via3Node_pos);};
  AnyRefNode LongissimusThoracisT4L4Via3NodeL   = { sRel =  .Scale(.Data.Thorax.Left.LongissimusThoracisT4L4Via3Node_pos);};
  AnyRefNode LongissimusThoracisT5L5Via2NodeR   = { sRel =  .Scale(.Data.Thorax.Right.LongissimusThoracisT5L5Via2Node_pos);};
  AnyRefNode LongissimusThoracisT5L5Via2NodeL   = { sRel =  .Scale(.Data.Thorax.Left.LongissimusThoracisT5L5Via2Node_pos);};
  AnyRefNode LongissimusThoracisT6S1Via1NodeR   = { sRel =  .Scale(.Data.Thorax.Right.LongissimusThoracisT6S1Via1Node_pos);};
  AnyRefNode LongissimusThoracisT6S1Via1NodeL   = { sRel =  .Scale(.Data.Thorax.Left.LongissimusThoracisT6S1Via1Node_pos);};
  AnyRefNode LongissimusThoracisT7S2NodeR       = { sRel =  .Scale(.Data.Thorax.Right.LongissimusThoracisT7S2Node_pos);};
  AnyRefNode LongissimusThoracisT7S2NodeL       = { sRel =  .Scale(.Data.Thorax.Left.LongissimusThoracisT7S2Node_pos);};
  AnyRefNode LongissimusThoracisR3L3Via4NodeR   = { sRel =  .Scale(.Data.Thorax.Right.LongissimusThoracisR3L3Via4Node_pos);};
  AnyRefNode LongissimusThoracisR3L3Via4NodeL   = { sRel =  .Scale(.Data.Thorax.Left.LongissimusThoracisR3L3Via4Node_pos);};
  AnyRefNode LongissimusThoracisR4L4Via3NodeR   = { sRel =  .Scale(.Data.Thorax.Right.LongissimusThoracisR4L4Via3Node_pos);};
  AnyRefNode LongissimusThoracisR4L4Via3NodeL   = { sRel =  .Scale(.Data.Thorax.Left.LongissimusThoracisR4L4Via3Node_pos);};
  AnyRefNode LongissimusThoracisR5L5Via2NodeR   = { sRel =  .Scale(.Data.Thorax.Right.LongissimusThoracisR5L5Via2Node_pos);};
  AnyRefNode LongissimusThoracisR5L5Via2NodeL   = { sRel =  .Scale(.Data.Thorax.Left.LongissimusThoracisR5L5Via2Node_pos);};
  AnyRefNode LongissimusThoracisR6S1Via1NodeR   = { sRel =  .Scale(.Data.Thorax.Right.LongissimusThoracisR6S1Via1Node_pos);};
  AnyRefNode LongissimusThoracisR6S1Via1NodeL   = { sRel =  .Scale(.Data.Thorax.Left.LongissimusThoracisR6S1Via1Node_pos);};
  AnyRefNode LongissimusThoracisR7S2NodeR       = { sRel =  .Scale(.Data.Thorax.Right.LongissimusThoracisR7S2Node_pos);};
  AnyRefNode LongissimusThoracisR7S2NodeL       = { sRel =  .Scale(.Data.Thorax.Left.LongissimusThoracisR7S2Node_pos);};
  AnyRefNode SpinousProcess = {sRel = .Scale(.Data.T7.SupraSpinous_superior_points[0]);};

  Right = {
    //Rotatores
    AnyRefNode RotatoresBrevisT7T6Node = {sRel = ..Scale(..Data.Thorax.Right.RotatoresBrevisT7T6OrgNode_pos);};
    AnyRefNode RotatoresBrevisT8T7Node = {sRel = ..Scale(..Data.Thorax.Right.RotatoresBrevisT8T7InsNode_pos);};
    AnyRefNode RotatoresLongusT7T5Node = {sRel = ..Scale(..Data.Thorax.Right.RotatoresLongusT7T5OrgNode_pos);};
    AnyRefNode RotatoresLongusT9T7Node = {sRel = ..Scale(..Data.Thorax.Right.RotatoresLongusT9T7InsNode_pos);};
  };
  Left = {
    //Rotatores
    AnyRefNode RotatoresBrevisT7T6Node = {sRel = ..Scale(..Data.Thorax.Left.RotatoresBrevisT7T6OrgNode_pos);};
    AnyRefNode RotatoresBrevisT8T7Node = {sRel = ..Scale(..Data.Thorax.Left.RotatoresBrevisT8T7InsNode_pos);};
    AnyRefNode RotatoresLongusT7T5Node = {sRel = ..Scale(..Data.Thorax.Left.RotatoresLongusT7T5OrgNode_pos);};
    AnyRefNode RotatoresLongusT9T7Node = {sRel = ..Scale(..Data.Thorax.Left.RotatoresLongusT9T7InsNode_pos);};
  };

  #if BM_TRUNK_CAVITY_MODEL == _CAVITY_MODEL_VOLUME_ | BM_TRUNK_THORACIC_MODEL == _THORACIC_MODEL_FLEXIBLE_ | BM_TRUNK_THORACIC_MODEL == _THORACIC_MODEL_FLEXIBLE_KINEMATIC_ONLY_
    AnyRefNode ThoracicCavityNodes = {
      CavityPoints Level07(data=....Data.unscaled.ModelParameters.ThoracicCavity.Level07, scale_fun=..Scale) = {
        Right.points_generator = {
          amount = ......Data.unscaled.ModelParameters.ThoracicCavity.DiscretizationFactorThoracic;
          start = ..data.Right.T_StartStop[0];
          end = ..data.Right.T_StartStop[1];
        };
        Left.points_generator = {
          amount = ......Data.unscaled.ModelParameters.ThoracicCavity.DiscretizationFactorThoracic;
          start = ..data.Left.T_StartStop[0];
          end = ..data.Left.T_StartStop[1];
        };
      };
    };
  #endif

};

Segments.T8Seg = {
  AnyRefNode SemispinalisThoracisT8TransversusR = {sRel = .Scale(.Data.T8.Right.SemispinalisThoracisTransversus_pos );};
  AnyRefNode SemispinalisThoracisT8TransversusL = {sRel = .Scale(.Data.T8.Left.SemispinalisThoracisTransversus_pos );};
  AnyRefNode SemispinalisThoracisT8ViaNodeR = {sRel = .Scale(.Data.T8.Right.SemispinalisThoracisViaNode_pos );};
  AnyRefNode SemispinalisThoracisT1ViaNodeR = {sRel = .Scale(.Data.T8.Right.SemispinalisThoracisT1ViaNode_pos );};
  AnyRefNode SemispinalisThoracisT8C7ViaNodeR = {sRel = .Scale(.Data.T8.Right.SemispinalisThoracisT8C7ViaNode_pos );};
  AnyRefNode SemispinalisThoracisC6ViaNodeR = {sRel = .Scale(.Data.T8.Right.SemispinalisThoracisC6ViaNode_pos );};
  AnyRefNode SemispinalisThoracisT9T4ViaNodeR = {sRel = .Scale(.Data.T8.Right.SemispinalisThoracisT9T4ViaNode_pos );};
  AnyRefNode SemispinalisThoracisT8ViaNodeL = {sRel = .Scale(.Data.T8.Left.SemispinalisThoracisViaNode_pos );};
  AnyRefNode SemispinalisThoracisT1ViaNodeL = {sRel = .Scale(.Data.T8.Left.SemispinalisThoracisT1ViaNode_pos );};
  AnyRefNode SemispinalisThoracisT8C7ViaNodeL = {sRel = .Scale(.Data.T8.Left.SemispinalisThoracisT8C7ViaNode_pos );};
  AnyRefNode SemispinalisThoracisC6ViaNodeL = {sRel = .Scale(.Data.T8.Left.SemispinalisThoracisC6ViaNode_pos );};
  AnyRefNode SemispinalisThoracisT9T4ViaNodeL = {sRel = .Scale(.Data.T8.Left.SemispinalisThoracisT9T4ViaNode_pos );};
  AnyRefNode MultifidusThoracisL1T8NodeRIns  = {sRel = .Scale(.Data.Thorax.Right.MultifidusThoracisL1T8Node_pos);};
  AnyRefNode MultifidusThoracisL1T8NodeLIns  = {sRel = .Scale(.Data.Thorax.Left.MultifidusThoracisL1T8Node_pos);};
  AnyRefNode MultifidusThoracisT8T3NodeROrg = {sRel = .Scale(.Data.T8.Right.MultifidusThoracisT8T3NodeOrg_pos );};
  AnyRefNode MultifidusThoracisT8T4NodeROrg = {sRel = .Scale(.Data.T8.Right.MultifidusThoracisT8T4NodeOrg_pos );};
  AnyRefNode MultifidusThoracisT8T5NodeROrg = {sRel = .Scale(.Data.T8.Right.MultifidusThoracisT8T5NodeOrg_pos );};
  AnyRefNode MultifidusThoracisT8T3NodeLOrg = {sRel = .Scale(.Data.T8.Left.MultifidusThoracisT8T3NodeOrg_pos );};
  AnyRefNode MultifidusThoracisT8T4NodeLOrg = {sRel = .Scale(.Data.T8.Left.MultifidusThoracisT8T4NodeOrg_pos );};
  AnyRefNode MultifidusThoracisT8T5NodeLOrg = {sRel = .Scale(.Data.T8.Left.MultifidusThoracisT8T5NodeOrg_pos );};
  AnyRefNode MultifidusThoracisT12T8NodeRIns = {sRel = .Scale(.Data.T8.Right.MultifidusThoracisT12T8NodeIns_pos );};
  AnyRefNode MultifidusThoracisT11T8NodeRIns = {sRel = .Scale(.Data.T8.Right.MultifidusThoracisT11T8NodeIns_pos );};
  AnyRefNode MultifidusThoracisT12T8NodeLIns = {sRel = .Scale(.Data.T8.Left.MultifidusThoracisT12T8NodeIns_pos );};
  AnyRefNode MultifidusThoracisT11T8NodeLIns = {sRel = .Scale(.Data.T8.Left.MultifidusThoracisT11T8NodeIns_pos );};
  AnyRefNode SET8T4NodeROrg = {sRel = .Scale(.Data.T8.Right.SET8T4NodeOrg_pos );};
  AnyRefNode SET8T5NodeROrg = {sRel = .Scale(.Data.T8.Right.SET8T5NodeOrg_pos );};
  AnyRefNode SET8T6NodeROrg = {sRel = .Scale(.Data.T8.Right.SET8T6NodeOrg_pos );};
  AnyRefNode SET8T4NodeLOrg = {sRel = .Scale(.Data.T8.Left.SET8T4NodeOrg_pos );};
  AnyRefNode SET8T5NodeLOrg = {sRel = .Scale(.Data.T8.Left.SET8T5NodeOrg_pos );};
  AnyRefNode SET8T6NodeLOrg = {sRel = .Scale(.Data.T8.Left.SET8T6NodeOrg_pos );};
  AnyRefNode SET12T8NodeRIns = {sRel = .Scale(.Data.T8.Right.SET12T8NodeIns_pos );};
  AnyRefNode SET11T8NodeRIns = {sRel = .Scale(.Data.T8.Right.SET11T8NodeIns_pos );};
  AnyRefNode SET10T8NodeRIns = {sRel = .Scale(.Data.T8.Right.SET10T8NodeIns_pos );};
  AnyRefNode SET12T8NodeLIns = {sRel = .Scale(.Data.T8.Left.SET12T8NodeIns_pos );};
  AnyRefNode SET11T8NodeLIns = {sRel = .Scale(.Data.T8.Left.SET11T8NodeIns_pos );};
  AnyRefNode SET10T8NodeLIns = {sRel = .Scale(.Data.T8.Left.SET10T8NodeIns_pos );};
  AnyRefNode SpinalisL1T3ViaNode = {sRel = .Scale(.Data.T8.SpinalisL1T3ViaNode_pos );};
  AnyRefNode SpinalisT11T6Via3Node = {sRel= .Scale(.Data.T8.SpinalisT11T6Via3Node_pos );};
  AnyRefNode SpinalisT12T5Via4Node = {sRel= .Scale(.Data.T8.SpinalisT12T5Via4Node_pos );};
  AnyRefNode SpinalisT12T4Via4Node = {sRel= .Scale(.Data.T8.SpinalisT12T4Via4Node_pos );};
  AnyRefNode SpinalisL1T3Via5Node = {sRel= .Scale(.Data.T8.SpinalisL1T3Via5Node_pos );};
  AnyRefNode SpinalisL1T2Via5Node = {sRel= .Scale(.Data.T8.SpinalisL1T2Via5Node_pos );};
  AnyRefNode SpinalisL2T1Via6Node = {sRel= .Scale(.Data.T8.SpinalisL2T1Via6Node_pos );};
  AnyRefNode LongissimusThoracisT1L1Via7NodeR = {sRel = .Scale(.Data.Thorax.Right.LongissimusThoracisT1L1Via7Node_pos);};
  AnyRefNode LongissimusThoracisT1L1Via7NodeL = {sRel = .Scale(.Data.Thorax.Left.LongissimusThoracisT1L1Via7Node_pos);};
  AnyRefNode LongissimusThoracisT2L2Via6NodeR = {sRel = .Scale(.Data.Thorax.Right.LongissimusThoracisT2L2Via6Node_pos);};
  AnyRefNode LongissimusThoracisT2L2Via6NodeL = {sRel = .Scale(.Data.Thorax.Left.LongissimusThoracisT2L2Via6Node_pos);};
  AnyRefNode LevatorCostarumT8R9ROrg = {    sRel =  .Scale(.Data.T8.Right.LevatorCostarumT8R9_pos);};
  AnyRefNode LevatorCostarumT8R9LOrg = {    sRel =  .Scale(.Data.T8.Left.LevatorCostarumT8R9_pos);};
  AnyRefNode LevatorCostarumT8R10ROrg = {    sRel =  .Scale(.Data.T8.Right.LevatorCostarumT8R10_pos);};
  AnyRefNode LevatorCostarumT8R10LOrg = {    sRel =  .Scale(.Data.T8.Left.LevatorCostarumT8R10_pos);};
  AnyRefNode LongissimusThoracisT3L3Via5NodeR   = { sRel =  .Scale(.Data.Thorax.Right.LongissimusThoracisT3L3Via5Node_pos);};
  AnyRefNode LongissimusThoracisT3L3Via5NodeL   = { sRel =  .Scale(.Data.Thorax.Left.LongissimusThoracisT3L3Via5Node_pos);};
  AnyRefNode LongissimusThoracisT4L4Via4NodeR   = { sRel =  .Scale(.Data.Thorax.Right.LongissimusThoracisT4L4Via4Node_pos);};
  AnyRefNode LongissimusThoracisT4L4Via4NodeL   = { sRel =  .Scale(.Data.Thorax.Left.LongissimusThoracisT4L4Via4Node_pos);};
  AnyRefNode LongissimusThoracisT5L5Via3NodeR   = { sRel =  .Scale(.Data.Thorax.Right.LongissimusThoracisT5L5Via3Node_pos);};
  AnyRefNode LongissimusThoracisT5L5Via3NodeL   = { sRel =  .Scale(.Data.Thorax.Left.LongissimusThoracisT5L5Via3Node_pos);};
  AnyRefNode LongissimusThoracisT6S1Via2NodeR   = { sRel =  .Scale(.Data.Thorax.Right.LongissimusThoracisT6S1Via2Node_pos);};
  AnyRefNode LongissimusThoracisT6S1Via2NodeL   = { sRel =  .Scale(.Data.Thorax.Left.LongissimusThoracisT6S1Via2Node_pos);};
  AnyRefNode LongissimusThoracisT7S2Via1NodeR   = { sRel =  .Scale(.Data.Thorax.Right.LongissimusThoracisT7S2Via1Node_pos);};
  AnyRefNode LongissimusThoracisT7S2Via1NodeL   = { sRel =  .Scale(.Data.Thorax.Left.LongissimusThoracisT7S2Via1Node_pos);};
  AnyRefNode LongissimusThoracisT8S3NodeR       = { sRel =  .Scale(.Data.Thorax.Right.LongissimusThoracisT8S3Node_pos);};
  AnyRefNode LongissimusThoracisT8S3NodeL       = { sRel =  .Scale(.Data.Thorax.Left.LongissimusThoracisT8S3Node_pos);};
  AnyRefNode LongissimusThoracisR3L3Via5NodeR   = { sRel =  .Scale(.Data.Thorax.Right.LongissimusThoracisR3L3Via5Node_pos);};
  AnyRefNode LongissimusThoracisR3L3Via5NodeL   = { sRel =  .Scale(.Data.Thorax.Left.LongissimusThoracisR3L3Via5Node_pos);};
  AnyRefNode LongissimusThoracisR4L4Via4NodeR   = { sRel =  .Scale(.Data.Thorax.Right.LongissimusThoracisR4L4Via4Node_pos);};
  AnyRefNode LongissimusThoracisR4L4Via4NodeL   = { sRel =  .Scale(.Data.Thorax.Left.LongissimusThoracisR4L4Via4Node_pos);};
  AnyRefNode LongissimusThoracisR5L5Via3NodeR   = { sRel =  .Scale(.Data.Thorax.Right.LongissimusThoracisR5L5Via3Node_pos);};
  AnyRefNode LongissimusThoracisR5L5Via3NodeL   = { sRel =  .Scale(.Data.Thorax.Left.LongissimusThoracisR5L5Via3Node_pos);};
  AnyRefNode LongissimusThoracisR6S1Via2NodeR   = { sRel =  .Scale(.Data.Thorax.Right.LongissimusThoracisR6S1Via2Node_pos);};
  AnyRefNode LongissimusThoracisR6S1Via2NodeL   = { sRel =  .Scale(.Data.Thorax.Left.LongissimusThoracisR6S1Via2Node_pos);};
  AnyRefNode LongissimusThoracisR7S2Via1NodeR   = { sRel =  .Scale(.Data.Thorax.Right.LongissimusThoracisR7S2Via1Node_pos);};
  AnyRefNode LongissimusThoracisR7S2Via1NodeL   = { sRel =  .Scale(.Data.Thorax.Left.LongissimusThoracisR7S2Via1Node_pos);};
  AnyRefNode LongissimusThoracisR8S3NodeR       = { sRel =  .Scale(.Data.Thorax.Right.LongissimusThoracisR8S3Node_pos);};
  AnyRefNode LongissimusThoracisR8S3NodeL       = { sRel =  .Scale(.Data.Thorax.Left.LongissimusThoracisR8S3Node_pos);};
  AnyRefNode MidPoint = { sRel = 0.5 * (.Scale(.Data.T8.T7T8JntNode_pos) + .Scale(.Data.T8.T8T9JntNode_pos));};
  AnyRefNode SpinousProcess = {sRel = .Scale(.Data.T8.SupraSpinous_superior_points[0]);};

  Right = {
    //Rotatores
    AnyRefNode RotatoresBrevisT8T7Node = {sRel = ..Scale(..Data.Thorax.Right.RotatoresBrevisT8T7OrgNode_pos);};
    AnyRefNode RotatoresBrevisT9T8Node = {sRel = ..Scale(..Data.Thorax.Right.RotatoresBrevisT9T8InsNode_pos);};
    AnyRefNode RotatoresLongusT8T6Node = {sRel = ..Scale(..Data.Thorax.Right.RotatoresLongusT8T6OrgNode_pos);};
    AnyRefNode RotatoresLongusT10T8Node = {sRel = ..Scale(..Data.Thorax.Right.RotatoresLongusT10T8InsNode_pos);};
  };
  Left = {
    //Rotatores
    AnyRefNode RotatoresBrevisT8T7Node = {sRel = ..Scale(..Data.Thorax.Left.RotatoresBrevisT8T7OrgNode_pos);};
    AnyRefNode RotatoresBrevisT9T8Node = {sRel = ..Scale(..Data.Thorax.Left.RotatoresBrevisT9T8InsNode_pos);};
    AnyRefNode RotatoresLongusT8T6Node = {sRel = ..Scale(..Data.Thorax.Left.RotatoresLongusT8T6OrgNode_pos);};
    AnyRefNode RotatoresLongusT10T8Node = {sRel = ..Scale(..Data.Thorax.Left.RotatoresLongusT10T8InsNode_pos);};
  };

  #if BM_TRUNK_CAVITY_MODEL == _CAVITY_MODEL_VOLUME_ | BM_TRUNK_THORACIC_MODEL == _THORACIC_MODEL_FLEXIBLE_ | BM_TRUNK_THORACIC_MODEL == _THORACIC_MODEL_FLEXIBLE_KINEMATIC_ONLY_
    AnyRefNode ThoracicCavityNodes = {
      CavityPoints Level08(data=....Data.unscaled.ModelParameters.ThoracicCavity.Level08, scale_fun=..Scale) = {
        Right.points_generator = {
          amount = ......Data.unscaled.ModelParameters.ThoracicCavity.DiscretizationFactorThoracic;
          start = ..data.Right.T_StartStop[0];
          end = ..data.Right.T_StartStop[1];
        };
        Left.points_generator = {
          amount = ......Data.unscaled.ModelParameters.ThoracicCavity.DiscretizationFactorThoracic;
          start = ..data.Left.T_StartStop[0];
          end = ..data.Left.T_StartStop[1];
        };
      };
       CavityPoints Level08_Discretization28(data=....Data.unscaled.ModelParameters.ThoracicCavity.Level08, scale_fun=..Scale) = {
        Right.points_generator = {
          amount = 5;
          start = 0;
          end = 0.08;
        };
        Left.points_generator = {
          amount = 5;
          start = 0;
          end = 0.08;
        };
      };
   };
  #endif
};

Segments.T9Seg = {
  AnyRefNode SemispinalisThoracisT9TransversusR = {sRel = .Scale(.Data.T9.Right.SemispinalisThoracisTransversus_pos );};
  AnyRefNode SemispinalisThoracisT9TransversusL = {sRel = .Scale(.Data.T9.Left.SemispinalisThoracisTransversus_pos );};
  AnyRefNode SemispinalisThoracisT9ViaNodeR = {sRel = .Scale(.Data.T9.Right.SemispinalisThoracisViaNode_pos );};
  AnyRefNode SemispinalisThoracisT9ViaNodeL = {sRel = .Scale(.Data.T9.Left.SemispinalisThoracisViaNode_pos );};
  AnyRefNode MultifidusThoracisL1T9NodeRIns  = {sRel = .Scale(.Data.Thorax.Right.MultifidusThoracisL1T9Node_pos);};
  AnyRefNode MultifidusThoracisL1T9NodeLIns  = {sRel = .Scale(.Data.Thorax.Left.MultifidusThoracisL1T9Node_pos);};
  AnyRefNode MultifidusThoracisL2T9NodeRIns  = {sRel = .Scale(.Data.Thorax.Right.MultifidusThoracisL2T9Node_pos);};
  AnyRefNode MultifidusThoracisL2T9NodeLIns  = {sRel = .Scale(.Data.Thorax.Left.MultifidusThoracisL2T9Node_pos);};
  AnyRefNode MultifidusThoracisT9T4NodeROrg = {sRel = .Scale(.Data.T9.Right.MultifidusThoracisT9T4NodeOrg_pos );};
  AnyRefNode MultifidusThoracisT9T5NodeROrg = {sRel = .Scale(.Data.T9.Right.MultifidusThoracisT9T5NodeOrg_pos );};
  AnyRefNode MultifidusThoracisT9T6NodeROrg = {sRel = .Scale(.Data.T9.Right.MultifidusThoracisT9T6NodeOrg_pos );};
  AnyRefNode MultifidusThoracisT9T4NodeLOrg = {sRel = .Scale(.Data.T9.Left.MultifidusThoracisT9T4NodeOrg_pos );};
  AnyRefNode MultifidusThoracisT9T5NodeLOrg = {sRel = .Scale(.Data.T9.Left.MultifidusThoracisT9T5NodeOrg_pos );};
  AnyRefNode MultifidusThoracisT9T6NodeLOrg = {sRel = .Scale(.Data.T9.Left.MultifidusThoracisT9T6NodeOrg_pos );};
  AnyRefNode MultifidusThoracisT12T9NodeRIns = {sRel = .Scale(.Data.T9.Right.MultifidusThoracisT12T9NodeIns_pos );};
  AnyRefNode MultifidusThoracisT12T9NodeLIns = {sRel = .Scale(.Data.T9.Left.MultifidusThoracisT12T9NodeIns_pos );};
  AnyRefNode SET9T5NodeROrg = {sRel = .Scale(.Data.T9.Right.SET9T5NodeOrg_pos );};
  AnyRefNode SET9T6NodeROrg = {sRel = .Scale(.Data.T9.Right.SET9T6NodeOrg_pos );};
  AnyRefNode SET9T7NodeROrg = {sRel = .Scale(.Data.T9.Right.SET9T7NodeOrg_pos );};
  AnyRefNode SET9T5NodeLOrg = {sRel = .Scale(.Data.T9.Left.SET9T5NodeOrg_pos );};
  AnyRefNode SET9T6NodeLOrg = {sRel = .Scale(.Data.T9.Left.SET9T6NodeOrg_pos );};
  AnyRefNode SET9T7NodeLOrg = {sRel = .Scale(.Data.T9.Left.SET9T7NodeOrg_pos );};
  AnyRefNode SET12T9NodeRIns = {sRel = .Scale(.Data.T9.Right.SET12T9NodeIns_pos );};
  AnyRefNode SET11T9NodeRIns = {sRel = .Scale(.Data.T9.Right.SET11T9NodeIns_pos );};
  AnyRefNode SET12T9NodeLIns = {sRel = .Scale(.Data.T9.Left.SET12T9NodeIns_pos );};
  AnyRefNode SET11T9NodeLIns = {sRel = .Scale(.Data.T9.Left.SET11T9NodeIns_pos );};
  AnyRefNode SpinalisT11T6Via2Node = {sRel= .Scale(.Data.T9.SpinalisT11T6Via2Node_pos );};
  AnyRefNode SpinalisT12T5Via3Node = {sRel= .Scale(.Data.T9.SpinalisT12T5Via3Node_pos );};
  AnyRefNode SpinalisT12T4Via3Node = {sRel= .Scale(.Data.T9.SpinalisT12T4Via3Node_pos );};
  AnyRefNode SpinalisL1T3Via4Node = {sRel= .Scale(.Data.T9.SpinalisL1T3Via4Node_pos );};
  AnyRefNode SpinalisL1T2Via4Node = {sRel= .Scale(.Data.T9.SpinalisL1T2Via4Node_pos );};
  AnyRefNode SpinalisL2T1Via5Node = {sRel= .Scale(.Data.T9.SpinalisL2T1Via5Node_pos );};
  AnyRefNode LongissimusThoracisT1L1Via8NodeR   = {sRel = .Scale(.Data.Thorax.Right.LongissimusThoracisT1L1Via8Node_pos);};
  AnyRefNode LongissimusThoracisT1L1Via8NodeL   = {sRel = .Scale(.Data.Thorax.Left.LongissimusThoracisT1L1Via8Node_pos);};
  AnyRefNode LongissimusThoracisT2L2Via7NodeR   = {sRel = .Scale(.Data.Thorax.Right.LongissimusThoracisT2L2Via7Node_pos);};
  AnyRefNode LongissimusThoracisT2L2Via7NodeL   = {sRel = .Scale(.Data.Thorax.Left.LongissimusThoracisT2L2Via7Node_pos);};
  AnyRefNode LevatorCostarumT9R10ROrg = {    sRel = .Scale(.Data.T9.Right.LevatorCostarumT9R10_pos);};
  AnyRefNode LevatorCostarumT9R10LOrg = {    sRel = .Scale(.Data.T9.Left.LevatorCostarumT9R10_pos);};
  AnyRefNode LevatorCostarumT9R11ROrg = {    sRel = .Scale(.Data.T9.Right.LevatorCostarumT9R11_pos);};
  AnyRefNode LevatorCostarumT9R11LOrg = {    sRel = .Scale(.Data.T9.Left.LevatorCostarumT9R11_pos);};
  AnyRefNode LongissimusThoracisT3L3Via6NodeR   = { sRel =  .Scale(.Data.Thorax.Right.LongissimusThoracisT3L3Via6Node_pos);};
  AnyRefNode LongissimusThoracisT3L3Via6NodeL   = { sRel =  .Scale(.Data.Thorax.Left.LongissimusThoracisT3L3Via6Node_pos);};
  AnyRefNode LongissimusThoracisT4L4Via5NodeR   = { sRel =  .Scale(.Data.Thorax.Right.LongissimusThoracisT4L4Via5Node_pos);};
  AnyRefNode LongissimusThoracisT4L4Via5NodeL   = { sRel =  .Scale(.Data.Thorax.Left.LongissimusThoracisT4L4Via5Node_pos);};
  AnyRefNode LongissimusThoracisT5L5Via4NodeR   = { sRel =  .Scale(.Data.Thorax.Right.LongissimusThoracisT5L5Via4Node_pos);};
  AnyRefNode LongissimusThoracisT5L5Via4NodeL   = { sRel =  .Scale(.Data.Thorax.Left.LongissimusThoracisT5L5Via4Node_pos);};
  AnyRefNode LongissimusThoracisT6S1Via3NodeR   = { sRel =  .Scale(.Data.Thorax.Right.LongissimusThoracisT6S1Via3Node_pos);};
  AnyRefNode LongissimusThoracisT6S1Via3NodeL   = { sRel =  .Scale(.Data.Thorax.Left.LongissimusThoracisT6S1Via3Node_pos);};
  AnyRefNode LongissimusThoracisT7S2Via2NodeR   = { sRel =  .Scale(.Data.Thorax.Right.LongissimusThoracisT7S2Via2Node_pos);};
  AnyRefNode LongissimusThoracisT7S2Via2NodeL   = { sRel =  .Scale(.Data.Thorax.Left.LongissimusThoracisT7S2Via2Node_pos);};
  AnyRefNode LongissimusThoracisT8S3Via1NodeR   = { sRel =  .Scale(.Data.Thorax.Right.LongissimusThoracisT8S3Via1Node_pos);};
  AnyRefNode LongissimusThoracisT8S3Via1NodeL   = { sRel =  .Scale(.Data.Thorax.Left.LongissimusThoracisT8S3Via1Node_pos);};
  AnyRefNode LongissimusThoracisT9S4NodeR       = { sRel =  .Scale(.Data.Thorax.Right.LongissimusThoracisT9S4Node_pos);};
  AnyRefNode LongissimusThoracisT9S4NodeL       = { sRel =  .Scale(.Data.Thorax.Left.LongissimusThoracisT9S4Node_pos);};
  AnyRefNode LongissimusThoracisR3L3Via6NodeR   = { sRel =  .Scale(.Data.Thorax.Right.LongissimusThoracisR3L3Via6Node_pos);};
  AnyRefNode LongissimusThoracisR3L3Via6NodeL   = { sRel =  .Scale(.Data.Thorax.Left.LongissimusThoracisR3L3Via6Node_pos);};
  AnyRefNode LongissimusThoracisR4L4Via5NodeR   = { sRel =  .Scale(.Data.Thorax.Right.LongissimusThoracisR4L4Via5Node_pos);};
  AnyRefNode LongissimusThoracisR4L4Via5NodeL   = { sRel =  .Scale(.Data.Thorax.Left.LongissimusThoracisR4L4Via5Node_pos);};
  AnyRefNode LongissimusThoracisR5L5Via4NodeR   = { sRel =  .Scale(.Data.Thorax.Right.LongissimusThoracisR5L5Via4Node_pos);};
  AnyRefNode LongissimusThoracisR5L5Via4NodeL   = { sRel =  .Scale(.Data.Thorax.Left.LongissimusThoracisR5L5Via4Node_pos);};
  AnyRefNode LongissimusThoracisR6S1Via3NodeR   = { sRel =  .Scale(.Data.Thorax.Right.LongissimusThoracisR6S1Via3Node_pos);};
  AnyRefNode LongissimusThoracisR6S1Via3NodeL   = { sRel =  .Scale(.Data.Thorax.Left.LongissimusThoracisR6S1Via3Node_pos);};
  AnyRefNode LongissimusThoracisR7S2Via2NodeR   = { sRel =  .Scale(.Data.Thorax.Right.LongissimusThoracisR7S2Via2Node_pos);};
  AnyRefNode LongissimusThoracisR7S2Via2NodeL   = { sRel =  .Scale(.Data.Thorax.Left.LongissimusThoracisR7S2Via2Node_pos);};
  AnyRefNode LongissimusThoracisR8S3Via1NodeR   = { sRel =  .Scale(.Data.Thorax.Right.LongissimusThoracisR8S3Via1Node_pos);};
  AnyRefNode LongissimusThoracisR8S3Via1NodeL   = { sRel =  .Scale(.Data.Thorax.Left.LongissimusThoracisR8S3Via1Node_pos);};
  AnyRefNode LongissimusThoracisR9S4NodeR       = { sRel =  .Scale(.Data.Thorax.Right.LongissimusThoracisR9S4Node_pos);};
  AnyRefNode LongissimusThoracisR9S4NodeL       = { sRel =  .Scale(.Data.Thorax.Left.LongissimusThoracisR9S4Node_pos);};
  AnyRefNode MidPoint = { sRel = 0.5 * (.Scale(.Data.T9.T8T9JntNode_pos) +.Scale(.Data.T9.T9T10JntNode_pos));};
  AnyRefNode SpinousProcess = {sRel = .Scale(.Data.T9.SupraSpinous_superior_points[0]);};

  Right = {
    //Rotatores
    AnyRefNode RotatoresBrevisT9T8Node = {sRel = ..Scale(..Data.Thorax.Right.RotatoresBrevisT9T8OrgNode_pos);};
    AnyRefNode RotatoresBrevisT10T9Node = {sRel = ..Scale(..Data.Thorax.Right.RotatoresBrevisT10T9InsNode_pos);};
    AnyRefNode RotatoresLongusT9T7Node = {sRel = ..Scale(..Data.Thorax.Right.RotatoresLongusT9T7OrgNode_pos);};
    AnyRefNode RotatoresLongusT11T9Node = {sRel = ..Scale(..Data.Thorax.Right.RotatoresLongusT11T9InsNode_pos);};
  };
  Left = {
    //Rotatores
    AnyRefNode RotatoresBrevisT9T8Node = {sRel = ..Scale(..Data.Thorax.Left.RotatoresBrevisT9T8OrgNode_pos);};
    AnyRefNode RotatoresBrevisT10T9Node = {sRel = ..Scale(..Data.Thorax.Left.RotatoresBrevisT10T9InsNode_pos);};
    AnyRefNode RotatoresLongusT9T7Node = {sRel = ..Scale(..Data.Thorax.Left.RotatoresLongusT9T7OrgNode_pos);};
    AnyRefNode RotatoresLongusT11T9Node = {sRel = ..Scale(..Data.Thorax.Left.RotatoresLongusT11T9InsNode_pos);};
  };

  #if BM_TRUNK_CAVITY_MODEL == _CAVITY_MODEL_VOLUME_ | BM_TRUNK_THORACIC_MODEL == _THORACIC_MODEL_FLEXIBLE_ | BM_TRUNK_THORACIC_MODEL == _THORACIC_MODEL_FLEXIBLE_KINEMATIC_ONLY_
    AnyRefNode ThoracicCavityNodes = {
      CavityPoints Level09(data=....Data.unscaled.ModelParameters.ThoracicCavity.Level09, scale_fun=..Scale) = {
        Right.points_generator = {
          amount = ......Data.unscaled.ModelParameters.ThoracicCavity.DiscretizationFactorThoracic;
          start = ..data.Right.T_StartStop[0];
          end = ..data.Right.T_StartStop[1];
        };
        Left.points_generator = {
          amount = ......Data.unscaled.ModelParameters.ThoracicCavity.DiscretizationFactorThoracic;
          start = ..data.Left.T_StartStop[0];
          end = ..data.Left.T_StartStop[1];
        };
      };
      CavityPoints Level09_Discretization28(data=....Data.unscaled.ModelParameters.ThoracicCavity.Level09, scale_fun=..Scale) = {
        Right.points_generator = {
          amount = 5;
          start = 0;
          end = 0.08;
        };
        Left.points_generator = {
          amount = 5;
          start = 0;
          end = 0.08;
        };
      };
    };
  #endif
};

Segments.T10Seg = {
  AnyRefNode SemispinalisThoracisT10TransversusR = {sRel = .Scale(.Data.T10.Right.SemispinalisThoracisTransversus_pos );};
  AnyRefNode SemispinalisThoracisT10TransversusL = {sRel = .Scale(.Data.T10.Left.SemispinalisThoracisTransversus_pos );};
  AnyRefNode SemispinalisThoracisT10ViaNodeR = {sRel = .Scale(.Data.T10.Right.SemispinalisThoracisViaNode_pos );};
  AnyRefNode SemispinalisThoracisT10ViaNodeL = {sRel = .Scale(.Data.T10.Left.SemispinalisThoracisViaNode_pos );};
  AnyRefNode MultifidusThoracisL1T10NodeRIns = {sRel = .Scale(.Data.Thorax.Right.MultifidusThoracisL1T10Node_pos);};
  AnyRefNode MultifidusThoracisL1T10NodeLIns = {sRel = .Scale(.Data.Thorax.Left.MultifidusThoracisL1T10Node_pos);};
  AnyRefNode MultifidusThoracisL2T10NodeRIns = {sRel = .Scale(.Data.Thorax.Right.MultifidusThoracisL2T10Node_pos);};
  AnyRefNode MultifidusThoracisL2T10NodeLIns = {sRel = .Scale(.Data.Thorax.Left.MultifidusThoracisL2T10Node_pos);};
  AnyRefNode MultifidusThoracisL3T10NodeRIns = {sRel = .Scale(.Data.Thorax.Right.MultifidusThoracisL3T10Node_pos);};
  AnyRefNode MultifidusThoracisL3T10NodeLIns = {sRel = .Scale(.Data.Thorax.Left.MultifidusThoracisL3T10Node_pos);};
  AnyRefNode MultifidusThoracisT10T5NodeROrg = {sRel = .Scale(.Data.Thorax.Right.MultifidusThoracisT10T5Node_pos);};
  AnyRefNode MultifidusThoracisT10T6NodeROrg = {sRel = .Scale(.Data.Thorax.Right.MultifidusThoracisT10T6Node_pos);};
  AnyRefNode MultifidusThoracisT10T7NodeROrg = {sRel = .Scale(.Data.Thorax.Right.MultifidusThoracisT10T7Node_pos);};
  AnyRefNode MultifidusThoracisT10T5NodeLOrg = {sRel = .Scale(.Data.Thorax.Left.MultifidusThoracisT10T5Node_pos);};
  AnyRefNode MultifidusThoracisT10T6NodeLOrg = {sRel = .Scale(.Data.Thorax.Left.MultifidusThoracisT10T6Node_pos);};
  AnyRefNode MultifidusThoracisT10T7NodeLOrg = {sRel = .Scale(.Data.Thorax.Left.MultifidusThoracisT10T7Node_pos);};
  AnyRefNode SET10T6NodeROrg = {sRel = .Scale(.Data.Thorax.Right.SET10T6Node_pos);};
  AnyRefNode SET10T7NodeROrg = {sRel = .Scale(.Data.Thorax.Right.SET10T7Node_pos);};
  AnyRefNode SET10T8NodeROrg = {sRel = .Scale(.Data.Thorax.Right.SET10T8Node_pos);};
  AnyRefNode SET10T6NodeLOrg = {sRel = .Scale(.Data.Thorax.Left.SET10T6Node_pos);};
  AnyRefNode SET10T7NodeLOrg = {sRel = .Scale(.Data.Thorax.Left.SET10T7Node_pos);};
  AnyRefNode SET10T8NodeLOrg = {sRel = .Scale(.Data.Thorax.Left.SET10T8Node_pos);};
  AnyRefNode SET12T10NodeRIns = {sRel = .Scale(.Data.Thorax.Right.SET12T10Node_pos);};
  AnyRefNode SET12T10NodeLIns = {sRel = .Scale(.Data.Thorax.Left.SET12T10Node_pos);};
  AnyRefNode SpinalisT11T6Via1Node = {sRel= .Scale(.Data.Thorax.SpinalisT11T6Via1Node_pos);};
  AnyRefNode SpinalisT12T5Via2Node = {sRel= .Scale(.Data.Thorax.SpinalisT12T5Via2Node_pos);};
  AnyRefNode SpinalisT12T4Via2Node = {sRel= .Scale(.Data.Thorax.SpinalisT12T4Via2Node_pos);};
  AnyRefNode SpinalisL1T3Via3Node = {sRel= .Scale(.Data.Thorax.SpinalisL1T3Via3Node_pos);};
  AnyRefNode SpinalisL1T2Via3Node = {sRel= .Scale(.Data.Thorax.SpinalisL1T2Via3Node_pos);};
  AnyRefNode SpinalisL2T1Via4Node = {sRel= .Scale(.Data.Thorax.SpinalisL2T1Via4Node_pos);};
  AnyRefNode LongissimusThoracisT1L1Via9NodeR   = {sRel = .Scale(.Data.Thorax.Right.LongissimusThoracisT1L1Via9Node_pos);};
  AnyRefNode LongissimusThoracisT1L1Via9NodeL   = {sRel = .Scale(.Data.Thorax.Left.LongissimusThoracisT1L1Via9Node_pos);};
  AnyRefNode LongissimusThoracisT2L2Via8NodeR   = {sRel = .Scale(.Data.Thorax.Right.LongissimusThoracisT2L2Via8Node_pos);};
  AnyRefNode LongissimusThoracisT2L2Via8NodeL   = {sRel = .Scale(.Data.Thorax.Left.LongissimusThoracisT2L2Via8Node_pos);};
  AnyRefNode LevatorCostarumT10R11ROrg = {    sRel = .Scale(.Data.T10.Right.LevatorCostarumT10R11_pos);};
  AnyRefNode LevatorCostarumT10R11LOrg = {    sRel = .Scale(.Data.T10.Left.LevatorCostarumT10R11_pos);};
  AnyRefNode LevatorCostarumT10R12ROrg = {    sRel = .Scale(.Data.T10.Right.LevatorCostarumT10R12_pos);};
  AnyRefNode LevatorCostarumT10R12LOrg = {    sRel = .Scale(.Data.T10.Left.LevatorCostarumT10R12_pos);};
  AnyRefNode LongissimusThoracisT3L3Via7NodeR   = { sRel =  .Scale(.Data.Thorax.Right.LongissimusThoracisT3L3Via7Node_pos);};
  AnyRefNode LongissimusThoracisT3L3Via7NodeL   = { sRel =  .Scale(.Data.Thorax.Left.LongissimusThoracisT3L3Via7Node_pos);};
  AnyRefNode LongissimusThoracisT4L4Via6NodeR   = { sRel =  .Scale(.Data.Thorax.Right.LongissimusThoracisT4L4Via6Node_pos);};
  AnyRefNode LongissimusThoracisT4L4Via6NodeL   = { sRel =  .Scale(.Data.Thorax.Left.LongissimusThoracisT4L4Via6Node_pos);};
  AnyRefNode LongissimusThoracisT5L5Via5NodeR   = { sRel =  .Scale(.Data.Thorax.Right.LongissimusThoracisT5L5Via5Node_pos);};
  AnyRefNode LongissimusThoracisT5L5Via5NodeL   = { sRel =  .Scale(.Data.Thorax.Left.LongissimusThoracisT5L5Via5Node_pos);};
  AnyRefNode LongissimusThoracisT6S1Via4NodeR   = { sRel =  .Scale(.Data.Thorax.Right.LongissimusThoracisT6S1Via4Node_pos);};
  AnyRefNode LongissimusThoracisT6S1Via4NodeL   = { sRel =  .Scale(.Data.Thorax.Left.LongissimusThoracisT6S1Via4Node_pos);};
  AnyRefNode LongissimusThoracisT7S2Via3NodeR   = { sRel =  .Scale(.Data.Thorax.Right.LongissimusThoracisT7S2Via3Node_pos);};
  AnyRefNode LongissimusThoracisT7S2Via3NodeL   = { sRel =  .Scale(.Data.Thorax.Left.LongissimusThoracisT7S2Via3Node_pos);};
  AnyRefNode LongissimusThoracisT8S3Via2NodeR   = { sRel =  .Scale(.Data.Thorax.Right.LongissimusThoracisT8S3Via2Node_pos);};
  AnyRefNode LongissimusThoracisT8S3Via2NodeL   = { sRel =  .Scale(.Data.Thorax.Left.LongissimusThoracisT8S3Via2Node_pos);};
  AnyRefNode LongissimusThoracisT9S4Via1NodeR   = { sRel =  .Scale(.Data.Thorax.Right.LongissimusThoracisT9S4Via1Node_pos);};
  AnyRefNode LongissimusThoracisT9S4Via1NodeL   = { sRel =  .Scale(.Data.Thorax.Left.LongissimusThoracisT9S4Via1Node_pos);};
  AnyRefNode LongissimusThoracisT10S3NodeR  = { sRel =  .Scale(.Data.Thorax.Right.LongissimusThoracisT10S3Node_pos);};
  AnyRefNode LongissimusThoracisT10S3NodeL  = { sRel =  .Scale(.Data.Thorax.Left.LongissimusThoracisT10S3Node_pos);};
  AnyRefNode LongissimusThoracisR3L3Via7NodeR   = { sRel =  .Scale(.Data.Thorax.Right.LongissimusThoracisR3L3Via7Node_pos);};
  AnyRefNode LongissimusThoracisR3L3Via7NodeL   = { sRel =  .Scale(.Data.Thorax.Left.LongissimusThoracisR3L3Via7Node_pos);};
  AnyRefNode LongissimusThoracisR4L4Via6NodeR   = { sRel =  .Scale(.Data.Thorax.Right.LongissimusThoracisR4L4Via6Node_pos);};
  AnyRefNode LongissimusThoracisR4L4Via6NodeL   = { sRel =  .Scale(.Data.Thorax.Left.LongissimusThoracisR4L4Via6Node_pos);};
  AnyRefNode LongissimusThoracisR5L5Via5NodeR   = { sRel =  .Scale(.Data.Thorax.Right.LongissimusThoracisR5L5Via5Node_pos);};
  AnyRefNode LongissimusThoracisR5L5Via5NodeL   = { sRel =  .Scale(.Data.Thorax.Left.LongissimusThoracisR5L5Via5Node_pos);};
  AnyRefNode LongissimusThoracisR6S1Via4NodeR   = { sRel =  .Scale(.Data.Thorax.Right.LongissimusThoracisR6S1Via4Node_pos);};
  AnyRefNode LongissimusThoracisR6S1Via4NodeL   = { sRel =  .Scale(.Data.Thorax.Left.LongissimusThoracisR6S1Via4Node_pos);};
  AnyRefNode LongissimusThoracisR7S2Via3NodeR   = { sRel =  .Scale(.Data.Thorax.Right.LongissimusThoracisR7S2Via3Node_pos);};
  AnyRefNode LongissimusThoracisR7S2Via3NodeL   = { sRel =  .Scale(.Data.Thorax.Left.LongissimusThoracisR7S2Via3Node_pos);};
  AnyRefNode LongissimusThoracisR8S3Via2NodeR   = { sRel =  .Scale(.Data.Thorax.Right.LongissimusThoracisR8S3Via2Node_pos);};
  AnyRefNode LongissimusThoracisR8S3Via2NodeL   = { sRel =  .Scale(.Data.Thorax.Left.LongissimusThoracisR8S3Via2Node_pos);};
  AnyRefNode LongissimusThoracisR9S4Via1NodeR   = { sRel =  .Scale(.Data.Thorax.Right.LongissimusThoracisR9S4Via1Node_pos);};
  AnyRefNode LongissimusThoracisR9S4Via1NodeL   = { sRel =  .Scale(.Data.Thorax.Left.LongissimusThoracisR9S4Via1Node_pos);};
  AnyRefNode LongissimusThoracisR10S3NodeR  = { sRel =  .Scale(.Data.Thorax.Right.LongissimusThoracisR10S3Node_pos);};
  AnyRefNode LongissimusThoracisR10S3NodeL  = { sRel =  .Scale(.Data.Thorax.Left.LongissimusThoracisR10S3Node_pos);};
  AnyRefNode MidPoint = { sRel = 0.5 * (.Scale(.Data.T10.T9T10JntNode_pos) +.Scale(.Data.T10.T10T11JntNode_pos));};
  AnyRefNode SpinousProcess = {sRel = .Scale(.Data.T10.SupraSpinous_superior_points[0]);};


  Right = {
    //Rotatores
    AnyRefNode RotatoresBrevisT10T9Node = {sRel = ..Scale(..Data.Thorax.Right.RotatoresBrevisT10T9OrgNode_pos);};
    AnyRefNode RotatoresBrevisT11T10Node = {sRel = ..Scale(..Data.Thorax.Right.RotatoresBrevisT11T10InsNode_pos);};
    AnyRefNode RotatoresLongusT10T8Node = {sRel = ..Scale(..Data.Thorax.Right.RotatoresLongusT10T8OrgNode_pos);};
    AnyRefNode RotatoresLongusT12T10Node = {sRel = ..Scale(..Data.Thorax.Right.RotatoresLongusT12T10InsNode_pos);};
  };
  Left = {
    //Rotatores
    AnyRefNode RotatoresBrevisT10T9Node = {sRel = ..Scale(..Data.Thorax.Left.RotatoresBrevisT10T9OrgNode_pos);};
    AnyRefNode RotatoresBrevisT11T10Node = {sRel = ..Scale(..Data.Thorax.Left.RotatoresBrevisT11T10InsNode_pos);};
    AnyRefNode RotatoresLongusT10T8Node = {sRel = ..Scale(..Data.Thorax.Left.RotatoresLongusT10T8OrgNode_pos);};
    AnyRefNode RotatoresLongusT12T10Node = {sRel = ..Scale(..Data.Thorax.Left.RotatoresLongusT12T10InsNode_pos);};
  };

  #if BM_TRUNK_CAVITY_MODEL == _CAVITY_MODEL_VOLUME_ | BM_TRUNK_THORACIC_MODEL == _THORACIC_MODEL_FLEXIBLE_ | BM_TRUNK_THORACIC_MODEL == _THORACIC_MODEL_FLEXIBLE_KINEMATIC_ONLY_
    AnyRefNode ThoracicCavityNodes = {
      CavityPoints Level10(data=....Data.unscaled.ModelParameters.ThoracicCavity.Level10, scale_fun=..Scale) = {
        Right.points_generator = {
          amount = ......Data.unscaled.ModelParameters.ThoracicCavity.DiscretizationFactorThoracic;
          start = ..data.Right.T_StartStop[0];
          end = ..data.Right.T_StartStop[1];
        };
        Left.points_generator = {
          amount = ......Data.unscaled.ModelParameters.ThoracicCavity.DiscretizationFactorThoracic;
          start = ..data.Left.T_StartStop[0];
          end = ..data.Left.T_StartStop[1];
        };
      };
      CavityPoints Level10_Discretization28(data=....Data.unscaled.ModelParameters.ThoracicCavity.Level10, scale_fun=..Scale) = {
        Right.points_generator = {
          amount = 5;
          start = 0;
          end = 0.08;
        };
        Left.points_generator = {
          amount = 5;
          start = 0;
          end = 0.08;
        };
      };
    };
  #endif
};
Segments.T11Seg = {
  AnyRefNode SemispinalisThoracisT11TransversusR = {  sRel= .Scale(.Data.T11.Right.SemispinalisThoracisTransversus_pos );};
  AnyRefNode SemispinalisThoracisT11TransversusL = {  sRel= .Scale(.Data.T11.Left.SemispinalisThoracisTransversus_pos );};
  AnyRefNode SemispinalisThoracisT11ViaNodeR = {sRel = .Scale(.Data.T11.Right.SemispinalisThoracisViaNode_pos );};
  AnyRefNode SemispinalisThoracisT11ViaNodeL = {sRel = .Scale(.Data.T11.Left.SemispinalisThoracisViaNode_pos );};
  AnyRefNode MultifidusThoracisL2T11NodeRIns = {sRel = .Scale(.Data.Thorax.Right.MultifidusThoracisL2T11Node_pos);};
  AnyRefNode MultifidusThoracisL2T11NodeLIns = {sRel = .Scale(.Data.Thorax.Left.MultifidusThoracisL2T11Node_pos);};
  AnyRefNode MultifidusThoracisL3T11NodeRIns = {sRel = .Scale(.Data.Thorax.Right.MultifidusThoracisL3T11Node_pos);};
  AnyRefNode MultifidusThoracisL3T11NodeLIns = {sRel = .Scale(.Data.Thorax.Left.MultifidusThoracisL3T11Node_pos);};
  AnyRefNode MultifidusThoracisL4T11NodeRIns = {sRel = .Scale(.Data.Thorax.Right.MultifidusThoracisL4T11Node_pos);};
  AnyRefNode MultifidusThoracisL4T11NodeLIns = {sRel = .Scale(.Data.Thorax.Left.MultifidusThoracisL4T11Node_pos);};
  AnyRefNode MultifidusThoracisT11T6NodeROrg = {sRel = .Scale(.Data.T11.Right.MultifidusThoracisT11T6NodeOrg_pos );};
  AnyRefNode MultifidusThoracisT11T7NodeROrg = {sRel = .Scale(.Data.T11.Right.MultifidusThoracisT11T7NodeOrg_pos );};
  AnyRefNode MultifidusThoracisT11T8NodeROrg = {sRel = .Scale(.Data.T11.Right.MultifidusThoracisT11T8NodeOrg_pos );};
  AnyRefNode MultifidusThoracisT11T6NodeLOrg = {sRel = .Scale(.Data.T11.Left.MultifidusThoracisT11T6NodeOrg_pos );};
  AnyRefNode MultifidusThoracisT11T7NodeLOrg = {sRel = .Scale(.Data.T11.Left.MultifidusThoracisT11T7NodeOrg_pos );};
  AnyRefNode MultifidusThoracisT11T8NodeLOrg = {sRel = .Scale(.Data.T11.Left.MultifidusThoracisT11T8NodeOrg_pos );};
  AnyRefNode SET11T7NodeROrg = {sRel = .Scale(.Data.T11.Right.SET11T7NodeOrg_pos );};
  AnyRefNode SET11T8NodeROrg = {sRel = .Scale(.Data.T11.Right.SET11T8NodeOrg_pos );};
  AnyRefNode SET11T9NodeROrg = {sRel = .Scale(.Data.T11.Right.SET11T9NodeOrg_pos );};
  AnyRefNode SET11T7NodeLOrg = {sRel = .Scale(.Data.T11.Left.SET11T7NodeOrg_pos );};
  AnyRefNode SET11T8NodeLOrg = {sRel = .Scale(.Data.T11.Left.SET11T8NodeOrg_pos );};
  AnyRefNode SET11T9NodeLOrg = {sRel = .Scale(.Data.T11.Left.SET11T9NodeOrg_pos );};
  AnyRefNode SpinalisT11T6NodeOrg = {sRel= .Scale(.Data.T11.SpinalisT11T6NodeOrg_pos );};
  AnyRefNode SpinalisT12T5Via1Node = {sRel= .Scale(.Data.T11.SpinalisT12T5Via1Node_pos );};
  AnyRefNode SpinalisT12T4Via1Node = {sRel= .Scale(.Data.T11.SpinalisT12T4Via1Node_pos );};
  AnyRefNode SpinalisL1T3Via2Node = {sRel= .Scale(.Data.T11.SpinalisL1T3Via2Node_pos );};
  AnyRefNode SpinalisL1T2Via2Node = {sRel= .Scale(.Data.T11.SpinalisL1T2Via2Node_pos );};
  AnyRefNode SpinalisL2T1Via3Node = {sRel= .Scale(.Data.T11.SpinalisL2T1Via3Node_pos );};
  // Longissimus
  AnyRefNode LongissimusThoracisT1L1Via10NodeR     = {sRel = .Scale(.Data.Thorax.Right.LongissimusThoracisT1L1Via10Node_pos);};
  AnyRefNode LongissimusThoracisT1L1Via10NodeL     = {sRel = .Scale(.Data.Thorax.Left.LongissimusThoracisT1L1Via10Node_pos);};
  AnyRefNode LongissimusThoracisT2L2Via9NodeR      = {sRel = .Scale(.Data.Thorax.Right.LongissimusThoracisT2L2Via9Node_pos);};
  AnyRefNode LongissimusThoracisT2L2Via9NodeL      = {sRel = .Scale(.Data.Thorax.Left.LongissimusThoracisT2L2Via9Node_pos);};
  AnyRefNode LongissimusThoracisT3L3Via8NodeR      = {sRel = .Scale(.Data.Thorax.Right.LongissimusThoracisT3L3Via8Node_pos);};
  AnyRefNode LongissimusThoracisT3L3Via8NodeL      = {sRel = .Scale(.Data.Thorax.Left.LongissimusThoracisT3L3Via8Node_pos);};
  AnyRefNode LongissimusThoracisT4L4Via7NodeR      = {sRel = .Scale(.Data.Thorax.Right.LongissimusThoracisT4L4Via7Node_pos);};
  AnyRefNode LongissimusThoracisT4L4Via7NodeL      = {sRel = .Scale(.Data.Thorax.Left.LongissimusThoracisT4L4Via7Node_pos);};
  AnyRefNode LongissimusThoracisT5L5Via6NodeR      = {sRel = .Scale(.Data.Thorax.Right.LongissimusThoracisT5L5Via6Node_pos);};
  AnyRefNode LongissimusThoracisT5L5Via6NodeL      = {sRel = .Scale(.Data.Thorax.Left.LongissimusThoracisT5L5Via6Node_pos);};
  AnyRefNode LongissimusThoracisT6S1Via5NodeR      = {sRel = .Scale(.Data.Thorax.Right.LongissimusThoracisT6S1Via5Node_pos);};
  AnyRefNode LongissimusThoracisT6S1Via5NodeL      = {sRel = .Scale(.Data.Thorax.Left.LongissimusThoracisT6S1Via5Node_pos);};
  AnyRefNode LongissimusThoracisT7S2Via4NodeR      = {sRel = .Scale(.Data.Thorax.Right.LongissimusThoracisT7S2Via4Node_pos); };
  AnyRefNode LongissimusThoracisT7S2Via4NodeL      = {sRel = .Scale(.Data.Thorax.Left.LongissimusThoracisT7S2Via4Node_pos); };
  AnyRefNode LongissimusThoracisT8S3Via3NodeR      = {sRel = .Scale(.Data.Thorax.Right.LongissimusThoracisT8S3Via3Node_pos); };
  AnyRefNode LongissimusThoracisT8S3Via3NodeL      = {sRel = .Scale(.Data.Thorax.Left.LongissimusThoracisT8S3Via3Node_pos); };
  AnyRefNode LongissimusThoracisT9S4Via2NodeR      = {sRel = .Scale(.Data.Thorax.Right.LongissimusThoracisT9S4Via2Node_pos); };
  AnyRefNode LongissimusThoracisT9S4Via2NodeL      = {sRel = .Scale(.Data.Thorax.Left.LongissimusThoracisT9S4Via2Node_pos); };
  AnyRefNode LongissimusThoracisT10S3Via1NodeR = {sRel = .Scale(.Data.Thorax.Right.LongissimusThoracisT10S3Via1Node_pos); };
  AnyRefNode LongissimusThoracisT10S3Via1NodeL = {sRel = .Scale(.Data.Thorax.Left.LongissimusThoracisT10S3Via1Node_pos); };
  AnyRefNode LongissimusThoracisT11S3NodeR     = {sRel = .Scale(.Data.Thorax.Right.LongissimusThoracisT11S3Node_pos); };
  AnyRefNode LongissimusThoracisT11S3NodeL     = {sRel = .Scale(.Data.Thorax.Left.LongissimusThoracisT11S3Node_pos); };
  AnyRefNode LongissimusThoracisR3L3Via8NodeR      = {sRel = .Scale(.Data.Thorax.Right.LongissimusThoracisR3L3Via8Node_pos);};
  AnyRefNode LongissimusThoracisR3L3Via8NodeL      = {sRel = .Scale(.Data.Thorax.Left.LongissimusThoracisR3L3Via8Node_pos);};
  AnyRefNode LongissimusThoracisR4L4Via7NodeR      = {sRel = .Scale(.Data.Thorax.Right.LongissimusThoracisR4L4Via7Node_pos);};
  AnyRefNode LongissimusThoracisR4L4Via7NodeL      = {sRel = .Scale(.Data.Thorax.Left.LongissimusThoracisR4L4Via7Node_pos);};
  AnyRefNode LongissimusThoracisR5L5Via6NodeR      = {sRel = .Scale(.Data.Thorax.Right.LongissimusThoracisR5L5Via6Node_pos);};
  AnyRefNode LongissimusThoracisR5L5Via6NodeL      = {sRel = .Scale(.Data.Thorax.Left.LongissimusThoracisR5L5Via6Node_pos);};
  AnyRefNode LongissimusThoracisR6S1Via5NodeR      = {sRel = .Scale(.Data.Thorax.Right.LongissimusThoracisR6S1Via5Node_pos);};
  AnyRefNode LongissimusThoracisR6S1Via5NodeL      = {sRel = .Scale(.Data.Thorax.Left.LongissimusThoracisR6S1Via5Node_pos);};
  AnyRefNode LongissimusThoracisR7S2Via4NodeR      = {sRel = .Scale(.Data.Thorax.Right.LongissimusThoracisR7S2Via4Node_pos); };
  AnyRefNode LongissimusThoracisR7S2Via4NodeL      = {sRel = .Scale(.Data.Thorax.Left.LongissimusThoracisR7S2Via4Node_pos); };
  AnyRefNode LongissimusThoracisR8S3Via3NodeR      = {sRel = .Scale(.Data.Thorax.Right.LongissimusThoracisR8S3Via3Node_pos); };
  AnyRefNode LongissimusThoracisR8S3Via3NodeL      = {sRel = .Scale(.Data.Thorax.Left.LongissimusThoracisR8S3Via3Node_pos); };
  AnyRefNode LongissimusThoracisR9S4Via2NodeR      = {sRel = .Scale(.Data.Thorax.Right.LongissimusThoracisR9S4Via2Node_pos); };
  AnyRefNode LongissimusThoracisR9S4Via2NodeL      = {sRel = .Scale(.Data.Thorax.Left.LongissimusThoracisR9S4Via2Node_pos); };
  AnyRefNode LongissimusThoracisR10S3Via1NodeR = {sRel = .Scale(.Data.Thorax.Right.LongissimusThoracisR10S3Via1Node_pos); };
  AnyRefNode LongissimusThoracisR10S3Via1NodeL = {sRel = .Scale(.Data.Thorax.Left.LongissimusThoracisR10S3Via1Node_pos); };
  AnyRefNode O_serratus_posterior_inferior_T11R = {sRel = .Scale(.Data.T11.O_serratus_posterior_inferior_pos); };
  AnyRefNode O_serratus_posterior_inferior_T11L = {sRel = .Scale(.Data.T11.O_serratus_posterior_inferior_pos);};
  AnyRefNode O_serratus_posterior_inferior_T11R9ViaNodeR = {sRel = .Scale(.Data.T11.Right.O_serratus_posterior_inferior_T11R9ViaNodepos); };
  AnyRefNode O_serratus_posterior_inferior_T11R9ViaNodeL = {sRel = .Scale(.Data.T11.Left.O_serratus_posterior_inferior_T11R9ViaNodepos); };
  AnyRefNode LevatorCostarumT11R12ROrg = {    sRel = .Scale(.Data.T11.Right.LevatorCostarumT11R12_pos);};
  AnyRefNode LevatorCostarumT11R12LOrg = {    sRel = .Scale(.Data.T11.Left.LevatorCostarumT11R12_pos);};
  AnyRefNode MidPoint = { sRel = 0.5 * (.Scale(.Data.T11.T10T11JntNode_pos) + .Scale(.Data.T11.T11T12JntNode_pos));};
  AnyRefNode SpinousProcess = {sRel = .Scale(.Data.T11.SupraSpinous_superior_points[0]);};

  Right = {
    //Rotatores
    AnyRefNode RotatoresBrevisT11T10Node = {sRel = ..Scale(..Data.Thorax.Right.RotatoresBrevisT11T10OrgNode_pos);};
    AnyRefNode RotatoresBrevisT12T11Node = {sRel = ..Scale(..Data.Thorax.Right.RotatoresBrevisT12T11InsNode_pos);};
    AnyRefNode RotatoresLongusT11T9Node = {sRel = ..Scale(..Data.Thorax.Right.RotatoresLongusT11T9OrgNode_pos);};
  };
  Left = {
    //Rotatores
    AnyRefNode RotatoresBrevisT11T10Node = {sRel = ..Scale(..Data.Thorax.Left.RotatoresBrevisT11T10OrgNode_pos);};
    AnyRefNode RotatoresBrevisT12T11Node = {sRel = ..Scale(..Data.Thorax.Left.RotatoresBrevisT12T11InsNode_pos);};
    AnyRefNode RotatoresLongusT11T9Node = {sRel = ..Scale(..Data.Thorax.Left.RotatoresLongusT11T9OrgNode_pos);};
  };

};

Segments.T12Seg = {
  AnyRefNode QuadratusLumborumT12NodeR = {  sRel= .Scale(.Data.T12.Right.QuadratusLumborumT12Node_pos );};
  AnyRefNode QuadratusLumborumT12NodeL = {  sRel= .Scale(.Data.T12.Left.QuadratusLumborumT12Node_pos );};
  AnyRefNode SemispinalisThoracisT12TransversusR = {  sRel= .Scale(.Data.T12.Right.SemispinalisThoracisTransversus_pos );};
  AnyRefNode SemispinalisThoracisT12TransversusL = {  sRel= .Scale(.Data.T12.Left.SemispinalisThoracisTransversus_pos );};
  AnyRefNode MultifidusThoracisL3T12NodeRIns = {sRel = .Scale(.Data.Thorax.Right.MultifidusThoracisL3T12Node_pos);};
  AnyRefNode MultifidusThoracisL3T12NodeLIns = {sRel = .Scale(.Data.Thorax.Left.MultifidusThoracisL3T12Node_pos);};
  AnyRefNode MultifidusThoracisL4T12NodeRIns = {sRel = .Scale(.Data.Thorax.Right.MultifidusThoracisL4T12Node_pos);};
  AnyRefNode MultifidusThoracisL4T12NodeLIns = {sRel = .Scale(.Data.Thorax.Left.MultifidusThoracisL4T12Node_pos);};
  AnyRefNode MultifidusThoracisL5T12NodeRIns = {sRel = .Scale(.Data.Thorax.Right.MultifidusThoracisL5T12Node_pos);};
  AnyRefNode MultifidusThoracisL5T12NodeLIns = {sRel = .Scale(.Data.Thorax.Left.MultifidusThoracisL5T12Node_pos);};
  AnyRefNode MultifidusThoracisT12T7NodeROrg = {sRel = .Scale(.Data.T12.Right.MultifidusThoracisT12T7NodeOrg_pos );};
  AnyRefNode MultifidusThoracisT12T8NodeROrg = {sRel = .Scale(.Data.T12.Right.MultifidusThoracisT12T8NodeOrg_pos );};
  AnyRefNode MultifidusThoracisT12T9NodeROrg = {sRel = .Scale(.Data.T12.Right.MultifidusThoracisT12T9NodeOrg_pos );};
  AnyRefNode MultifidusThoracisT12T7NodeLOrg = {sRel = .Scale(.Data.T12.Left.MultifidusThoracisT12T7NodeOrg_pos );};
  AnyRefNode MultifidusThoracisT12T8NodeLOrg = {sRel = .Scale(.Data.T12.Left.MultifidusThoracisT12T8NodeOrg_pos );};
  AnyRefNode MultifidusThoracisT12T9NodeLOrg = {sRel = .Scale(.Data.T12.Left.MultifidusThoracisT12T9NodeOrg_pos );};
  AnyRefNode SET12T8NodeROrg  = {sRel = .Scale(.Data.T12.Right.SET12T8NodeOrg_pos );};
  AnyRefNode SET12T9NodeROrg  = {sRel = .Scale(.Data.T12.Right.SET12T9NodeOrg_pos );};
  AnyRefNode SET12T10NodeROrg = {sRel = .Scale(.Data.T12.Right.SET12T10NodeOrg_pos );};
  AnyRefNode SET12T8NodeLOrg  = {sRel = .Scale(.Data.T12.Left.SET12T8NodeOrg_pos );};
  AnyRefNode SET12T9NodeLOrg  = {sRel = .Scale(.Data.T12.Left.SET12T9NodeOrg_pos );};
  AnyRefNode SET12T10NodeLOrg = {sRel = .Scale(.Data.T12.Left.SET12T10NodeOrg_pos );};
  AnyRefNode SpinalisT12T5NodeOrg = {sRel= .Scale(.Data.T12.SpinalisT12T5NodeOrg_pos );};
  AnyRefNode SpinalisT12T4NodeOrg = {sRel= .Scale(.Data.T12.SpinalisT12T4NodeOrg_pos );};
  AnyRefNode SpinalisL1T3Via1Node = {sRel= .Scale(.Data.T12.SpinalisL1T3Via1Node_pos );};
  AnyRefNode SpinalisL1T2Via1Node = {sRel= .Scale(.Data.T12.SpinalisL1T2Via1Node_pos );};
  AnyRefNode SpinalisL2T1Via2Node = {sRel= .Scale(.Data.T12.SpinalisL2T1Via2Node_pos );};
  // Longissimus
  AnyRefNode LongissimusThoracisT1L1Via11NodeR     = {sRel = .Scale(.Data.Thorax.Right.LongissimusThoracisT1L1Via11Node_pos);};
  AnyRefNode LongissimusThoracisT1L1Via11NodeL     = {sRel = .Scale(.Data.Thorax.Left.LongissimusThoracisT1L1Via11Node_pos);};
  AnyRefNode LongissimusThoracisT2L2Via10NodeR     = {sRel = .Scale(.Data.Thorax.Right.LongissimusThoracisT2L2Via10Node_pos);};
  AnyRefNode LongissimusThoracisT2L2Via10NodeL     = {sRel = .Scale(.Data.Thorax.Left.LongissimusThoracisT2L2Via10Node_pos);};
  AnyRefNode LongissimusThoracisT3L3Via9NodeR      = {sRel = .Scale(.Data.Thorax.Right.LongissimusThoracisT3L3Via9Node_pos);};
  AnyRefNode LongissimusThoracisT3L3Via9NodeL      = {sRel = .Scale(.Data.Thorax.Left.LongissimusThoracisT3L3Via9Node_pos);};
  AnyRefNode LongissimusThoracisT4L4Via8NodeR      = {sRel = .Scale(.Data.Thorax.Right.LongissimusThoracisT4L4Via8Node_pos);};
  AnyRefNode LongissimusThoracisT4L4Via8NodeL      = {sRel = .Scale(.Data.Thorax.Left.LongissimusThoracisT4L4Via8Node_pos);};
  AnyRefNode LongissimusThoracisT5L5Via7NodeR      = {sRel = .Scale(.Data.Thorax.Right.LongissimusThoracisT5L5Via7Node_pos);};
  AnyRefNode LongissimusThoracisT5L5Via7NodeL      = {sRel = .Scale(.Data.Thorax.Left.LongissimusThoracisT5L5Via7Node_pos);};
  AnyRefNode LongissimusThoracisT6S1Via6NodeR      = {sRel = .Scale(.Data.Thorax.Right.LongissimusThoracisT6S1Via6Node_pos);};
  AnyRefNode LongissimusThoracisT6S1Via6NodeL      = {sRel = .Scale(.Data.Thorax.Left.LongissimusThoracisT6S1Via6Node_pos);};
  AnyRefNode LongissimusThoracisT7S2Via5NodeR      = {sRel = .Scale(.Data.Thorax.Right.LongissimusThoracisT7S2Via5Node_pos);};
  AnyRefNode LongissimusThoracisT7S2Via5NodeL      = {sRel = .Scale(.Data.Thorax.Left.LongissimusThoracisT7S2Via5Node_pos);};

  AnyRefNode LongissimusThoracisT8S3Via4NodeR      = {sRel = .Scale(.Data.Thorax.Right.LongissimusThoracisT8S3Via4Node_pos);};
  AnyRefNode LongissimusThoracisT8S3Via4NodeL      = {sRel = .Scale(.Data.Thorax.Left.LongissimusThoracisT8S3Via4Node_pos);};
  AnyRefNode LongissimusThoracisT9S4Via3NodeR      = {sRel = .Scale(.Data.Thorax.Right.LongissimusThoracisT9S4Via3Node_pos);};
  AnyRefNode LongissimusThoracisT9S4Via3NodeL      = {sRel = .Scale(.Data.Thorax.Left.LongissimusThoracisT9S4Via3Node_pos);};
  AnyRefNode LongissimusThoracisT10S3Via2NodeR = {sRel = .Scale(.Data.Thorax.Right.LongissimusThoracisT10S3Via2Node_pos); };
  AnyRefNode LongissimusThoracisT10S3Via2NodeL = {sRel = .Scale(.Data.Thorax.Left.LongissimusThoracisT10S3Via2Node_pos); };
  AnyRefNode LongissimusThoracisT11S3Via1NodeR = {sRel = .Scale(.Data.Thorax.Right.LongissimusThoracisT11S3Via1Node_pos); };
  AnyRefNode LongissimusThoracisT11S3Via1NodeL = {sRel = .Scale(.Data.Thorax.Left.LongissimusThoracisT11S3Via1Node_pos); };
  AnyRefNode LongissimusThoracisT12S3NodeR     = {sRel = .Scale(.Data.Thorax.Right.LongissimusThoracisT12S3Node_pos); };
  AnyRefNode LongissimusThoracisT12S3NodeL     = {sRel = .Scale(.Data.Thorax.Left.LongissimusThoracisT12S3Node_pos); };
  AnyRefNode LongissimusThoracisR12S3NodeR     = {sRel = .Scale(.Data.R12.Right.LongissimusThoracisR12S3Node_pos); };
  AnyRefNode LongissimusThoracisR12S3NodeL     = {sRel = .Scale(.Data.R12.Left.LongissimusThoracisR12S3Node_pos); };

  AnyRefNode LongissimusThoracisR3L3Via9NodeR      = {sRel = .Scale(.Data.Thorax.Right.LongissimusThoracisR3L3Via9Node_pos);};
  AnyRefNode LongissimusThoracisR3L3Via9NodeL      = {sRel = .Scale(.Data.Thorax.Left.LongissimusThoracisR3L3Via9Node_pos);};
  AnyRefNode LongissimusThoracisR4L4Via8NodeR      = {sRel = .Scale(.Data.Thorax.Right.LongissimusThoracisR4L4Via8Node_pos);};
  AnyRefNode LongissimusThoracisR4L4Via8NodeL      = {sRel = .Scale(.Data.Thorax.Left.LongissimusThoracisR4L4Via8Node_pos);};
  AnyRefNode LongissimusThoracisR5L5Via7NodeR      = {sRel = .Scale(.Data.Thorax.Right.LongissimusThoracisR5L5Via7Node_pos);};
  AnyRefNode LongissimusThoracisR5L5Via7NodeL      = {sRel = .Scale(.Data.Thorax.Left.LongissimusThoracisR5L5Via7Node_pos);};
  AnyRefNode LongissimusThoracisR6S1Via6NodeR      = {sRel = .Scale(.Data.Thorax.Right.LongissimusThoracisR6S1Via6Node_pos);};
  AnyRefNode LongissimusThoracisR6S1Via6NodeL      = {sRel = .Scale(.Data.Thorax.Left.LongissimusThoracisR6S1Via6Node_pos);};
  AnyRefNode LongissimusThoracisR7S2Via5NodeR      = {sRel = .Scale(.Data.Thorax.Right.LongissimusThoracisR7S2Via5Node_pos);};
  AnyRefNode LongissimusThoracisR7S2Via5NodeL      = {sRel = .Scale(.Data.Thorax.Left.LongissimusThoracisR7S2Via5Node_pos);};
  AnyRefNode LongissimusThoracisR8S3Via4NodeR      = {sRel = .Scale(.Data.R12.Right.LongissimusThoracisR8S3Via4Node_pos);};
  AnyRefNode LongissimusThoracisR8S3Via4NodeL      = {sRel = .Scale(.Data.R12.Left.LongissimusThoracisR8S3Via4Node_pos);};
  AnyRefNode LongissimusThoracisR9S4Via3NodeR      = {sRel = .Scale(.Data.R12.Right.LongissimusThoracisR9S4Via3Node_pos);};
  AnyRefNode LongissimusThoracisR9S4Via3NodeL      = {sRel = .Scale(.Data.R12.Left.LongissimusThoracisR9S4Via3Node_pos);};
  AnyRefNode LongissimusThoracisR10S3Via2NodeR = {sRel = .Scale(.Data.R12.Right.LongissimusThoracisR10S3Via2Node_pos); };
  AnyRefNode LongissimusThoracisR10S3Via2NodeL = {sRel = .Scale(.Data.R12.Left.LongissimusThoracisR10S3Via2Node_pos); };
  AnyRefNode LongissimusThoracisR11S3Via1NodeR = {sRel = .Scale(.Data.R12.Right.LongissimusThoracisR11S3Via1Node_pos); };
  AnyRefNode LongissimusThoracisR11S3Via1NodeL = {sRel = .Scale(.Data.R12.Left.LongissimusThoracisR11S3Via1Node_pos); };

  AnyRefNode PsoasMajorT12NodeR = {sRel = .Scale(.Data.Thorax.Right.PsoasMajorT12Node_pos);};
  AnyRefNode PsoasMajorT12NodeL = {sRel = .Scale(.Data.Thorax.Left.PsoasMajorT12Node_pos);};
  AnyRefNode O_serratus_posterior_inferior_T12R = {sRel = .Scale(.Data.T12.O_serratus_posterior_inferior_pos); };
  AnyRefNode O_serratus_posterior_inferior_T12L = {sRel = .Scale(.Data.T12.O_serratus_posterior_inferior_pos);};
  AnyRefNode O_serratus_posterior_inferior_T12R10ViaNodeR = {sRel = .Scale(.Data.T12.Right.O_serratus_posterior_inferior_T12R10ViaNodepos); };
  AnyRefNode O_serratus_posterior_inferior_T12R10ViaNodeL = {sRel = .Scale(.Data.T12.Left.O_serratus_posterior_inferior_T12R10ViaNodepos); };
  AnyRefNode MidPoint = {
    sRel = 0.5 * (
      .Scale(.Data.T12.T11T12JntNode_pos) + .Scale(.Data.T12.T12L1JntNode_pos)
    );
  };
  AnyRefNode SpinousProcess = {sRel = .Scale(.Data.T12.SupraSpinous_superior_points[0]);};

  Right = {
    //Rotatores
    AnyRefNode RotatoresBrevisT12T11Node = {sRel = ..Scale(..Data.Thorax.Right.RotatoresBrevisT12T11OrgNode_pos);};
    AnyRefNode RotatoresLongusT12T10Node = {sRel = ..Scale(..Data.Thorax.Right.RotatoresLongusT12T10OrgNode_pos);};
  };
  Left = {
    //Rotatores
    AnyRefNode RotatoresBrevisT12T11Node = {sRel = ..Scale(..Data.Thorax.Left.RotatoresBrevisT12T11OrgNode_pos);};
    AnyRefNode RotatoresLongusT12T10Node = {sRel = ..Scale(..Data.Thorax.Left.RotatoresLongusT12T10OrgNode_pos);};
  };

};

Segments.SternumSeg = {
  #if BM_TRUNK_CAVITY_MODEL == _CAVITY_MODEL_VOLUME_ | BM_TRUNK_THORACIC_MODEL == _THORACIC_MODEL_FLEXIBLE_ | BM_TRUNK_THORACIC_MODEL == _THORACIC_MODEL_FLEXIBLE_KINEMATIC_ONLY_
    AnyRefNode ThoracicCavityNodes = {
      CavityPoints Level01(data=....Data.unscaled.ModelParameters.ThoracicCavity.Level01, scale_fun=..Scale) = {
        Right.points_generator = {
          amount = ......Data.unscaled.ModelParameters.ThoracicCavity.DiscretizationFactorSternum;
          start = ..data.Right.Sternum_StartStop[0];
          end = ..data.Right.Sternum_StartStop[1];
        };
        Left.points_generator = {
          amount = ......Data.unscaled.ModelParameters.ThoracicCavity.DiscretizationFactorSternum;
          start = ..data.Left.Sternum_StartStop[0];
          end = ..data.Left.Sternum_StartStop[1];
        };
      };
    };
  #endif
};

Segments.SternalBodySeg = {
  // Rectus Abdominis Nodes
  AnyRefNode RectusAbdominisCP_CO7_1_R = {sRel = .Scale(.Data.Thorax.Right.RectusAbdominisCP_CO7Node_1_pos);};
  AnyRefNode RectusAbdominisCP_CO6_2_R = {sRel = .Scale(.Data.Thorax.Right.RectusAbdominisCP_CO6Node_2_pos);};
  AnyRefNode RectusAbdominisCP_CO5_2_R = {sRel = .Scale(.Data.Thorax.Right.RectusAbdominisCP_CO5Node_2_pos);};
  AnyRefNode RectusAbdominisCP_Via_2_R = {sRel = .Scale(.Data.Thorax.Right.RectusAbdominisCP_Via_2_pos);};
  AnyRefNode RectusAbdominisCP_CO7_1_L = {sRel = .Scale(.Data.Thorax.Left.RectusAbdominisCP_CO7Node_1_pos);};
  AnyRefNode RectusAbdominisCP_CO6_2_L = {sRel = .Scale(.Data.Thorax.Left.RectusAbdominisCP_CO6Node_2_pos);};
  AnyRefNode RectusAbdominisCP_CO5_2_L = {sRel = .Scale(.Data.Thorax.Left.RectusAbdominisCP_CO5Node_2_pos);};
  AnyRefNode RectusAbdominisCP_Via_2_L = {sRel = .Scale(.Data.Thorax.Left.RectusAbdominisCP_Via_2_pos);};
  // End of Rectus Abdominis Nodes

  #if BM_TRUNK_CAVITY_MODEL == _CAVITY_MODEL_VOLUME_ | BM_TRUNK_THORACIC_MODEL == _THORACIC_MODEL_FLEXIBLE_ | BM_TRUNK_THORACIC_MODEL == _THORACIC_MODEL_FLEXIBLE_KINEMATIC_ONLY_
    AnyRefNode ThoracicCavityNodes = {
      CavityPoints Level02(data=....Data.unscaled.ModelParameters.ThoracicCavity.Level02, scale_fun=..Scale) = {
        Right.points_generator = {
          amount = ......Data.unscaled.ModelParameters.ThoracicCavity.DiscretizationFactorSternum;
          start = ..data.Right.Sternum_StartStop[0];
          end = ..data.Right.Sternum_StartStop[1];
        };
        Left.points_generator = {
          amount = ......Data.unscaled.ModelParameters.ThoracicCavity.DiscretizationFactorSternum;
          start = ..data.Left.Sternum_StartStop[0];
          end = ..data.Left.Sternum_StartStop[1];
        };
      };
      CavityPoints Level03(data=....Data.unscaled.ModelParameters.ThoracicCavity.Level03, scale_fun=..Scale) = {
        Right.points_generator = {
          amount = ......Data.unscaled.ModelParameters.ThoracicCavity.DiscretizationFactorSternum;
          start = ..data.Right.Sternum_StartStop[0];
          end = ..data.Right.Sternum_StartStop[1];
        };
        Left.points_generator = {
          amount = ......Data.unscaled.ModelParameters.ThoracicCavity.DiscretizationFactorSternum;
          start = ..data.Left.Sternum_StartStop[0];
          end = ..data.Left.Sternum_StartStop[1];
        };
      };
      CavityPoints Level04(data=....Data.unscaled.ModelParameters.ThoracicCavity.Level04, scale_fun=..Scale) = {
        Right.points_generator = {
          amount = ......Data.unscaled.ModelParameters.ThoracicCavity.DiscretizationFactorSternum;
          start = ..data.Right.Sternum_StartStop[0];
          end = ..data.Right.Sternum_StartStop[1];
        };
        Left.points_generator = {
          amount = ......Data.unscaled.ModelParameters.ThoracicCavity.DiscretizationFactorSternum;
          start = ..data.Left.Sternum_StartStop[0];
          end = ..data.Left.Sternum_StartStop[1];
        };
      };
      CavityPoints Level05(data=....Data.unscaled.ModelParameters.ThoracicCavity.Level05, scale_fun=..Scale) = {
        Right.points_generator = {
          amount = ......Data.unscaled.ModelParameters.ThoracicCavity.DiscretizationFactorSternum;
          start = ..data.Right.Sternum_StartStop[0];
          end = ..data.Right.Sternum_StartStop[1];
        };
        Left.points_generator = {
          amount = ......Data.unscaled.ModelParameters.ThoracicCavity.DiscretizationFactorSternum;
          start = ..data.Left.Sternum_StartStop[0];
          end = ..data.Left.Sternum_StartStop[1];
        };
      };
      CavityPoints Level06(data=....Data.unscaled.ModelParameters.ThoracicCavity.Level06, scale_fun=..Scale) = {
        Right.points_generator = {
          amount = ......Data.unscaled.ModelParameters.ThoracicCavity.DiscretizationFactorSternum;
          start = ..data.Right.Sternum_StartStop[0];
          end = ..data.Right.Sternum_StartStop[1];
        };
        Left.points_generator = {
          amount = ......Data.unscaled.ModelParameters.ThoracicCavity.DiscretizationFactorSternum;
          start = ..data.Left.Sternum_StartStop[0];
          end = ..data.Left.Sternum_StartStop[1];
        };
      };
      CavityPoints Level07(data=....Data.unscaled.ModelParameters.ThoracicCavity.Level07, scale_fun=..Scale) = {
        Right.points_generator = {
          amount = ......Data.unscaled.ModelParameters.ThoracicCavity.DiscretizationFactorSternum;
          start = ..data.Right.Sternum_StartStop[0];
          end = ..data.Right.Sternum_StartStop[1];
        };
        Left.points_generator = {
          amount = ......Data.unscaled.ModelParameters.ThoracicCavity.DiscretizationFactorSternum;
          start = ..data.Left.Sternum_StartStop[0];
          end = ..data.Left.Sternum_StartStop[1];
        };
      };
      CavityPoints Level08(data=....Data.unscaled.ModelParameters.ThoracicCavity.Level08, scale_fun=..Scale) = {
        Right.points_generator = {
          amount = ......Data.unscaled.ModelParameters.ThoracicCavity.DiscretizationFactorSternum;
          start = ..data.Right.Sternum_StartStop[0];
          end = ..data.Right.Sternum_StartStop[1];
        };
        Left.points_generator = {
          amount = ......Data.unscaled.ModelParameters.ThoracicCavity.DiscretizationFactorSternum;
          start = ..data.Left.Sternum_StartStop[0];
          end = ..data.Left.Sternum_StartStop[1];
        };
      };
      CavityPoints Level09(data=....Data.unscaled.ModelParameters.ThoracicCavity.Level09, scale_fun=..Scale) = {
        Right.points_generator = {
          amount = ......Data.unscaled.ModelParameters.ThoracicCavity.DiscretizationFactorSternum;
          start = ..data.Right.Sternum_StartStop[0];
          end = ..data.Right.Sternum_StartStop[1];
        };
        Left.points_generator = {
          amount = ......Data.unscaled.ModelParameters.ThoracicCavity.DiscretizationFactorSternum;
          start = ..data.Left.Sternum_StartStop[0];
          end = ..data.Left.Sternum_StartStop[1];
        };
      };
      CavityPoints Level10(data=....Data.unscaled.ModelParameters.ThoracicCavity.Level10, scale_fun=..Scale) = {
        Right.points_generator = {
          amount = ......Data.unscaled.ModelParameters.ThoracicCavity.DiscretizationFactorSternum;
          start = ..data.Right.Sternum_StartStop[0];
          end = ..data.Right.Sternum_StartStop[1];
        };
        Left.points_generator = {
          amount = ......Data.unscaled.ModelParameters.ThoracicCavity.DiscretizationFactorSternum;
          start = ..data.Left.Sternum_StartStop[0];
          end = ..data.Left.Sternum_StartStop[1];
        };
        AnyRefNode Center = {
          sRel = mean({
            .Right.points_generator.points[.Right.points_generator.amount - 1],
            .Left.points_generator.points[.Right.points_generator.amount - 1]}');
        };
      };
      CavityPoints Level10_Discretization28(data=....Data.unscaled.ModelParameters.ThoracicCavity.Level10, scale_fun=..Scale) = {
        Right.points_generator = {
          amount = 5;
          start = 0.65;
          end = 1;
        };
        Left.points_generator = {
          amount = 5;
          start = 0.65;
          end = 1;
        };
        AnyRefNode Center = {
          sRel = mean({
            .Right.points_generator.points[4],
            .Left.points_generator.points[4]}');
        };
      };

    };
  #endif
};

#if BM_TRUNK_THORACIC_STERNUM_TOPOLOGY == 4
  Segments.Right.CostalCartilageSeg={
    AnyRefNode RectusAbdominisCP_Via_2_R = {sRel = .Scale(.Data.Thorax.Right.RectusAbdominisCP_Via_2_pos);};
    AnyRefNode RectusAbdominisCP_Via_3_R = {sRel = .Scale(.Data.Thorax.Right.RectusAbdominisCP_Via_3_pos);};
    AnyRefNode RectusAbdominisCP_Via_4_R = {sRel = .Scale(.Data.Thorax.Right.RectusAbdominisCP_Via_4_pos);};
  };

  Segments.Left.CostalCartilageSeg={
    AnyRefNode RectusAbdominisCP_Via_2_L = {sRel = .Scale(.Data.Thorax.Left.RectusAbdominisCP_Via_2_pos);};
    AnyRefNode RectusAbdominisCP_Via_3_L = {sRel = .Scale(.Data.Thorax.Left.RectusAbdominisCP_Via_3_pos);};
    AnyRefNode RectusAbdominisCP_Via_4_L = {sRel = .Scale(.Data.Thorax.Left.RectusAbdominisCP_Via_4_pos);};
  };
#endif

#if BM_TRUNK_CAVITY_MODEL == _CAVITY_MODEL_VOLUME_ | BM_TRUNK_THORACIC_MODEL == _THORACIC_MODEL_FLEXIBLE_ | BM_TRUNK_THORACIC_MODEL == _THORACIC_MODEL_FLEXIBLE_KINEMATIC_ONLY_
Segments.Right = {
  R10Seg = {
    CavityNodesThoracic ThoracicCavityNodes(
      data=....Data.unscaled.ModelParameters.ThoracicCavity.Level10.Right, scale_fun=.Scale
    ) = {
      points_generator = {
        amount = .....Data.unscaled.ModelParameters.ThoracicCavity.DiscretizationFactorRib;
        start = .data.Rib_StartStop[0];
        end = .data.Rib_StartStop[1];
      };
    };
    CavityNodesThoracic ThoracicCavityNodes_Discretization28(
    data=....Data.unscaled.ModelParameters.ThoracicCavity.Level10.Right, scale_fun=.Scale
    ) = {
      points_generator = {
        amount = 10;
        start = 0.08;
        end = 0.65;
      };
    };
  };
  R9Seg = {
    CavityNodesThoracic ThoracicCavityNodes(
      data=....Data.unscaled.ModelParameters.ThoracicCavity.Level09.Right, scale_fun=.Scale
    ) = {
      points_generator = {
        amount = .....Data.unscaled.ModelParameters.ThoracicCavity.DiscretizationFactorRib;
        start = .data.Rib_StartStop[0];
        end = .data.Rib_StartStop[1];
      };
    };
    CavityNodesThoracic ThoracicCavityNodes_Discretization28(
      data=....Data.unscaled.ModelParameters.ThoracicCavity.Level09.Right, scale_fun=.Scale
    ) = {
      points_generator = {
        amount = 10;
        start = 0.08;
        end = 0.64;
      };
    };
  };
  R8Seg = {
    CavityNodesThoracic ThoracicCavityNodes(
      data=....Data.unscaled.ModelParameters.ThoracicCavity.Level08.Right, scale_fun=.Scale
    ) = {
      points_generator = {
        amount = .....Data.unscaled.ModelParameters.ThoracicCavity.DiscretizationFactorRib;
        start = .data.Rib_StartStop[0];
        end = .data.Rib_StartStop[1];
      };
    };
    CavityNodesThoracic ThoracicCavityNodes_Discretization28(
      data=....Data.unscaled.ModelParameters.ThoracicCavity.Level08.Right, scale_fun=.Scale
    ) = {
      points_generator = {
        amount = 10;
        start = 0.08;
        end = 0.7;
      };
    };
  };
  R7Seg = {
    CavityNodesThoracic ThoracicCavityNodes(
      data=....Data.unscaled.ModelParameters.ThoracicCavity.Level07.Right, scale_fun=.Scale
    ) = {
      points_generator = {
        amount = .....Data.unscaled.ModelParameters.ThoracicCavity.DiscretizationFactorRib;
        start = .data.Rib_StartStop[0];
        end = .data.Rib_StartStop[1];
      };
    };
  };
  R6Seg = {
    CavityNodesThoracic ThoracicCavityNodes(
      data=....Data.unscaled.ModelParameters.ThoracicCavity.Level06.Right, scale_fun=.Scale
    ) = {
      points_generator = {
        amount = .....Data.unscaled.ModelParameters.ThoracicCavity.DiscretizationFactorRib;
        start = .data.Rib_StartStop[0];
        end = .data.Rib_StartStop[1];
      };
    };
  };
  R5Seg = {
    CavityNodesThoracic ThoracicCavityNodes(
      data=....Data.unscaled.ModelParameters.ThoracicCavity.Level05.Right, scale_fun=.Scale
    ) = {
      points_generator = {
        amount = .....Data.unscaled.ModelParameters.ThoracicCavity.DiscretizationFactorRib;
        start = .data.Rib_StartStop[0];
        end = .data.Rib_StartStop[1];
      };
    };
  };
  R4Seg = {
    CavityNodesThoracic ThoracicCavityNodes(
      data=....Data.unscaled.ModelParameters.ThoracicCavity.Level04.Right, scale_fun=.Scale
    ) = {
      points_generator = {
        amount = .....Data.unscaled.ModelParameters.ThoracicCavity.DiscretizationFactorRib;
        start = .data.Rib_StartStop[0];
        end = .data.Rib_StartStop[1];
      };
    };
  };
  R3Seg = {
    CavityNodesThoracic ThoracicCavityNodes(
      data=....Data.unscaled.ModelParameters.ThoracicCavity.Level03.Right, scale_fun=.Scale
    ) = {
      points_generator = {
        amount = .....Data.unscaled.ModelParameters.ThoracicCavity.DiscretizationFactorRib;
        start = .data.Rib_StartStop[0];
        end = .data.Rib_StartStop[1];
      };
    };
  };
  R2Seg = {
    CavityNodesThoracic ThoracicCavityNodes(
      data=....Data.unscaled.ModelParameters.ThoracicCavity.Level02.Right, scale_fun=.Scale
    ) = {
      points_generator = {
        amount = .....Data.unscaled.ModelParameters.ThoracicCavity.DiscretizationFactorRib;
        start = .data.Rib_StartStop[0];
        end = .data.Rib_StartStop[1];
      };
    };
  };
  R1Seg = {
    AnyRefNode ThoracicCavityNodes = {
      CavityNodesThoracic Level01(
        data=.....Data.unscaled.ModelParameters.ThoracicCavity.Level01.Right, scale_fun=..Scale
      ) = {
        points_generator = {
          amount = ......Data.unscaled.ModelParameters.ThoracicCavity.DiscretizationFactorRib;
          start = .data.Rib_StartStop[0];
          end = .data.Rib_StartStop[1];
        };
      };

    };
  };
};

Segments.Left = {
  R10Seg = {
    CavityNodesThoracic ThoracicCavityNodes(
      data=....Data.unscaled.ModelParameters.ThoracicCavity.Level10.Left, scale_fun=.Scale
    ) = {
      points_generator = {
        amount = .....Data.unscaled.ModelParameters.ThoracicCavity.DiscretizationFactorRib;
        start = .data.Rib_StartStop[0];
        end = .data.Rib_StartStop[1];
      };
    };
    CavityNodesThoracic ThoracicCavityNodes_Discretization28(
      data=....Data.unscaled.ModelParameters.ThoracicCavity.Level10.Left, scale_fun=.Scale
    ) = {
      points_generator = {
        amount = 10;
        start = 0.08;
        end = 0.65;
      };
    };
  };
  R9Seg = {
    CavityNodesThoracic ThoracicCavityNodes(
      data=....Data.unscaled.ModelParameters.ThoracicCavity.Level09.Left, scale_fun=.Scale
    ) = {
      points_generator = {
        amount = .....Data.unscaled.ModelParameters.ThoracicCavity.DiscretizationFactorRib;
        start = .data.Rib_StartStop[0];
        end = .data.Rib_StartStop[1];
      };
    };
    CavityNodesThoracic ThoracicCavityNodes_Discretization28(
      data=....Data.unscaled.ModelParameters.ThoracicCavity.Level09.Left, scale_fun=.Scale
    ) = {
      points_generator = {
        amount = 10;
        start = 0.08;
        end = 0.64;
      };
    };
  };
  R8Seg = {
    CavityNodesThoracic ThoracicCavityNodes(
      data=....Data.unscaled.ModelParameters.ThoracicCavity.Level08.Left, scale_fun=.Scale
    ) = {
      points_generator = {
        amount = .....Data.unscaled.ModelParameters.ThoracicCavity.DiscretizationFactorRib;
        start = .data.Rib_StartStop[0];
        end = .data.Rib_StartStop[1];
      };
    };
    CavityNodesThoracic ThoracicCavityNodes_Discretization28(
      data=....Data.unscaled.ModelParameters.ThoracicCavity.Level08.Left, scale_fun=.Scale
    ) = {
      points_generator = {
        amount = 10;
        start = 0.08;
        end = 0.7;
      };
    };
  };
  R7Seg = {
    CavityNodesThoracic ThoracicCavityNodes(
      data=....Data.unscaled.ModelParameters.ThoracicCavity.Level07.Left, scale_fun=.Scale
    ) = {
      points_generator = {
        amount = .....Data.unscaled.ModelParameters.ThoracicCavity.DiscretizationFactorRib;
        start = .data.Rib_StartStop[0];
        end = .data.Rib_StartStop[1];
      };
    };
  };
  R6Seg = {
    CavityNodesThoracic ThoracicCavityNodes(
      data=....Data.unscaled.ModelParameters.ThoracicCavity.Level06.Left, scale_fun=.Scale
    ) = {
      points_generator = {
        amount = .....Data.unscaled.ModelParameters.ThoracicCavity.DiscretizationFactorRib;
        start = .data.Rib_StartStop[0];
        end = .data.Rib_StartStop[1];
      };
    };
  };
  R5Seg = {
    CavityNodesThoracic ThoracicCavityNodes(
      data=....Data.unscaled.ModelParameters.ThoracicCavity.Level05.Left, scale_fun=.Scale
    ) = {
      points_generator = {
        amount = .....Data.unscaled.ModelParameters.ThoracicCavity.DiscretizationFactorRib;
        start = .data.Rib_StartStop[0];
        end = .data.Rib_StartStop[1];
      };
    };
  };
  R4Seg = {
    CavityNodesThoracic ThoracicCavityNodes(
      data=....Data.unscaled.ModelParameters.ThoracicCavity.Level04.Left, scale_fun=.Scale
    ) = {
      points_generator = {
        amount = .....Data.unscaled.ModelParameters.ThoracicCavity.DiscretizationFactorRib;
        start = .data.Rib_StartStop[0];
        end = .data.Rib_StartStop[1];
      };
    };
  };
  R3Seg = {
    CavityNodesThoracic ThoracicCavityNodes(
      data=....Data.unscaled.ModelParameters.ThoracicCavity.Level03.Left, scale_fun=.Scale
    ) = {
      points_generator = {
        amount = .....Data.unscaled.ModelParameters.ThoracicCavity.DiscretizationFactorRib;
        start = .data.Rib_StartStop[0];
        end = .data.Rib_StartStop[1];
      };
    };
  };
  R2Seg = {
    CavityNodesThoracic ThoracicCavityNodes(
      data=....Data.unscaled.ModelParameters.ThoracicCavity.Level02.Left, scale_fun=.Scale
    ) = {
      points_generator = {
        amount = .....Data.unscaled.ModelParameters.ThoracicCavity.DiscretizationFactorRib;
        start = .data.Rib_StartStop[0];
        end = .data.Rib_StartStop[1];
      };
    };
  };
  R1Seg = {
    AnyRefNode ThoracicCavityNodes = {
      CavityNodesThoracic Level01(
        data=.....Data.unscaled.ModelParameters.ThoracicCavity.Level01.Left, scale_fun=..Scale
      ) = {
        points_generator = {
          amount = ......Data.unscaled.ModelParameters.ThoracicCavity.DiscretizationFactorRib;
          start = .data.Rib_StartStop[0];
          end = .data.Rib_StartStop[1];
        };
      };
    };
  };
};
#endif
