AnyRefNode SpinaIschiadicaR = {sRel = .Scale(.Data.Right.SpinaIschiadica_pos);};
AnyRefNode SpinaIschiadicaL = {sRel = .Scale(.Data.Left.SpinaIschiadica_pos);};

AnyRefNode TuberIschiadicumR = {sRel = .Scale(.Data.Right.TuberIschiadicum_pos);};
AnyRefNode TuberIschiadicumL = {sRel = .Scale(.Data.Left.TuberIschiadicum_pos);};

AnyRefNode MultifidusLumborumtL1ICNodeR = {sRel = .Scale(.Data.Right.MultifidusLumborumtL1ICNode_pos);};
AnyRefNode MultifidusLumborumtL1ICNodeL = {sRel = .Scale(.Data.Left.MultifidusLumborumtL1ICNode_pos);};

AnyRefNode MultifidusLumborumtL2ICNodeR = {sRel = .Scale(.Data.Right.MultifidusLumborumtL2ICNode_pos);};
AnyRefNode MultifidusLumborumtL2ICNodeL = {sRel = .Scale(.Data.Left.MultifidusLumborumtL2ICNode_pos);};

AnyRefNode MultifidusLumborumtL1ICViaNodeR = {sRel = .Scale(.Data.Right.MultifidusLumborumtL1ICViaNode_pos);};
AnyRefNode MultifidusLumborumtL1ICViaNodeL = {sRel = .Scale(.Data.Left.MultifidusLumborumtL1ICViaNode_pos);};

AnyRefNode MultifidusLumborumtL2ICViaNodeR = {sRel = .Scale(.Data.Right.MultifidusLumborumtL2ICViaNode_pos);};
AnyRefNode MultifidusLumborumtL2ICViaNodeL = {sRel = .Scale(.Data.Left.MultifidusLumborumtL2ICViaNode_pos);};

// End of MultifidusLumborum Nodes

// Erector Spinae Nodes
AnyRefNode IliocostalisLumborumL1NodeR = {sRel = .Scale(.Data.Right.IliocostalisLumborumL1Node_pos);};
AnyRefNode IliocostalisLumborumL1NodeL = {sRel = .Scale(.Data.Left.IliocostalisLumborumL1Node_pos);};

AnyRefNode IliocostalisLumborumL2NodeR = {sRel = .Scale(.Data.Right.IliocostalisLumborumL2Node_pos);};
AnyRefNode IliocostalisLumborumL2NodeL = {sRel = .Scale(.Data.Left.IliocostalisLumborumL2Node_pos);};

AnyRefNode IliocostalisLumborumL3NodeR = {sRel = .Scale(.Data.Right.IliocostalisLumborumL3Node_pos);};
AnyRefNode IliocostalisLumborumL3NodeL = {sRel = .Scale(.Data.Left.IliocostalisLumborumL3Node_pos);};

AnyRefNode IliocostalisLumborumL4NodeR = {sRel = .Scale(.Data.Right.IliocostalisLumborumL4Node_pos);};
AnyRefNode IliocostalisLumborumL4NodeL = {sRel = .Scale(.Data.Left.IliocostalisLumborumL4Node_pos);};

AnyRefNode LongissimusThoracisL1ICNodeR = {sRel = .Scale(.Data.Right.LongissimusThoracisL1ICNode_pos);};
AnyRefNode LongissimusThoracisL1ICNodeL = {sRel = .Scale(.Data.Left.LongissimusThoracisL1ICNode_pos);};

AnyRefNode LongissimusThoracisL2ICNodeR = {sRel = .Scale(.Data.Right.LongissimusThoracisL2ICNode_pos);};
AnyRefNode LongissimusThoracisL2ICNodeL = {sRel = .Scale(.Data.Left.LongissimusThoracisL2ICNode_pos);};

AnyRefNode LongissimusThoracisL3ICNodeR = {sRel = .Scale(.Data.Right.LongissimusThoracisL3ICNode_pos);};
AnyRefNode LongissimusThoracisL3ICNodeL = {sRel = .Scale(.Data.Left.LongissimusThoracisL3ICNode_pos);};

AnyRefNode LongissimusThoracisL4ICNodeR = {sRel = .Scale(.Data.Right.LongissimusThoracisL4ICNode_pos);};
AnyRefNode LongissimusThoracisL4ICNodeL = {sRel = .Scale(.Data.Left.LongissimusThoracisL4ICNode_pos);};

AnyRefNode IliocostalisLumborumR5NodeR = {sRel = .Scale(.Data.Right.IliocostalisLumborumR5Node_pos);};
AnyRefNode IliocostalisLumborumR5NodeL = {sRel = .Scale(.Data.Left.IliocostalisLumborumR5Node_pos);};

AnyRefNode IliocostalisLumborumR6NodeR = {sRel = .Scale(.Data.Right.IliocostalisLumborumR6Node_pos);};
AnyRefNode IliocostalisLumborumR6NodeL = {sRel = .Scale(.Data.Left.IliocostalisLumborumR6Node_pos);};

AnyRefNode IliocostalisLumborumR7NodeR = {sRel = .Scale(.Data.Right.IliocostalisLumborumR7Node_pos);};
AnyRefNode IliocostalisLumborumR7NodeL = {sRel = .Scale(.Data.Left.IliocostalisLumborumR7Node_pos);};

AnyRefNode IliocostalisLumborumR8NodeR = {sRel = .Scale(.Data.Right.IliocostalisLumborumR8Node_pos);};
AnyRefNode IliocostalisLumborumR8NodeL = {sRel = .Scale(.Data.Left.IliocostalisLumborumR8Node_pos);};

AnyRefNode IliocostalisLumborumR9NodeR = {sRel = .Scale(.Data.Right.IliocostalisLumborumR9Node_pos);};
AnyRefNode IliocostalisLumborumR9NodeL = {sRel = .Scale(.Data.Left.IliocostalisLumborumR9Node_pos);};

AnyRefNode IliocostalisLumborumR10NodeR = {sRel = .Scale(.Data.Right.IliocostalisLumborumR10Node_pos);};
AnyRefNode IliocostalisLumborumR10NodeL = {sRel = .Scale(.Data.Left.IliocostalisLumborumR10Node_pos);};

AnyRefNode IliocostalisLumborumR11NodeR = {sRel = .Scale(.Data.Right.IliocostalisLumborumR11Node_pos);};
AnyRefNode IliocostalisLumborumR11NodeL = {sRel = .Scale(.Data.Left.IliocostalisLumborumR11Node_pos);};

AnyRefNode IliocostalisLumborumR12NodeR = {sRel = .Scale(.Data.Right.IliocostalisLumborumR12Node_pos);};
AnyRefNode IliocostalisLumborumR12NodeL = {sRel = .Scale(.Data.Left.IliocostalisLumborumR12Node_pos);};

// End of Erector Spinae Nodes

// Psoas Major Nodes
AnyRefNode IliopubicEminenceViaNodeR = {sRel = .Scale(.Data.Right.IliopubicEminenceViaNode_pos);};
AnyRefNode IliopubicEminenceViaNodeL = {sRel = .Scale(.Data.Left.IliopubicEminenceViaNode_pos);};

//These points are used as end points in case there are no legs in the model
//the points are very close to the via points above but they are different
Right ={
  AnyRefNode IliopsoasIns= {
    sRel = ..Scale(..Data.Right.IliopubicEminenceEndNode_pos);
  }; //Via point for Psoas Major, will first be used as end point.


  // Definition of cylinder used for wrapping of the psoas major muscle
  TSurfCylinder5PointFit PsoasWrapSurf =
  {
    CreateMotionOutput.r = On;
    //AnyFunTransform3D &Scale = ..Scale;
    AnyFloat lengthscalefactor = 2.5;
    AnyFloat radiusscalefactor=1;
    p = ..Scale(..Data.Right.PsoasWrapSurf_points);
    AnyVar Z_rotation =0;
  };

  AnyRefNode ObliquusExternusNode_1 = {sRel = ..Scale(..Data.Right.ObliquusExternusR10aNode_pos);};
  AnyRefNode ObliquusExternusNode_2 = {sRel = ..Scale(..Data.Right.ObliquusExternusR11Node_pos);};
  AnyRefNode ObliquusExternusNode_3 = {sRel = ..Scale(..Data.Right.ObliquusExternusR12Node_pos);};

  AnyRefNode ObliquusInternusNode_1 = {sRel = ..Scale(..Data.Right.ObliquusInternusR11Node_pos);};
  AnyRefNode ObliquusInternusNode_2 = {sRel = ..Scale(..Data.Right.ObliquusInternusR10aNode_pos);};
  AnyRefNode ObliquusInternusNode_3 = {sRel = ..Scale(..Data.Right.ObliquusInternusR10Node_pos);};
  AnyRefNode ObliquusInternusNode_4_1 = {sRel = ..Scale(..Data.Right.ObliquusInternusR9_1Node_pos);};
  AnyRefNode ObliquusInternusNode_4 = {sRel = ..Scale(..Data.Right.ObliquusInternusR9Node_pos);};
  AnyRefNode ObliquusInternusNode_5 = {sRel = ..Scale(..Data.Right.ObliquusInternusR8Node_pos);};
  AnyRefNode ObliquusInternusNode_6 = {sRel = ..Scale(..Data.Right.ObliquusInternusRS1Node_pos);};
  AnyRefNode ObliquusInternusNode_7 = {sRel = ..Scale(..Data.Right.ObliquusInternusRS2Node_pos);};
  AnyRefNode ObliquusInternusNode_8 = {sRel = ..Scale(..Data.Right.ObliquusInternusRS3Node_pos);};
  AnyRefNode ObliquusInternusNode_9 = {sRel = ..Scale(..Data.Right.ObliquusInternusRS4Node_pos);};
  AnyRefNode ObliquusInternusNode_10 = {sRel = ..Scale(..Data.Right.ObliquusInternusRS5Node_pos);};
};

Left =
{
  ///This point is used as Iliopsoas end points in case there are no legs in the model
  AnyRefNode IliopsoasIns=
  {
    sRel = ..Scale(..Data.Left.IliopubicEminenceEndNode_pos);
  };  //Via point for Psoas Major, will first be used as end point.

  // Definition of cylinder used for wrapping of the psoas major muscle
  TSurfCylinder5PointFit PsoasWrapSurf = {
    CreateMotionOutput.r = On;
    //AnyFunTransform3D &Scale = ..Scale;
    AnyFloat lengthscalefactor = 2.5;
    AnyFloat radiusscalefactor=1;
    p = ..Scale(..Data.Left.PsoasWrapSurf_points);
    AnyVar Z_rotation =0;
  };

  AnyRefNode ObliquusExternusNode_1 = {sRel = ..Scale(..Data.Left.ObliquusExternusR10aNode_pos);};
  AnyRefNode ObliquusExternusNode_2 = {sRel = ..Scale(..Data.Left.ObliquusExternusR11Node_pos);};
  AnyRefNode ObliquusExternusNode_3 = {sRel = ..Scale(..Data.Left.ObliquusExternusR12Node_pos);};

  AnyRefNode ObliquusInternusNode_1 = {sRel = ..Scale(..Data.Left.ObliquusInternusR11Node_pos);};
  AnyRefNode ObliquusInternusNode_2 = {sRel = ..Scale(..Data.Left.ObliquusInternusR10aNode_pos);};
  AnyRefNode ObliquusInternusNode_3 = {sRel = ..Scale(..Data.Left.ObliquusInternusR10Node_pos);};
  AnyRefNode ObliquusInternusNode_4_1 = {sRel = ..Scale(..Data.Left.ObliquusInternusR9_1Node_pos);};
  AnyRefNode ObliquusInternusNode_4 = {sRel = ..Scale(..Data.Left.ObliquusInternusR9Node_pos);};
  AnyRefNode ObliquusInternusNode_5 = {sRel = ..Scale(..Data.Left.ObliquusInternusR8Node_pos);};
  AnyRefNode ObliquusInternusNode_6 = {sRel = ..Scale(..Data.Left.ObliquusInternusRS1Node_pos);};
  AnyRefNode ObliquusInternusNode_7 = {sRel = ..Scale(..Data.Left.ObliquusInternusRS2Node_pos);};
  AnyRefNode ObliquusInternusNode_8 = {sRel = ..Scale(..Data.Left.ObliquusInternusRS3Node_pos);};
  AnyRefNode ObliquusInternusNode_9 = {sRel = ..Scale(..Data.Left.ObliquusInternusRS4Node_pos);};
  AnyRefNode ObliquusInternusNode_10 = {sRel = ..Scale(..Data.Left.ObliquusInternusRS5Node_pos);};
};

AnyRefNode PsoasMajorT12Via5NodeR = {sRel = .Scale(.Data.Right.PsoasMajorT12Via5Node_pos);};
AnyRefNode PsoasMajorT12Via5NodeL = {sRel = .Scale(.Data.Left.PsoasMajorT12Via5Node_pos);};

AnyRefNode PsoasMajorL1_1Via4NodeR = {sRel = .Scale(.Data.Right.PsoasMajorL1_1Via4Node_pos);};
AnyRefNode PsoasMajorL1_1Via4NodeL = {sRel = .Scale(.Data.Left.PsoasMajorL1_1Via4Node_pos);};

AnyRefNode PsoasMajorL2_1Via3NodeR = {sRel = .Scale(.Data.Right.PsoasMajorL2_1Via3Node_pos);};
AnyRefNode PsoasMajorL2_1Via3NodeL = {sRel = .Scale(.Data.Left.PsoasMajorL2_1Via3Node_pos);};

AnyRefNode PsoasMajorL3_1Via2NodeR = {sRel = .Scale(.Data.Right.PsoasMajorL3_1Via2Node_pos);};
AnyRefNode PsoasMajorL3_1Via2NodeL = {sRel = .Scale(.Data.Left.PsoasMajorL3_1Via2Node_pos);};

AnyRefNode PsoasMajorL4_1Via1NodeR = {sRel = .Scale(.Data.Right.PsoasMajorL4_1Via1Node_pos);};
AnyRefNode PsoasMajorL4_1Via1NodeL = {sRel = .Scale(.Data.Left.PsoasMajorL4_1Via1Node_pos);};

AnyRefNode PsoasMajorL5_1Via1NodeR = {sRel = .Scale(.Data.Right.PsoasMajorL5_1Via1Node_pos);};
AnyRefNode PsoasMajorL5_1Via1NodeL = {sRel = .Scale(.Data.Left.PsoasMajorL5_1Via1Node_pos);};

AnyRefNode PsoasMajorL1_2Via5NodeR = {sRel = .Scale(.Data.Right.PsoasMajorL1_2Via5Node_pos);};
AnyRefNode PsoasMajorL1_2Via5NodeL = {sRel = .Scale(.Data.Left.PsoasMajorL1_2Via5Node_pos);};

AnyRefNode PsoasMajorL2_2Via4NodeR = {sRel = .Scale(.Data.Right.PsoasMajorL2_2Via4Node_pos);};
AnyRefNode PsoasMajorL2_2Via4NodeL = {sRel = .Scale(.Data.Left.PsoasMajorL2_2Via4Node_pos);};

AnyRefNode PsoasMajorL3_2Via3NodeR = {sRel = .Scale(.Data.Right.PsoasMajorL3_2Via3Node_pos);};
AnyRefNode PsoasMajorL3_2Via3NodeL = {sRel = .Scale(.Data.Left.PsoasMajorL3_2Via3Node_pos);};

AnyRefNode PsoasMajorL4_2Via2NodeR = {sRel = .Scale(.Data.Right.PsoasMajorL4_2Via2Node_pos);};
AnyRefNode PsoasMajorL4_2Via2NodeL = {sRel = .Scale(.Data.Left.PsoasMajorL4_2Via2Node_pos);};

AnyRefNode PsoasMajorL5_2Via1NodeR = {sRel = .Scale(.Data.Right.PsoasMajorL5_2Via1Node_pos);};
AnyRefNode PsoasMajorL5_2Via1NodeL = {sRel = .Scale(.Data.Left.PsoasMajorL5_2Via1Node_pos);};
// End of Psoas Major Nodes

// Quadratus Lumborum Nodes
AnyRefNode QuadratusLumborumLateralNode1R = {sRel = .Scale(.Data.Right.QuadratusLumborumLateralNode1_pos);};
AnyRefNode QuadratusLumborumLateralNode2R = {sRel = .Scale(.Data.Right.QuadratusLumborumLateralNode2_pos);};
AnyRefNode QuadratusLumborumLateralNode3R = {sRel = .Scale(.Data.Right.QuadratusLumborumLateralNode3_pos);};
AnyRefNode QuadratusLumborumLateralNode4R = {sRel = .Scale(.Data.Right.QuadratusLumborumLateralNode4_pos);};
AnyRefNode QuadratusLumborumLateralNode5R = {sRel = .Scale(.Data.Right.QuadratusLumborumLateralNode5_pos);};
AnyRefNode QuadratusLumborumInterMedianNode1R = {sRel = .Scale(.Data.Right.QuadratusLumborumInterMedianNode1_pos);};
AnyRefNode QuadratusLumborumInterMedianNode2R = {sRel = .Scale(.Data.Right.QuadratusLumborumInterMedianNode2_pos);};
AnyRefNode QuadratusLumborumInterMedianNode3R = {sRel = .Scale(.Data.Right.QuadratusLumborumInterMedianNode3_pos);};
AnyRefNode QuadratusLumborumInterMedianNode4R = {sRel = .Scale(.Data.Right.QuadratusLumborumInterMedianNode4_pos);};
AnyRefNode QuadratusLumborumInterMedianNode5R = {sRel = .Scale(.Data.Right.QuadratusLumborumInterMedianNode5_pos);};
AnyRefNode QuadratusLumborumMedianNodeR = {sRel = .Scale(.Data.Right.QuadratusLumborumMedianNode_pos);};
AnyRefNode QuadratusLumborumLateralNode1L = {sRel = .Scale(.Data.Left.QuadratusLumborumLateralNode1_pos);};
AnyRefNode QuadratusLumborumLateralNode2L = {sRel = .Scale(.Data.Left.QuadratusLumborumLateralNode2_pos);};
AnyRefNode QuadratusLumborumLateralNode3L = {sRel = .Scale(.Data.Left.QuadratusLumborumLateralNode3_pos);};
AnyRefNode QuadratusLumborumLateralNode4L = {sRel = .Scale(.Data.Left.QuadratusLumborumLateralNode4_pos);};
AnyRefNode QuadratusLumborumLateralNode5L = {sRel = .Scale(.Data.Left.QuadratusLumborumLateralNode5_pos);};
AnyRefNode QuadratusLumborumInterMedianNode1L = {sRel = .Scale(.Data.Left.QuadratusLumborumInterMedianNode1_pos);};
AnyRefNode QuadratusLumborumInterMedianNode2L = {sRel = .Scale(.Data.Left.QuadratusLumborumInterMedianNode2_pos);};
AnyRefNode QuadratusLumborumInterMedianNode3L = {sRel = .Scale(.Data.Left.QuadratusLumborumInterMedianNode3_pos);};
AnyRefNode QuadratusLumborumInterMedianNode4L = {sRel = .Scale(.Data.Left.QuadratusLumborumInterMedianNode4_pos);};
AnyRefNode QuadratusLumborumInterMedianNode5L = {sRel = .Scale(.Data.Left.QuadratusLumborumInterMedianNode5_pos);};
AnyRefNode QuadratusLumborumMedianNodeL = {sRel = .Scale(.Data.Left.QuadratusLumborumMedianNode_pos);};
// End of Quadratus Lumborum Nodes

// Rectus Abdominis Nodes
AnyRefNode RectusAbdominis_1_R = {sRel = .Scale(.Data.Right.RectusAbdominisNode1_pos);};
AnyRefNode RectusAbdominis_2_R = {sRel = .Scale(.Data.Right.RectusAbdominisNode2_pos);};
AnyRefNode RectusAbdominis_1_L = {sRel = .Scale(.Data.Left.RectusAbdominisNode1_pos);};
AnyRefNode RectusAbdominis_2_L = {sRel = .Scale(.Data.Left.RectusAbdominisNode2_pos);};

AnyRefNode RectusAbdominis_1_ViaR = {sRel = .Scale(.Data.Right.RectusAbdominisNode1Via_pos);};
AnyRefNode RectusAbdominis_2_ViaR = {sRel = .Scale(.Data.Right.RectusAbdominisNode2Via_pos);};
AnyRefNode RectusAbdominis_1_ViaL = {sRel = .Scale(.Data.Left.RectusAbdominisNode1Via_pos);};
AnyRefNode RectusAbdominis_2_ViaL = {sRel = .Scale(.Data.Left.RectusAbdominisNode2Via_pos);};


// End of Rectus Abdominis Nodes


AnyRefNode Seat_contactR = {sRel = .Scale(.Data.Right.Seat_contact_pos);};
AnyRefNode Seat_contactL = {sRel = .Scale(.Data.Left.Seat_contact_pos);};

//Midpoint between  Seat_contactR and Seat_contactL
AnyRefNode Seat_contactCenter = {sRel = .Scale(.Data.Seat_contactCenter_pos);};

#if BM_TRUNK_CAVITY_MODEL == _CAVITY_MODEL_VOLUME_
  //these transversus muscles originates along InguinalLigament made as straight line
  //these follwing points are fund analytically based on ligament end points
  AnyRefNode InguinalLigament1RNode = {sRel = .Scale(.Data.Right.InguinalLigament1_pos);};
  AnyRefNode InguinalLigament2RNode = {sRel = .Scale(.Data.Right.InguinalLigament2_pos);};
  AnyDrawLine InguinalLigamentR ={p0 =.InguinalLigament1RNode.sRel; p1=.InguinalLigament2RNode.sRel; Line.RGB={1,1,1};Line.Thickness=0.005;GlobalCoord =Off;};
  AnyFloat   InguinalLigamentRVector    = InguinalLigament2RNode.sRel- InguinalLigament1RNode.sRel;
  AnyFloat   InguinalLigamentRLenght = vnorm(InguinalLigamentRVector,2);
  AnyFloat   InguinalLigamentRDir =InguinalLigamentRVector/InguinalLigamentRLenght;

  AnyRefNode InguinalLigament1LNode = {sRel = .Scale(.Data.Left.InguinalLigament1_pos);};
  AnyRefNode InguinalLigament2LNode = {sRel = .Scale(.Data.Left.InguinalLigament2_pos);};
  AnyDrawLine InguinalLigamentL ={p0 =.InguinalLigament1LNode.sRel; p1=.InguinalLigament2LNode.sRel; Line.RGB={1,1,1};Line.Thickness=0.005;GlobalCoord =Off;};

  AnyFloat   InguinalLigamentLVector    = InguinalLigament2LNode.sRel- InguinalLigament1LNode.sRel;
  AnyFloat   InguinalLigamentLLenght = vnorm(InguinalLigamentLVector,2);
  AnyFloat   InguinalLigamentLDir =InguinalLigamentLVector/InguinalLigamentLLenght;

  AnyRefNode Transversus6NodeR = {sRel =.InguinalLigament1RNode.sRel+.InguinalLigamentRDir*0.0*.InguinalLigamentRLenght;}; //10% along lig
  AnyRefNode Transversus7NodeR ={sRel=.InguinalLigament1RNode.sRel+.InguinalLigamentRDir*0.35*.InguinalLigamentRLenght; };//40% along lig
  AnyRefNode Transversus8NodeR ={sRel=.InguinalLigament1RNode.sRel+.InguinalLigamentRDir*0.8*.InguinalLigamentRLenght ;};//80% along lig

  AnyRefNode Transversus6NodeL ={sRel=.InguinalLigament1LNode.sRel+.InguinalLigamentLDir*0.0*.InguinalLigamentLLenght ;};//10% along lig
  AnyRefNode Transversus7NodeL ={sRel=.InguinalLigament1LNode.sRel+.InguinalLigamentLDir*0.35*.InguinalLigamentLLenght;}; //40% along lig
  AnyRefNode Transversus8NodeL ={sRel=.InguinalLigament1LNode.sRel+.InguinalLigamentLDir*0.8*.InguinalLigamentLLenght; };//80% along lig

  AnyRefNode Transversus6NodeMid = {sRel = 0.5*( .Transversus6NodeR.sRel+.Transversus6NodeL.sRel);};
  AnyRefNode Transversus7NodeMid ={sRel = 0.5*(.Transversus7NodeR.sRel+.Transversus7NodeL.sRel);};
  AnyRefNode Transversus8NodeMid={sRel = 0.5*( .Transversus8NodeR.sRel+.Transversus8NodeL.sRel);};

  AnyRefNode Transversus6_1RNode = {sRel =.Scale(.Data.Right.Transversus6_1_pos);};
  AnyRefNode Transversus6_2RNode = {sRel =.Scale(.Data.Right.Transversus6_2_pos);};
  AnyRefNode Transversus7_1RNode = {sRel =.Scale(.Data.Right.Transversus7_1_pos);};
  AnyRefNode Transversus7_2RNode = {sRel =.Scale(.Data.Right.Transversus7_2_pos);};
  AnyRefNode Transversus8_1RNode = {sRel =.Scale(.Data.Right.Transversus8_1_pos);};
  AnyRefNode Transversus8_2RNode = {sRel =.Scale(.Data.Right.Transversus8_2_pos);};

  AnyRefNode Transversus6_1LNode = {sRel =.Scale(.Data.Left.Transversus6_1_pos);};
  AnyRefNode Transversus6_2LNode = {sRel =.Scale(.Data.Left.Transversus6_2_pos);};
  AnyRefNode Transversus7_1LNode = {sRel =.Scale(.Data.Left.Transversus7_1_pos);};
  AnyRefNode Transversus7_2LNode = {sRel =.Scale(.Data.Left.Transversus7_2_pos);};
  AnyRefNode Transversus8_1LNode = {sRel =.Scale(.Data.Left.Transversus8_1_pos);};
  AnyRefNode Transversus8_2LNode = {sRel =.Scale(.Data.Left.Transversus8_2_pos);};

  AnyRefNode  Puborectalis_1NodeR={sRel = .Scale(.Data.Right.Puborectalis_1_pos);};
  AnyRefNode  Puborectalis_2NodeR={sRel = .Scale(.Data.Right.Puborectalis_1_pos);};
  AnyRefNode  Puborectalis_1NodeL={sRel = .Scale(.Data.Left.Puborectalis_1_pos);};
  AnyRefNode  Puborectalis_2NodeL={sRel = .Scale(.Data.Left.Puborectalis_1_pos);};

  AnyRefNode  Pubococcygeus_1NodeR ={sRel = .Scale(.Data.Right.Puborectalis_1_pos);};
  AnyRefNode  Pubococcygeus_2NodeR ={sRel = .Scale(.Data.Right.Puborectalis_1_pos);};
  AnyRefNode  Pubococcygeus_1NodeL ={sRel = .Scale(.Data.Left.Puborectalis_1_pos);};
  AnyRefNode  Pubococcygeus_2NodeL ={sRel = .Scale(.Data.Left.Puborectalis_1_pos);};
#endif
/// Previous names for seat_contactR/L/center. Added here for backwards compatibility.
AnyRefNode Tuber_ischiadicumR = {sRel = .Scale(.Data.Right.Seat_contact_pos);};
/// Previous names for seat_contactR/L/center. Added here fo backwards compatibility.
AnyRefNode Tuber_ischiadicumL = {sRel = .Scale(.Data.Left.Seat_contact_pos);};
/// Previous names for seat_contactR/L/center. Added here for backwards compatibility.
AnyRefNode TuberIschiadicumCenter = {sRel = .Scale(.Data.Seat_contactCenter_pos);};
