/*
Definitions of Segments in the Lumbar Part of the Spine + the pelvis
Abbrevitations:
ALL = Anterior Longitudinal Ligament
PLL = Posterior Longitudinal Ligament
LS = Ligamentum Supraspinale
LI = Ligamentum Interspinalia

MF = Multifidi
ILpl = Iliocostalis Lumborum pars lumborum (part of Erector Spinae)
LTpl = Longissimus Thoracis pars lumborum (part of Erector Spinae)
ILpt = Iliocostalis Lumborum pars thoracis (part of Erector Spinae)
LTpt = Longissimus Thoracis pars thoracis (part of Erector Spinae)
PM = Psoas Major
QL = Quadratus Lumborum
RA = Rectus Abdominis
OE = Obliquus Externus
OI = Obliquus Internus

C = Costae
CI = Crista Iliaca
CP = Crista Pubica
SIPS = Spina iliaca posterior superior
SIPI = Spina iliaca Posterior inferior
T = Thoracal hvirvel
L = Lumbal hvirvel
S = Sacral segment
*/

#include "PelvisSeg.any"

AnySeg SacrumSeg = {

  AnyFolder &Data=..Data.unscaled.ModelParameters.Sacrum;

  //initial position found as a function of pelvis pos and orientation
  r0=.PelvisSeg.PelvisSacrumJntNode.sRel*.PelvisSeg.Axes0'+.PelvisSeg.r0-SacrumPelvisJntNode.sRel*Axes0';
  Axes0=.PelvisSeg.Axes0;

  // Inertia properties for the segment
  UseInertiaObjects = On;
  #if (BM_TRUNK_CAVITY_MODEL == _CAVITY_MODEL_VOLUME_)
    AnyInertiaSolid BoneInertiaObject = {
      BodyMassCorrection massCorrection() = {
        DensityTheoretical = ....Data.unscaled.ModelParameters.BoneDensity;
        enableMassCorrection = Off;
      };
      AnySurfSTL surface = {
        FileName = ...PelvisSeg.DrwSacrum.FileName;
        AnyFunTransform3D &scale = ..Scale;
        viewSurface.RGB = {0,0,1};
        ScaleXYZ = ...PelvisSeg.DrwSacrum.ScaleXYZ;
      };
    };
  #else
    AnyInertiaMatrix InertiaObject = {
      Jii = {0.001,0.001,0.001};
      ///  The mass of sacrum is added to the pelvis segment
      BodyMassCorrectionCompatibility massCorrection() = {
        DensityTheoretical = 1e-5;
        enableMassCorrection = Off;
      };
    };
  #endif

  AnyRefNode MoCapMarkerFrameAMMR24 = {}; ///< For backwards compatibility with AMMR 2.4 MoCap Marker protocols

  // Sacrum is part of the pelvis so they scales together
  AnyRefNode& ScalingNode = AnatomicalFrameTrunk;
  AnyRefNode AnatomicalFrameTrunk = {
    sRel = ..PelvisSeg.AnatomicalFrameTrunk.sRel;
    ARel = ..PelvisSeg.AnatomicalFrameTrunk.ARel;
  };
  AnyFunTransform3D& Scale = .PelvisSeg.Scale;

  // Joint nodes
  AnyRefNode SacrumL5JntNode = {
    sRel = .Scale(.Data.SacrumL5JntNode_pos);
    /// Rotated node with x axis parallel to the sacrum base surface
    AnyRefNode RotNode = {
        ARel = RotMat(0.5*(..SacrumBaseAnteriorNode.sRel + ..SacrumBasePosteriorNode.sRel),
                      ..SacrumBaseAnteriorNode.sRel,
                      0.5*(..SacrumBaseAnteriorNode.sRel + ..SacrumBasePosteriorNode.sRel) + (..SacrumBaseNodeL.sRel - ..SacrumBaseNodeR.sRel))*RotMat(pi/2,x);
    };
  };
  AnyRefNode SacrumPelvisJntNode = {sRel = .Scale(.Data.SacrumPelvisJntNode_pos);};
  AnyRefNode SacrumContactNode = {sRel= .Scale(.Data.SacrumContactNode_pos);};

  AnyRefNode SacrumBonyTip ={sRel= .Scale(.Data.SacrumBonyTip_pos);};
  AnyRefNode SacrumPosteriorSuperior ={sRel= .Scale(.Data.SacrumPosteriorSuperior_pos);};

  // Nodes at the anterior and posterior points on the sacrum base that articulates with L5
  AnyRefNode SacrumBaseAnteriorNode = {sRel = .Scale(.Data.SacrumBaseAnteriorNode_pos);};
  AnyRefNode SacrumBasePosteriorNode = {sRel = .Scale(.Data.SacrumBasePosteriorNode_pos);};

  // Nodes at the right and left points on the sacrum base that articulates with L5
  AnyRefNode SacrumBaseNodeR = {sRel = .Scale(.Data.Right.SacrumBaseNode_pos);};
  AnyRefNode SacrumBaseNodeL = {sRel = .Scale(.Data.Left.SacrumBaseNode_pos);};

  /// The Right node is used by different body part for adding mirrored nodes
  /// (muscle origins/insertions etc) to the sacrum segment
  AnyRefNode Right= {
    AnyInt Sign = 1;
    AnyFunTransform3D& Scale = .Scale;
    AnyRefNode SacrumContactNode = {sRel= .Scale(..Data.Right.SacrumContactNode_pos);};
  };

  /// The Left node is used by different body part for adding mirrored nodes
  /// (muscle origins/insertions etc) to the sacrum segment
  AnyRefNode Left=  {
    AnyInt Sign = -1;
    AnyFunTransform3D& Scale = .Scale;
    AnyRefNode SacrumContactNode = {sRel= .Scale(..Data.Left.SacrumContactNode_pos);};
  };
   #if BM_TRUNK_CAVITY_MODEL == _CAVITY_MODEL_VOLUME_
   #include "SacrumMuscleAttactmentNodes.any"
   #endif

  // Multifidi Nodes
  AnyRefNode MFdL4S1NodeR = {sRel = .Scale(.Data.Right.MFdL4S1Node_pos);};
  AnyRefNode MFdL4S1NodeL = {sRel = .Scale(.Data.Left.MFdL4S1Node_pos);};
  AnyRefNode MFdL5S1NodeR = {sRel = .Scale(.Data.Right.MFdL5S1Node_pos);};
  AnyRefNode MFdL5S1NodeL = {sRel = .Scale(.Data.Left.MFdL5S1Node_pos);};

  AnyRefNode MFmL3S1NodeR = {sRel = .Scale(.Data.Right.MFmL3S1Node_pos);};
  AnyRefNode MFmL3S1NodeL = {sRel = .Scale(.Data.Left.MFmL3S1Node_pos);};

  AnyRefNode MFmL4SacrumNodeR = {sRel = .Scale(.Data.Right.MFmL4SacrumNode_pos);};
  AnyRefNode MFmL4SacrumNodeL = {sRel = .Scale(.Data.Left.MFmL4SacrumNode_pos);};

  AnyRefNode MFmL5SacrumNodeR = {sRel = .Scale(.Data.Right.MFmL5SacrumNode_pos);};
  AnyRefNode MFmL5SacrumNodeL = {sRel = .Scale(.Data.Left.MFmL5SacrumNode_pos);};

  AnyRefNode MFtsL1S1NodeR = {sRel = .Scale(.Data.Right.MFtsL1S1Node_pos);};
  AnyRefNode MFtsL1S1NodeL = {sRel = .Scale(.Data.Left.MFtsL1S1Node_pos);};

  AnyRefNode MFtsL2S1NodeR = {sRel = .Scale(.Data.Right.MFtsL2S1Node_pos);};
  AnyRefNode MFtsL2S1NodeL = {sRel = .Scale(.Data.Left.MFtsL2S1Node_pos);};

  AnyRefNode MFtsL3LigamentNodeViaR = {sRel = .Scale(.Data.Right.MFtsL3LigamentNodeVia_pos);};
  AnyRefNode MFtsL3LigamentNodeViaL = {sRel = .Scale(.Data.Left.MFtsL3LigamentNodeVia_pos);};

  AnyRefNode MFtsL3LigamentNodeR = {sRel = .Scale(.Data.Right.MFtsL3LigamentNode_pos);};
  AnyRefNode MFtsL3LigamentNodeL = {sRel = .Scale(.Data.Left.MFtsL3LigamentNode_pos);};

  AnyRefNode MFtsL4SacrumNodeR = {sRel = .Scale(.Data.Right.MFtsL4SacrumNode_pos);};
  AnyRefNode MFtsL4SacrumNodeL = {sRel = .Scale(.Data.Left.MFtsL4SacrumNode_pos);};

  AnyRefNode MFtsL4SacrumViaNodeR = {sRel = .Scale(.Data.Right.MFtsL4SacrumViaNode_pos);};
  AnyRefNode MFtsL4SacrumViaNodeL = {sRel = .Scale(.Data.Left.MFtsL4SacrumViaNode_pos);};

  AnyRefNode MFtsL5SacrumViaNodeR = {sRel = .Scale(.Data.Right.MFtsL5SacrumViaNode_pos);};
  AnyRefNode MFtsL5SacrumViaNodeL = {sRel = .Scale(.Data.Left.MFtsL5SacrumViaNode_pos);};

  AnyRefNode MFtsL5SacrumNodeR = {sRel = .Scale(.Data.Right.MFtsL5SacrumNode_pos);};
  AnyRefNode MFtsL5SacrumNodeL = {sRel = .Scale(.Data.Left.MFtsL5SacrumNode_pos);};

  AnyRefNode LTplL5IliumNodeR = {sRel = .Scale(.Data.Right.LTplL5IliumNode_pos);};
  AnyRefNode LTplL5IliumNodeL = {sRel = .Scale(.Data.Left.LTplL5IliumNode_pos);};

  AnyRefNode LTptT6S1NodeR = {sRel = .Scale(.Data.Right.LTptT6S1Node_pos);};
  AnyRefNode LTptT6S1NodeL = {sRel = .Scale(.Data.Left.LTptT6S1Node_pos);};

  AnyRefNode LTptT7S2NodeR = {sRel = .Scale(.Data.Right.LTptT7S2Node_pos);};
  AnyRefNode LTptT7S2NodeL = {sRel = .Scale(.Data.Left.LTptT7S2Node_pos);};

  AnyRefNode LTptT8S3NodeR = {sRel = .Scale(.Data.Right.LTptT8S3Node_pos);};
  AnyRefNode LTptT8S3NodeL = {sRel = .Scale(.Data.Left.LTptT8S3Node_pos);};

  AnyRefNode LTptT9S4NodeR = {sRel = .Scale(.Data.Right.LTptT9S4Node_pos);};
  AnyRefNode LTptT9S4NodeL = {sRel = .Scale(.Data.Left.LTptT9S4Node_pos);};

  AnyRefNode LTptT10SacrumNodeR = {sRel = .Scale(.Data.Right.LTptT10SacrumNode_pos);};
  AnyRefNode LTptT10SacrumNodeL = {sRel = .Scale(.Data.Left.LTptT10SacrumNode_pos);};

  AnyRefNode LTptT11SacrumNodeR = {sRel = .Scale(.Data.Right.LTptT11SacrumNode_pos);};
  AnyRefNode LTptT11SacrumNodeL = {sRel = .Scale(.Data.Left.LTptT11SacrumNode_pos);};

  AnyRefNode LTptT12SacrumNodeR = {sRel = .Scale(.Data.Right.LTptT12SacrumNode_pos);};
  AnyRefNode LTptT12SacrumNodeL = {sRel = .Scale(.Data.Left.LTptT12SacrumNode_pos);};

  AnyRefNode LTptC6S1NodeR = {sRel = .Scale(.Data.Right.LTptC6S1Node_pos);};
  AnyRefNode LTptC6S1NodeL = {sRel = .Scale(.Data.Left.LTptC6S1Node_pos);};

  AnyRefNode LTptC7S2NodeR = {sRel = .Scale(.Data.Right.LTptC7S2Node_pos);};
  AnyRefNode LTptC7S2NodeL = {sRel = .Scale(.Data.Left.LTptC7S2Node_pos);};

  AnyRefNode LTptC8S3NodeR = {sRel = .Scale(.Data.Right.LTptC8S3Node_pos);};
  AnyRefNode LTptC8S3NodeL = {sRel = .Scale(.Data.Left.LTptC8S3Node_pos);};

  AnyRefNode LTptC9S4NodeR = {sRel = .Scale(.Data.Right.LTptC9S4Node_pos);};
  AnyRefNode LTptC9S4NodeL = {sRel = .Scale(.Data.Left.LTptC9S4Node_pos);};

  AnyRefNode LTptC10SacrumNodeR = {sRel = .Scale(.Data.Right.LTptC10SacrumNode_pos);};
  AnyRefNode LTptC10SacrumNodeL = {sRel = .Scale(.Data.Left.LTptC10SacrumNode_pos);};

  AnyRefNode LTptC11SacrumNodeR = {sRel = .Scale(.Data.Right.LTptC11SacrumNode_pos);};
  AnyRefNode LTptC11SacrumNodeL = {sRel = .Scale(.Data.Left.LTptC11SacrumNode_pos);};

  AnyRefNode LTptC12SacrumNodeR = {sRel = .Scale(.Data.Right.LTptC12SacrumNode_pos);};
  AnyRefNode LTptC12SacrumNodeL = {sRel = .Scale(.Data.Left.LTptC12SacrumNode_pos);};

  AnyRefNode LTptT10SacrumViaNodeR = {sRel = .Scale(.Data.Right.LTptT10SacrumViaNode_pos);};
  AnyRefNode LTptT10SacrumViaNodeL = {sRel = .Scale(.Data.Left.LTptT10SacrumViaNode_pos);};

  AnyRefNode LTptT11SacrumViaNodeR = {sRel = .Scale(.Data.Right.LTptT11SacrumViaNode_pos);};
  AnyRefNode LTptT11SacrumViaNodeL = {sRel = .Scale(.Data.Left.LTptT11SacrumViaNode_pos);};

  AnyRefNode LTptC11SacrumViaNodeR = {sRel = .Scale(.Data.Right.LTptC11SacrumViaNode_pos);};
  AnyRefNode LTptC11SacrumViaNodeL = {sRel = .Scale(.Data.Left.LTptC11SacrumViaNode_pos);};

  AnyRefNode LTptT12SacrumViaNodeR = {sRel = .Scale(.Data.Right.LTptT12SacrumViaNode_pos);};
  AnyRefNode LTptT12SacrumViaNodeL = {sRel = .Scale(.Data.Left.LTptT12SacrumViaNode_pos);};

  AnyRefNode LTptC12SacrumViaNodeR = {sRel = .Scale(.Data.Right.LTptC12SacrumViaNode_pos);};
  AnyRefNode LTptC12SacrumViaNodeL = {sRel = .Scale(.Data.Left.LTptC12SacrumViaNode_pos);};
}; // SacrumSeg


// -------- Drawing object section (pelvis&sacrum)--------
#if (! BM_LEG_MODEL_IS_TLEM ) | (BM_PELVIS_DISPLAY == _PELVIS_DISPLAY_LEGANDTRUNKPELVIS_)
  SacrumSeg = {
    #if (BM_PELVIS_DISPLAY == _PELVIS_DISPLAY_LEGANDTRUNKPELVIS_)
    DrwSacrumForTrunk.Opacity = Main.DrawSettings.BonesOpacity.Sacrum*0.5;
    AnyDrawSurf DrwSacrumForTrunk =
    #else
    DrwSacrum.Opacity = Main.DrawSettings.BonesOpacity.Sacrum;
    AnyDrawSurf DrwSacrum =
    #endif
    {
      FileName = ...Data.unscaled.STL.FilenameSacrumSeg;
      RGB = ...ColorRef.Segments;
      AnyFunTransform3D &Scale =.Scale;
    };
  }; // SacrumSeg
#endif
// -------- End of drawing section (pelvis&sacrum)--------


AnySeg L5Seg = {

  AnyFolder &Data=..Data.unscaled.ModelParameters.L5;

  //initial position found as a function of pelvis pos and orientation
  r0=.SacrumSeg.SacrumL5JntNode.sRel*.SacrumSeg.Axes0'+.SacrumSeg.r0-L5SacrumJntNode.sRel*Axes0';

  // This file includes the trunk specifc scaling function
  // and anatomical reference system
  #include "TrunkAnatomicalFrame.any"

  TrunkScaleWithInterfaceMorphing Scale(
    GeomScale = ...Scaling.GeometricalScaling.L5Seg.ScaleFunction,
    PelvisSeg = ..PelvisSeg,
  ) = {};

  TrunkScaleWithInterfaceMorphing ScaleAbdominal(
    GeomScale = ...Scaling.GeometricalScaling.Lumbar.ScaleFunction,
    PelvisSeg = ..PelvisSeg,
  ) = {};

  // Inertia properties for the segment
  UseInertiaObjects = On;

  #if (BM_TRUNK_CAVITY_MODEL == _CAVITY_MODEL_VOLUME_)
    AnyInertiaSolid BoneInertiaObject = {
      BodyMassCorrection massCorrection() = {
        DensityTheoretical = ....Data.unscaled.ModelParameters.BoneDensity;
        enableMassCorrection = Off;
      };
      AnySurfSTL surface = {
        FileName = ..BoneDraw.FileName;
        AnyFunTransform3D &scale = ..Scale;
        viewSurface.RGB = {0,0,1};
        ScaleXYZ = ..BoneDraw.ScaleXYZ;
      };
    };
  #else
    AnyInertiaMatrix InertiaObject = {
      BodyMassCorrectionCompatibility massCorrection() = {
        DensityTheoretical = ....Data.unscaled.StandardParameters.Lumbar.L5Mass;
      };
      Jii = {0.001,0.001,0.001};
      JaboutCoMOnOff = On;
      sCoM = .Scale(.Data.sCoM_pos);
    };
  #endif


  AnyRefNode MoCapMarkerFrameAMMR24 = {}; ///< For backwards compatibility with AMMR 2.4 MoCap Marker protocols

  AnyRefNode L5SacrumJntNode = {sRel = .Scale(.Data.L5SacrumJntNode_pos);};
  AnyRefNode L4L5JntNode = {
    sRel = .Scale(.Data.L4L5JntNode_pos);
    // Rotated node with x axis parallel to the superior endplate surface
    AnyRefNode RotNode = {
        ARel = RotMat(
          0.5*(..SuperiorEndplateAnteriorNode.sRel + ..SuperiorEndplatePosteriorNode.sRel),
          ..SuperiorEndplateAnteriorNode.sRel,
          0.5*(..SuperiorEndplateAnteriorNode.sRel + ..SuperiorEndplatePosteriorNode.sRel) + (..SuperiorEndplateNodeL.sRel - ..SuperiorEndplateNodeR.sRel)
        )*RotMat(pi/2,x);
    };
  };

  // Nodes at the right and left points on the superior endplate
  AnyRefNode SuperiorEndplateNodeR = {sRel = .Scale(.Data.Right.SuperiorEndplateNode_pos);};
  AnyRefNode SuperiorEndplateNodeL = {sRel = .Scale(.Data.Left.SuperiorEndplateNode_pos);};

  // Nodes at the anterior and posterior points on the superior endplate
  AnyRefNode SuperiorEndplateAnteriorNode = {sRel = .Scale(.Data.SuperiorEndplateAnteriorNode_pos);};
  AnyRefNode SuperiorEndplatePosteriorNode = {sRel = .Scale(.Data.SuperiorEndplatePosteriorNode_pos);};

  //These nodes are used for adding extra used by other body parts to the right
  //and left side of the segment
  AnyRefNode Right = {AnyFunTransform3D&Scale=.Scale;};
  AnyRefNode Left = {AnyFunTransform3D&Scale=.Scale;};


  // Ligament Nodes
  AnyRefNode LINodeSuperior = {sRel = .Scale(.Data.LINodeSuperior_pos);};
  // End of ligament Nodes

  // Multifidi Nodes
  AnyRefNode MFdL3L5NodeR = {sRel = .Scale(.Data.Right.MFdL3L5Node_pos);};
  AnyRefNode MFdL3L5NodeL = {sRel = .Scale(.Data.Left.MFdL3L5Node_pos);};

  AnyRefNode MFdL5S1NodeR = {sRel = .Scale(.Data.Right.MFdL5S1Node_pos);};
  AnyRefNode MFdL5S1NodeL = {sRel = .Scale(.Data.Left.MFdL5S1Node_pos);};

  AnyRefNode MFmL2L5NodeR = {sRel = .Scale(.Data.Right.MFmL2L5Node_pos);};
  AnyRefNode MFmL2L5NodeL = {sRel = .Scale(.Data.Left.MFmL2L5Node_pos);};

  AnyRefNode MFmL5SacrumNodeR = {sRel = .Scale(.Data.Right.MFmL5SacrumNode_pos);};
  AnyRefNode MFmL5SacrumNodeL = {sRel = .Scale(.Data.Left.MFmL5SacrumNode_pos);};

  AnyRefNode MFtsL1L5NodeR = {sRel = .Scale(.Data.Right.MFtsL1L5Node_pos);};
  AnyRefNode MFtsL1L5NodeL = {sRel = .Scale(.Data.Left.MFtsL1L5Node_pos);};

  AnyRefNode MFtsL2L5NodeR = {sRel = .Scale(.Data.Right.MFtsL2L5Node_pos);};
  AnyRefNode MFtsL2L5NodeL = {sRel = .Scale(.Data.Left.MFtsL2L5Node_pos);};

  AnyRefNode MFtsL5SacrumNodeR = {sRel = .Scale(.Data.Right.MFtsL5SacrumNode_pos);};
  AnyRefNode MFtsL5SacrumNodeL = {sRel = .Scale(.Data.Left.MFtsL5SacrumNode_pos);};
  // End of Multifidi Nodes

  // Erector Spinae Nodes
  AnyRefNode LTplL5IliumNodeR = {sRel = .Scale(.Data.Right.LTplL5IliumNode_pos);};
  AnyRefNode LTplL5IliumNodeL = {sRel = .Scale(.Data.Left.LTplL5IliumNode_pos);};

  AnyRefNode LTptT5L5NodeR = {sRel = .Scale(.Data.Right.LTptT5L5Node_pos);};
  AnyRefNode LTptT5L5NodeL = {sRel = .Scale(.Data.Left.LTptT5L5Node_pos);};

  AnyRefNode LTptT6S1Via11NodeR = {sRel = .Scale(.Data.Right.LTptT6S1Via11Node_pos);};
  AnyRefNode LTptT6S1Via11NodeL = {sRel = .Scale(.Data.Left.LTptT6S1Via11Node_pos);};

  AnyRefNode LTptT7S2Via10NodeR = {sRel = .Scale(.Data.Right.LTptT7S2Via10Node_pos);};
  AnyRefNode LTptT7S2Via10NodeL = {sRel = .Scale(.Data.Left.LTptT7S2Via10Node_pos);};

  AnyRefNode LTptT8S3Via9NodeR = {sRel = .Scale(.Data.Right.LTptT8S3Via9Node_pos);};
  AnyRefNode LTptT8S3Via9NodeL = {sRel = .Scale(.Data.Left.LTptT8S3Via9Node_pos);};

  AnyRefNode LTptT9S4Via8NodeR = {sRel = .Scale(.Data.Right.LTptT9S4Via8Node_pos);};
  AnyRefNode LTptT9S4Via8NodeL = {sRel = .Scale(.Data.Left.LTptT9S4Via8Node_pos);};

  AnyRefNode LTptT10SacrumVia7NodeR = {sRel = .Scale(.Data.Right.LTptT10SacrumVia7Node_pos);};
  AnyRefNode LTptT10SacrumVia7NodeL = {sRel = .Scale(.Data.Left.LTptT10SacrumVia7Node_pos);};

  AnyRefNode LTptT11SacrumVia6NodeR = {sRel = .Scale(.Data.Right.LTptT11SacrumVia6Node_pos);};
  AnyRefNode LTptT11SacrumVia6NodeL = {sRel = .Scale(.Data.Left.LTptT11SacrumVia6Node_pos);};

  AnyRefNode LTptT12SacrumVia5NodeR = {sRel = .Scale(.Data.Right.LTptT12SacrumVia5Node_pos);};
  AnyRefNode LTptT12SacrumVia5NodeL = {sRel = .Scale(.Data.Left.LTptT12SacrumVia5Node_pos);};

  AnyRefNode LTptC5L5NodeR = {sRel = .Scale(.Data.Right.LTptC5L5Node_pos);};
  AnyRefNode LTptC5L5NodeL = {sRel = .Scale(.Data.Left.LTptC5L5Node_pos);};

  AnyRefNode LTptC6S1Via11NodeR = {sRel = .Scale(.Data.Right.LTptC6S1Via11Node_pos);};
  AnyRefNode LTptC6S1Via11NodeL = {sRel = .Scale(.Data.Left.LTptC6S1Via11Node_pos);};

  AnyRefNode LTptC7S2Via10NodeR = {sRel = .Scale(.Data.Right.LTptC7S2Via10Node_pos);};
  AnyRefNode LTptC7S2Via10NodeL = {sRel = .Scale(.Data.Left.LTptC7S2Via10Node_pos);};

  AnyRefNode LTptC8S3Via9NodeR = {sRel = .Scale(.Data.Right.LTptC8S3Via9Node_pos);};
  AnyRefNode LTptC8S3Via9NodeL = {sRel = .Scale(.Data.Left.LTptC8S3Via9Node_pos);};

  AnyRefNode LTptC9S4Via8NodeR = {sRel = .Scale(.Data.Right.LTptC9S4Via8Node_pos);};
  AnyRefNode LTptC9S4Via8NodeL = {sRel = .Scale(.Data.Left.LTptC9S4Via8Node_pos);};

  AnyRefNode LTptC10SacrumVia7NodeR = {sRel = .Scale(.Data.Right.LTptC10SacrumVia7Node_pos);};
  AnyRefNode LTptC10SacrumVia7NodeL = {sRel = .Scale(.Data.Left.LTptC10SacrumVia7Node_pos);};

  AnyRefNode LTptC11SacrumVia6NodeR = {sRel = .Scale(.Data.Right.LTptC11SacrumVia6Node_pos);};
  AnyRefNode LTptC11SacrumVia6NodeL = {sRel = .Scale(.Data.Left.LTptC11SacrumVia6Node_pos);};

  AnyRefNode LTptC12SacrumVia5NodeR = {sRel = .Scale(.Data.Right.LTptC12SacrumVia5Node_pos);};
  AnyRefNode LTptC12SacrumVia5NodeL = {sRel = .Scale(.Data.Left.LTptC12SacrumVia5Node_pos);};
  // End of Erector Spinae Nodes

  // Psoas Major Nodes
  AnyRefNode PML5_TMNodeR = {sRel = .Scale(.Data.Right.PML5_TMNode_pos);};
  AnyRefNode PML5_TMNodeL = {sRel = .Scale(.Data.Left.PML5_TMNode_pos);};

  AnyRefNode PML5T_TMNodeR = {sRel = .Scale(.Data.Right.PML5T_TMNode_pos);};
  AnyRefNode PML5T_TMNodeL = {sRel = .Scale(.Data.Left.PML5T_TMNode_pos);};

  AnyRefNode PMT12I_TMVia4NodeR = {sRel = .Scale(.Data.Right.PMT12I_TMVia4Node_pos);};
  AnyRefNode PMT12I_TMVia4NodeL = {sRel = .Scale(.Data.Left.PMT12I_TMVia4Node_pos);};

  AnyRefNode PML1I_TMVia3NodeR = {sRel = .Scale(.Data.Right.PML1I_TMVia3Node_pos);};
  AnyRefNode PML1I_TMVia3NodeL = {sRel = .Scale(.Data.Left.PML1I_TMVia3Node_pos);};

  AnyRefNode PML2I_TMVia2NodeR = {sRel = .Scale(.Data.Right.PML2I_TMVia2Node_pos);};
  AnyRefNode PML2I_TMVia2NodeL = {sRel = .Scale(.Data.Left.PML2I_TMVia2Node_pos);};

  AnyRefNode PML3I_TMVia1NodeR = {sRel = .Scale(.Data.Right.PML3I_TMVia1Node_pos);};
  AnyRefNode PML3I_TMVia1NodeL = {sRel = .Scale(.Data.Left.PML3I_TMVia1Node_pos);};

  AnyRefNode PML1T_TMVia4NodeR = {sRel = .Scale(.Data.Right.PML1T_TMVia4Node_pos);};
  AnyRefNode PML1T_TMVia4NodeL = {sRel = .Scale(.Data.Left.PML1T_TMVia4Node_pos);};

  AnyRefNode PML2T_TMVia3NodeR = {sRel = .Scale(.Data.Right.PML2T_TMVia3Node_pos);};
  AnyRefNode PML2T_TMVia3NodeL = {sRel = .Scale(.Data.Left.PML2T_TMVia3Node_pos);};

  AnyRefNode PML3T_TMVia2NodeR = {sRel = .Scale(.Data.Right.PML3T_TMVia2Node_pos);};
  AnyRefNode PML3T_TMVia2NodeL = {sRel = .Scale(.Data.Left.PML3T_TMVia2Node_pos);};

  AnyRefNode PML4T_TMVia1NodeR = {sRel = .Scale(.Data.Right.PML4T_TMVia1Node_pos);};
  AnyRefNode PML4T_TMVia1NodeL = {sRel = .Scale(.Data.Left.PML4T_TMVia1Node_pos);};
  // End of Psoas Major Nodes

  // Obliquus Externus Nodes
  AnyRefNode OEC10_RSNodeR = {sRel = .Scale(.Data.Right.OEC10_RSNode_pos);};
  AnyRefNode OEC10_RSNodeL = {sRel = .Scale(.Data.Left.OEC10_RSNode_pos);};
  // End of Obliquus Externus Nodes

  AnyDrawSurf BoneDraw = {
    FileName = ...Data.unscaled.STL.FilenameL5Seg;
    RGB = ...ColorRef.Segments;
    Opacity = Main.DrawSettings.BonesOpacity.L5;
    AnyFunTransform3D &Scale =.Scale;
  };

  #if BM_TRUNK_CAVITY_MODEL == _CAVITY_MODEL_VOLUME_
    AnyRefNode TransversusInsNode_R={sRel=.Scale(.Data.Right.Transversus_Ins_pos);};
    AnyRefNode TransversusInsNode_L={sRel=.Scale(.Data.Left.Transversus_Ins_pos);};
    AnyRefNode TransversusMid={sRel=0.5*(.TransversusInsNode_R.sRel+.TransversusInsNode_L.sRel) ;};
  #else
    AnyRefNode TransversusOrgNode = {sRel = .MidPoint.sRel;};
    AnyRefNode TransversusInsNode = {sRel = .TransversusOrgNode.sRel;};
  #endif

  AnyRefNode MidPoint = {sRel = (.L4L5JntNode.sRel+.L5SacrumJntNode.sRel)*0.5;};
  AnyRefNode &SupportNode = MidPoint;

  AnyRefNode BuckleContactNode = {sRel= .ScaleAbdominal(.Data.BuckleContactNode_pos);};

  AnyRefNode L5RContactNode = {sRel= .Scale(.Data.Right.ContactNode_pos);};
  AnyRefNode L5LContactNode = {sRel= .Scale(.Data.Left.ContactNode_pos);};

}; // End of L5Seg

AnySeg L4Seg = {

  AnyFolder &Data=..Data.unscaled.ModelParameters.L4;

//initial position found as a function of pelvis pos and orientation
  r0=.L5Seg.L4L5JntNode.sRel*.L5Seg.Axes0'+.L5Seg.r0-L4L5JntNode.sRel*Axes0';

  // This file includes the trunk specifc scaling function
  // and anatomical reference system
  #include "TrunkAnatomicalFrame.any"

  TrunkScaleWithInterfaceMorphing Scale(
    GeomScale = ...Scaling.GeometricalScaling.L4Seg.ScaleFunction,
    PelvisSeg = ..PelvisSeg,
  ) = {};

  TrunkScaleWithInterfaceMorphing ScaleAbdominal(
    GeomScale = ...Scaling.GeometricalScaling.Lumbar.ScaleFunction,
    PelvisSeg = ..PelvisSeg,
  ) = {};

  // Inertia properties for the segment
  UseInertiaObjects = On;

  #if (BM_TRUNK_CAVITY_MODEL == _CAVITY_MODEL_VOLUME_)
    AnyInertiaSolid BoneInertiaObject = {
      BodyMassCorrection massCorrection() = {
        DensityTheoretical = ....Data.unscaled.ModelParameters.BoneDensity;
        enableMassCorrection = Off;
      };
      AnySurfSTL surface = {
        FileName = ..BoneDraw.FileName;
        AnyFunTransform3D &scale = ..Scale;
        viewSurface.RGB = {0,0,1};
        ScaleXYZ = ..BoneDraw.ScaleXYZ;
      };
    };
  #else
    AnyInertiaMatrix InertiaObject = {
      BodyMassCorrectionCompatibility massCorrection() = {
        DensityTheoretical = ....Data.unscaled.StandardParameters.Lumbar.L4Mass;
      };
      Jii = {0.001,0.001,0.001};
      JaboutCoMOnOff = On;
      sCoM = .Scale(.Data.sCoM_pos);
    };
  #endif


  AnyRefNode MoCapMarkerFrameAMMR24 = {}; ///< For backwards compatibility with AMMR 2.4 MoCap Marker protocols


  AnyRefNode L4L5JntNode = {sRel = .Scale(.Data.L4L5JntNode_pos);};
  AnyRefNode L3L4JntNode = {
    sRel = .Scale(.Data.L3L4JntNode_pos);
    /// Rotated node with x axis parallel to the superior endplate surface
    AnyRefNode RotNode = {
      ARel = RotMat(
        0.5*(..SuperiorEndplateAnteriorNode.sRel + ..SuperiorEndplatePosteriorNode.sRel),
        ..SuperiorEndplateAnteriorNode.sRel,
        0.5*(..SuperiorEndplateAnteriorNode.sRel + ..SuperiorEndplatePosteriorNode.sRel) + (..SuperiorEndplateNodeL.sRel - ..SuperiorEndplateNodeR.sRel)
      )*RotMat(pi/2,x);
    };
  };

  // Nodes at the anterior and posterior points on the superior endplate
  AnyRefNode SuperiorEndplateAnteriorNode = {sRel = .Scale(.Data.SuperiorEndplateAnteriorNode_pos);};
  AnyRefNode SuperiorEndplatePosteriorNode = {sRel = .Scale(.Data.SuperiorEndplatePosteriorNode_pos);};

  // Nodes at the right and left points on the superior endplate
  AnyRefNode SuperiorEndplateNodeR = {sRel = .Scale(.Data.Right.SuperiorEndplateNode_pos);};
  AnyRefNode SuperiorEndplateNodeL = {sRel = .Scale(.Data.Left.SuperiorEndplateNode_pos);};

  //These nodes are used for adding extra used by other body parts to the right
  //and left side of the segment
  AnyRefNode Right = {AnyFunTransform3D&Scale=.Scale;};
  AnyRefNode Left = {AnyFunTransform3D&Scale=.Scale;};

  // Ligament Nodes
  AnyRefNode LSNode = {sRel = .Scale(.Data.LSNode_pos);};

  AnyRefNode LINodeInferior = {sRel = .Scale(.Data.LINodeInferior_pos);};
  AnyRefNode LINodeSuperior = {sRel = .Scale(.Data.LINodeSuperior_pos);};
  // End of ligament Nodes

  // Multifidi Nodes
  AnyRefNode MFdL2L4NodeR = {sRel = .Scale(.Data.Right.MFdL2L4Node_pos);};
  AnyRefNode MFdL2L4NodeL = {sRel = .Scale(.Data.Left.MFdL2L4Node_pos);};

  AnyRefNode MFdL4S1NodeR = {sRel = .Scale(.Data.Right.MFdL4S1Node_pos);};
  AnyRefNode MFdL4S1NodeL = {sRel = .Scale(.Data.Left.MFdL4S1Node_pos);};

  AnyRefNode MFmL1L4NodeR = {sRel = .Scale(.Data.Right.MFmL1L4Node_pos);};
  AnyRefNode MFmL1L4NodeL = {sRel = .Scale(.Data.Left.MFmL1L4Node_pos);};

  AnyRefNode MFmL4SacrumNodeR = {sRel = .Scale(.Data.Right.MFmL4SacrumNode_pos);};
  AnyRefNode MFmL4SacrumNodeL = {sRel = .Scale(.Data.Left.MFmL4SacrumNode_pos);};

  AnyRefNode MFtsL4SacrumNodeR = {sRel = .Scale(.Data.Right.MFtsL4SacrumNode_pos);};
  AnyRefNode MFtsL4SacrumNodeL = {sRel = .Scale(.Data.Left.MFtsL4SacrumNode_pos);};
  // End of Multifidi Nodes

  // Erector Spinae Nodes
  AnyRefNode IliocostalisLumborumL4NodeR = {sRel = .Scale(.Data.Right.IliocostalisLumborumL4Node_pos);};
  AnyRefNode IliocostalisLumborumL4NodeL = {sRel = .Scale(.Data.Left.IliocostalisLumborumL4Node_pos);};

  AnyRefNode LTplL4SIPSNodeR = {sRel = .Scale(.Data.Right.LTplL4SIPSNode_pos);};
  AnyRefNode LTplL4SIPSNodeL = {sRel = .Scale(.Data.Left.LTplL4SIPSNode_pos);};

  AnyRefNode LTptT4L4NodeR = {sRel = .Scale(.Data.Right.LTptT4L4Node_pos);};
  AnyRefNode LTptT4L4NodeL = {sRel = .Scale(.Data.Left.LTptT4L4Node_pos);};

  AnyRefNode LTptC4L4NodeR = {sRel = .Scale(.Data.Right.LTptC4L4Node_pos);};
  AnyRefNode LTptC4L4NodeL = {sRel = .Scale(.Data.Left.LTptC4L4Node_pos);};

  AnyRefNode IliocostalisLumborumL1ViaNodeR = {sRel = .Scale(.Data.Right.IliocostalisLumborumL1ViaNode_pos);};
  AnyRefNode IliocostalisLumborumL1ViaNodeL = {sRel = .Scale(.Data.Left.IliocostalisLumborumL1ViaNode_pos);};

  AnyRefNode IliocostalisLumborumL2ViaNodeR = {sRel = .Scale(.Data.Right.IliocostalisLumborumL2ViaNode_pos);};
  AnyRefNode IliocostalisLumborumL2ViaNodeL = {sRel = .Scale(.Data.Left.IliocostalisLumborumL2ViaNode_pos);};

  AnyRefNode LTptT5L5Via11NodeR = {sRel = .Scale(.Data.Right.LTptT5L5Via11Node_pos);};
  AnyRefNode LTptT5L5Via11NodeL = {sRel = .Scale(.Data.Left.LTptT5L5Via11Node_pos);};

  AnyRefNode LTptT6S1Via10NodeR = {sRel = .Scale(.Data.Right.LTptT6S1Via10Node_pos);};
  AnyRefNode LTptT6S1Via10NodeL = {sRel = .Scale(.Data.Left.LTptT6S1Via10Node_pos);};

  AnyRefNode LTptT7S2Via9NodeR = {sRel = .Scale(.Data.Right.LTptT7S2Via9Node_pos);};
  AnyRefNode LTptT7S2Via9NodeL = {sRel = .Scale(.Data.Left.LTptT7S2Via9Node_pos);};

  AnyRefNode LTptT8S3Via8NodeR = {sRel = .Scale(.Data.Right.LTptT8S3Via8Node_pos);};
  AnyRefNode LTptT8S3Via8NodeL = {sRel = .Scale(.Data.Left.LTptT8S3Via8Node_pos);};

  AnyRefNode LTptT9S4Via7NodeR = {sRel = .Scale(.Data.Right.LTptT9S4Via7Node_pos);};
  AnyRefNode LTptT9S4Via7NodeL = {sRel = .Scale(.Data.Left.LTptT9S4Via7Node_pos);};

  AnyRefNode LTptT10SacrumVia6NodeR = {sRel = .Scale(.Data.Right.LTptT10SacrumVia6Node_pos);};
  AnyRefNode LTptT10SacrumVia6NodeL = {sRel = .Scale(.Data.Left.LTptT10SacrumVia6Node_pos);};

  AnyRefNode LTptT11SacrumVia5NodeR = {sRel = .Scale(.Data.Right.LTptT11SacrumVia5Node_pos);};
  AnyRefNode LTptT11SacrumVia5NodeL = {sRel = .Scale(.Data.Left.LTptT11SacrumVia5Node_pos);};

  AnyRefNode LTptT12SacrumVia4NodeR = {sRel = .Scale(.Data.Right.LTptT12SacrumVia4Node_pos);};
  AnyRefNode LTptT12SacrumVia4NodeL = {sRel = .Scale(.Data.Left.LTptT12SacrumVia4Node_pos);};

  AnyRefNode LTptC5L5Via11NodeR = {sRel = .Scale(.Data.Right.LTptC5L5Via11Node_pos);};
  AnyRefNode LTptC5L5Via11NodeL = {sRel = .Scale(.Data.Left.LTptC5L5Via11Node_pos);};

  AnyRefNode LTptC6S1Via10NodeR = {sRel = .Scale(.Data.Right.LTptC6S1Via10Node_pos);};
  AnyRefNode LTptC6S1Via10NodeL = {sRel = .Scale(.Data.Left.LTptC6S1Via10Node_pos);};

  AnyRefNode LTptC7S2Via9NodeR = {sRel = .Scale(.Data.Right.LTptC7S2Via9Node_pos);};
  AnyRefNode LTptC7S2Via9NodeL = {sRel = .Scale(.Data.Left.LTptC7S2Via9Node_pos);};

  AnyRefNode LTptC8S3Via8NodeR = {sRel = .Scale(.Data.Right.LTptC8S3Via8Node_pos);};
  AnyRefNode LTptC8S3Via8NodeL = {sRel = .Scale(.Data.Left.LTptC8S3Via8Node_pos);};

  AnyRefNode LTptC9S4Via7NodeR = {sRel = .Scale(.Data.Right.LTptC9S4Via7Node_pos);};
  AnyRefNode LTptC9S4Via7NodeL = {sRel = .Scale(.Data.Left.LTptC9S4Via7Node_pos);};

  AnyRefNode LTptC10SacrumVia6NodeR = {sRel = .Scale(.Data.Right.LTptC10SacrumVia6Node_pos);};
  AnyRefNode LTptC10SacrumVia6NodeL = {sRel = .Scale(.Data.Left.LTptC10SacrumVia6Node_pos);};

  AnyRefNode LTptC11SacrumVia5NodeR = {sRel = .Scale(.Data.Right.LTptC11SacrumVia5Node_pos);};
  AnyRefNode LTptC11SacrumVia5NodeL = {sRel = .Scale(.Data.Left.LTptC11SacrumVia5Node_pos);};

  AnyRefNode LTptC12SacrumVia4NodeR = {sRel = .Scale(.Data.Right.LTptC12SacrumVia4Node_pos);};
  AnyRefNode LTptC12SacrumVia4NodeL = {sRel = .Scale(.Data.Left.LTptC12SacrumVia4Node_pos);};
  // End of Erector Spinae Nodes

  // Psoas Major Nodes
  AnyRefNode PML4I_TMNodeR = {sRel = .Scale(.Data.Right.PML4I_TMNode_pos);};
  AnyRefNode PML4I_TMNodeL = {sRel = .Scale(.Data.Left.PML4I_TMNode_pos);};

  AnyRefNode PML4T_TMNodeR = {sRel = .Scale(.Data.Right.PML4T_TMNode_pos);};
  AnyRefNode PML4T_TMNodeL = {sRel = .Scale(.Data.Left.PML4T_TMNode_pos);};

  AnyRefNode PMT12I_TMVia3NodeR = {sRel = .Scale(.Data.Right.PMT12I_TMVia3Node_pos);};
  AnyRefNode PMT12I_TMVia3NodeL = {sRel = .Scale(.Data.Left.PMT12I_TMVia3Node_pos);};

  AnyRefNode PML1I_TMVia2NodeR = {sRel = .Scale(.Data.Right.PML1I_TMVia2Node_pos);};
  AnyRefNode PML1I_TMVia2NodeL = {sRel = .Scale(.Data.Left.PML1I_TMVia2Node_pos);};

  AnyRefNode PML2I_TMVia1NodeR = {sRel = .Scale(.Data.Right.PML2I_TMVia1Node_pos);};
  AnyRefNode PML2I_TMVia1NodeL = {sRel = .Scale(.Data.Left.PML2I_TMVia1Node_pos);};

  AnyRefNode PML1T_TMVia3NodeR = {sRel = .Scale(.Data.Right.PML1T_TMVia3Node_pos);};
  AnyRefNode PML1T_TMVia3NodeL = {sRel = .Scale(.Data.Left.PML1T_TMVia3Node_pos);};

  AnyRefNode PML2T_TMVia2NodeR = {sRel = .Scale(.Data.Right.PML2T_TMVia2Node_pos);};
  AnyRefNode PML2T_TMVia2NodeL = {sRel = .Scale(.Data.Left.PML2T_TMVia2Node_pos);};

  AnyRefNode PML3T_TMVia1NodeR = {sRel = .Scale(.Data.Right.PML3T_TMVia1Node_pos);};
  AnyRefNode PML3T_TMVia1NodeL = {sRel = .Scale(.Data.Left.PML3T_TMVia1Node_pos);};
  // End of Psoas Major Nodes

  // Quadratus Lumborum Nodes
  AnyRefNode QLL4_CINodeR = {sRel = .Scale(.Data.Right.QLL4_CINode_pos);};
  AnyRefNode QLL4_CINodeL = {sRel = .Scale(.Data.Left.QLL4_CINode_pos);};
  // End of Quadratus Lumborum Nodes

  // Obliquus Externus Nodes
  AnyRefNode OEC9_RSNodeR = {sRel = .Scale(.Data.Right.OEC9_RSNode_pos);};
  AnyRefNode OEC9_RSNodeL = {sRel = .Scale(.Data.Left.OEC9_RSNode_pos);};
  // End of Obliquus Externus Nodes

  // Obliquus Internus Nodes
  AnyRefNode OICI_RS3NodeR = {sRel = .Scale(.Data.Right.OICI_RS3Node_pos);};
  AnyRefNode OICI_RS3NodeL = {sRel = .Scale(.Data.Left.OICI_RS3Node_pos);};
  // End of Obliquus Internus Nodes

  AnyDrawSurf BoneDraw = {
    FileName = ...Data.unscaled.STL.FilenameL4Seg;
    RGB = ...ColorRef.Segments;
    Opacity = Main.DrawSettings.BonesOpacity.L4;
    AnyFunTransform3D &Scale =.Scale;
  };

  #if BM_TRUNK_CAVITY_MODEL == _CAVITY_MODEL_VOLUME_
    AnyRefNode TransversusInsNode_R={sRel=.Scale(.Data.Right.Transversus_Ins_pos);};
    AnyRefNode TransversusInsNode_L={sRel=.Scale(.Data.Left.Transversus_Ins_pos);};
    AnyRefNode TransversusMid={sRel=0.5*(.TransversusInsNode_R.sRel+.TransversusInsNode_L.sRel) ;};
  #else
    AnyRefNode TransversusOrgNode = {sRel = .MidPoint.sRel;};
    AnyRefNode TransversusInsNode = {sRel = .TransversusOrgNode.sRel;};
  #endif

  AnyRefNode MidPoint = {sRel = (.L3L4JntNode.sRel+.L4L5JntNode.sRel)*0.5;};
  AnyRefNode SupportNode = {sRel = .Scale(.Data.SupportNode_pos);};
  AnyRefNode BuckleContactNode = {sRel= .ScaleAbdominal(.Data.BuckleContactNode_pos);};

  AnyRefNode L4RContactNode = {sRel= .Scale(.Data.Right.ContactNode_pos);};
  AnyRefNode L4LContactNode = {sRel= .Scale(.Data.Left.ContactNode_pos);};

}; // End of L4Seg

AnySeg L3Seg = {
  AnyFolder &Data = ..Data.unscaled.ModelParameters.L3;
  //initial position found as a function of pelvis pos and orientation
  r0=.L4Seg.L3L4JntNode.sRel*.L4Seg.Axes0'+.L4Seg.r0-L3L4JntNode.sRel*Axes0';

  // This file includes the trunk specifc scaling function
  // and anatomical reference system
  #include "TrunkAnatomicalFrame.any"

  TrunkScaleWithInterfaceMorphing Scale(
    GeomScale = ...Scaling.GeometricalScaling.L3Seg.ScaleFunction,
    PelvisSeg = ..PelvisSeg,
  ) = {};

  TrunkScaleWithInterfaceMorphing ScaleAbdominal(
    GeomScale = ...Scaling.GeometricalScaling.Lumbar.ScaleFunction,
    PelvisSeg = ..PelvisSeg,
  ) = {};

  // Inertia properties for the segment
  UseInertiaObjects = On;

  #if (BM_TRUNK_CAVITY_MODEL == _CAVITY_MODEL_VOLUME_)
    AnyInertiaSolid BoneInertiaObject = {
      BodyMassCorrection massCorrection() = {
        DensityTheoretical = ....Data.unscaled.ModelParameters.BoneDensity;
        enableMassCorrection = Off;
      };
      AnySurfSTL surface = {
        FileName = ..BoneDraw.FileName;
        AnyFunTransform3D &scale = ..Scale;
        viewSurface.RGB = {0,0,1};
        ScaleXYZ = ..BoneDraw.ScaleXYZ;
      };
    };
  #else
    AnyInertiaMatrix InertiaObject = {
      BodyMassCorrectionCompatibility massCorrection() = {
        DensityTheoretical = ....Data.unscaled.StandardParameters.Lumbar.L3Mass;
      };
      Jii = {0.001,0.001,0.001};
      JaboutCoMOnOff = On;
      sCoM = .Scale(.Data.sCoM_pos);
    };
  #endif


  AnyRefNode MoCapMarkerFrameAMMR24 = {}; ///< For backwards compatibility with AMMR 2.4 MoCap Marker protocols


  AnyRefNode L3L4JntNode = {sRel = .Scale(.Data.L3L4JntNode_pos);};
  AnyRefNode L2L3JntNode = {
    sRel = .Scale(.Data.L2L3JntNode_pos);
    // Rotated node with x axis parallel to the superior endplate surface
    AnyRefNode RotNode = {
      ARel = RotMat(
        0.5*(..SuperiorEndplateAnteriorNode.sRel + ..SuperiorEndplatePosteriorNode.sRel),
        ..SuperiorEndplateAnteriorNode.sRel,
        0.5*(..SuperiorEndplateAnteriorNode.sRel + ..SuperiorEndplatePosteriorNode.sRel) + (..SuperiorEndplateNodeL.sRel - ..SuperiorEndplateNodeR.sRel)
      )*RotMat(pi/2,x);
    };
  };

  // Nodes at the anterior and posterior points on the superior endplate
  AnyRefNode SuperiorEndplateAnteriorNode = {sRel = .Scale(.Data.SuperiorEndplateAnteriorNode_pos);};
  AnyRefNode SuperiorEndplatePosteriorNode = {sRel = .Scale(.Data.SuperiorEndplatePosteriorNode_pos);};

  // Nodes at the right and left points on the superior endplate
  AnyRefNode SuperiorEndplateNodeR = {sRel = .Scale(.Data.Right.SuperiorEndplateNode_pos);};
  AnyRefNode SuperiorEndplateNodeL = {sRel = .Scale(.Data.Left.SuperiorEndplateNode_pos);};

  //These nodes are used for adding extra used by other body parts to the right
  //and left side of the segment
  AnyRefNode Right= {AnyFunTransform3D&Scale=.Scale;
    AnyRefNode ICSpringSupNode        = { sRel =  .Scale(..Data.Right.ICSpringSupNode_pos); };
  };
  AnyRefNode Left = {AnyFunTransform3D&Scale=.Scale;
    AnyRefNode ICSpringSupNode        = { sRel =  .Scale(..Data.Left.ICSpringSupNode_pos); };
  };


  // Ligament Nodes
  AnyRefNode LSNode = {sRel = .Scale(.Data.LSNode_pos);};

  AnyRefNode LINodeInferior = {sRel = .Scale(.Data.LINodeInferior_pos);};
  AnyRefNode LINodeSuperior = {sRel = .Scale(.Data.LINodeSuperior_pos);};
  // End of ligament Nodes

  // Multifidi Nodes
  AnyRefNode MFdL1L3NodeR = {sRel = .Scale(.Data.Right.MFdL1L3Node_pos);};
  AnyRefNode MFdL1L3NodeL = {sRel = .Scale(.Data.Left.MFdL1L3Node_pos);};

  AnyRefNode MFdL3L5NodeR = {sRel = .Scale(.Data.Right.MFdL3L5Node_pos);};
  AnyRefNode MFdL3L5NodeL = {sRel = .Scale(.Data.Left.MFdL3L5Node_pos);};

  AnyRefNode MFmL3S1NodeR = {sRel = .Scale(.Data.Right.MFmL3S1Node_pos);};
  AnyRefNode MFmL3S1NodeL = {sRel = .Scale(.Data.Left.MFmL3S1Node_pos);};

  AnyRefNode MFtsL3LigamentNodeR = {sRel = .Scale(.Data.Right.MFtsL3LigamentNode_pos);};
  AnyRefNode MFtsL3LigamentNodeL = {sRel = .Scale(.Data.Left.MFtsL3LigamentNode_pos);};
  // End of Multifidi Nodes

  // Erector Spinae Nodes
  AnyRefNode IliocostalisLumborumL3NodeR = {sRel = .Scale(.Data.Right.IliocostalisLumborumL3Node_pos);};
  AnyRefNode IliocostalisLumborumL3NodeL = {sRel = .Scale(.Data.Left.IliocostalisLumborumL3Node_pos);};

  AnyRefNode LTplL3SIPSNodeR = {sRel = .Scale(.Data.Right.LTplL3SIPSNode_pos);};
  AnyRefNode LTplL3SIPSNodeL = {sRel = .Scale(.Data.Left.LTplL3SIPSNode_pos);};

  AnyRefNode LTptT3L3NodeR = {sRel = .Scale(.Data.Right.LTptT3L3Node_pos);};
  AnyRefNode LTptT3L3NodeL = {sRel = .Scale(.Data.Left.LTptT3L3Node_pos);};

  AnyRefNode LTptC3L3NodeR = {sRel = .Scale(.Data.Right.LTptC3L3Node_pos);};
  AnyRefNode LTptC3L3NodeL = {sRel = .Scale(.Data.Left.LTptC3L3Node_pos);};

  AnyRefNode IliocostalisLumborumL1ViaNodeR = {sRel = .Scale(.Data.Right.IliocostalisLumborumL1ViaNode_pos);};
  AnyRefNode IliocostalisLumborumL1ViaNodeL = {sRel = .Scale(.Data.Left.IliocostalisLumborumL1ViaNode_pos);};

  AnyRefNode IliocostalisLumborumL2ViaNodeR = {sRel = .Scale(.Data.Right.IliocostalisLumborumL2ViaNode_pos);};
  AnyRefNode IliocostalisLumborumL2ViaNodeL = {sRel = .Scale(.Data.Left.IliocostalisLumborumL2ViaNode_pos);};

  AnyRefNode LTplL1SIPSViaNodeR = {sRel = .Scale(.Data.Right.LTplL1SIPSViaNode_pos);};
  AnyRefNode LTplL1SIPSViaNodeL = {sRel = .Scale(.Data.Left.LTplL1SIPSViaNode_pos);};

  AnyRefNode LTplL2SIPSViaNodeR = {sRel = .Scale(.Data.Right.LTplL2SIPSViaNode_pos);};
  AnyRefNode LTplL2SIPSViaNodeL = {sRel = .Scale(.Data.Left.LTplL2SIPSViaNode_pos);};

  AnyRefNode IliocostalisLumborumR5Via9NodeR = {sRel = .Scale(.Data.Right.IliocostalisLumborumR5Via9Node_pos);};
  AnyRefNode IliocostalisLumborumR5Via9NodeL = {sRel = .Scale(.Data.Left.IliocostalisLumborumR5Via9Node_pos);};

  AnyRefNode IliocostalisLumborumR6Via8NodeR = {sRel = .Scale(.Data.Right.IliocostalisLumborumR6Via8Node_pos);};
  AnyRefNode IliocostalisLumborumR6Via8NodeL = {sRel = .Scale(.Data.Left.IliocostalisLumborumR6Via8Node_pos);};

  AnyRefNode IliocostalisLumborumR7Via7NodeR = {sRel = .Scale(.Data.Right.IliocostalisLumborumR7Via7Node_pos);};
  AnyRefNode IliocostalisLumborumR7Via7NodeL = {sRel = .Scale(.Data.Left.IliocostalisLumborumR7Via7Node_pos);};

  AnyRefNode IliocostalisLumborumR8Via6NodeR = {sRel = .Scale(.Data.Right.IliocostalisLumborumR8Via6Node_pos);};
  AnyRefNode IliocostalisLumborumR8Via6NodeL = {sRel = .Scale(.Data.Left.IliocostalisLumborumR8Via6Node_pos);};

  AnyRefNode IliocostalisLumborumR9Via5NodeR = {sRel = .Scale(.Data.Right.IliocostalisLumborumR9Via5Node_pos);};
  AnyRefNode IliocostalisLumborumR9Via5NodeL = {sRel = .Scale(.Data.Left.IliocostalisLumborumR9Via5Node_pos);};

  AnyRefNode IliocostalisLumborumR10Via4NodeR = {sRel = .Scale(.Data.Right.IliocostalisLumborumR10Via4Node_pos);};
  AnyRefNode IliocostalisLumborumR10Via4NodeL = {sRel = .Scale(.Data.Left.IliocostalisLumborumR10Via4Node_pos);};

  AnyRefNode IliocostalisLumborumR11Via3NodeR = {sRel = .Scale(.Data.Right.IliocostalisLumborumR11Via3Node_pos);};
  AnyRefNode IliocostalisLumborumR11Via3NodeL = {sRel = .Scale(.Data.Left.IliocostalisLumborumR11Via3Node_pos);};

  AnyRefNode IliocostalisLumborumR12Via3NodeR = {sRel = .Scale(.Data.Right.IliocostalisLumborumR12Via3Node_pos);};
  AnyRefNode IliocostalisLumborumR12Via3NodeL = {sRel = .Scale(.Data.Left.IliocostalisLumborumR12Via3Node_pos);};

  AnyRefNode LTptT4L4Via11NodeR = {sRel = .Scale(.Data.Right.LTptT4L4Via11Node_pos);};
  AnyRefNode LTptT4L4Via11NodeL = {sRel = .Scale(.Data.Left.LTptT4L4Via11Node_pos);};

  AnyRefNode LTptT5L5Via10NodeR = {sRel = .Scale(.Data.Right.LTptT5L5Via10Node_pos);};
  AnyRefNode LTptT5L5Via10NodeL = {sRel = .Scale(.Data.Left.LTptT5L5Via10Node_pos);};

  AnyRefNode LTptT6S1Via9NodeR = {sRel = .Scale(.Data.Right.LTptT6S1Via9Node_pos);};
  AnyRefNode LTptT6S1Via9NodeL = {sRel = .Scale(.Data.Left.LTptT6S1Via9Node_pos);};

  AnyRefNode LTptT7S2Via8NodeR = {sRel = .Scale(.Data.Right.LTptT7S2Via8Node_pos);};
  AnyRefNode LTptT7S2Via8NodeL = {sRel = .Scale(.Data.Left.LTptT7S2Via8Node_pos);};

  AnyRefNode LTptT8S3Via7NodeR = {sRel = .Scale(.Data.Right.LTptT8S3Via7Node_pos);};
  AnyRefNode LTptT8S3Via7NodeL = {sRel = .Scale(.Data.Left.LTptT8S3Via7Node_pos);};

  AnyRefNode LTptT9S4Via6NodeR = {sRel = .Scale(.Data.Right.LTptT9S4Via6Node_pos);};
  AnyRefNode LTptT9S4Via6NodeL = {sRel = .Scale(.Data.Left.LTptT9S4Via6Node_pos);};

  AnyRefNode LTptT10SacrumVia5NodeR = {sRel = .Scale(.Data.Right.LTptT10SacrumVia5Node_pos);};
  AnyRefNode LTptT10SacrumVia5NodeL = {sRel = .Scale(.Data.Left.LTptT10SacrumVia5Node_pos);};

  AnyRefNode LTptT11SacrumVia4NodeR = {sRel = .Scale(.Data.Right.LTptT11SacrumVia4Node_pos);};
  AnyRefNode LTptT11SacrumVia4NodeL = {sRel = .Scale(.Data.Left.LTptT11SacrumVia4Node_pos);};

  AnyRefNode LTptT12SacrumVia3NodeR = {sRel = .Scale(.Data.Right.LTptT12SacrumVia3Node_pos);};
  AnyRefNode LTptT12SacrumVia3NodeL = {sRel = .Scale(.Data.Left.LTptT12SacrumVia3Node_pos);};

  AnyRefNode LTptC4L4Via11NodeR = {sRel = .Scale(.Data.Right.LTptC4L4Via11Node_pos);};
  AnyRefNode LTptC4L4Via11NodeL = {sRel = .Scale(.Data.Left.LTptC4L4Via11Node_pos);};

  AnyRefNode LTptC5L5Via10NodeR = {sRel = .Scale(.Data.Right.LTptC5L5Via10Node_pos);};
  AnyRefNode LTptC5L5Via10NodeL = {sRel = .Scale(.Data.Left.LTptC5L5Via10Node_pos);};

  AnyRefNode LTptC6S1Via9NodeR = {sRel = .Scale(.Data.Right.LTptC6S1Via9Node_pos);};
  AnyRefNode LTptC6S1Via9NodeL = {sRel = .Scale(.Data.Left.LTptC6S1Via9Node_pos);};

  AnyRefNode LTptC7S2Via8NodeR = {sRel = .Scale(.Data.Right.LTptC7S2Via8Node_pos);};
  AnyRefNode LTptC7S2Via8NodeL = {sRel = .Scale(.Data.Left.LTptC7S2Via8Node_pos);};

  AnyRefNode LTptC8S3Via7NodeR = {sRel = .Scale(.Data.Right.LTptC8S3Via7Node_pos);};
  AnyRefNode LTptC8S3Via7NodeL = {sRel = .Scale(.Data.Left.LTptC8S3Via7Node_pos);};

  AnyRefNode LTptC9S4Via6NodeR = {sRel = .Scale(.Data.Right.LTptC9S4Via6Node_pos);};
  AnyRefNode LTptC9S4Via6NodeL = {sRel = .Scale(.Data.Left.LTptC9S4Via6Node_pos);};

  AnyRefNode LTptC10SacrumVia5NodeR = {sRel = .Scale(.Data.Right.LTptC10SacrumVia5Node_pos);};
  AnyRefNode LTptC10SacrumVia5NodeL = {sRel = .Scale(.Data.Left.LTptC10SacrumVia5Node_pos);};

  AnyRefNode LTptC11SacrumVia4NodeR = {sRel = .Scale(.Data.Right.LTptC11SacrumVia4Node_pos);};
  AnyRefNode LTptC11SacrumVia4NodeL = {sRel = .Scale(.Data.Left.LTptC11SacrumVia4Node_pos);};

  AnyRefNode LTptC12SacrumVia3NodeR = {sRel = .Scale(.Data.Right.LTptC12SacrumVia3Node_pos);};
  AnyRefNode LTptC12SacrumVia3NodeL = {sRel = .Scale(.Data.Left.LTptC12SacrumVia3Node_pos);};

  // End of Erector Spinae Nodes

  // Psoas Major Nodes
  AnyRefNode PML3I_TMNodeR = {sRel = .Scale(.Data.Right.PML3I_TMNode_pos);};
  AnyRefNode PML3I_TMNodeL = {sRel = .Scale(.Data.Left.PML3I_TMNode_pos);};

  AnyRefNode PML3T_TMNodeR = {sRel = .Scale(.Data.Right.PML3T_TMNode_pos);};
  AnyRefNode PML3T_TMNodeL = {sRel = .Scale(.Data.Left.PML3T_TMNode_pos);};

  AnyRefNode PMT12I_TMVia2NodeR = {sRel = .Scale(.Data.Right.PMT12I_TMVia2Node_pos);};
  AnyRefNode PMT12I_TMVia2NodeL = {sRel = .Scale(.Data.Left.PMT12I_TMVia2Node_pos);};

  AnyRefNode PML1I_TMVia1NodeR = {sRel = .Scale(.Data.Right.PML1I_TMVia1Node_pos);};
  AnyRefNode PML1I_TMVia1NodeL = {sRel = .Scale(.Data.Left.PML1I_TMVia1Node_pos);};

  AnyRefNode PML1T_TMVia2NodeR = {sRel = .Scale(.Data.Right.PML1T_TMVia2Node_pos);};
  AnyRefNode PML1T_TMVia2NodeL = {sRel = .Scale(.Data.Left.PML1T_TMVia2Node_pos);};

  AnyRefNode PML2T_TMVia1NodeR = {sRel = .Scale(.Data.Right.PML2T_TMVia1Node_pos);};
  AnyRefNode PML2T_TMVia1NodeL = {sRel = .Scale(.Data.Left.PML2T_TMVia1Node_pos);};
  // End of Psoas Major Nodes

  // Quadratus Lumborum Nodes
  AnyRefNode QLL3_CINodeR = {sRel = .Scale(.Data.Right.QLL3_CINode_pos);};
  AnyRefNode QLL3_CINodeL = {sRel = .Scale(.Data.Left.QLL3_CINode_pos);};
  // End of Quadratus Lumborum Nodes

  // Obliquus Externus Nodes
  AnyRefNode OEC8_RSNodeR = {sRel = .Scale(.Data.Right.OEC8_RSNode_pos);};
  AnyRefNode OEC8_RSNodeL = {sRel = .Scale(.Data.Left.OEC8_RSNode_pos);};
  // End of Obliquus Externus Nodes

  // Obliquus Internus Nodes
  AnyRefNode OICI_RS2NodeR = {sRel = .Scale(.Data.Right.OICI_RS2Node_pos);};
  AnyRefNode OICI_RS2NodeL = {sRel = .Scale(.Data.Left.OICI_RS2Node_pos);};
  // End of Obliquus Internus Nodes

  //AnyDrawSeg DrwSeg = {};

  AnyDrawSurf BoneDraw = {
    FileName = ...Data.unscaled.STL.FilenameL3Seg;
    RGB = ...ColorRef.Segments;
    Opacity = Main.DrawSettings.BonesOpacity.L3;
    AnyFunTransform3D &Scale =.Scale;
  };

  #if BM_TRUNK_CAVITY_MODEL == _CAVITY_MODEL_VOLUME_
    AnyRefNode TransversusInsNode_R={sRel=.Scale(.Data.Right.Transversus_Ins_pos);};
    AnyRefNode TransversusInsNode_L={sRel=.Scale(.Data.Left.Transversus_Ins_pos);};
    AnyRefNode TransversusMid={sRel=0.5*(.TransversusInsNode_R.sRel+.TransversusInsNode_L.sRel) ;};
  #else
    AnyRefNode TransversusOrgNode = {sRel = .MidPoint.sRel;};
    AnyRefNode TransversusInsNode = {sRel = .TransversusOrgNode.sRel;};
  #endif

  AnyRefNode MidPoint = {sRel = (.L2L3JntNode.sRel+.L3L4JntNode.sRel)*0.5; };

  AnyRefNode SupportNode = {sRel = .Scale(.Data.SupportNode_pos);};
  AnyRefNode BuckleContactNode = {sRel = .ScaleAbdominal(.Data.BuckleContactNode_pos);};

  AnyRefNode L3RContactNode = {sRel= .Scale(.Data.Right.ContactNode_pos);};
  AnyRefNode L3LContactNode = {sRel= .Scale(.Data.Left.ContactNode_pos);};
}; // End of L3Seg

AnySeg L2Seg = {
  AnyFolder &Data=..Data.unscaled.ModelParameters.L2;

  //initial position found as a function of pelvis pos and orientation
  r0=.L3Seg.L2L3JntNode.sRel*.L3Seg.Axes0'+.L3Seg.r0-L2L3JntNode.sRel*Axes0';

  // This file includes the trunk specifc scaling function
  // and anatomical reference system
  #include "TrunkAnatomicalFrame.any"

  TrunkScaleWithInterfaceMorphing Scale(
    GeomScale = ...Scaling.GeometricalScaling.L2Seg.ScaleFunction,
    PelvisSeg = ..PelvisSeg,
  ) = {};

  TrunkScaleWithInterfaceMorphing ScaleAbdominal(
    GeomScale = ...Scaling.GeometricalScaling.Lumbar.ScaleFunction,
    PelvisSeg = ..PelvisSeg,
  ) = {};

  // Inertia properties for the segment
  UseInertiaObjects = On;

  #if (BM_TRUNK_CAVITY_MODEL == _CAVITY_MODEL_VOLUME_)
    AnyInertiaSolid BoneInertiaObject = {
      BodyMassCorrection massCorrection() = {
        DensityTheoretical = ....Data.unscaled.ModelParameters.BoneDensity;
        enableMassCorrection = Off;
      };
      AnySurfSTL surface = {
        FileName = ..BoneDraw.FileName;
        AnyFunTransform3D &scale = ..Scale;
        viewSurface.RGB = {0,0,1};
        ScaleXYZ = ..BoneDraw.ScaleXYZ;
      };
    };
  #else
    AnyInertiaMatrix InertiaObject = {
      BodyMassCorrectionCompatibility massCorrection() = {
        DensityTheoretical = ....Data.unscaled.StandardParameters.Lumbar.L2Mass;
      };
      Jii = {0.001,0.001,0.001};
      JaboutCoMOnOff = On;
      sCoM = .Scale(.Data.sCoM_pos);
    };
  #endif


  AnyRefNode MoCapMarkerFrameAMMR24 = {}; ///< For backwards compatibility with AMMR 2.4 MoCap Marker protocols


  AnyRefNode L2L3JntNode = {sRel = .Scale(.Data.L2L3JntNode_pos);};
  AnyRefNode L1L2JntNode = {
    sRel = .Scale(.Data.L1L2JntNode_pos);
    // Rotated node with x axis parallel to the superior endplate surface
    AnyRefNode RotNode = {
      ARel = RotMat(
        0.5*(..SuperiorEndplateAnteriorNode.sRel + ..SuperiorEndplatePosteriorNode.sRel),
        ..SuperiorEndplateAnteriorNode.sRel,
        0.5*(..SuperiorEndplateAnteriorNode.sRel + ..SuperiorEndplatePosteriorNode.sRel) + (..SuperiorEndplateNodeL.sRel - ..SuperiorEndplateNodeR.sRel)
      )*RotMat(pi/2,x);
    };
  };

  // Nodes at the anterior and posterior points on the superior endplate
  AnyRefNode SuperiorEndplateAnteriorNode = {sRel = .Scale(.Data.SuperiorEndplateAnteriorNode_pos);};
  AnyRefNode SuperiorEndplatePosteriorNode = {sRel = .Scale(.Data.SuperiorEndplatePosteriorNode_pos);};

  // Nodes at the right and left points on the superior endplate
  AnyRefNode SuperiorEndplateNodeR = {sRel = .Scale(.Data.Right.SuperiorEndplateNode_pos);};
  AnyRefNode SuperiorEndplateNodeL = {sRel = .Scale(.Data.Left.SuperiorEndplateNode_pos);};

  //These nodes are used for adding extra used by other body parts to the right
  //and left side of the segment
  AnyRefNode Right = {AnyFunTransform3D&Scale=.Scale;
    AnyRefNode ICSpringSupNode        = { sRel =  .Scale(..Data.Right.ICSpringSupNode_pos); };
  };
  AnyRefNode Left = {AnyFunTransform3D&Scale=.Scale;
    AnyRefNode ICSpringSupNode        = { sRel =  .Scale(..Data.Left.ICSpringSupNode_pos); };
  };


  // Ligament Nodes
  AnyRefNode LSNode = {sRel = .Scale(.Data.LSNode_pos);};
  AnyRefNode LSNode2 = {sRel = .Scale(.Data.LSNode2_pos);};

  AnyRefNode LINodeInferior = {sRel = .Scale(.Data.LINodeInferior_pos);};
  AnyRefNode LINodeSuperior = {sRel = .Scale(.Data.LINodeSuperior_pos);};
  // End of ligament Nodes

  // Multifidi Nodes
  AnyRefNode MFdL2L4NodeR = {sRel = .Scale(.Data.Right.MFdL2L4Node_pos);};
  AnyRefNode MFdL2L4NodeL = {sRel = .Scale(.Data.Left.MFdL2L4Node_pos);};

  AnyRefNode MFmL2L5NodeR = {sRel = .Scale(.Data.Right.MFmL2L5Node_pos);};
  AnyRefNode MFmL2L5NodeL = {sRel = .Scale(.Data.Left.MFmL2L5Node_pos);};

  AnyRefNode MFtsL2L5NodeR = {sRel = .Scale(.Data.Right.MFtsL2L5Node_pos);};
  AnyRefNode MFtsL2L5NodeL = {sRel = .Scale(.Data.Left.MFtsL2L5Node_pos);};

  AnyRefNode MFtsL2S1NodeR = {sRel = .Scale(.Data.Right.MFtsL2S1Node_pos);};
  AnyRefNode MFtsL2S1NodeL = {sRel = .Scale(.Data.Left.MFtsL2S1Node_pos);};

  AnyRefNode MFtstL2SIPSNodeR = {sRel = .Scale(.Data.Right.MFtstL2SIPSNode_pos);};
  AnyRefNode MFtstL2SIPSNodeL = {sRel = .Scale(.Data.Left.MFtstL2SIPSNode_pos);};
  // End of Multifidi Nodes

  // Erector Spinae Nodes
  AnyRefNode IliocostalisLumborumL2NodeR = {sRel = .Scale(.Data.Right.IliocostalisLumborumL2Node_pos);};
  AnyRefNode IliocostalisLumborumL2NodeL = {sRel = .Scale(.Data.Left.IliocostalisLumborumL2Node_pos);};

  AnyRefNode LTplL2SIPSNodeR = {sRel = .Scale(.Data.Right.LTplL2SIPSNode_pos);};
  AnyRefNode LTplL2SIPSNodeL = {sRel = .Scale(.Data.Left.LTplL2SIPSNode_pos);};

  AnyRefNode LTptT2L2NodeR = {sRel = .Scale(.Data.Right.LTptT2L2Node_pos);};
  AnyRefNode LTptT2L2NodeL = {sRel = .Scale(.Data.Left.LTptT2L2Node_pos);};

  AnyRefNode LTptC2L2NodeR = {sRel = .Scale(.Data.Right.LTptC2L2Node_pos);};
  AnyRefNode LTptC2L2NodeL = {sRel = .Scale(.Data.Left.LTptC2L2Node_pos);};

  AnyRefNode IliocostalisLumborumL1ViaNodeR = {sRel = .Scale(.Data.Right.IliocostalisLumborumL1ViaNode_pos);};
  AnyRefNode IliocostalisLumborumL1ViaNodeL = {sRel = .Scale(.Data.Left.IliocostalisLumborumL1ViaNode_pos);};

  AnyRefNode LTplL1SIPSViaNodeR = {sRel = .Scale(.Data.Right.LTplL1SIPSViaNode_pos);};
  AnyRefNode LTplL1SIPSViaNodeL = {sRel = .Scale(.Data.Left.LTplL1SIPSViaNode_pos);};

  AnyRefNode IliocostalisLumborumR5Via8NodeR = {sRel = .Scale(.Data.Right.IliocostalisLumborumR5Via8Node_pos);};
  AnyRefNode IliocostalisLumborumR5Via8NodeL = {sRel = .Scale(.Data.Left.IliocostalisLumborumR5Via8Node_pos);};

  AnyRefNode IliocostalisLumborumR6Via7NodeR = {sRel = .Scale(.Data.Right.IliocostalisLumborumR6Via7Node_pos);};
  AnyRefNode IliocostalisLumborumR6Via7NodeL = {sRel = .Scale(.Data.Left.IliocostalisLumborumR6Via7Node_pos);};

  AnyRefNode IliocostalisLumborumR7Via6NodeR = {sRel = .Scale(.Data.Right.IliocostalisLumborumR7Via6Node_pos);};
  AnyRefNode IliocostalisLumborumR7Via6NodeL = {sRel = .Scale(.Data.Left.IliocostalisLumborumR7Via6Node_pos);};

  AnyRefNode IliocostalisLumborumR8Via5NodeR = {sRel = .Scale(.Data.Right.IliocostalisLumborumR8Via5Node_pos);};
  AnyRefNode IliocostalisLumborumR8Via5NodeL = {sRel = .Scale(.Data.Left.IliocostalisLumborumR8Via5Node_pos);};

  AnyRefNode IliocostalisLumborumR9Via4NodeR = {sRel = .Scale(.Data.Right.IliocostalisLumborumR9Via4Node_pos);};
  AnyRefNode IliocostalisLumborumR9Via4NodeL = {sRel = .Scale(.Data.Left.IliocostalisLumborumR9Via4Node_pos);};

  AnyRefNode IliocostalisLumborumR10Via3NodeR = {sRel = .Scale(.Data.Right.IliocostalisLumborumR10Via3Node_pos);};
  AnyRefNode IliocostalisLumborumR10Via3NodeL = {sRel = .Scale(.Data.Left.IliocostalisLumborumR10Via3Node_pos);};

  AnyRefNode IliocostalisLumborumR11Via2NodeR = {sRel = .Scale(.Data.Right.IliocostalisLumborumR11Via2Node_pos);};
  AnyRefNode IliocostalisLumborumR11Via2NodeL = {sRel = .Scale(.Data.Left.IliocostalisLumborumR11Via2Node_pos);};

  AnyRefNode IliocostalisLumborumR12Via2NodeR = {sRel = .Scale(.Data.Right.IliocostalisLumborumR12Via2Node_pos);};
  AnyRefNode IliocostalisLumborumR12Via2NodeL = {sRel = .Scale(.Data.Left.IliocostalisLumborumR12Via2Node_pos);};

  AnyRefNode LTptT3L3Via11NodeR = {sRel = .Scale(.Data.Right.LTptT3L3Via11Node_pos);};
  AnyRefNode LTptT3L3Via11NodeL = {sRel = .Scale(.Data.Left.LTptT3L3Via11Node_pos);};

  AnyRefNode LTptT4L4Via10NodeR = {sRel = .Scale(.Data.Right.LTptT4L4Via10Node_pos);};
  AnyRefNode LTptT4L4Via10NodeL = {sRel = .Scale(.Data.Left.LTptT4L4Via10Node_pos);};

  AnyRefNode LTptT5L5Via9NodeR = {sRel = .Scale(.Data.Right.LTptT5L5Via9Node_pos);};
  AnyRefNode LTptT5L5Via9NodeL = {sRel = .Scale(.Data.Left.LTptT5L5Via9Node_pos);};

  AnyRefNode LTptT6S1Via8NodeR = {sRel = .Scale(.Data.Right.LTptT6S1Via8Node_pos);};
  AnyRefNode LTptT6S1Via8NodeL = {sRel = .Scale(.Data.Left.LTptT6S1Via8Node_pos);};

  AnyRefNode LTptT7S2Via7NodeR = {sRel = .Scale(.Data.Right.LTptT7S2Via7Node_pos);};
  AnyRefNode LTptT7S2Via7NodeL = {sRel = .Scale(.Data.Left.LTptT7S2Via7Node_pos);};

  AnyRefNode LTptT8S3Via6NodeR = {sRel = .Scale(.Data.Right.LTptT8S3Via6Node_pos);};
  AnyRefNode LTptT8S3Via6NodeL = {sRel = .Scale(.Data.Left.LTptT8S3Via6Node_pos);};

  AnyRefNode LTptT9S4Via5NodeR = {sRel = .Scale(.Data.Right.LTptT9S4Via5Node_pos);};
  AnyRefNode LTptT9S4Via5NodeL = {sRel = .Scale(.Data.Left.LTptT9S4Via5Node_pos);};

  AnyRefNode LTptT10SacrumVia4NodeR = {sRel = .Scale(.Data.Right.LTptT10SacrumVia4Node_pos);};
  AnyRefNode LTptT10SacrumVia4NodeL = {sRel = .Scale(.Data.Left.LTptT10SacrumVia4Node_pos);};

  AnyRefNode LTptT11SacrumVia3NodeR = {sRel = .Scale(.Data.Right.LTptT11SacrumVia3Node_pos);};
  AnyRefNode LTptT11SacrumVia3NodeL = {sRel = .Scale(.Data.Left.LTptT11SacrumVia3Node_pos);};

  AnyRefNode LTptT12SacrumVia2NodeR = {sRel = .Scale(.Data.Right.LTptT12SacrumVia2Node_pos);};
  AnyRefNode LTptT12SacrumVia2NodeL = {sRel = .Scale(.Data.Left.LTptT12SacrumVia2Node_pos);};

  AnyRefNode LTptC3L3Via11NodeR = {sRel = .Scale(.Data.Right.LTptC3L3Via11Node_pos);};
  AnyRefNode LTptC3L3Via11NodeL = {sRel = .Scale(.Data.Left.LTptC3L3Via11Node_pos);};

  AnyRefNode LTptC4L4Via10NodeR = {sRel = .Scale(.Data.Right.LTptC4L4Via10Node_pos);};
  AnyRefNode LTptC4L4Via10NodeL = {sRel = .Scale(.Data.Left.LTptC4L4Via10Node_pos);};

  AnyRefNode LTptC5L5Via9NodeR = {sRel = .Scale(.Data.Right.LTptC5L5Via9Node_pos);};
  AnyRefNode LTptC5L5Via9NodeL = {sRel = .Scale(.Data.Left.LTptC5L5Via9Node_pos);};

  AnyRefNode LTptC6S1Via8NodeR = {sRel = .Scale(.Data.Right.LTptC6S1Via8Node_pos);};
  AnyRefNode LTptC6S1Via8NodeL = {sRel = .Scale(.Data.Left.LTptC6S1Via8Node_pos);};

  AnyRefNode LTptC7S2Via7NodeR = {sRel = .Scale(.Data.Right.LTptC7S2Via7Node_pos);};
  AnyRefNode LTptC7S2Via7NodeL = {sRel = .Scale(.Data.Left.LTptC7S2Via7Node_pos);};

  AnyRefNode LTptC8S3Via6NodeR = {sRel = .Scale(.Data.Right.LTptC8S3Via6Node_pos);};
  AnyRefNode LTptC8S3Via6NodeL = {sRel = .Scale(.Data.Left.LTptC8S3Via6Node_pos);};

  AnyRefNode LTptC9S4Via5NodeR = {sRel = .Scale(.Data.Right.LTptC9S4Via5Node_pos);};
  AnyRefNode LTptC9S4Via5NodeL = {sRel = .Scale(.Data.Left.LTptC9S4Via5Node_pos);};

  AnyRefNode LTptC10SacrumVia4NodeR = {sRel = .Scale(.Data.Right.LTptC10SacrumVia4Node_pos);};
  AnyRefNode LTptC10SacrumVia4NodeL = {sRel = .Scale(.Data.Left.LTptC10SacrumVia4Node_pos);};

  AnyRefNode LTptC11SacrumVia3NodeR = {sRel = .Scale(.Data.Right.LTptC11SacrumVia3Node_pos);};
  AnyRefNode LTptC11SacrumVia3NodeL = {sRel = .Scale(.Data.Left.LTptC11SacrumVia3Node_pos);};

  AnyRefNode LTptC12SacrumVia2NodeR = {sRel = .Scale(.Data.Right.LTptC12SacrumVia2Node_pos);};
  AnyRefNode LTptC12SacrumVia2NodeL = {sRel = .Scale(.Data.Left.LTptC12SacrumVia2Node_pos);};
   // End of Erector Spinae Nodes

    // Psoas Major Nodes
    AnyRefNode PML2I_TMNodeR = {sRel = .Scale(.Data.Right.PML2I_TMNode_pos);};
    AnyRefNode PML2I_TMNodeL = {sRel = .Scale(.Data.Left.PML2I_TMNode_pos);};

    AnyRefNode PML2T_TMNodeR = {sRel = .Scale(.Data.Right.PML2T_TMNode_pos);};
    AnyRefNode PML2T_TMNodeL = {sRel = .Scale(.Data.Left.PML2T_TMNode_pos);};

    AnyRefNode PMT12I_TMVia1NodeR = {sRel = .Scale(.Data.Right.PMT12I_TMVia1Node_pos);};
    AnyRefNode PMT12I_TMVia1NodeL = {sRel = .Scale(.Data.Left.PMT12I_TMVia1Node_pos);};

    AnyRefNode PML1T_TMVia1NodeR = {sRel = .Scale(.Data.Right.PML1T_TMVia1Node_pos);};
    AnyRefNode PML1T_TMVia1NodeL = {sRel = .Scale(.Data.Left.PML1T_TMVia1Node_pos);};
    // End of Psoas Major Nodes

    // Quadratus Lumborum Nodes
    AnyRefNode QLL2_CINodeR = {sRel = .Scale(.Data.Right.QLL2_CINode_pos);};
    AnyRefNode QLL2_CINodeL = {sRel = .Scale(.Data.Left.QLL2_CINode_pos);};
    // End of Quadratus Lumborum Nodes

    // Obliquus Externus Nodes
    AnyRefNode OEC7_RSNodeR = {sRel = .Scale(.Data.Right.OEC7_RSNode_pos);};
    AnyRefNode OEC7_RSNodeL = {sRel = .Scale(.Data.Left.OEC7_RSNode_pos);};
    // End of Obliquus Externus Nodes

    // Obliquus Internus Nodes
    AnyRefNode OICI_RS1NodeR = {sRel = .Scale(.Data.Right.OICI_RS1Node_pos);};
    AnyRefNode OICI_RS1NodeL = {sRel = .Scale(.Data.Left.OICI_RS1Node_pos);};
    // End of Obliquus Internus Nodes

    // Diaphragm Muscles Nodes
    AnyRefNode DiaphragmL2_1NodeR = {sRel = .Scale(.Data.Right.DiaphragmNode1_pos); };
    AnyRefNode DiaphragmL2_2NodeR = {sRel = .Scale(.Data.Right.DiaphragmNode2_pos); };
    AnyRefNode DiaphragmL2_1NodeL = {sRel = .Scale(.Data.Left.DiaphragmNode1_pos); };
    AnyRefNode DiaphragmL2_2NodeL = {sRel = .Scale(.Data.Left.DiaphragmNode2_pos); };
    //End of Diaphragm Muscles Nodes

  AnyDrawSurf BoneDraw = {
    FileName = ...Data.unscaled.STL.FilenameL2Seg;
    RGB = ...ColorRef.Segments;
    Opacity = Main.DrawSettings.BonesOpacity.L2;
    AnyFunTransform3D &Scale =.Scale;
  };
  #if BM_TRUNK_CAVITY_MODEL == _CAVITY_MODEL_VOLUME_
    AnyRefNode TransversusInsNode_R={sRel=.Scale(.Data.Right.Transversus_Ins_pos);};
    AnyRefNode TransversusInsNode_L={sRel=.Scale(.Data.Left.Transversus_Ins_pos);};
    AnyRefNode TransversusMid={sRel=0.5*(.TransversusInsNode_R.sRel+.TransversusInsNode_L.sRel) ;};
  #else
    AnyRefNode TransversusOrgNode = {sRel = .MidPoint.sRel;};
    AnyRefNode TransversusInsNode = {sRel = .TransversusOrgNode.sRel;};
  #endif

  AnyRefNode MidPoint = {sRel = (.L1L2JntNode.sRel+.L2L3JntNode.sRel)*0.5;};
  AnyRefNode SupportNode = {sRel = .Scale(.Data.SupportNode_pos);};
  AnyRefNode BuckleContactNode = {sRel = .ScaleAbdominal(.Data.BuckleContactNode_pos);};

  AnyRefNode L2RContactNode = {sRel= .Scale(.Data.Right.ContactNode_pos);};
  AnyRefNode L2LContactNode = {sRel= .Scale(.Data.Left.ContactNode_pos);};
}; // End of L2Seg

AnySeg L1Seg = {

  // Reference to generic data
  AnyFolder &Data = ..Data.unscaled.ModelParameters.L1;

  //initial position found as a function of pelvis pos and orientation
  r0=.L2Seg.L1L2JntNode.sRel*.L2Seg.Axes0'+.L2Seg.r0-L1L2JntNode.sRel*Axes0';

  // This file includes the trunk specifc scaling function
  // and anatomical reference system
  #include "TrunkAnatomicalFrame.any"

  TrunkScaleWithInterfaceMorphing Scale(
    GeomScale = ...Scaling.GeometricalScaling.L1Seg.ScaleFunction,
    PelvisSeg = ..PelvisSeg,
  ) = {};

  TrunkScaleWithInterfaceMorphing ScaleAbdominal(
    GeomScale = ...Scaling.GeometricalScaling.Lumbar.ScaleFunction,
    PelvisSeg = ..PelvisSeg,
  ) = {};

  // Inertia properties for the segment
  UseInertiaObjects = On;

  #if (BM_TRUNK_CAVITY_MODEL == _CAVITY_MODEL_VOLUME_)
    AnyInertiaSolid BoneInertiaObject = {
      BodyMassCorrection massCorrection() = {
        DensityTheoretical = ....Data.unscaled.ModelParameters.BoneDensity;
        enableMassCorrection = Off;
      };
      AnySurfSTL surface = {
        FileName = ..BoneDraw.FileName;
        AnyFunTransform3D &scale = ..Scale;
        viewSurface.RGB = {0,0,1};
        ScaleXYZ = ..BoneDraw.ScaleXYZ;
      };
    };
  #else
    AnyInertiaMatrix InertiaObject = {
      BodyMassCorrectionCompatibility massCorrection() = {
        DensityTheoretical = ....Data.unscaled.StandardParameters.Lumbar.L1Mass;
      };
      Jii = {0.001,0.001,0.001};
      JaboutCoMOnOff = On;
      sCoM = .Scale(.Data.sCoM_pos);
    };
  #endif


  AnyRefNode MoCapMarkerFrameAMMR24 = {}; ///< For backwards compatibility with AMMR 2.4 MoCap Marker protocols


  AnyRefNode L1L2JntNode = {sRel = .Scale(.Data.L1L2JntNode_pos);};
  AnyRefNode T12L1JntNode = {
    sRel = .Scale(.Data.T12L1JntNode_pos);
    // Rotated node with x axis parallel to the superior endplate surface
    AnyRefNode RotNode = {
      ARel = RotMat(
        0.5*(..SuperiorEndplateAnteriorNode.sRel + ..SuperiorEndplatePosteriorNode.sRel),
        ..SuperiorEndplateAnteriorNode.sRel,
        0.5*(..SuperiorEndplateAnteriorNode.sRel + ..SuperiorEndplatePosteriorNode.sRel) + (..SuperiorEndplateNodeL.sRel - ..SuperiorEndplateNodeR.sRel)
      )*RotMat(pi/2,x);
    };
  };

  // Nodes at the anterior and posterior points on the superior endplate
  AnyRefNode SuperiorEndplateAnteriorNode = {sRel = .Scale(.Data.SuperiorEndplateAnteriorNode_pos);};
  AnyRefNode SuperiorEndplatePosteriorNode = {sRel = .Scale(.Data.SuperiorEndplatePosteriorNode_pos);};

  // Nodes at the right and left points on the superior endplate
  AnyRefNode SuperiorEndplateNodeR = {sRel = .Scale(.Data.Right.SuperiorEndplateNode_pos);};
  AnyRefNode SuperiorEndplateNodeL = {sRel = .Scale(.Data.Left.SuperiorEndplateNode_pos);};

  //These nodes are used for adding extra used by other body parts to the right
  //and left side of the segment
  AnyRefNode Right= {AnyFunTransform3D&Scale=.Scale;
    AnyRefNode ICSpringSupNode        = { sRel =  .Scale(..Data.Right.ICSpringSupNode_pos); };
  };
  AnyRefNode Left = {AnyFunTransform3D&Scale=.Scale;
    AnyRefNode ICSpringSupNode        = { sRel =  .Scale(..Data.Left.ICSpringSupNode_pos); };
  };


  // Ligament Nodes
  AnyRefNode LSNode = {sRel = .Scale(.Data.LSNode_pos);};

  AnyRefNode LINodeInferior = {sRel = .Scale(.Data.LINodeInferior_pos);};
  AnyRefNode LINodeSuperior = {sRel = .Scale(.Data.LINodeSuperior_pos);};
  // End of ligament Nodes

  // Multifidi Nodes
  AnyRefNode MFdL1L3NodeR = {sRel = .Scale(.Data.Right.MFdL1L3Node_pos);};
  AnyRefNode MFdL1L3NodeL = {sRel = .Scale(.Data.Left.MFdL1L3Node_pos);};

  AnyRefNode MFmL1L4NodeR = {sRel = .Scale(.Data.Right.MFmL1L4Node_pos);};
  AnyRefNode MFmL1L4NodeL = {sRel = .Scale(.Data.Left.MFmL1L4Node_pos);};

  AnyRefNode MFtsL1L5NodeR = {sRel = .Scale(.Data.Right.MFtsL1L5Node_pos);};
  AnyRefNode MFtsL1L5NodeL = {sRel = .Scale(.Data.Left.MFtsL1L5Node_pos);};

  AnyRefNode MFtsL1S1NodeR = {sRel = .Scale(.Data.Right.MFtsL1S1Node_pos);};
  AnyRefNode MFtsL1S1NodeL = {sRel = .Scale(.Data.Left.MFtsL1S1Node_pos);};

  AnyRefNode MFtstL1SIPSNodeR = {sRel = .Scale(.Data.Right.MFtstL1SIPSNode_pos);};
  AnyRefNode MFtstL1SIPSNodeL = {sRel = .Scale(.Data.Left.MFtstL1SIPSNode_pos);};
  // End of Multifidi Nodes

  // Erector Spinae Nodes
  AnyRefNode IliocostalisLumborumL1NodeR = {sRel = .Scale(.Data.Right.IliocostalisLumborumL1Node_pos);};
  AnyRefNode IliocostalisLumborumL1NodeL = {sRel = .Scale(.Data.Left.IliocostalisLumborumL1Node_pos);};

  AnyRefNode LTplL1SIPSNodeR = {sRel = .Scale(.Data.Right.LTplL1SIPSNode_pos);};
  AnyRefNode LTplL1SIPSNodeL = {sRel = .Scale(.Data.Left.LTplL1SIPSNode_pos);};

  AnyRefNode LTptT1L1NodeR = {sRel = .Scale(.Data.Right.LTptT1L1Node_pos);};
  AnyRefNode LTptT1L1NodeL = {sRel = .Scale(.Data.Left.LTptT1L1Node_pos);};

  AnyRefNode LTptC1L1NodeR = {sRel = .Scale(.Data.Right.LTptC1L1Node_pos);};
  AnyRefNode LTptC1L1NodeL = {sRel = .Scale(.Data.Left.LTptC1L1Node_pos);};

  AnyRefNode IliocostalisLumborumR5Via7NodeR = {sRel = .Scale(.Data.Right.IliocostalisLumborumR5Via7Node_pos);};
  AnyRefNode IliocostalisLumborumR5Via7NodeL = {sRel = .Scale(.Data.Left.IliocostalisLumborumR5Via7Node_pos);};

  AnyRefNode IliocostalisLumborumR6Via6NodeR = {sRel = .Scale(.Data.Right.IliocostalisLumborumR6Via6Node_pos);};
  AnyRefNode IliocostalisLumborumR6Via6NodeL = {sRel = .Scale(.Data.Left.IliocostalisLumborumR6Via6Node_pos);};

  AnyRefNode IliocostalisLumborumR7Via5NodeR = {sRel = .Scale(.Data.Right.IliocostalisLumborumR7Via5Node_pos);};
  AnyRefNode IliocostalisLumborumR7Via5NodeL = {sRel = .Scale(.Data.Left.IliocostalisLumborumR7Via5Node_pos);};

  AnyRefNode IliocostalisLumborumR8Via4NodeR = {sRel = .Scale(.Data.Right.IliocostalisLumborumR8Via4Node_pos);};
  AnyRefNode IliocostalisLumborumR8Via4NodeL = {sRel = .Scale(.Data.Left.IliocostalisLumborumR8Via4Node_pos);};

  AnyRefNode IliocostalisLumborumR9Via3NodeR = {sRel = .Scale(.Data.Right.IliocostalisLumborumR9Via3Node_pos);};
  AnyRefNode IliocostalisLumborumR9Via3NodeL = {sRel = .Scale(.Data.Left.IliocostalisLumborumR9Via3Node_pos);};

  AnyRefNode IliocostalisLumborumR10Via2NodeR = {sRel= .Scale(.Data.Right.IliocostalisLumborumR10Via2Node_pos);};
  AnyRefNode IliocostalisLumborumR10Via2NodeL = {sRel= .Scale(.Data.Left.IliocostalisLumborumR10Via2Node_pos);};

  AnyRefNode IliocostalisLumborumR11Via1NodeR = {sRel= .Scale(.Data.Right.IliocostalisLumborumR11Via1Node_pos);};
  AnyRefNode IliocostalisLumborumR11Via1NodeL = {sRel= .Scale(.Data.Left.IliocostalisLumborumR11Via1Node_pos);};

  AnyRefNode IliocostalisLumborumR12Via1NodeR = {sRel= .Scale(.Data.Right.IliocostalisLumborumR12Via1Node_pos);};
  AnyRefNode IliocostalisLumborumR12Via1NodeL = {sRel= .Scale(.Data.Left.IliocostalisLumborumR12Via1Node_pos);};

  AnyRefNode LTptT2L2Via11NodeR = {sRel= .Scale(.Data.Right.LTptT2L2Via11Node_pos);};
  AnyRefNode LTptT2L2Via11NodeL = {sRel= .Scale(.Data.Left.LTptT2L2Via11Node_pos);};

  AnyRefNode LTptT3L3Via10NodeR = {sRel= .Scale(.Data.Right.LTptT3L3Via10Node_pos);};
  AnyRefNode LTptT3L3Via10NodeL = {sRel= .Scale(.Data.Left.LTptT3L3Via10Node_pos);};

    AnyRefNode LTptT4L4Via9NodeR = {sRel = .Scale(.Data.Right.LTptT4L4Via9Node_pos);};
    AnyRefNode LTptT4L4Via9NodeL = {sRel = .Scale(.Data.Left.LTptT4L4Via9Node_pos);};

    AnyRefNode LTptT5L5Via8NodeR = {sRel = .Scale(.Data.Right.LTptT5L5Via8Node_pos);};
    AnyRefNode LTptT5L5Via8NodeL = {sRel = .Scale(.Data.Left.LTptT5L5Via8Node_pos);};

    AnyRefNode LTptT6S1Via7NodeR = {sRel = .Scale(.Data.Right.LTptT6S1Via7Node_pos);};
    AnyRefNode LTptT6S1Via7NodeL = {sRel = .Scale(.Data.Left.LTptT6S1Via7Node_pos);};

    AnyRefNode LTptT7S2Via6NodeR = {sRel = .Scale(.Data.Right.LTptT7S2Via6Node_pos);};
    AnyRefNode LTptT7S2Via6NodeL = {sRel = .Scale(.Data.Left.LTptT7S2Via6Node_pos);};

    AnyRefNode LTptT8S3Via5NodeR = {sRel = .Scale(.Data.Right.LTptT8S3Via5Node_pos);};
    AnyRefNode LTptT8S3Via5NodeL = {sRel = .Scale(.Data.Left.LTptT8S3Via5Node_pos);};

    AnyRefNode LTptT9S4Via4NodeR = {sRel = .Scale(.Data.Right.LTptT9S4Via4Node_pos);};
    AnyRefNode LTptT9S4Via4NodeL = {sRel = .Scale(.Data.Left.LTptT9S4Via4Node_pos);};

    AnyRefNode LTptT10SacrumVia3NodeR = {sRel = .Scale(.Data.Right.LTptT10SacrumVia3Node_pos);};
    AnyRefNode LTptT10SacrumVia3NodeL = {sRel = .Scale(.Data.Left.LTptT10SacrumVia3Node_pos);};

    AnyRefNode LTptT11SacrumVia2NodeR = {sRel = .Scale(.Data.Right.LTptT11SacrumVia2Node_pos);};
    AnyRefNode LTptT11SacrumVia2NodeL = {sRel = .Scale(.Data.Left.LTptT11SacrumVia2Node_pos);};

    AnyRefNode LTptT12SacrumVia1NodeR = {sRel = .Scale(.Data.Right.LTptT12SacrumVia1Node_pos);};
    AnyRefNode LTptT12SacrumVia1NodeL = {sRel = .Scale(.Data.Left.LTptT12SacrumVia1Node_pos);};

    AnyRefNode LTptC3L3Via10NodeR = {sRel= .Scale(.Data.Right.LTptC3L3Via10Node_pos);};
    AnyRefNode LTptC3L3Via10NodeL = {sRel= .Scale(.Data.Left.LTptC3L3Via10Node_pos);};

    AnyRefNode LTptC4L4Via9NodeR = {sRel = .Scale(.Data.Right.LTptC4L4Via9Node_pos);};
    AnyRefNode LTptC4L4Via9NodeL = {sRel = .Scale(.Data.Left.LTptC4L4Via9Node_pos);};

    AnyRefNode LTptC5L5Via8NodeR = {sRel = .Scale(.Data.Right.LTptC5L5Via8Node_pos);};
    AnyRefNode LTptC5L5Via8NodeL = {sRel = .Scale(.Data.Left.LTptC5L5Via8Node_pos);};

    AnyRefNode LTptC6S1Via7NodeR = {sRel = .Scale(.Data.Right.LTptC6S1Via7Node_pos);};
    AnyRefNode LTptC6S1Via7NodeL = {sRel = .Scale(.Data.Left.LTptC6S1Via7Node_pos);};

    AnyRefNode LTptC7S2Via6NodeR = {sRel = .Scale(.Data.Right.LTptC7S2Via6Node_pos);};
    AnyRefNode LTptC7S2Via6NodeL = {sRel = .Scale(.Data.Left.LTptC7S2Via6Node_pos);};

    AnyRefNode LTptC8S3Via5NodeR = {sRel = .Scale(.Data.Right.LTptC8S3Via5Node_pos);};
    AnyRefNode LTptC8S3Via5NodeL = {sRel = .Scale(.Data.Left.LTptC8S3Via5Node_pos);};

    AnyRefNode LTptC9S4Via4NodeR = {sRel = .Scale(.Data.Right.LTptC9S4Via4Node_pos);};
    AnyRefNode LTptC9S4Via4NodeL = {sRel = .Scale(.Data.Left.LTptC9S4Via4Node_pos);};

    AnyRefNode LTptC10SacrumVia3NodeR = {sRel = .Scale(.Data.Right.LTptC10SacrumVia3Node_pos);};
    AnyRefNode LTptC10SacrumVia3NodeL = {sRel = .Scale(.Data.Left.LTptC10SacrumVia3Node_pos);};

    AnyRefNode LTptC11SacrumVia2NodeR = {sRel = .Scale(.Data.Right.LTptC11SacrumVia2Node_pos);};
    AnyRefNode LTptC11SacrumVia2NodeL = {sRel = .Scale(.Data.Left.LTptC11SacrumVia2Node_pos);};

    AnyRefNode LTptC12SacrumVia1NodeR = {sRel = .Scale(.Data.Right.LTptC12SacrumVia1Node_pos);};
    AnyRefNode LTptC12SacrumVia1NodeL = {sRel = .Scale(.Data.Left.LTptC12SacrumVia1Node_pos);};
    // End of Erector Spinae Nodes

    // Psoas Major Nodes
    AnyRefNode PML1I_TMNodeR = {sRel = .Scale(.Data.Right.PML1I_TMNode_pos);};
    AnyRefNode PML1I_TMNodeL = {sRel = .Scale(.Data.Left.PML1I_TMNode_pos);};

    AnyRefNode PML1T_TMNodeR = {sRel = .Scale(.Data.Right.PML1T_TMNode_pos);};
    AnyRefNode PML1T_TMNodeL = {sRel = .Scale(.Data.Left.PML1T_TMNode_pos);};
    // End of Psoas Major Nodes

    // Quadratus Lumborum Nodes
    AnyRefNode QLL1_CINodeR = {sRel = .Scale(.Data.Right.QLL1_CINode_pos);};
    AnyRefNode QLL1_CINodeL = {sRel = .Scale(.Data.Left.QLL1_CINode_pos);};
    // End of Quadratus Lumborum Nodes

    // Diaphragm Muscles Nodes
    AnyRefNode DiaphragmL1_3NodeR = {sRel = .Scale(.Data.Right.DiaphragmL1_3Node_pos); };
    AnyRefNode DiaphragmL1_3NodeL = {sRel = .Scale(.Data.Left.DiaphragmL1_3Node_pos); };
    AnyRefNode DiaphragmL1_1NodeR = {sRel = .Scale(.Data.Right.DiaphragmNode1_pos); };
    AnyRefNode DiaphragmL1_2NodeR = {sRel = .Scale(.Data.Right.DiaphragmNode2_pos); };
    AnyRefNode DiaphragmL1_1NodeL = {sRel = .Scale(.Data.Left.DiaphragmNode1_pos); };
    AnyRefNode DiaphragmL1_2NodeL = {sRel = .Scale(.Data.Left.DiaphragmNode2_pos); };
    //End of Diaphragm Muscles Nodes

    AnyDrawSurf BoneDraw = {
      FileName = ...Data.unscaled.STL.FilenameL1Seg;
      RGB = ...ColorRef.Segments;
      Opacity = Main.DrawSettings.BonesOpacity.L1;
      AnyFunTransform3D &Scale =.Scale;
    };

    AnyRefNode MidPoint={sRel=(.L1L2JntNode.sRel+.T12L1JntNode.sRel)*0.5;};
    AnyRefNode SupportNode={sRel = .Scale(.Data.SupportNode_pos);};
    AnyRefNode BuckleContactNode={sRel = .ScaleAbdominal(.Data.BuckleContactNode_pos);};

    #if BM_TRUNK_CAVITY_MODEL == _CAVITY_MODEL_VOLUME_
      AnyRefNode TransversusInsNode_R={sRel=.Scale(.Data.Right.Transversus_Ins_pos);};
      AnyRefNode TransversusInsNode_L={sRel=.Scale(.Data.Left.Transversus_Ins_pos);};
      AnyRefNode TransversusMid={sRel=0.5*(.TransversusInsNode_R.sRel+.TransversusInsNode_L.sRel) ;};
    #else
      AnyRefNode TransversusOrgNode = {sRel = .MidPoint.sRel;};
      AnyRefNode TransversusInsNode = {sRel = .TransversusOrgNode.sRel;};
    #endif

  AnyRefNode L1RContactNode = {sRel= .Scale(.Data.Right.ContactNode_pos);};
  AnyRefNode L1LContactNode = {sRel= .Scale(.Data.Left.ContactNode_pos);};
}; // End of L1Seg
