SelectedOutput.Trunk = {

  /// The joint reaction force is expressed in the local reference frame on the proximal segment in the joint.
  /// This reference frame (RotNode) is located inside the joint node on the proximal segment and aligned with
  /// the vertebral body of the vertebra to compute the compression and shear force on the vertebra.
  /// The force is acting on the distal segment due to the proximal segment.
  SelectedOutputGroup JointReactionForce = {

    /// Right positive
    AnyVar SacrumPelvisMedioLateralShearForce = ...Trunk.Joints.Lumbar.SacrumPelvis.Constraints.Reaction.Fout[2];
    /// Distal (superior) positive
    AnyVar SacrumPelvisCompressionForce = ...Trunk.Joints.Lumbar.SacrumPelvis.Constraints.Reaction.Fout[1];
    /// Anterior positive
    AnyVar SacrumPelvisAnteroPosteriorShearForce = ...Trunk.Joints.Lumbar.SacrumPelvis.Constraints.Reaction.Fout[0];
    //Pelvis ref

    /// Right positive
    AnyVar L5SacrumMedioLateralShearForce = ...Trunk.Joints.Lumbar.L5Sacrum.ReactionForceRotated.Flocal[2];
    /// Distal (superior) positive
    AnyVar L5SacrumCompressionForce = ...Trunk.Joints.Lumbar.L5Sacrum.ReactionForceRotated.Flocal[1];
    /// Anterior positive
    AnyVar L5SacrumAnteroPosteriorShearForce = ...Trunk.Joints.Lumbar.L5Sacrum.ReactionForceRotated.Flocal[0];
    //Sacrum ref

    /// Right positive
    AnyVar L4L5MedioLateralShearForce = ...Trunk.Joints.Lumbar.L4L5.ReactionForceRotated.Flocal[2];
    /// Distal (superior) positive
    AnyVar L4L5CompressionForce = ...Trunk.Joints.Lumbar.L4L5.ReactionForceRotated.Flocal[1];
    /// Anterior positive
    AnyVar L4L5AnteroPosteriorShearForce = ...Trunk.Joints.Lumbar.L4L5.ReactionForceRotated.Flocal[0];
    //L5 ref

    /// Right positive
    AnyVar L3L4MedioLateralShearForce = ...Trunk.Joints.Lumbar.L3L4.ReactionForceRotated.Flocal[2];
    /// Distal (superior) positive
    AnyVar L3L4CompressionForce = ...Trunk.Joints.Lumbar.L3L4.ReactionForceRotated.Flocal[1];
    /// Anterior positive
    AnyVar L3L4AnteroPosteriorShearForce = ...Trunk.Joints.Lumbar.L3L4.ReactionForceRotated.Flocal[0];
    //L4 ref


    /// Right positive
    AnyVar L2L3MedioLateralShearForce = ...Trunk.Joints.Lumbar.L2L3.ReactionForceRotated.Flocal[2];
    /// Distal (superior) positive
    AnyVar L2L3CompressionForce = ...Trunk.Joints.Lumbar.L2L3.ReactionForceRotated.Flocal[1];
    /// Anterior positive
    AnyVar L2L3AnteroPosteriorShearForce = ...Trunk.Joints.Lumbar.L2L3.ReactionForceRotated.Flocal[0];
    //L3 ref

    /// Right positive
    AnyVar L1L2MedioLateralShearForce = ...Trunk.Joints.Lumbar.L1L2.ReactionForceRotated.Flocal[2];
    /// Distal (superior) positive
    AnyVar L1L2CompressionForce = ...Trunk.Joints.Lumbar.L1L2.ReactionForceRotated.Flocal[1];
    /// Anterior positive
    AnyVar L1L2AnteroPosteriorShearForce = ...Trunk.Joints.Lumbar.L1L2.ReactionForceRotated.Flocal[0];
    //L2 ref

    /// Right positive
    AnyVar T12L1MedioLateralShearForce = ...Trunk.Joints.Lumbar.T12L1.ReactionForceRotated.Flocal[2];
    /// Distal (superior) positive
    AnyVar T12L1CompressionForce = ...Trunk.Joints.Lumbar.T12L1.ReactionForceRotated.Flocal[1];
    /// Anterior positive
    AnyVar T12L1AnteroPosteriorShearForce = ...Trunk.Joints.Lumbar.T12L1.ReactionForceRotated.Flocal[0];
    //L1 ref

    #if BM_TRUNK_THORACIC_MODEL != _THORACIC_MODEL_RIGID_

      /// Right positive
      AnyVar T11T12MedioLateralShearForce = ...Trunk.Joints.Thorax.T11T12.ReactionForceRotated.Flocal[2];
      /// Distal (superior) positive
      AnyVar T11T12CompressionForce = ...Trunk.Joints.Thorax.T11T12.ReactionForceRotated.Flocal[1];
      /// Anterior positive
      AnyVar T11T12AnteroPosteriorShearForce = ...Trunk.Joints.Thorax.T11T12.ReactionForceRotated.Flocal[0];
      //T12 ref

      /// Right positive
      AnyVar T10T11MedioLateralShearForce = ...Trunk.Joints.Thorax.T10T11.ReactionForceRotated.Flocal[2];
      /// Distal (superior) positive
      AnyVar T10T11CompressionForce = ...Trunk.Joints.Thorax.T10T11.ReactionForceRotated.Flocal[1];
      /// Anterior positive
      AnyVar T10T11AnteroPosteriorShearForce = ...Trunk.Joints.Thorax.T10T11.ReactionForceRotated.Flocal[0];
      //T11 ref

      /// Right positive
      AnyVar T9T10MedioLateralShearForce = ...Trunk.Joints.Thorax.T9T10.ReactionForceRotated.Flocal[2];
      /// Distal (superior) positive
      AnyVar T9T10CompressionForce = ...Trunk.Joints.Thorax.T9T10.ReactionForceRotated.Flocal[1];
      /// Anterior positive
      AnyVar T9T10AnteroPosteriorShearForce = ...Trunk.Joints.Thorax.T9T10.ReactionForceRotated.Flocal[0];
      //T10 ref

      /// Right positive
      AnyVar T8T9MedioLateralShearForce = ...Trunk.Joints.Thorax.T8T9.ReactionForceRotated.Flocal[2];
      /// Distal (superior) positive
      AnyVar T8T9CompressionForce = ...Trunk.Joints.Thorax.T8T9.ReactionForceRotated.Flocal[1];
      /// Anterior positive
      AnyVar T8T9AnteroPosteriorShearForce = ...Trunk.Joints.Thorax.T8T9.ReactionForceRotated.Flocal[0];
      //T9 ref

      /// Right positive
      AnyVar T7T8MedioLateralShearForce = ...Trunk.Joints.Thorax.T7T8.ReactionForceRotated.Flocal[2];
      /// Distal (superior) positive
      AnyVar T7T8CompressionForce = ...Trunk.Joints.Thorax.T7T8.ReactionForceRotated.Flocal[1];
      /// Anterior positive
      AnyVar T7T8AnteroPosteriorShearForce = ...Trunk.Joints.Thorax.T7T8.ReactionForceRotated.Flocal[0];
      //T8 ref

      /// Right positive
      AnyVar T6T7MedioLateralShearForce = ...Trunk.Joints.Thorax.T6T7.ReactionForceRotated.Flocal[2];
      /// Distal (superior) positive
      AnyVar T6T7CompressionForce = ...Trunk.Joints.Thorax.T6T7.ReactionForceRotated.Flocal[1];
      /// Anterior positive
      AnyVar T6T7AnteroPosteriorShearForce = ...Trunk.Joints.Thorax.T6T7.ReactionForceRotated.Flocal[0];
      //T7 ref

      /// Right positive
      AnyVar T5T6MedioLateralShearForce = ...Trunk.Joints.Thorax.T5T6.ReactionForceRotated.Flocal[2];
      /// Distal (superior) positive
      AnyVar T5T6CompressionForce = ...Trunk.Joints.Thorax.T5T6.ReactionForceRotated.Flocal[1];
      /// Anterior positive
      AnyVar T5T6AnteroPosteriorShearForce = ...Trunk.Joints.Thorax.T5T6.ReactionForceRotated.Flocal[0];
      //T6 ref

      /// Right positive
      AnyVar T4T5MedioLateralShearForce = ...Trunk.Joints.Thorax.T4T5.ReactionForceRotated.Flocal[2];
      /// Distal (superior) positive
      AnyVar T4T5CompressionForce = ...Trunk.Joints.Thorax.T4T5.ReactionForceRotated.Flocal[1];
      /// Anterior positive
      AnyVar T4T5AnteroPosteriorShearForce = ...Trunk.Joints.Thorax.T4T5.ReactionForceRotated.Flocal[0];
      //T5 ref

      /// Right positive
      AnyVar T3T4MedioLateralShearForce = ...Trunk.Joints.Thorax.T3T4.ReactionForceRotated.Flocal[2];
      /// Distal (superior) positive
      AnyVar T3T4CompressionForce = ...Trunk.Joints.Thorax.T3T4.ReactionForceRotated.Flocal[1];
      /// Anterior positive
      AnyVar T3T4AnteroPosteriorShearForce = ...Trunk.Joints.Thorax.T3T4.ReactionForceRotated.Flocal[0];
      //T4 ref

      /// Right positive
      AnyVar T2T3MedioLateralShearForce = ...Trunk.Joints.Thorax.T2T3.ReactionForceRotated.Flocal[2];
      /// Distal (superior) positive
      AnyVar T2T3CompressionForce = ...Trunk.Joints.Thorax.T2T3.ReactionForceRotated.Flocal[1];
      /// Anterior positive
      AnyVar T2T3AnteroPosteriorShearForce = ...Trunk.Joints.Thorax.T2T3.ReactionForceRotated.Flocal[0];
      //T3 ref

      /// Right positive
      AnyVar T1T2MedioLateralShearForce = ...Trunk.Joints.Thorax.T1T2.ReactionForceRotated.Flocal[2];
      /// Distal (superior) positive
      AnyVar T1T2CompressionForce = ...Trunk.Joints.Thorax.T1T2.ReactionForceRotated.Flocal[1];
      /// Anterior positive
      AnyVar T1T2AnteroPosteriorShearForce = ...Trunk.Joints.Thorax.T1T2.ReactionForceRotated.Flocal[0];
      //T2 ref

    #endif

    /// Right positive
    AnyVar C7T1MedioLateralShearForce = ...Trunk.Joints.Cervical.T1C7.ReactionForceRotated.Flocal[2];
    /// Distal (superior) positive
    AnyVar C7T1CompressionForce = ...Trunk.Joints.Cervical.T1C7.ReactionForceRotated.Flocal[1];
    /// Anterior positive
    AnyVar C7T1AnteroPosteriorShearForce = ...Trunk.Joints.Cervical.T1C7.ReactionForceRotated.Flocal[0];
    //Thorax ref

    /// Right positive
    AnyVar C6C7MedioLateralShearForce = ...Trunk.Joints.Cervical.C7C6.ReactionForceRotated.Flocal[2];
    /// Distal (superior) positive
    AnyVar C6C7CompressionForce = ...Trunk.Joints.Cervical.C7C6.ReactionForceRotated.Flocal[1];
    /// Anterior positive
    AnyVar C6C7AnteroPosteriorShearForce = ...Trunk.Joints.Cervical.C7C6.ReactionForceRotated.Flocal[0];
    //C7 ref

    /// Right positive
    AnyVar C5C6MedioLateralShearForce = ...Trunk.Joints.Cervical.C6C5.ReactionForceRotated.Flocal[2];
    /// Distal (superior) positive
    AnyVar C5C6CompressionForce = ...Trunk.Joints.Cervical.C6C5.ReactionForceRotated.Flocal[1];
    /// Anterior positive
    AnyVar C5C6AnteroPosteriorShearForce = ...Trunk.Joints.Cervical.C6C5.ReactionForceRotated.Flocal[0];
    //C6 ref

    /// Right positive
    AnyVar C4C5MedioLateralShearForce = ...Trunk.Joints.Cervical.C5C4.ReactionForceRotated.Flocal[2];
    /// Distal (superior) positive
    AnyVar C4C5CompressionForce = ...Trunk.Joints.Cervical.C5C4.ReactionForceRotated.Flocal[1];
    /// Anterior positive
    AnyVar C4C5AnteroPosteriorShearForce = ...Trunk.Joints.Cervical.C5C4.ReactionForceRotated.Flocal[0];
    //C5 ref

    /// Right positive
    AnyVar C3C4MedioLateralShearForce = ...Trunk.Joints.Cervical.C4C3.ReactionForceRotated.Flocal[2];
    /// Distal (superior) positive
    AnyVar C3C4CompressionForce = ...Trunk.Joints.Cervical.C4C3.ReactionForceRotated.Flocal[1];
    /// Anterior positive
    AnyVar C3C4AnteroPosteriorShearForce = ...Trunk.Joints.Cervical.C4C3.ReactionForceRotated.Flocal[0];
    //C4 ref

    /// Right positive
    AnyVar C2C3MedioLateralShearForce = ...Trunk.Joints.Cervical.C3C2.ReactionForceRotated.Flocal[2];
    /// Distal (superior) positive
    AnyVar C2C3CompressionForce = ...Trunk.Joints.Cervical.C3C2.ReactionForceRotated.Flocal[1];
    /// Anterior positive
    AnyVar C2C3AnteroPosteriorShearForce = ...Trunk.Joints.Cervical.C3C2.ReactionForceRotated.Flocal[0];
    //C3 ref

    /// Right positive
    AnyVar C1C2MedioLateralShearForce = ...Trunk.Joints.Cervical.C2C1.ReactionForceRotated.Flocal[2];
    /// Distal (superior) positive
    AnyVar C1C2CompressionForce = ...Trunk.Joints.Cervical.C2C1.ReactionForceRotated.Flocal[1];
    /// Anterior positive
    AnyVar C1C2AnteroPosteriorShearForce = ...Trunk.Joints.Cervical.C2C1.ReactionForceRotated.Flocal[0];
    /// Extension positive
    AnyVar C1C2FlexionExtensionMoment = -1*(...Trunk.Joints.Cervical.C2C1.Constraints.Reaction.RefFrameOutput.M[0]*...Trunk.Joints.Cervical.C2C1.C2Node.RotNode.Axes)[2];
    /// Right positive
    AnyVar C1C2LateralMoment = -1*(...Trunk.Joints.Cervical.C2C1.Constraints.Reaction.RefFrameOutput.M[0]*...Trunk.Joints.Cervical.C2C1.C2Node.RotNode.Axes)[0];
    //C2 ref

    /// Right positive
    AnyVar C0C1MedioLateralShearForce = ...Trunk.Joints.Cervical.C1C0.ReactionForceRotated.Flocal[2];
    /// Distal (superior) positive
    AnyVar C0C1CompressionForce = ...Trunk.Joints.Cervical.C1C0.ReactionForceRotated.Flocal[1];
    /// Anterior positive
    AnyVar C0C1AnteroPosteriorShearForce = ...Trunk.Joints.Cervical.C1C0.ReactionForceRotated.Flocal[0];
    /// Left positive
    AnyVar C0C1AxialMoment = -1*(...Trunk.Joints.Cervical.C1C0.Constraints.Reaction.RefFrameOutput.M[0]*...Trunk.Joints.Cervical.C1C0.C1Node.RotNode.Axes)[1];
    /// Right positive
    AnyVar C0C1LateralMoment = -1*(...Trunk.Joints.Cervical.C1C0.Constraints.Reaction.RefFrameOutput.M[0]*...Trunk.Joints.Cervical.C1C0.C1Node.RotNode.Axes)[0];
    //C1 ref

  }; //End JointReactionForce

  SelectedOutputGroup JointMomentMeasure = {
    AnyVar SacrumPelvisFlexionExtensionMoment = ...Trunk.Joints.Lumbar.SacrumPelvisReaction.Fout[2];
    AnyVar SacrumPelvisAxialMoment = ...Trunk.Joints.Lumbar.SacrumPelvisReaction.Fout[1];
    AnyVar SacrumPelvisLateralMoment = ...Trunk.Joints.Lumbar.SacrumPelvisReaction.Fout[0];
  }; //End JointMomentMeasure

  /// Joint angles in degrees
  SelectedOutputGroup JointAngles = {
    /// Sacrum-Pelvis Flexion angle in degrees
    AnyVar SacrumPelvisFlexion = ...Interface.Trunk.PelvisThoraxExtension.Pos[0] * 180/pi;
    /// Sacrum-Pelvis Lateral Bending angle in degrees
    AnyVar SacrumPelvisLateralBending = ...Interface.Trunk.PelvisThoraxLateralBending.Pos[0] * 180/pi;
    /// Sacrum-Pelvis Axial Rotation angle in degrees
    AnyVar SacrumPelvisAxialRotation = ...Interface.Trunk.PelvisThoraxRotation.Pos[0] * 180/pi;
    /// Skull-Thorax Flexion angle in degrees
    AnyVar SkullThoraxFlexion = ...Interface.Trunk.SkullThoraxFlexion.Pos[0] * 180/pi;
    /// Skull-Thorax Lateral Bending angle in degrees
    AnyVar SkullThoraxLateralBending = ...Interface.Trunk.SkullThoraxLateralBending.Pos[0] * 180/pi;
    /// Skull-Thorax Axial Rotation angle in degrees
    AnyVar SkullThoraxAxialRotation = ...Interface.Trunk.SkullThoraxRotation.Pos[0] * 180/pi;
    /// Pelvis-T12 Extension angle in degrees
    AnyVar PelvisT12Extension = ...Interface.Trunk.PelvisT12Extension.Pos[0] * 180/pi;
    /// Pelvis-T12 Lateral Bending angle in degrees
    AnyVar PelvisT12LateralBending = ...Interface.Trunk.PelvisT12LateralBending.Pos[0] * 180/pi;
    /// Pelvis-T12 Axial Rotation angle in degrees
    AnyVar PelvisT12AxialRotation = ...Interface.Trunk.PelvisT12Rotation.Pos[0] * 180/pi;
  };

  AnyFolder Muscles = {}; //End Muscles

}; //End Trunk

#if BM_COMPATIBILITY_24_TRUNK_SELECTED_OUTPUTS_JRF == ON
#include "TrunkSelectedOutput_Compatibility24.any"
#endif
