AnyFolder Pelvis = {

  AnyVar Width = 0.1791738;
  AnyVar Depth = 0.1509133;
  AnyVar Height = 0.1188;

  AnyFloat SacralInterfaceMorphingPointsPickedMidline = {
    {0.0543855, -0.0164601, 0},
    {0.024924, 0.00666343, 0},
    {-0.0164834, 0.00236085, 0},
    {-0.0242425, -0.022508, 0},
    {-0.0406775, -0.0590935, 0},
    {-0.0336094, -0.128441, 0},
    {-0.0368024, -0.116344, 0},
    {-0.0359238, -0.072841, 0}
  };

  AnyFloat SacralInterfaceMorphingPointsPickedRight = {
    {-0.0420192, -0.103225, 0.0242102},
    {0.0382823, -0.0422929, 0.0481419},
    {0.0345507, 0.0198072, 0.0448075},
    {0.014581, -0.0100491, 0.0471374},
    {-0.0381448, -0.11934, 0.00921956},
    {-0.0471807, -0.105513, 0.00555406},
    {-0.0512493, -0.081406, 0.00761028}
  };

  //Trick to ensure symmetry on Z
  AnyFloat SacralInterfaceMorphingPoints = arrcat(
    SacralInterfaceMorphingPointsPickedMidline,
    SacralInterfaceMorphingPointsPickedRight,
    SacralInterfaceMorphingPointsPickedRight * {{1,0,0},{0,1,0},{0,0,-1}}
  );

  AnyVec3 sCoM_pos = {0.053000, -0.050, 0.000};

  AnyMatrix points_RBF_unscaled = arrcat(
    SacralInterfaceMorphingPoints,
    Right.PelvicInterfaceMorphingPoints,
    Right.PelvicInterfaceMorphingPoints * {{1,0,0},{0,1,0},{0,0,-1}}
  );

  AnyFloat HipJointsCenterTD_pos = {0.050000, -0.1150000, 0};
  AnyFloat GroundPelvisJntNode_pos = {0.015000, -9.911979e-034, 0};
  AnyFloat PelvisSacrumJntNode_pos = {0.02700000, -0.03000000, 0} ;
  AnyFloat SacrumPelvisJntNode_pos = {0.02700000, -0.03000000, 0} ;
  AnyFloat ALLNodeSuperior_pos = {0.073000, -0.01800000, 0};
  AnyFloat PLLNodeSuperior_pos = {0.047000, 0, 0};

  AnyFloat Seat_contactCenter_pos = {0.005000, -0.1750000, 2.895209e-017};
  AnyFloat Seat2MidContactNode_pos = {0.070000, -0.1700000, 4.163336e-017};
  AnyFloat PressureNode_pos = {0.085000, -0.1400000, 2.453266e-017};
  AnyFloat RibConstraintsPelvisNode_pos = {0.035000, 0, 0};
  AnyFloat RibConstraintsPelvisNodeR_pos = {0.035000, 0.1, 0.1};
  AnyFloat RibConstraintsPelvisNodeL_pos = {0.035000, 0.1, -0.1};

  AnyFloat PelvicLayer1_JntNode_pos = {0.0, -0.01660388, 0.0};
  AnyFloat PelvicLayer2_JntNode_pos = {0.0, -0.04607247, 0.0};
  AnyFloat PelvicLayer3_JntNode_pos = {0.0, -0.08536393, 0.0};


  #if BM_TRUNK_CAVITY_MODEL == _CAVITY_MODEL_VOLUME_
      AnyFloat BuckleNodeBottomCenter_pos =0.5*(Right.BuckleNode_pos+Left.BuckleNode_pos);
  #else
     AnyFloat BuckleNodeBottomCenter_pos = {0.115000, -0.1400000, 2.369714e-017};
  #endif

  AnyFolder Right = {
    AnyFloat PsoasWrapSurf_points = {
      {0.076, -0.112, 0.048},
      {0.076, -0.095, 0.093},
      {0.077, -0.139, 0.077},
      {0.082, -0.117, 0.076},
      {0.077, -0.104, 0.072}
    };

    AnyFloat PelvicInterfaceMorphingPoints = {
      {0.104428, -0.140406, 0.00308862},
      {0.10547, -0.138748, 0.0222285},
      {0.0728191, -0.165556, 0.00130153},
      {0.0599428, -0.173275, 0.0147677},
      {0.0300061, -0.173138, 0.0277551},
      {0.0493885, -0.134952, 0.052601},
      {0.081841, -0.135439, 0.0413888},
      {0.0328742, -0.127934, 0.0647686},
      {-0.00890269, -0.151025, 0.0707131},
      {-0.0133161, -0.126963, 0.0583294},
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
      ASIS,
      PSIS,
      PT,
      {-0.0187111, 0.00909837, 0.0499859},
      {-0.0119614, 0.02531837, 0.0537879},
      {-0.001592202, 0.03452027, 0.05598822},
      {0.01285505, 0.04296467, 0.06240207},
      {0.04438692, 0.04429117, 0.08807922},
      {0.05957438, 0.03936057, 0.1033819},
      {0.06883843, 0.03050837, 0.11382}
    };

    AnyVec3 ASIS = {0.120080, -0.05009163, 0.1312};
    AnyVec3 PSIS = {-0.016926, -0.00514715, 0.0396796};
    AnyVec3 PT = {0.1070, -0.1413, 0.0190};

    // MultifidusLumborum nodes

    AnyFloat MultifidusLumborumtL1ICViaNode_pos = {-0.0149335+0.02, 0.0153627+0.015, (0.054064-0.02)};
    AnyFloat MultifidusLumborumtL2ICViaNode_pos = {-0.0174397+0.02, 0.0118849+0.01, (0.048182-0.02)};
    AnyFloat MultifidusLumborumtL1ICNode_pos = {-0.0149335, 0.0153627, 0.054064};
    AnyFloat MultifidusLumborumtL2ICNode_pos = {-0.0174397, 0.0118849, 0.048182};

    // Erector Spinae Nodes
    AnyVec3 IliocostalisLumborumL1Node_pos = {-0.000516508, 0.0354869, 0.0554782};
    AnyVec3 IliocostalisLumborumL2Node_pos = {-0.00572358 , 0.0317726, 0.0549007};
    AnyVec3 LongissimusThoracisL1ICNode_pos = {0.00696654, 0.0391073, 0.0604304};
    AnyVec3 LongissimusThoracisL2ICNode_pos = {0.00622304, 0.0395058, 0.0568333};
    AnyVec3 IliocostalisLumborumR6Node_pos = {-0.00317836, 0.0328506, 0.0532211};
    AnyVec3 IliocostalisLumborumR5Node_pos = {0.00208588, 0.0372169, 0.0562346};
    AnyVec3 IliocostalisLumborumR7Node_pos = {-0.00800184, 0.0184049, 0.0435864};
    AnyVec3 IliocostalisLumborumR8Node_pos = {-0.00526293, 0.0243863, 0.046309 };
    AnyVec3 IliocostalisLumborumR9Node_pos = {-0.00222712, 0.0301648, 0.0499919};
    AnyVec3 IliocostalisLumborumR10Node_pos = {0.000544396, 0.0349682, 0.0529106};
    AnyVec3 IliocostalisLumborumR11Node_pos = {0.00440885 , 0.0385561, 0.0568978};
    AnyVec3 IliocostalisLumborumR12Node_pos = {0.0103772  , 0.0412754, 0.0622313};
    AnyFloat IliocostalisLumborumL3Node_pos = {-0.00991402 , 0.0279672, 0.0529199};
    AnyFloat IliocostalisLumborumL4Node_pos = {-0.0125597  , 0.02113  , 0.0502513};
    AnyFloat LongissimusThoracisL3ICNode_pos    = {0.00643616, 0.0377332, 0.0536012};
    AnyFloat LongissimusThoracisL4ICNode_pos    = {0.00711773, 0.0334732, 0.0493415};


    // Psoas Major Nodes
    //These points are used as via points
    AnyVec3 IliopubicEminenceViaNode_pos = {0.086, -0.102, 0.078};
    AnyFloat IliopubicEminenceEndNode_pos = {0.089,-0.1101,0.0785};

    AnyFloat PsoasMajorT12Via5Node_pos = {0.069, -0.037, (..Thorax.Right.PsoasMajorT12Node_pos[2] - ..Thorax.PsoasMajorT12Z * (..Thorax.Right.PsoasMajorT12Node_pos[1] + 0.037))};
    AnyFloat PsoasMajorL1_1Via4Node_pos  = {0.067, -0.037, (..L1.Right.PsoasMajorL1_1Node_pos[2] - ..L3.PsoasMajorL1_1Z * (..L1.Right.PsoasMajorL1_1Node_pos[1] + 0.037))};
    AnyFloat PsoasMajorL2_1Via3Node_pos  = {0.065, -0.037, (..L2.Right.PsoasMajorL2_1Node_pos[2] - ..L3.PsoasMajorL2_1Z * (..L2.Right.PsoasMajorL2_1Node_pos[1] + 0.037))};
    AnyFloat PsoasMajorL3_1Via2Node_pos  = {0.063, -0.037, (..L3.Right.PsoasMajorL3_1Node_pos[2] - ..L3.PsoasMajorL3_1Z * (..L3.Right.PsoasMajorL3_1Node_pos[1] + 0.037))};
    AnyFloat PsoasMajorL4_1Via1Node_pos  = {0.061, -0.037, (..L4.Right.PsoasMajorL4_1Node_pos[2] - ..L3.PsoasMajorL4_1Z * (..L4.Right.PsoasMajorL4_1Node_pos[1] + 0.037))};
    AnyFloat PsoasMajorL5_1Via1Node_pos   = {0.059, -0.037, (..L5.Right.PsoasMajorL5_1Node_pos[2] - ..L3.PsoasMajorL5_1Z  * (..L5.Right.PsoasMajorL5_1Node_pos[1] + 0.037))};
    AnyFloat PsoasMajorL1_2Via5Node_pos  = {0.0585, -0.048, (..L1.Right.PsoasMajorL1_2Node_pos[2] - ..L2.PsoasMajorL1_2Z*(..L1.Right.PsoasMajorL1_2Node_pos[1] + 0.037))};
    AnyFloat PsoasMajorL2_2Via4Node_pos  = {0.0585, -0.048, (..L2.Right.PsoasMajorL2_2Node_pos[2] - ..L2.PsoasMajorL2_2Z*(..L2.Right.PsoasMajorL2_2Node_pos[1] + 0.037))};
    AnyFloat PsoasMajorL3_2Via3Node_pos  = {0.0585, -0.048, (..L3.Right.PsoasMajorL3_2Node_pos[2] - ..L2.PsoasMajorL3_2Z*(..L3.Right.PsoasMajorL3_2Node_pos[1] + 0.037))};
    AnyFloat PsoasMajorL4_2Via2Node_pos  = {0.0585, -0.048, (..L4.Right.PsoasMajorL4_2Node_pos[2] - ..L2.PsoasMajorL4_2Z*(..L4.Right.PsoasMajorL4_2Node_pos[1] + 0.037))};
    AnyFloat PsoasMajorL5_2Via1Node_pos  = {0.0585, -0.048, (..L5.Right.PsoasMajorL5_2Node_pos[2] - ..L2.PsoasMajorL5_2Z*(..L5.Right.PsoasMajorL5_2Node_pos[1] + 0.037))};


    // Quadratus Lumborum Nodes
    AnyFloat QuadratusLumborumLateralNode1_pos = {0.038000, 0.045500,  0.08300000};
    AnyFloat QuadratusLumborumLateralNode2_pos = {0.038000, 0.045500,  0.08300000}*0.8+{0.0173772  , 0.0442754, 0.067313}*0.2;
    AnyFloat QuadratusLumborumLateralNode3_pos = {0.038000, 0.045500,  0.08300000}*0.6+{0.0173772  , 0.0442754, 0.067313}*0.4;
    AnyFloat QuadratusLumborumLateralNode4_pos = {0.038000, 0.045500,  0.08300000}*0.4+{0.0173772  , 0.0442754, 0.067313}*0.6;
    AnyFloat QuadratusLumborumLateralNode5_pos = {0.038000, 0.045500,  0.08300000}*0.2+{0.0173772  , 0.0442754, 0.067313}*0.8;
    AnyFloat QuadratusLumborumInterMedianNode1_pos = {0.0173772  , 0.0442754, 0.067313};
    AnyFloat QuadratusLumborumInterMedianNode2_pos = {0.0173772  , 0.0442754, 0.067313}*0.8+{-0.00991402 , 0.0289672, 0.0529199}*0.2;
    AnyFloat QuadratusLumborumInterMedianNode3_pos = {0.0173772  , 0.0442754, 0.067313}*0.6+{-0.00991402 , 0.0289672, 0.0529199}*0.4;
    AnyFloat QuadratusLumborumInterMedianNode4_pos = {0.0173772  , 0.0442754, 0.067313}*0.4+{-0.00991402 , 0.0289672, 0.0529199}*0.6;
    AnyFloat QuadratusLumborumInterMedianNode5_pos = {0.0173772  , 0.0442754, 0.067313}*0.2+{-0.00991402 , 0.0289672, 0.0529199}*0.8;
    AnyFloat QuadratusLumborumMedianNode_pos = {-0.00991402 , 0.0289672, 0.0529199};

    AnyFloat RectusAbdominisNode1_pos = {0.115000, -0.1310000,   0.00000000};
    AnyFloat RectusAbdominisNode2_pos = {0.115000, -0.1310000,   0.02000000};
    AnyFloat RectusAbdominisNode1Via_pos =  {0.13536613, -0.0579459 ,  0.006};
    AnyFloat RectusAbdominisNode2Via_pos = {0.1326777 , -0.05716338,  0.02978744};
    AnyFloat ObliquusExternusR12Node_pos = {0.04977, 0.0435192, 0.09298};
    AnyFloat ObliquusExternusR11Node_pos = {0.096817106, -0.0012205498, 0.13769041};
    AnyFloat ObliquusExternusR10aNode_pos = {0.1088, -0.02659, 0.1473};
    AnyFloat ObliquusInternusR12Node_pos = {-0.00991402, 0.0279672, 0.0529199};
    AnyFloat ObliquusInternusR11Node_pos = {0.0075142789,0.04030681, 0.059687428};
    AnyFloat ObliquusInternusR10aNode_pos = {0.031630576,0.04502495, 0.075529367};
    AnyFloat ObliquusInternusR10Node_pos = {0.04977525,0.043519221, 0.092987895};
    AnyFloat ObliquusInternusR9Node_pos = {0.065335087,0.035016526, 0.1084922};

    AnyFloat ObliquusInternusR9_1Node_pos = {0.072,    0.025,       0.11};

    AnyFloat ObliquusInternusR8Node_pos = {0.080460943,0.016277507, 0.12737164};
    AnyFloat ObliquusInternusRS1Node_pos = {0.096817106,-0.0012205498, 0.13769041};
    AnyFloat ObliquusInternusRS2Node_pos = {0.10559666,-0.014595013, 0.14242136};
    AnyFloat ObliquusInternusRS3Node_pos = {0.112334,-0.0314788, 0.142239};
    AnyFloat ObliquusInternusRS4Node_pos = {0.114946,-0.037678201, 0.13897499};
    AnyFloat ObliquusInternusRS5Node_pos = {0.118205,-0.043456201, 0.137155};
    AnyFloat Seat_contact_pos = {0.005000, -0.1750000, 0.04000000};
    AnyFloat PosteriorContactNode_pos = {0.048000, 0.05000000, 0.1000000};
    AnyFloat Seat1ContactNode_pos = {0.090000, -0.1650000, 0.04000000};
    AnyFloat Seat2ContactNode_pos = {0.070000, -0.1700000, 0.04000000};
    AnyFloat Seat3ContactNode_pos = {0.030000, -0.1750000, 0.04000000};
    AnyFloat Seat4ContactNode_pos = {-0.010000, -0.1650000, 0.04000000};

    #if BM_TRUNK_CAVITY_MODEL == _CAVITY_MODEL_VOLUME_
      AnyFloat BuckleNode_pos ={0.115000, -0.06000000, 0.1300000}+{0.03,0.01,0.0}+{0,0.04,0};
    #else
      AnyFloat BuckleNode_pos = {0.115000, -0.06000000, 0.1300000};
    #endif

    #if BM_TRUNK_CAVITY_MODEL == _CAVITY_MODEL_VOLUME_
      AnyFloat InguinalLigament1_pos = {0.1172,-0.05086,0.1316};
      AnyFloat InguinalLigament2_pos = {0.1061,-0.14118,0.0216};
      AnyFloat Transversus6_1_pos ={0.0830,-0.0460,0.1079};
      AnyFloat Transversus6_2_pos ={0.0448,-0.01129,0.06680};
      AnyFloat Transversus7_1_pos ={0.0713,-0.0582,0.09177};
      AnyFloat Transversus7_2_pos ={0.0494,-0.03155,0.0614};
      AnyFloat Transversus8_1_pos ={0.07311,-0.0958,0.0633};
      AnyFloat Transversus8_2_pos ={0.0452,-0.0513,0.06163};
      AnyFloat Puborectalis_1_pos ={0.038996894,-0.17051911,0.010945595};
      AnyFloat Puborectalis_2_pos ={0.025902467,-0.1703189,0.015720557};
      AnyFloat Pubococcygeus_1_pos ={0.065261446,-0.16586813,0.0043942};
      AnyFloat Pubococcygeus_2_pos ={0.053172123,-0.16823313,0.00773671};
      AnyFloat Illiococcygeus1_pos ={0.01530074, -0.16555537,0.02385361};
      AnyFloat Illiococcygeus2_pos ={0.00698961, -0.15956853,0.03279636};
      AnyFloat Illiococcygeus3_pos ={0.00057361, -0.15074690,0.04164211};
      AnyFloat Illiococcygeus4_pos ={-0.0047009, -0.13982244,0.05028456};
      AnyFloat Illiococcygeus5_pos ={-0.0094440, -0.13198431,0.05182208};
      AnyFloat Illiococcygeus6_pos ={-0.0131347, -0.12643142,0.05415554};
      AnyFloat Illiococcygeus7_pos ={-0.0044460, -0.12213352,0.05326055};
      AnyFloat Illiococcygeus8_pos ={-0.0004558, -0.11571024,0.05070689};
      AnyFloat Illiococcygeus9_pos ={0.00154819, -0.10841258,0.04780113};
      AnyFloat Illiococcygeus10_pos ={0.00274206, -0.10056107,0.04535627};
      AnyFloat Illiococcygeus11_pos ={0.00277247, -0.09377613,0.04328365};
      AnyFloat Coccygeus1_pos ={0.000246484,-0.085211948,0.03897208};
      AnyFloat Coccygeus2_pos ={ 0.003709820,-0.083913051,0.04192553};
      AnyFloat Piriformis1_pos ={0.005627019,-0.079723492,0.04945343};
      AnyFloat Piriformis2_pos ={0.007823377,-0.075181171,0.05428711};
      AnyFloat Piriformis3_pos ={0.012098785,-0.070184201,0.05868164};
      AnyFloat Piriformis4_pos ={0.016546514,-0.063232295,0.06098184};
      AnyFloat Piriformis5_pos ={0.016946688,-0.055261776,0.05910724};
    #endif
    AnyFloat TrochanterBonyTip_pos = {0.03, -0.14, 0.157};
  };

  AnyFolder Left = {
    AnyFloat PsoasWrapSurf_points = .Right.PsoasWrapSurf_points * ..MirrorTransform;
    AnyVec3 ASIS = .Right.ASIS * ..MirrorTransform;
    AnyVec3 PSIS = .Right.PSIS * ..MirrorTransform;
    AnyVec3 PT = .Right.PT * ..MirrorTransform;

    // MultifidusLumborum nodes

    AnyFloat MultifidusLumborumtL1ICViaNode_pos = .Right.MultifidusLumborumtL1ICViaNode_pos * ..MirrorTransform;
    AnyFloat MultifidusLumborumtL2ICViaNode_pos = .Right.MultifidusLumborumtL2ICViaNode_pos * ..MirrorTransform;
    AnyFloat MultifidusLumborumtL1ICNode_pos = .Right.MultifidusLumborumtL1ICNode_pos * ..MirrorTransform;
    AnyFloat MultifidusLumborumtL2ICNode_pos = .Right.MultifidusLumborumtL2ICNode_pos * ..MirrorTransform;

    // Erector Spinae nodes
    AnyFloat IliocostalisLumborumL1Node_pos = .Right.IliocostalisLumborumL1Node_pos * ..MirrorTransform;
    AnyFloat IliocostalisLumborumL2Node_pos = .Right.IliocostalisLumborumL2Node_pos * ..MirrorTransform;
    AnyFloat LongissimusThoracisL1ICNode_pos = .Right.LongissimusThoracisL1ICNode_pos * ..MirrorTransform;
    AnyFloat LongissimusThoracisL2ICNode_pos = .Right.LongissimusThoracisL2ICNode_pos * ..MirrorTransform;
    AnyFloat IliocostalisLumborumR5Node_pos = .Right.IliocostalisLumborumR5Node_pos * ..MirrorTransform;
    AnyFloat IliocostalisLumborumR6Node_pos = .Right.IliocostalisLumborumR6Node_pos * ..MirrorTransform;
    AnyFloat IliocostalisLumborumR7Node_pos = .Right.IliocostalisLumborumR7Node_pos * ..MirrorTransform;
    AnyFloat IliocostalisLumborumR8Node_pos = .Right.IliocostalisLumborumR8Node_pos * ..MirrorTransform;
    AnyFloat IliocostalisLumborumR9Node_pos = .Right.IliocostalisLumborumR9Node_pos * ..MirrorTransform;
    AnyFloat IliocostalisLumborumR10Node_pos = .Right.IliocostalisLumborumR10Node_pos  * ..MirrorTransform;
    AnyFloat IliocostalisLumborumR11Node_pos = .Right.IliocostalisLumborumR11Node_pos  * ..MirrorTransform;
    AnyFloat IliocostalisLumborumR12Node_pos = .Right.IliocostalisLumborumR12Node_pos  * ..MirrorTransform;
    AnyFloat IliocostalisLumborumL3Node_pos = .Right.IliocostalisLumborumL3Node_pos * ..MirrorTransform;
    AnyFloat IliocostalisLumborumL4Node_pos = .Right.IliocostalisLumborumL4Node_pos * ..MirrorTransform;
    AnyFloat LongissimusThoracisL3ICNode_pos = .Right.LongissimusThoracisL3ICNode_pos * ..MirrorTransform;
    AnyFloat LongissimusThoracisL4ICNode_pos = .Right.LongissimusThoracisL4ICNode_pos * ..MirrorTransform;
    AnyFloat IliopubicEminenceViaNode_pos = .Right.IliopubicEminenceViaNode_pos* ..MirrorTransform;
    AnyFloat IliopubicEminenceEndNode_pos = .Right.IliopubicEminenceEndNode_pos * ..MirrorTransform;

    // Psoas Major nodes
    AnyFloat PsoasMajorT12Via5Node_pos = .Right.PsoasMajorT12Via5Node_pos * ..MirrorTransform;
    AnyFloat PsoasMajorL1_1Via4Node_pos = .Right.PsoasMajorL1_1Via4Node_pos * ..MirrorTransform;
    AnyFloat PsoasMajorL2_1Via3Node_pos = .Right.PsoasMajorL2_1Via3Node_pos * ..MirrorTransform;
    AnyFloat PsoasMajorL3_1Via2Node_pos = .Right.PsoasMajorL3_1Via2Node_pos * ..MirrorTransform;
    AnyFloat PsoasMajorL4_1Via1Node_pos = .Right.PsoasMajorL4_1Via1Node_pos * ..MirrorTransform;
    AnyFloat PsoasMajorL5_1Via1Node_pos = .Right.PsoasMajorL5_1Via1Node_pos * ..MirrorTransform;
    AnyFloat PsoasMajorL1_2Via5Node_pos = .Right.PsoasMajorL1_2Via5Node_pos * ..MirrorTransform;
    AnyFloat PsoasMajorL2_2Via4Node_pos = .Right.PsoasMajorL2_2Via4Node_pos * ..MirrorTransform;
    AnyFloat PsoasMajorL3_2Via3Node_pos = .Right.PsoasMajorL3_2Via3Node_pos * ..MirrorTransform;
    AnyFloat PsoasMajorL4_2Via2Node_pos = .Right.PsoasMajorL4_2Via2Node_pos * ..MirrorTransform;
    AnyFloat PsoasMajorL5_2Via1Node_pos = .Right.PsoasMajorL5_2Via1Node_pos * ..MirrorTransform;


    // Quadratus Lumborum Nodes
    AnyFloat QuadratusLumborumLateralNode1_pos = .Right.QuadratusLumborumLateralNode1_pos * ..MirrorTransform;
    AnyFloat QuadratusLumborumLateralNode2_pos = .Right.QuadratusLumborumLateralNode2_pos * ..MirrorTransform;
    AnyFloat QuadratusLumborumLateralNode3_pos = .Right.QuadratusLumborumLateralNode3_pos * ..MirrorTransform;
    AnyFloat QuadratusLumborumLateralNode4_pos = .Right.QuadratusLumborumLateralNode4_pos * ..MirrorTransform;
    AnyFloat QuadratusLumborumLateralNode5_pos = .Right.QuadratusLumborumLateralNode5_pos * ..MirrorTransform;
    AnyFloat QuadratusLumborumInterMedianNode1_pos = .Right.QuadratusLumborumInterMedianNode1_pos * ..MirrorTransform;
    AnyFloat QuadratusLumborumInterMedianNode2_pos = .Right.QuadratusLumborumInterMedianNode2_pos * ..MirrorTransform;
    AnyFloat QuadratusLumborumInterMedianNode3_pos = .Right.QuadratusLumborumInterMedianNode3_pos * ..MirrorTransform;
    AnyFloat QuadratusLumborumInterMedianNode4_pos = .Right.QuadratusLumborumInterMedianNode4_pos * ..MirrorTransform;
    AnyFloat QuadratusLumborumInterMedianNode5_pos = .Right.QuadratusLumborumInterMedianNode5_pos * ..MirrorTransform;
    AnyFloat QuadratusLumborumMedianNode_pos = .Right.QuadratusLumborumMedianNode_pos * ..MirrorTransform;

    // Rectus Abdominis Nodes
    AnyFloat RectusAbdominisNode1_pos = .Right.RectusAbdominisNode1_pos * ..MirrorTransform;
    AnyFloat RectusAbdominisNode2_pos = .Right.RectusAbdominisNode2_pos * ..MirrorTransform;
    AnyFloat RectusAbdominisNode1Via_pos = .Right.RectusAbdominisNode1Via_pos * ..MirrorTransform;
    AnyFloat RectusAbdominisNode2Via_pos = .Right.RectusAbdominisNode2Via_pos * ..MirrorTransform;

    // Obliquus Externus Nodes
    AnyFloat ObliquusExternusR12Node_pos = .Right.ObliquusExternusR12Node_pos * ..MirrorTransform;
    AnyFloat ObliquusExternusR11Node_pos = .Right.ObliquusExternusR11Node_pos * ..MirrorTransform;
    AnyFloat ObliquusExternusR10aNode_pos = .Right.ObliquusExternusR10aNode_pos * ..MirrorTransform;
    AnyFloat ObliquusInternusR12Node_pos = .Right.ObliquusInternusR12Node_pos * ..MirrorTransform;
    AnyFloat ObliquusInternusR11Node_pos = .Right.ObliquusInternusR11Node_pos * ..MirrorTransform;
    AnyFloat ObliquusInternusR10aNode_pos = .Right.ObliquusInternusR10aNode_pos * ..MirrorTransform;
    AnyFloat ObliquusInternusR10Node_pos = .Right.ObliquusInternusR10Node_pos * ..MirrorTransform;
    AnyFloat ObliquusInternusR9Node_pos = .Right.ObliquusInternusR9Node_pos * ..MirrorTransform;
    AnyFloat ObliquusInternusR9_1Node_pos = .Right.ObliquusInternusR9_1Node_pos * ..MirrorTransform;

    AnyFloat ObliquusInternusR8Node_pos = .Right.ObliquusInternusR8Node_pos * ..MirrorTransform;
    AnyFloat ObliquusInternusRS1Node_pos = .Right.ObliquusInternusRS1Node_pos * ..MirrorTransform;
    AnyFloat ObliquusInternusRS2Node_pos = .Right.ObliquusInternusRS2Node_pos * ..MirrorTransform;
    AnyFloat ObliquusInternusRS3Node_pos = .Right.ObliquusInternusRS3Node_pos * ..MirrorTransform;
    AnyFloat ObliquusInternusRS4Node_pos = .Right.ObliquusInternusRS4Node_pos * ..MirrorTransform;
    AnyFloat ObliquusInternusRS5Node_pos = .Right.ObliquusInternusRS5Node_pos * ..MirrorTransform;
    AnyFloat Seat_contact_pos = .Right.Seat_contact_pos * ..MirrorTransform;
    AnyFloat PosteriorContactNode_pos = .Right.PosteriorContactNode_pos * ..MirrorTransform;
    AnyFloat Seat1ContactNode_pos = .Right.Seat1ContactNode_pos * ..MirrorTransform;
    AnyFloat Seat2ContactNode_pos = .Right.Seat2ContactNode_pos * ..MirrorTransform;
    AnyFloat Seat3ContactNode_pos = .Right.Seat3ContactNode_pos * ..MirrorTransform;
    AnyFloat Seat4ContactNode_pos = .Right.Seat4ContactNode_pos * ..MirrorTransform;
    AnyFloat BuckleNode_pos = .Right.BuckleNode_pos * ..MirrorTransform;
    AnyFloat TrochanterBonyTip_pos = .Right.TrochanterBonyTip_pos * ..MirrorTransform;
    #if BM_TRUNK_CAVITY_MODEL == _CAVITY_MODEL_VOLUME_
      AnyFloat InguinalLigament1_pos = .Right.InguinalLigament1_pos* ..MirrorTransform ;
      AnyFloat InguinalLigament2_pos = .Right.InguinalLigament2_pos* ..MirrorTransform ;
      AnyFloat Transversus6_1_pos =.Right.Transversus6_1_pos* ..MirrorTransform ;
      AnyFloat Transversus6_2_pos =.Right.Transversus6_2_pos* ..MirrorTransform ;
      AnyFloat Transversus7_1_pos =.Right.Transversus7_1_pos* ..MirrorTransform ;
      AnyFloat Transversus7_2_pos =.Right.Transversus7_2_pos* ..MirrorTransform ;
      AnyFloat Transversus8_1_pos =.Right.Transversus8_1_pos* ..MirrorTransform ;
      AnyFloat Transversus8_2_pos =.Right.Transversus8_2_pos* ..MirrorTransform ;
      AnyFloat  Puborectalis_1_pos =.Right.Puborectalis_1_pos* ..MirrorTransform;
      AnyFloat  Puborectalis_2_pos =.Right.Puborectalis_2_pos* ..MirrorTransform;
      AnyFloat  Pubococcygeus_1_pos =.Right.Pubococcygeus_1_pos* ..MirrorTransform;
      AnyFloat  Pubococcygeus_2_pos =.Right.Pubococcygeus_2_pos* ..MirrorTransform;
      AnyFloat  Illiococcygeus1_pos =.Right.Illiococcygeus1_pos* ..MirrorTransform;
      AnyFloat  Illiococcygeus3_pos =.Right.Illiococcygeus3_pos* ..MirrorTransform;
      AnyFloat  Illiococcygeus4_pos =.Right.Illiococcygeus4_pos* ..MirrorTransform;
      AnyFloat  Illiococcygeus5_pos =.Right.Illiococcygeus5_pos* ..MirrorTransform;
      AnyFloat  Illiococcygeus6_pos =.Right.Illiococcygeus6_pos* ..MirrorTransform;
      AnyFloat  Illiococcygeus7_pos =.Right.Illiococcygeus7_pos* ..MirrorTransform;
      AnyFloat  Illiococcygeus8_pos =.Right.Illiococcygeus8_pos* ..MirrorTransform;
      AnyFloat  Illiococcygeus9_pos =.Right.Illiococcygeus9_pos* ..MirrorTransform;
      AnyFloat  Illiococcygeus10_pos =.Right.Illiococcygeus10_pos* ..MirrorTransform;
      AnyFloat  Illiococcygeus11_pos =.Right.Illiococcygeus11_pos* ..MirrorTransform;
      AnyFloat  Coccygeus1_pos = .Right.Coccygeus1_pos* ..MirrorTransform;
      AnyFloat  Coccygeus2_pos = .Right.Coccygeus2_pos* ..MirrorTransform;
      AnyFloat  Piriformis1_pos =.Right.Piriformis1_pos* ..MirrorTransform;
      AnyFloat  Piriformis2_pos =.Right.Piriformis2_pos* ..MirrorTransform;
      AnyFloat  Piriformis3_pos =.Right.Piriformis3_pos* ..MirrorTransform;
      AnyFloat  Piriformis4_pos =.Right.Piriformis4_pos* ..MirrorTransform;
      AnyFloat  Piriformis5_pos =.Right.Piriformis5_pos* ..MirrorTransform;
      AnyFloat  Illiococcygeus2_pos  = .Right.Illiococcygeus2_pos* ..MirrorTransform;
    #endif
  };
};

AnyFolder Sacrum = {
  AnyFloat ScalingNode_pos = {0.0000000, 0.0000000, 0.0000000};
  AnyFloat L5SacrumJntNode_pos = {0.04300000, -0.005000000, 0.0000000};
  AnyFloat SacrumL5JntNode_pos = {0.04300000, -0.005000000, 0.0000000};
  AnyFloat SacrumPelvisJntNode_pos = {0.02700000, -0.03000000, 0.0000000};
  AnyFloat SacrumContactNode_pos = {-0.006000000, -0.02500000, 0.0000000};
  AnyFloat SacrumRContactNode_pos = {-0.006000000, -0.02500000, 0.05000000};
  AnyFloat SacrumLContactNode_pos = {-0.006000000, -0.02500000, -0.05000000};
  AnyFloat SacrumBonyTip_pos = {-0.02, -0.03, 0.00};
  AnyFloat SacrumPosteriorSuperior_pos = {0.025, 0.004, 0.00};

  #if BM_TRUNK_CAVITY_MODEL == _CAVITY_MODEL_VOLUME_
    AnyFloat  Disc7Center_pos ={0.0,-0.03-0.05,0};
  #endif

  AnyFloat SuperiorEndplateAnteriorNode_pos = {0.053000, -0.014000, 0.000000};
  AnyFloat SuperiorEndplatePosteriorNode_pos = {0.032264, 0.004383, 0.000000};
  AnyFloat InferiorEndplateAnteriorNode_pos = {0.048894, -0.022049, 0.000000};
  AnyFloat InferiorEndplatePosteriorNode_pos = {0.023596, -0.019944, 0.000000};

  AnyFloat SacrumBaseAnteriorNode_pos = {0.053000, -0.014000, 0.000000};
  AnyFloat SacrumBasePosteriorNode_pos = {0.032264, 0.004383, 0.000000};

  AnyFolder Right = {
    AnyFloat SacrumContactNode_pos = {-0.006000000, -0.02500000, 0.05000000};
    #if BM_TRUNK_CAVITY_MODEL == _CAVITY_MODEL_VOLUME_
      AnyFloat Puborectalis_1_pos ={-0.032542277,-0.12732209,0.00097748067};
      AnyFloat Puborectalis_2_pos ={-0.037777826,-0.12007225,0.008633879};
      AnyFloat Pubococcygeus_1_pos ={-0.00051133032,-0.027415741,0.012528392};
      AnyFloat Pubococcygeus_2_pos ={0.016514685,-0.020097122,0.011810537};
    #endif


    AnyFloat MultifidusLumborumL4S1_1Node_pos = {0.0306566, 0.0142471 , 0.0333636};
    AnyFloat MultifidusLumborumL5S1_2Node_pos = {0.00205033, 0.012148, 0.0129715};
    AnyFloat MultifidusLumborumL4S1_2Node_pos = {-0.0213334, -0.01194, 0.0257652};
    AnyFloat MultifidusLumborumL5S1_1Node_pos = {0.00447431, 0.00935999, 0.0172032};
    AnyFloat MultifidusLumborumL5S3Node_pos = {-0.038453, -0.0540485, 0.0311674};
    AnyFloat MultifidusLumborumL3S1Node_pos = {0.0306566, 0.0142471 , 0.0333636};
    AnyFloat MultifidusLumborumL1S1Node_pos = {0.0306566, 0.0142471 , 0.0333636};
    AnyFloat MultifidusLumborumL2S1Node_pos = {0.0306566, 0.0142471 , 0.0333636};
    AnyFloat MultifidusLumborumL3S2NodeVia_pos = {-0.0180531-0.0075, -0.0141317-0.005, (0.0397136-0.005)};
    AnyFloat MultifidusLumborumL3S2Node_pos = {-0.0255907, -0.0356921, 0.038108 };
    AnyFloat MultifidusLumborumL4S2ViaNode_pos = {-0.017548 , -0.00147985-0.005, 0.0054480+0.005};
    AnyFloat MultifidusLumborumL5S3ViaNode_pos = {-0.0121086, 0.00488946 , 0.0119143}+{0,0,-0.008};
    AnyFloat MultifidusLumborumL4S2Node_pos = {-0.027368, -0.0316718, 0.0152958};
    AnyVec3 LongissimusThoracisT6S1Node_pos = {-0.0171665 - 0.005, 0.00751867-0.01, 0.00000000};
    AnyVec3 LongissimusThoracisT7S2Node_pos = {-0.0242993 - 0.005, -0.0226956, 0.00000000};
    AnyVec3 LongissimusThoracisT8S3Node_pos = {-0.0324856 - 0.005, -0.0401841, 0.00000000};
    AnyVec3 LongissimusThoracisT9S4Node_pos = {-0.0420005 - 0.005, -0.070595 , 0.00000000};
    AnyVec3 LongissimusThoracisT10S3Node_pos = {-0.0302671 - 0.005, -0.0382631, 0.01443650};
    AnyVec3 LongissimusThoracisT11S3Node_pos = {-0.0311736 - 0.005, -0.0385761, 0.02201010};
    AnyVec3 LongissimusThoracisT12S3Node_pos = {-0.0308891 - 0.005, -0.0388656, 0.03019510};
    AnyVec3 LongissimusThoracisT10S3ViaNode_pos = {-0.0302671+0.0, -0.0382631+0.03, 0.01443650+0.0025};
    AnyVec3 LongissimusThoracisT11S3ViaNode_pos = {-0.0311736+0.0, -0.0385761+0.03, 0.02201010+0.0025};
    AnyVec3 LongissimusThoracisT12S3ViaNode_pos = {-0.0308891+0.0, -0.0388656+0.03, 0.03019510+0.0025};
    AnyVec3 LongissimusThoracisR6S1Node_pos = {-0.0171665 - 0.005, 0.00751867-0.01, 0.00000000};
    AnyVec3 LongissimusThoracisR7S2Node_pos = {-0.0242993 - 0.005, -0.0226956, 0.00000000};
    AnyVec3 LongissimusThoracisR8S3Node_pos = {-0.0324856 - 0.005, -0.0401841, 0.00000000};
    AnyVec3 LongissimusThoracisR9S4Node_pos = {-0.0420005 - 0.005, -0.070595 , 0.00000000};
    AnyVec3 LongissimusThoracisR10S3Node_pos = {-0.0302671 - 0.005, -0.0382631, 0.01443650};
    AnyVec3 LongissimusThoracisR11S3Node_pos = {-0.0311736 - 0.005, -0.0385761, 0.02201010};
    AnyVec3 LongissimusThoracisR12S3Node_pos = {-0.0308891 - 0.005, -0.0388656, 0.03019510};
    AnyVec3 LongissimusThoracisR11S3ViaNode_pos = {-0.0311736+0.0, -0.0385761+0.03, 0.02201010+0.0025};
    AnyVec3 LongissimusThoracisR12S3ViaNode_pos = {-0.0308891+0.0, -0.0388656+0.03, 0.03019510+0.0025};
    AnyFloat LongissimusThoracisL5IliumNode_pos   = {0.006000, 0.01300000, 0.02100000}+{0,-0.005,0.015};
    AnyFloat SacrumBaseNode_pos = 0.5*(.SacrumBaseAnteriorNode_pos + .SacrumBasePosteriorNode_pos) + {0,0.002000,0.019800}; // Offset added manually to match the base surface
    AnyFloat SuperiorEndplateNode_pos  = 0.5*(.SacrumBaseAnteriorNode_pos + .SacrumBasePosteriorNode_pos) + {0,0.002000,0.019800}; // Offset added manually to match the base surface
    AnyFloat InferiorEndplateNode_pos = {0.034197, -0.018805, 0.020860};
  };

  AnyFolder Left = {
    AnyInt MirrorSign = -1;
    AnyFloat MirrorTransform = {{1,0,0},{0,1,0},{0,0, MirrorSign}};
    AnyFloat SacrumContactNode_pos = .Right.SacrumContactNode_pos* MirrorTransform;
    #if BM_TRUNK_CAVITY_MODEL == _CAVITY_MODEL_VOLUME_
      AnyFloat Puborectalis_1_pos =.Right.Puborectalis_1_pos* MirrorTransform;
      AnyFloat Puborectalis_2_pos =.Right.Puborectalis_2_pos* MirrorTransform;
      AnyFloat Pubococcygeus_1_pos =.Right.Pubococcygeus_1_pos* MirrorTransform;
      AnyFloat Pubococcygeus_2_pos =.Right.Pubococcygeus_2_pos* MirrorTransform;
    #endif
    AnyFloat MultifidusLumborumL4S1_1Node_pos = .Right.MultifidusLumborumL4S1_1Node_pos * ..MirrorTransform;
    AnyFloat MultifidusLumborumL5S1_2Node_pos = .Right.MultifidusLumborumL5S1_2Node_pos * ..MirrorTransform;
    AnyFloat MultifidusLumborumL4S1_2Node_pos = .Right.MultifidusLumborumL4S1_2Node_pos * ..MirrorTransform;
    AnyFloat MultifidusLumborumL5S1_1Node_pos = .Right.MultifidusLumborumL5S1_1Node_pos * ..MirrorTransform;
    AnyFloat MultifidusLumborumL3S1Node_pos = .Right.MultifidusLumborumL3S1Node_pos * ..MirrorTransform;
    AnyFloat MultifidusLumborumL1S1Node_pos = .Right.MultifidusLumborumL1S1Node_pos * ..MirrorTransform;
    AnyFloat MultifidusLumborumL2S1Node_pos = .Right.MultifidusLumborumL2S1Node_pos * ..MirrorTransform;
    AnyFloat MultifidusLumborumL3S2NodeVia_pos = .Right.MultifidusLumborumL3S2NodeVia_pos * ..MirrorTransform;
    AnyFloat MultifidusLumborumL3S2Node_pos = .Right.MultifidusLumborumL3S2Node_pos * ..MirrorTransform;
    AnyFloat MultifidusLumborumL4S2ViaNode_pos = .Right.MultifidusLumborumL4S2ViaNode_pos * ..MirrorTransform;
    AnyFloat MultifidusLumborumL5S3ViaNode_pos = .Right.MultifidusLumborumL5S3ViaNode_pos * ..MirrorTransform;
    AnyFloat MultifidusLumborumL4S2Node_pos = .Right.MultifidusLumborumL4S2Node_pos * ..MirrorTransform;
    AnyFloat MultifidusLumborumL5S3Node_pos = .Right.MultifidusLumborumL5S3Node_pos * ..MirrorTransform;
    AnyFloat LongissimusThoracisT6S1Node_pos = .Right.LongissimusThoracisT6S1Node_pos * ..MirrorTransform;
    AnyFloat LongissimusThoracisT7S2Node_pos = .Right.LongissimusThoracisT7S2Node_pos * ..MirrorTransform;
    AnyFloat LongissimusThoracisT8S3Node_pos = .Right.LongissimusThoracisT8S3Node_pos * ..MirrorTransform;
    AnyFloat LongissimusThoracisT9S4Node_pos = .Right.LongissimusThoracisT9S4Node_pos * ..MirrorTransform;
//    AnyFloat LTptT10SacLumNode_pos = .Right.LongissimusThoracisT10S3Node_pos * ..MirrorTransform;
//    AnyFloat LTptT11SacLumNode_pos = .Right.LongissimusThoracisT11S3Node_pos * ..MirrorTransform;
//    AnyFloat LTptT12SacLumNode_pos = .Right.LongissimusThoracisT12S3Node_pos * ..MirrorTransform;
    AnyFloat LongissimusThoracisT10S3ViaNode_pos = .Right.LongissimusThoracisT10S3ViaNode_pos * ..MirrorTransform;
    AnyFloat LongissimusThoracisT11S3ViaNode_pos = .Right.LongissimusThoracisT11S3ViaNode_pos * ..MirrorTransform;
    AnyFloat LongissimusThoracisT12S3ViaNode_pos = .Right.LongissimusThoracisT12S3ViaNode_pos * ..MirrorTransform;
    AnyFloat LongissimusThoracisT10S3Node_pos = .Right.LongissimusThoracisT10S3Node_pos* ..MirrorTransform;
    AnyFloat LongissimusThoracisT11S3Node_pos = .Right.LongissimusThoracisT11S3Node_pos* ..MirrorTransform;
    AnyFloat LongissimusThoracisT12S3Node_pos = .Right.LongissimusThoracisT12S3Node_pos* ..MirrorTransform;
    AnyFloat LongissimusThoracisR6S1Node_pos = .Right.LongissimusThoracisR6S1Node_pos * ..MirrorTransform;
    AnyFloat LongissimusThoracisR7S2Node_pos = .Right.LongissimusThoracisR7S2Node_pos * ..MirrorTransform;
    AnyFloat LongissimusThoracisR8S3Node_pos = .Right.LongissimusThoracisR8S3Node_pos * ..MirrorTransform;
    AnyFloat LongissimusThoracisR9S4Node_pos = .Right.LongissimusThoracisR9S4Node_pos * ..MirrorTransform;
    AnyFloat LongissimusThoracisR10S3Node_pos = .Right.LongissimusThoracisR10S3Node_pos* ..MirrorTransform;
    AnyFloat LongissimusThoracisR11S3Node_pos = .Right.LongissimusThoracisR11S3Node_pos* ..MirrorTransform;
    AnyFloat LongissimusThoracisR12S3Node_pos = .Right.LongissimusThoracisR12S3Node_pos* ..MirrorTransform;
    AnyFloat LongissimusThoracisR11S3ViaNode_pos = .Right.LongissimusThoracisR11S3ViaNode_pos* ..MirrorTransform;
    AnyFloat LongissimusThoracisR12S3ViaNode_pos = .Right.LongissimusThoracisR12S3ViaNode_pos* ..MirrorTransform;
    AnyFloat LongissimusThoracisL5IliumNode_pos = .Right.LongissimusThoracisL5IliumNode_pos * ..MirrorTransform;
    AnyFloat SacrumBaseNode_pos = .Right.SacrumBaseNode_pos * MirrorTransform;
    AnyFloat SuperiorEndplateNode_pos  = .Right.SuperiorEndplateNode_pos * MirrorTransform;
    AnyFloat InferiorEndplateNode_pos = .Right.InferiorEndplateNode_pos * MirrorTransform;
  };
};

AnyFolder L5 = {
  AnyFloat sCoM_pos={0.051, 0.009, 0.000000};
  AnyFloat ScalingNode_pos = {0.0000000, 0.0000000, 0.0000000};
  AnyFloat L5SacrumJntNode_pos = {0.04300000, -0.005000000, 0.0000000};
  AnyFloat L4L5JntNode_pos = {0.05000000, 0.02700000, 0.0000000};
  AnyFloat LINodeSuperior_pos = {0.01900000, 0.02300000, 0.0000000};
  AnyFloat BuckleContactNode_pos = {0.1190000, 0.006000000, 0.0000000};
  AnyFloat SuperiorEndplateAnteriorNode_pos = {0.068000, 0.020200, 0.000000};
  AnyFloat SuperiorEndplatePosteriorNode_pos = {0.044000, 0.025700, 0.000000};
  AnyFloat InferiorEndplateAnteriorNode_pos = {0.062102, -0.008197, 0.000000};
  AnyFloat InferiorEndplatePosteriorNode_pos = {0.036041, 0.002016, 0.000000};

  AnyFolder Right = {
    // Erector Spinae Nodes
    AnyVec3 LongissimusThoracisT5L5Node_pos = {0.001,0.016,0.0};
    AnyVec3 LongissimusThoracisR5L5Node_pos = {0.001,0.016,0.0};
    AnyFloat LongissimusThoracisL5IliumNode_pos       = {0.028,0.022,0.028};
    AnyFloat LongissimusThoracisT6S1Via11Node_pos     = {-0.001-0.015,0.011,(..Thorax.Right.LongissimusThoracisT6S1Node_pos[2]      - ..Thorax.LongissimusThoracisT6S1Z     *(..Thorax.Right.LongissimusThoracisT6S1Node_pos[1]      - 0.011))};
    AnyFloat LongissimusThoracisT7S2Via10Node_pos     = {-0.001-0.015,0.011,(..Thorax.Right.LongissimusThoracisT7S2Node_pos[2]      - ..Thorax.LongissimusThoracisT7S2Z     *(..Thorax.Right.LongissimusThoracisT7S2Node_pos[1]      - 0.011))};
    AnyFloat LongissimusThoracisT8S3Via9Node_pos      = {-0.001-0.015,0.011,(..Thorax.Right.LongissimusThoracisT8S3Node_pos[2]      - ..Thorax.LongissimusThoracisT8S3Z     *(..Thorax.Right.LongissimusThoracisT8S3Node_pos[1]      - 0.011))};
    AnyFloat LongissimusThoracisT9S4Via8Node_pos      = {-0.001-0.015,0.011,(..Thorax.Right.LongissimusThoracisT9S4Node_pos[2]      - ..Thorax.LongissimusThoracisT9S4Z     *(..Thorax.Right.LongissimusThoracisT9S4Node_pos[1]      - 0.011))};
    AnyFloat LongissimusThoracisT10S3Via7Node_pos = {-0.001-0.015,0.011,(..Thorax.Right.LongissimusThoracisT10S3Node_pos[2] - ..Thorax.LongissimusThoracisT10S3Z*(..Thorax.Right.LongissimusThoracisT10S3Node_pos[1] - 0.011))};
    AnyFloat LongissimusThoracisT11S3Via6Node_pos = {-0.001-0.015,0.011,(..Thorax.Right.LongissimusThoracisT11S3Node_pos[2] - ..Thorax.LongissimusThoracisT11S3Z*(..Thorax.Right.LongissimusThoracisT11S3Node_pos[1] - 0.011))};
    AnyFloat LongissimusThoracisT12S3Via5Node_pos = {-0.001-0.015,0.011,(..Thorax.Right.LongissimusThoracisT12S3Node_pos[2] - ..Thorax.LongissimusThoracisT12S3Z*(..Thorax.Right.LongissimusThoracisT12S3Node_pos[1] - 0.011))};
    AnyFloat LongissimusThoracisR6S1Via11Node_pos     = {-0.001-0.015,0.011,(..Thorax.Right.LongissimusThoracisR6S1Node_pos[2]      - ..Thorax.LongissimusThoracisR6S1Z     *(..Thorax.Right.LongissimusThoracisR6S1Node_pos[1]      - 0.011))};
    AnyFloat LongissimusThoracisR7S2Via10Node_pos     = {-0.001-0.015,0.011,(..Thorax.Right.LongissimusThoracisR7S2Node_pos[2]      - ..Thorax.LongissimusThoracisR7S2Z     *(..Thorax.Right.LongissimusThoracisR7S2Node_pos[1]      - 0.011))};
    AnyFloat LongissimusThoracisR8S3Via9Node_pos      = {-0.001-0.015,0.011,(..Thorax.Right.LongissimusThoracisR8S3Node_pos[2]      - ..Thorax.LongissimusThoracisR8S3Z     *(..Thorax.Right.LongissimusThoracisR8S3Node_pos[1]      - 0.011))};
    AnyFloat LongissimusThoracisR9S4Via8Node_pos      = {-0.001-0.015,0.011,(..Thorax.Right.LongissimusThoracisR9S4Node_pos[2]      - ..Thorax.LongissimusThoracisR9S4Z     *(..Thorax.Right.LongissimusThoracisR9S4Node_pos[1]      - 0.011))};
    AnyFloat LongissimusThoracisR10S3Via7Node_pos = {-0.001-0.015,0.011,(..Thorax.Right.LongissimusThoracisR10S3Node_pos[2] - ..Thorax.LongissimusThoracisR10S3Z*(..Thorax.Right.LongissimusThoracisR10S3Node_pos[1] - 0.011))};
    AnyFloat LongissimusThoracisR11S3Via6Node_pos = {-0.001-0.015,0.011,(..Thorax.Right.LongissimusThoracisR11S3Node_pos[2] - ..Thorax.LongissimusThoracisR11S3Z*(..Thorax.Right.LongissimusThoracisR11S3Node_pos[1] - 0.011))};
    AnyFloat LongissimusThoracisR12S3Via5Node_pos = {-0.001-0.015,0.011,(..R12.Right.LongissimusThoracisR12S3Node_pos[2] - ..R12.LongissimusThoracisR12S3Z*(..R12.Right.LongissimusThoracisR12S3Node_pos[1] - 0.011))};


    AnyFloat MultifidusLumborumL3L5Node_pos = {0.02700000, 0.02500000, 0.02200000};
    AnyFloat MultifidusLumborumL5S1_1Node_pos = {0.008000000, 0.009000000, 0.005000000};
    AnyFloat MultifidusLumborumL2L5_1Node_pos = {0.02700000, 0.02500000, 0.02200000};
    AnyFloat MultifidusLumborumL5S1_2Node_pos = {0.004000000, 0.01000000, 0.005000000};
    AnyFloat MultifidusLumborumL1L5Node_pos = {0.02700000, 0.02500000, 0.02200000};
    AnyFloat MultifidusLumborumL2L5_2Node_pos = {0.02700000, 0.02500000, 0.02200000};
    AnyFloat MultifidusLumborumL5S3Node_pos = {0.001000000, 0.007000000, 0.0000000}+{-0.006,0.005,0};
    AnyFloat ObliquusExternusR10Node_pos = {0.1580000, 0.008000000, 0.01500000};
    AnyFloat MultifidusThoracisL5T12Node_pos = {0.02500000, 0.02200000, 0.02400000};
    AnyFloat ContactNode_pos = {-0.01000000, 0.008000000, 0.05000000};

    #if BM_TRUNK_CAVITY_MODEL == _CAVITY_MODEL_VOLUME_
      AnyFloat Transversus_Ins_pos= {0.03100000, 0.02000000, 0.03300000};
    #endif

    AnyVec3 PsoasMajorL5_1Node_pos = { 0.066, 0.011, 0.021};
    AnyVec3 PsoasMajorL5_2Node_pos = {0.034,0.020,0.028};
    AnyFloat PsoasMajorT12Via4Node_pos = {0.067                         ,0.008,(..Thorax.Right.PsoasMajorT12Node_pos[2] - ..Thorax.PsoasMajorT12Z*(..Thorax.Right.PsoasMajorT12Node_pos[1] - 0.008))};
    AnyFloat PsoasMajorL1_1Via3Node_pos  = {0.067                         ,0.008,(..L1.Right.PsoasMajorL1_1Node_pos[2]      - ..L3.PsoasMajorL1_1Z*(..L1.Right.PsoasMajorL1_1Node_pos[1]           - 0.008))};
    AnyFloat PsoasMajorL2_1Via2Node_pos  = {0.067                         ,0.008,(..L2.Right.PsoasMajorL2_1Node_pos[2]      - ..L3.PsoasMajorL2_1Z*(..L2.Right.PsoasMajorL2_1Node_pos[1]           - 0.008))};
    AnyFloat PsoasMajorL3_1Via1Node_pos  = {0.067                         ,0.008,(..L3.Right.PsoasMajorL3_1Node_pos[2]      - ..L3.PsoasMajorL3_1Z*(..L3.Right.PsoasMajorL3_1Node_pos[1]           - 0.008))};
    AnyFloat PsoasMajorL1_2Via4Node_pos  = {0.041                         ,-0.005,(..L1.Right.PsoasMajorL1_2Node_pos[2]      - ..L2.PsoasMajorL1_2Z*(..L1.Right.PsoasMajorL1_2Node_pos[1]           - 0.008))};
    AnyFloat PsoasMajorL2_2Via3Node_pos  = {0.041                         ,-0.005,(..L2.Right.PsoasMajorL2_2Node_pos[2]      - ..L2.PsoasMajorL2_2Z*(..L2.Right.PsoasMajorL2_2Node_pos[1]           - 0.008))};
    AnyFloat PsoasMajorL3_2Via2Node_pos  = {0.041                         ,-0.005,(..L3.Right.PsoasMajorL3_2Node_pos[2]      - ..L2.PsoasMajorL3_2Z*(..L3.Right.PsoasMajorL3_2Node_pos[1]           - 0.008))};
    AnyFloat PsoasMajorL4_2Via1Node_pos  = {0.041                         ,-0.005,(..L4.Right.PsoasMajorL4_2Node_pos[2]      - ..L2.PsoasMajorL4_2Z*(..L4.Right.PsoasMajorL4_2Node_pos[1]           - 0.008))};
    AnyFloat SuperiorEndplateNode_pos = 0.5*(.SuperiorEndplateAnteriorNode_pos + .SuperiorEndplatePosteriorNode_pos) + {0,-0.000900,0.019800}; // Offset added manually to match the vertebra surface
    AnyFloat InferiorEndplateNode_pos = {0.049903, -0.001576, 0.022571};
  };

  AnyFolder Left = {
    // Erector Spinae Nodes
    AnyFloat LongissimusThoracisL5IliumNode_pos       = .Right.LongissimusThoracisL5IliumNode_pos       * ..MirrorTransform;
    AnyFloat LongissimusThoracisT5L5Node_pos          = .Right.LongissimusThoracisT5L5Node_pos          * ..MirrorTransform;
    AnyFloat LongissimusThoracisR5L5Node_pos          = .Right.LongissimusThoracisR5L5Node_pos          * ..MirrorTransform;
    AnyFloat LongissimusThoracisT6S1Via11Node_pos     = .Right.LongissimusThoracisT6S1Via11Node_pos     * ..MirrorTransform;
    AnyFloat LongissimusThoracisT7S2Via10Node_pos     = .Right.LongissimusThoracisT7S2Via10Node_pos     * ..MirrorTransform;
    AnyFloat LongissimusThoracisT8S3Via9Node_pos      = .Right.LongissimusThoracisT8S3Via9Node_pos      * ..MirrorTransform;
    AnyFloat LongissimusThoracisT9S4Via8Node_pos      = .Right.LongissimusThoracisT9S4Via8Node_pos      * ..MirrorTransform;
    AnyFloat LongissimusThoracisT10S3Via7Node_pos = .Right.LongissimusThoracisT10S3Via7Node_pos * ..MirrorTransform;
    AnyFloat LongissimusThoracisT11S3Via6Node_pos = .Right.LongissimusThoracisT11S3Via6Node_pos * ..MirrorTransform;
    AnyFloat LongissimusThoracisT12S3Via5Node_pos = .Right.LongissimusThoracisT12S3Via5Node_pos * ..MirrorTransform;
    AnyFloat LongissimusThoracisR6S1Via11Node_pos     = .Right.LongissimusThoracisR6S1Via11Node_pos     * ..MirrorTransform;
    AnyFloat LongissimusThoracisR7S2Via10Node_pos     = .Right.LongissimusThoracisR7S2Via10Node_pos     * ..MirrorTransform;
    AnyFloat LongissimusThoracisR8S3Via9Node_pos      = .Right.LongissimusThoracisR8S3Via9Node_pos      * ..MirrorTransform;
    AnyFloat LongissimusThoracisR9S4Via8Node_pos      = .Right.LongissimusThoracisR9S4Via8Node_pos      * ..MirrorTransform;
    AnyFloat LongissimusThoracisR10S3Via7Node_pos = .Right.LongissimusThoracisR10S3Via7Node_pos * ..MirrorTransform;
    AnyFloat LongissimusThoracisR11S3Via6Node_pos = .Right.LongissimusThoracisR11S3Via6Node_pos * ..MirrorTransform;
    AnyFloat LongissimusThoracisR12S3Via5Node_pos = .Right.LongissimusThoracisR12S3Via5Node_pos * ..MirrorTransform;

    // Psoas Major Nodes
    AnyFloat PsoasMajorL5_1Node_pos       = .Right.PsoasMajorL5_1Node_pos       * ..MirrorTransform;
    AnyFloat PsoasMajorL5_2Node_pos      = .Right.PsoasMajorL5_2Node_pos      * ..MirrorTransform;
    AnyFloat PsoasMajorT12Via4Node_pos = .Right.PsoasMajorT12Via4Node_pos * ..MirrorTransform;
    AnyFloat PsoasMajorL1_1Via3Node_pos  = .Right.PsoasMajorL1_1Via3Node_pos  * ..MirrorTransform;
    AnyFloat PsoasMajorL2_1Via2Node_pos  = .Right.PsoasMajorL2_1Via2Node_pos  * ..MirrorTransform;
    AnyFloat PsoasMajorL3_1Via1Node_pos  = .Right.PsoasMajorL3_1Via1Node_pos  * ..MirrorTransform;
    AnyFloat PsoasMajorL1_2Via4Node_pos  = .Right.PsoasMajorL1_2Via4Node_pos  * ..MirrorTransform;
    AnyFloat PsoasMajorL2_2Via3Node_pos  = .Right.PsoasMajorL2_2Via3Node_pos  * ..MirrorTransform;
    AnyFloat PsoasMajorL3_2Via2Node_pos  = .Right.PsoasMajorL3_2Via2Node_pos  * ..MirrorTransform;
    AnyFloat PsoasMajorL4_2Via1Node_pos  = .Right.PsoasMajorL4_2Via1Node_pos  * ..MirrorTransform;

    AnyFloat MultifidusLumborumL3L5Node_pos = .Right.MultifidusLumborumL3L5Node_pos * ..MirrorTransform;
    AnyFloat MultifidusLumborumL5S1_1Node_pos = .Right.MultifidusLumborumL5S1_1Node_pos * ..MirrorTransform;
    AnyFloat MultifidusLumborumL2L5_1Node_pos = .Right.MultifidusLumborumL2L5_1Node_pos * ..MirrorTransform;
    AnyFloat MultifidusLumborumL5S1_2Node_pos = .Right.MultifidusLumborumL5S1_2Node_pos * ..MirrorTransform;
    AnyFloat MultifidusLumborumL1L5Node_pos = .Right.MultifidusLumborumL1L5Node_pos * ..MirrorTransform;
    AnyFloat MultifidusLumborumL2L5_2Node_pos = .Right.MultifidusLumborumL2L5_2Node_pos * ..MirrorTransform;
    AnyFloat ObliquusExternusR10Node_pos = .Right.ObliquusExternusR10Node_pos * ..MirrorTransform;
    AnyFloat ContactNode_pos = .Right.ContactNode_pos * ..MirrorTransform;
    AnyFloat MultifidusThoracisL5T12Node_pos = .Right.MultifidusThoracisL5T12Node_pos * ..MirrorTransform;
    AnyFloat MultifidusLumborumL5S3Node_pos = .Right.MultifidusLumborumL5S3Node_pos * ..MirrorTransform;
    AnyFloat SuperiorEndplateNode_pos = .Right.SuperiorEndplateNode_pos * ..MirrorTransform;
    AnyFloat InferiorEndplateNode_pos = .Right.InferiorEndplateNode_pos * ..MirrorTransform;

    #if BM_TRUNK_CAVITY_MODEL == _CAVITY_MODEL_VOLUME_
      AnyFloat Transversus_Ins_pos = .Right.Transversus_Ins_pos * ..MirrorTransform;
    #endif
  };
};

AnyFolder L4 = {
  AnyFloat sCoM_pos = {0.056, 0.044, 0.000000};
  AnyFloat ScalingNode_pos = {0.0000000, 0.0000000, 0.0000000};
  AnyFloat L4L5JntNode_pos = {0.05000000, 0.02700000, 0.0000000};
  AnyFloat L3L4JntNode_pos = {0.05000000, 0.06100000, 0.0000000};
  AnyFloat LINodeInferior_pos = {0.005000000, 0.02000000, 0.0000000};
  AnyFloat LINodeSuperior_pos = {0.01900000, 0.04900000, 0.0000000};
  AnyVec3 LSNode_pos = {-0.003,0.029,0};
  AnyVar IliocostalisLumborumL1Z = (.L1.Right.IliocostalisLumborumL1Node_pos[2] - .Pelvis.Right.IliocostalisLumborumL1Node_pos[2]) / (.L1.Right.IliocostalisLumborumL1Node_pos[1] - .Pelvis.Right.IliocostalisLumborumL1Node_pos[1]);
  AnyVar IliocostalisLumborumL2Z = (.L2.Right.IliocostalisLumborumL2Node_pos[2] - .Pelvis.Right.IliocostalisLumborumL2Node_pos[2]) / (.L2.Right.IliocostalisLumborumL2Node_pos[1] - .Pelvis.Right.IliocostalisLumborumL2Node_pos[1]);
  AnyFloat MidPoint_pos = {0.05000000, 0.04400000, 0.0000000};
  AnyFloat SupportNode_pos = {-0.005000000, 0.02900000, 0.0000000};
  AnyFloat BuckleContactNode_pos = {0.07400000, 0.04400000, 0.0000000};
  AnyFloat SuperiorEndplateAnteriorNode_pos = {0.068000, 0.058500, 0.000000};
  AnyFloat SuperiorEndplatePosteriorNode_pos = {0.044000, 0.058600, 0.000000};
  AnyFloat InferiorEndplateAnteriorNode_pos = {0.070368, 0.028049, 0.000000};
  AnyFloat InferiorEndplatePosteriorNode_pos = {0.039516, 0.032388, 0.000000};


  AnyFolder Right = {
    AnyFloat MultifidusLumborumL2L4Node_pos = {0.02600000, 0.05500000, 0.02200000};
    AnyFloat MultifidusLumborumL4S1_1Node_pos = {0.01400000, 0.02800000, 0.005000000};
    AnyFloat MultifidusLumborumL1L4Node_pos = {0.02600000, 0.05500000, 0.02200000};
    AnyFloat MultifidusLumborumL4S1_2Node_pos = {0.009000000, 0.02500000, 0.005000000};
    AnyFloat MultifidusLumborumL4S2Node_pos = {0.003000000, 0.02100000, 0.0000000};

    AnyFloat IliocostalisLumborumL1ViaNode_pos       = {.LSNode_pos[0]-0.005,.LSNode_pos[1],(..L1.Right.IliocostalisLumborumL1Node_pos[2]          - .IliocostalisLumborumL1Z*(..L1.Right.IliocostalisLumborumL1Node_pos[1] - .LSNode_pos[1]))};
    AnyFloat IliocostalisLumborumL2ViaNode_pos       = {.LSNode_pos[0]-0.005,.LSNode_pos[1],(..L2.Right.IliocostalisLumborumL2Node_pos[2]          - .IliocostalisLumborumL2Z*(..L2.Right.IliocostalisLumborumL2Node_pos[1] - .LSNode_pos[1]))};
    AnyFloat LongissimusThoracisT5L5Via11Node_pos     = {.LSNode_pos[0]+0.004,.LSNode_pos[1],(..Thorax.Right.LongissimusThoracisT5L5Node_pos[2]      - ..Thorax.LongissimusThoracisT5L5Z     *(..Thorax.Right.LongissimusThoracisT5L5Node_pos[1]      - .LSNode_pos[1]))};
    AnyFloat LongissimusThoracisT6S1Via10Node_pos     = {.LSNode_pos[0]+0.004-0.005,.LSNode_pos[1],(..Thorax.Right.LongissimusThoracisT6S1Node_pos[2]      - ..Thorax.LongissimusThoracisT6S1Z     *(..Thorax.Right.LongissimusThoracisT6S1Node_pos[1]      - .LSNode_pos[1]))};
    AnyFloat LongissimusThoracisT7S2Via9Node_pos      = {.LSNode_pos[0]+0.002-0.005,.LSNode_pos[1],(..Thorax.Right.LongissimusThoracisT7S2Node_pos[2]      - ..Thorax.LongissimusThoracisT7S2Z     *(..Thorax.Right.LongissimusThoracisT7S2Node_pos[1]      - .LSNode_pos[1]))};
    AnyFloat LongissimusThoracisT8S3Via8Node_pos      = {.LSNode_pos[0]      -0.005,.LSNode_pos[1],(..Thorax.Right.LongissimusThoracisT8S3Node_pos[2]      - ..Thorax.LongissimusThoracisT8S3Z     *(..Thorax.Right.LongissimusThoracisT8S3Node_pos[1]      - .LSNode_pos[1]))};
    AnyFloat LongissimusThoracisT9S4Via7Node_pos      = {.LSNode_pos[0]      -0.005,.LSNode_pos[1],(..Thorax.Right.LongissimusThoracisT9S4Node_pos[2]      - ..Thorax.LongissimusThoracisT9S4Z     *(..Thorax.Right.LongissimusThoracisT9S4Node_pos[1]      - .LSNode_pos[1]))};
    AnyFloat LongissimusThoracisT10S3Via6Node_pos = {.LSNode_pos[0]      -0.005,.LSNode_pos[1],(..Thorax.Right.LongissimusThoracisT10S3Node_pos[2] - ..Thorax.LongissimusThoracisT10S3Z*(..Thorax.Right.LongissimusThoracisT10S3Node_pos[1] - .LSNode_pos[1]))};
    AnyFloat LongissimusThoracisT11S3Via5Node_pos = {.LSNode_pos[0]      -0.005,.LSNode_pos[1],(..Thorax.Right.LongissimusThoracisT11S3Node_pos[2] - ..Thorax.LongissimusThoracisT11S3Z*(..Thorax.Right.LongissimusThoracisT11S3Node_pos[1] - .LSNode_pos[1]))};
    AnyFloat LongissimusThoracisT12S3Via4Node_pos = {.LSNode_pos[0]      -0.005,.LSNode_pos[1],(..Thorax.Right.LongissimusThoracisT12S3Node_pos[2] - ..Thorax.LongissimusThoracisT12S3Z*(..Thorax.Right.LongissimusThoracisT12S3Node_pos[1] - .LSNode_pos[1]))};
    AnyFloat LongissimusThoracisR5L5Via11Node_pos     = {.LSNode_pos[0]+0.004,.LSNode_pos[1],(..Thorax.Right.LongissimusThoracisR5L5Node_pos[2]      - ..Thorax.LongissimusThoracisR5L5Z     *(..Thorax.Right.LongissimusThoracisR5L5Node_pos[1]      - .LSNode_pos[1]))};
    AnyFloat LongissimusThoracisR6S1Via10Node_pos     = {.LSNode_pos[0]+0.004-0.005,.LSNode_pos[1],(..Thorax.Right.LongissimusThoracisR6S1Node_pos[2]      - ..Thorax.LongissimusThoracisR6S1Z     *(..Thorax.Right.LongissimusThoracisR6S1Node_pos[1]      - .LSNode_pos[1]))};
    AnyFloat LongissimusThoracisR7S2Via9Node_pos      = {.LSNode_pos[0]+0.002-0.005,.LSNode_pos[1],(..Thorax.Right.LongissimusThoracisR7S2Node_pos[2]      - ..Thorax.LongissimusThoracisR7S2Z     *(..Thorax.Right.LongissimusThoracisR7S2Node_pos[1]      - .LSNode_pos[1]))};
    AnyFloat LongissimusThoracisR8S3Via8Node_pos      = {.LSNode_pos[0]      -0.005,.LSNode_pos[1],(..Thorax.Right.LongissimusThoracisR8S3Node_pos[2]      - ..Thorax.LongissimusThoracisR8S3Z     *(..Thorax.Right.LongissimusThoracisR8S3Node_pos[1]      - .LSNode_pos[1]))};
    AnyFloat LongissimusThoracisR9S4Via7Node_pos      = {.LSNode_pos[0]      -0.005,.LSNode_pos[1],(..Thorax.Right.LongissimusThoracisR9S4Node_pos[2]      - ..Thorax.LongissimusThoracisR9S4Z     *(..Thorax.Right.LongissimusThoracisR9S4Node_pos[1]      - .LSNode_pos[1]))};
    AnyFloat LongissimusThoracisR10S3Via6Node_pos = {.LSNode_pos[0]      -0.005,.LSNode_pos[1],(..Thorax.Right.LongissimusThoracisR10S3Node_pos[2] - ..Thorax.LongissimusThoracisR10S3Z*(..Thorax.Right.LongissimusThoracisR10S3Node_pos[1] - .LSNode_pos[1]))};
    AnyFloat LongissimusThoracisR11S3Via5Node_pos = {.LSNode_pos[0]      -0.005,.LSNode_pos[1],(..Thorax.Right.LongissimusThoracisR11S3Node_pos[2] - ..Thorax.LongissimusThoracisR11S3Z*(..Thorax.Right.LongissimusThoracisR11S3Node_pos[1] - .LSNode_pos[1]))};
    AnyFloat LongissimusThoracisR12S3Via4Node_pos = {.LSNode_pos[0]      -0.005,.LSNode_pos[1],(..R12.Right.LongissimusThoracisR12S3Node_pos[2] - ..R12.LongissimusThoracisR12S3Z*(..R12.Right.LongissimusThoracisR12S3Node_pos[1] - .LSNode_pos[1]))};

    // Psoas Major Nodes
    AnyVec3 PsoasMajorL4_1Node_pos = {0.069, 0.033, 0.022};
    AnyVec3 PsoasMajorL4_2Node_pos = {0.034,0.050,0.028};
    AnyFloat PsoasMajorT12Via3Node_pos = {0.069                          ,0.043,(..Thorax.Right.PsoasMajorT12Node_pos[2] - ..Thorax.PsoasMajorT12Z*(..Thorax.Right.PsoasMajorT12Node_pos[1] - 0.043))};
    AnyFloat PsoasMajorL1_1Via2Node_pos  = {0.069                          ,0.043,(..L1.Right.PsoasMajorL1_1Node_pos[2]      - ..L3.PsoasMajorL1_1Z     *(..L1.Right.PsoasMajorL1_1Node_pos[1]      - 0.043))};
    AnyFloat PsoasMajorL2_1Via1Node_pos  = {0.069                          ,0.043,(..L2.Right.PsoasMajorL2_1Node_pos[2]      - ..L3.PsoasMajorL2_1Z     *(..L2.Right.PsoasMajorL2_1Node_pos[1]      - 0.043))};
    AnyFloat PsoasMajorL1_2Via3Node_pos  = {0.0400                          ,0.043,(..L1.Right.PsoasMajorL1_2Node_pos[2]      - ..L2.PsoasMajorL1_2Z     *(..L1.Right.PsoasMajorL1_2Node_pos[1]      - 0.043))};
    AnyFloat PsoasMajorL2_2Via2Node_pos  = {0.0395                          ,0.043,(..L2.Right.PsoasMajorL2_2Node_pos[2]      - ..L2.PsoasMajorL2_2Z     *(..L2.Right.PsoasMajorL2_2Node_pos[1]      - 0.043))};
    AnyFloat PsoasMajorL3_2Via1Node_pos  = {0.0390                          ,0.043,(..L3.Right.PsoasMajorL3_2Node_pos[2]      - ..L2.PsoasMajorL3_2Z     *(..L3.Right.PsoasMajorL3_2Node_pos[1]      - 0.043))};

    AnyFloat IliocostalisLumborumL4Node_pos = {0.02500000, 0.05000000, 0.03500000};
    AnyFloat LongissimusThoracisL4ICNode_pos = {0.02800000, 0.05100000, 0.02800000};
    AnyFloat LongissimusThoracisT4L4Node_pos = {-0.001000000, 0.03800000, 0.0000000};
    AnyFloat LongissimusThoracisR4L4Node_pos = {-0.001000000, 0.03800000, 0.0000000};
    AnyFloat QuadratusLumborumL4Node_pos = {0.03100000, 0.05000000, 0.03300000};
    AnyFloat ObliquusExternusR9Node_pos = {0.1580000, 0.03800000, 0.01500000};
    AnyFloat ObliquusInternusRS3Node_pos = {0.1580000, 0.03800000, 0.01500000};
    AnyFloat MultifidusThoracisL4T11Node_pos = {0.02500000, 0.05100000, 0.02400000};
    AnyFloat MultifidusThoracisL4T12Node_pos = {0.02500000, 0.05100000, 0.02400000};
    AnyFloat ContactNode_pos = {-0.01000000, 0.03000000, 0.05000000};

    #if BM_TRUNK_CAVITY_MODEL == _CAVITY_MODEL_VOLUME_
      AnyFloat Transversus_Ins_pos= {0.03100000, 0.05000000, 0.03300000};
    #endif
    AnyFloat SuperiorEndplateNode_pos = 0.5*(.SuperiorEndplateAnteriorNode_pos + .SuperiorEndplatePosteriorNode_pos) + {0,-0.000700,0.019600}; // Offset added manually to match the vertebra surface
    AnyFloat InferiorEndplateNode_pos = {0.053471, 0.032829, 0.022381};
  };

  AnyFolder Left = {
    AnyFloat MultifidusLumborumL2L4Node_pos = .Right.MultifidusLumborumL2L4Node_pos * ..MirrorTransform;
    AnyFloat MultifidusLumborumL4S1_1Node_pos = .Right.MultifidusLumborumL4S1_1Node_pos * ..MirrorTransform;
    AnyFloat MultifidusLumborumL1L4Node_pos = .Right.MultifidusLumborumL1L4Node_pos * ..MirrorTransform;
    AnyFloat MultifidusLumborumL4S1_2Node_pos = .Right.MultifidusLumborumL4S1_2Node_pos * ..MirrorTransform;
    AnyFloat MultifidusLumborumL4S2Node_pos = .Right.MultifidusLumborumL4S2Node_pos * ..MirrorTransform;

    AnyFloat IliocostalisLumborumL1ViaNode_pos       = .Right.IliocostalisLumborumL1ViaNode_pos       * ..MirrorTransform;
    AnyFloat IliocostalisLumborumL2ViaNode_pos       = .Right.IliocostalisLumborumL2ViaNode_pos       * ..MirrorTransform;
    AnyFloat LongissimusThoracisT5L5Via11Node_pos     = .Right.LongissimusThoracisT5L5Via11Node_pos     * ..MirrorTransform;
    AnyFloat LongissimusThoracisT6S1Via10Node_pos     = .Right.LongissimusThoracisT6S1Via10Node_pos     * ..MirrorTransform;
    AnyFloat LongissimusThoracisT7S2Via9Node_pos      = .Right.LongissimusThoracisT7S2Via9Node_pos      * ..MirrorTransform;
    AnyFloat LongissimusThoracisT8S3Via8Node_pos      = .Right.LongissimusThoracisT8S3Via8Node_pos      * ..MirrorTransform;
    AnyFloat LongissimusThoracisT9S4Via7Node_pos      = .Right.LongissimusThoracisT9S4Via7Node_pos      * ..MirrorTransform;
    AnyFloat LongissimusThoracisT10S3Via6Node_pos = .Right.LongissimusThoracisT10S3Via6Node_pos * ..MirrorTransform;
    AnyFloat LongissimusThoracisT11S3Via5Node_pos = .Right.LongissimusThoracisT11S3Via5Node_pos * ..MirrorTransform;
    AnyFloat LongissimusThoracisT12S3Via4Node_pos = .Right.LongissimusThoracisT12S3Via4Node_pos * ..MirrorTransform;
    AnyFloat LongissimusThoracisR5L5Via11Node_pos     = .Right.LongissimusThoracisR5L5Via11Node_pos     * ..MirrorTransform;
    AnyFloat LongissimusThoracisR6S1Via10Node_pos     = .Right.LongissimusThoracisR6S1Via10Node_pos     * ..MirrorTransform;
    AnyFloat LongissimusThoracisR7S2Via9Node_pos      = .Right.LongissimusThoracisR7S2Via9Node_pos      * ..MirrorTransform;
    AnyFloat LongissimusThoracisR8S3Via8Node_pos      = .Right.LongissimusThoracisR8S3Via8Node_pos      * ..MirrorTransform;
    AnyFloat LongissimusThoracisR9S4Via7Node_pos      = .Right.LongissimusThoracisR9S4Via7Node_pos      * ..MirrorTransform;
    AnyFloat LongissimusThoracisR10S3Via6Node_pos = .Right.LongissimusThoracisR10S3Via6Node_pos * ..MirrorTransform;
    AnyFloat LongissimusThoracisR11S3Via5Node_pos = .Right.LongissimusThoracisR11S3Via5Node_pos * ..MirrorTransform;
    AnyFloat LongissimusThoracisR12S3Via4Node_pos = .Right.LongissimusThoracisR12S3Via4Node_pos * ..MirrorTransform;

    AnyFloat PsoasMajorL4_1Node_pos      = .Right.PsoasMajorL4_1Node_pos      * ..MirrorTransform;
    AnyFloat PsoasMajorL4_2Node_pos      = .Right.PsoasMajorL4_2Node_pos      * ..MirrorTransform;
    AnyFloat PsoasMajorT12Via3Node_pos = .Right.PsoasMajorT12Via3Node_pos * ..MirrorTransform;
    AnyFloat PsoasMajorL1_1Via2Node_pos  = .Right.PsoasMajorL1_1Via2Node_pos  * ..MirrorTransform;
    AnyFloat PsoasMajorL2_1Via1Node_pos  = .Right.PsoasMajorL2_1Via1Node_pos  * ..MirrorTransform;
    AnyFloat PsoasMajorL1_2Via3Node_pos  = .Right.PsoasMajorL1_2Via3Node_pos  * ..MirrorTransform;
    AnyFloat PsoasMajorL2_2Via2Node_pos  = .Right.PsoasMajorL2_2Via2Node_pos  * ..MirrorTransform;
    AnyFloat PsoasMajorL3_2Via1Node_pos  = .Right.PsoasMajorL3_2Via1Node_pos  * ..MirrorTransform;

    AnyFloat IliocostalisLumborumL4Node_pos = .Right.IliocostalisLumborumL4Node_pos * ..MirrorTransform;
    AnyFloat LongissimusThoracisL4ICNode_pos = .Right.LongissimusThoracisL4ICNode_pos * ..MirrorTransform;
    AnyFloat LongissimusThoracisT4L4Node_pos = .Right.LongissimusThoracisT4L4Node_pos * ..MirrorTransform;
    AnyFloat LongissimusThoracisR4L4Node_pos = .Right.LongissimusThoracisR4L4Node_pos * ..MirrorTransform;
    AnyFloat QuadratusLumborumL4Node_pos = .Right.QuadratusLumborumL4Node_pos * ..MirrorTransform;
    AnyFloat ObliquusExternusR9Node_pos = .Right.ObliquusExternusR9Node_pos * ..MirrorTransform;
    AnyFloat ObliquusInternusRS3Node_pos = .Right.ObliquusInternusRS3Node_pos * ..MirrorTransform;
    AnyFloat ContactNode_pos = .Right.ContactNode_pos * ..MirrorTransform;
    AnyFloat MultifidusThoracisL4T11Node_pos = .Right.MultifidusThoracisL4T11Node_pos * ..MirrorTransform;
    AnyFloat MultifidusThoracisL4T12Node_pos = .Right.MultifidusThoracisL4T12Node_pos * ..MirrorTransform;

    #if BM_TRUNK_CAVITY_MODEL == _CAVITY_MODEL_VOLUME_
      AnyFloat Transversus_Ins_pos= .Right.Transversus_Ins_pos * ..MirrorTransform;
    #endif
    AnyFloat SuperiorEndplateNode_pos = .Right.SuperiorEndplateNode_pos * ..MirrorTransform;
    AnyFloat InferiorEndplateNode_pos = .Right.InferiorEndplateNode_pos * ..MirrorTransform;
  };
};

AnyFolder L3 = {
  AnyFloat sCoM_pos={0.051, 0.079, 0.000000};
  AnyFloat ScalingNode_pos = {0.0000000, 0.0000000, 0.0000000};
  AnyFloat L3L4JntNode_pos = {0.05000000, 0.06100000, 0.0000000};
  AnyFloat L2L3JntNode_pos = {0.04400000, 0.09400000, 0.0000000};
  AnyFloat LSNode_pos = {-0.003000000, 0.05100000, 0.0000000};
  AnyFloat LINodeInferior_pos = {0.007000000, 0.04400000, 0.0000000};
  AnyFloat LINodeSuperior_pos = {0.01500000, 0.07500000, 0.0000000};
  AnyVar IliocostalisLumborumL1Z = (.L1.Right.IliocostalisLumborumL1Node_pos[2]-.Pelvis.Right.IliocostalisLumborumL1Node_pos[2])/(.L1.Right.IliocostalisLumborumL1Node_pos[1]-.Pelvis.Right.IliocostalisLumborumL1Node_pos[1]);
  AnyVar IliocostalisLumborumL2Z = (.L2.Right.IliocostalisLumborumL2Node_pos[2]-.Pelvis.Right.IliocostalisLumborumL2Node_pos[2])/(.L2.Right.IliocostalisLumborumL2Node_pos[1]-.Pelvis.Right.IliocostalisLumborumL2Node_pos[1]);
  AnyVar LongissimusThoracisL1ICZ = (.L1.Right.LongissimusThoracisL1ICNode_pos[2]-.Pelvis.Right.LongissimusThoracisL1ICNode_pos[2])/(.L1.Right.LongissimusThoracisL1ICNode_pos[1]-.Pelvis.Right.LongissimusThoracisL1ICNode_pos[1]);
  AnyVar LongissimusThoracisL2ICZ = (.L2.Right.LongissimusThoracisL2ICNode_pos[2]-.Pelvis.Right.LongissimusThoracisL2ICNode_pos[2])/(.L2.Right.LongissimusThoracisL2ICNode_pos[1]-.Pelvis.Right.LongissimusThoracisL2ICNode_pos[1]);
  AnyVar PsoasMajorL1_1Z = (.L1.Right.PsoasMajorL1_1Node_pos[2]-.Pelvis.Right.IliopubicEminenceViaNode_pos[2])/(.L1.Right.PsoasMajorL1_1Node_pos[1]-.Pelvis.Right.IliopubicEminenceViaNode_pos[1]);
  AnyVar PsoasMajorL2_1Z = (.L2.Right.PsoasMajorL2_1Node_pos[2]-.Pelvis.Right.IliopubicEminenceViaNode_pos[2])/(.L2.Right.PsoasMajorL2_1Node_pos[1]-.Pelvis.Right.IliopubicEminenceViaNode_pos[1]);
  AnyVar PsoasMajorL3_1Z = (.L3.Right.PsoasMajorL3_1Node_pos[2]-.Pelvis.Right.IliopubicEminenceViaNode_pos[2])/(.L3.Right.PsoasMajorL3_1Node_pos[1]-.Pelvis.Right.IliopubicEminenceViaNode_pos[1]);
  AnyVar PsoasMajorL4_1Z = (.L4.Right.PsoasMajorL4_1Node_pos[2]-.Pelvis.Right.IliopubicEminenceViaNode_pos[2])/(.L4.Right.PsoasMajorL4_1Node_pos[1]-.Pelvis.Right.IliopubicEminenceViaNode_pos[1]);
  AnyVar PsoasMajorL5_1Z = (.L5.Right.PsoasMajorL5_1Node_pos[2]-.Pelvis.Right.IliopubicEminenceViaNode_pos[2])/(.L5.Right.PsoasMajorL5_1Node_pos[1]-.Pelvis.Right.IliopubicEminenceViaNode_pos[1]);
  AnyFloat MidPoint_pos = {0.04700000, 0.07750000, 0.0000000};
  AnyFloat SupportNode_pos = {-0.003000000, 0.04750000, 0.0000000};
  AnyFloat BuckleContactNode_pos = {0.06700000, 0.08250000, 0.0000000};
  AnyFloat SuperiorEndplateAnteriorNode_pos = {0.060000, 0.095900, 0.000000};
  AnyFloat SuperiorEndplatePosteriorNode_pos = {0.038000, 0.090800, 0.000000};
  AnyFloat InferiorEndplateAnteriorNode_pos = {0.067233, 0.066233, 0.000000};
  AnyFloat InferiorEndplatePosteriorNode_pos = {0.036959, 0.063789, 0.000000};


  AnyFolder Right = {
    AnyFloat MultifidusLumborumL1L3Node_pos = {0.01900000, 0.08300000, 0.02200000};
    AnyFloat MultifidusLumborumL3L5Node_pos = {0.01400000, 0.05300000, 0.005000000};
    AnyFloat MultifidusLumborumL3S1Node_pos = {0.009000000, 0.04900000, 0.005000000};
    AnyFloat MultifidusLumborumL3S2Node_pos = {0.004000000, 0.04400000, 0.0000000};
    AnyFloat LongissimusThoracisT3L3Node_pos          = {-0.003,0.060,0.0};
    AnyFloat LongissimusThoracisR3L3Node_pos          = {-0.003,0.060,0.0};
    AnyFloat IliocostalisLumborumL1ViaNode_pos       = {.LSNode_pos[0]      ,.LSNode_pos[1],(..L1.Right.IliocostalisLumborumL1Node_pos[2]         - .IliocostalisLumborumL1Z                 *(..L1.Right.IliocostalisLumborumL1Node_pos[1]          - .LSNode_pos[1]))};
    AnyFloat IliocostalisLumborumL2ViaNode_pos       = {.LSNode_pos[0]      ,.LSNode_pos[1],(..L2.Right.IliocostalisLumborumL2Node_pos[2]         - .IliocostalisLumborumL2Z                 *(..L2.Right.IliocostalisLumborumL2Node_pos[1]          - .LSNode_pos[1]))};
    AnyFloat LongissimusThoracisL1ICViaNode_pos     = {.LSNode_pos[0]      ,.LSNode_pos[1],(..L1.Right.LongissimusThoracisL1ICNode_pos[2]       - .LongissimusThoracisL1ICZ               *(..L1.Right.LongissimusThoracisL1ICNode_pos[1]        - .LSNode_pos[1]))};
    AnyFloat LongissimusThoracisL2ICViaNode_pos     = {.LSNode_pos[0]      ,.LSNode_pos[1],(..L2.Right.LongissimusThoracisL2ICNode_pos[2]       - .LongissimusThoracisL2ICZ               *(..L2.Right.LongissimusThoracisL2ICNode_pos[1]        - .LSNode_pos[1]))};
    AnyFloat IliocostalisLumborumR5Via9Node_pos    = {.LSNode_pos[0]-0.005,.LSNode_pos[1],(..Thorax.Right.IliocostalisLumborumR5Node_pos[2]    - ..Thorax.IliocostalisLumborumR5Z   *(..Thorax.Right.IliocostalisLumborumR5Node_pos[1]    - .LSNode_pos[1]))};
    AnyFloat IliocostalisLumborumR6Via8Node_pos    = {.LSNode_pos[0]-0.005,.LSNode_pos[1],(..Thorax.Right.IliocostalisLumborumR6Node_pos[2]    - ..Thorax.IliocostalisLumborumR6Z   *(..Thorax.Right.IliocostalisLumborumR6Node_pos[1]    - .LSNode_pos[1]))};
    AnyFloat IliocostalisLumborumR7Via7Node_pos      = {.LSNode_pos[0]-0.005,.LSNode_pos[1],(..Thorax.Right.IliocostalisLumborumR7Node_pos[2]      - ..Thorax.IliocostalisLumborumR7Z     *(..Thorax.Right.IliocostalisLumborumR7Node_pos[1]      - .LSNode_pos[1]))};
    AnyFloat IliocostalisLumborumR8Via6Node_pos      = {.LSNode_pos[0]-0.005,.LSNode_pos[1],(..Thorax.Right.IliocostalisLumborumR8Node_pos[2]      - ..Thorax.IliocostalisLumborumR8Z     *(..Thorax.Right.IliocostalisLumborumR8Node_pos[1]      - .LSNode_pos[1]))};
    AnyFloat IliocostalisLumborumR9Via5Node_pos      = {.LSNode_pos[0]-0.005,.LSNode_pos[1],(..Thorax.Right.IliocostalisLumborumR9Node_pos[2]      - ..Thorax.IliocostalisLumborumR9Z     *(..Thorax.Right.IliocostalisLumborumR9Node_pos[1]      - .LSNode_pos[1]))};
    AnyFloat IliocostalisLumborumR10Via4Node_pos     = {.LSNode_pos[0]-0.003,.LSNode_pos[1],(..Thorax.Right.IliocostalisLumborumR10Node_pos[2]     - ..Thorax.IliocostalisLumborumR10Z    *(..Thorax.Right.IliocostalisLumborumR10Node_pos[1]     - .LSNode_pos[1]))};
    AnyFloat IliocostalisLumborumR11Via3Node_pos     = {.LSNode_pos[0]-0.001,.LSNode_pos[1],(..Thorax.Right.IliocostalisLumborumR11Node_pos[2]     - ..Thorax.IliocostalisLumborumR11Z    *(..Thorax.Right.IliocostalisLumborumR11Node_pos[1]     - .LSNode_pos[1]))};
    AnyFloat IliocostalisLumborumR12Via3Node_pos     = {.LSNode_pos[0]+0.003,.LSNode_pos[1],(..R12.Right.IliocostalisLumborumR12Node_pos[2]     - ..R12.IliocostalisLumborumR12Z    *(..R12.Right.IliocostalisLumborumR12Node_pos[1]     - .LSNode_pos[1]))};
    AnyFloat LongissimusThoracisT4L4Via11Node_pos     = {.LSNode_pos[0]+0.002,.LSNode_pos[1],(..Thorax.Right.LongissimusThoracisT4L4Node_pos[2]      - ..Thorax.LongissimusThoracisT4L4Z     *(..Thorax.Right.LongissimusThoracisT4L4Node_pos[1]      - .LSNode_pos[1]))};
    AnyFloat LongissimusThoracisT5L5Via10Node_pos     = {.LSNode_pos[0]+0.004,.LSNode_pos[1],(..Thorax.Right.LongissimusThoracisT5L5Node_pos[2]      - ..Thorax.LongissimusThoracisT5L5Z     *(..Thorax.Right.LongissimusThoracisT5L5Node_pos[1]      - .LSNode_pos[1]))};
    AnyFloat LongissimusThoracisT6S1Via9Node_pos      = {.LSNode_pos[0]+0.004,.LSNode_pos[1],(..Thorax.Right.LongissimusThoracisT6S1Node_pos[2]      - ..Thorax.LongissimusThoracisT6S1Z     *(..Thorax.Right.LongissimusThoracisT6S1Node_pos[1]      - .LSNode_pos[1]))};
    AnyFloat LongissimusThoracisT7S2Via8Node_pos      = {.LSNode_pos[0]      ,.LSNode_pos[1],(..Thorax.Right.LongissimusThoracisT7S2Node_pos[2]      - ..Thorax.LongissimusThoracisT7S2Z     *(..Thorax.Right.LongissimusThoracisT7S2Node_pos[1]      - .LSNode_pos[1]))};
    AnyFloat LongissimusThoracisT8S3Via7Node_pos      = {.LSNode_pos[0]      ,.LSNode_pos[1],(..Thorax.Right.LongissimusThoracisT8S3Node_pos[2]      - ..Thorax.LongissimusThoracisT8S3Z     *(..Thorax.Right.LongissimusThoracisT8S3Node_pos[1]      - .LSNode_pos[1]))};
    AnyFloat LongissimusThoracisT9S4Via6Node_pos      = {.LSNode_pos[0]      ,.LSNode_pos[1],(..Thorax.Right.LongissimusThoracisT9S4Node_pos[2]      - ..Thorax.LongissimusThoracisT9S4Z     *(..Thorax.Right.LongissimusThoracisT9S4Node_pos[1]      - .LSNode_pos[1]))};
    AnyFloat LongissimusThoracisT10S3Via5Node_pos = {.LSNode_pos[0]      ,.LSNode_pos[1],(..Thorax.Right.LongissimusThoracisT10S3Node_pos[2] - ..Thorax.LongissimusThoracisT10S3Z*(..Thorax.Right.LongissimusThoracisT10S3Node_pos[1] - .LSNode_pos[1]))};
    AnyFloat LongissimusThoracisT11S3Via4Node_pos = {.LSNode_pos[0]      ,.LSNode_pos[1],(..Thorax.Right.LongissimusThoracisT11S3Node_pos[2] - ..Thorax.LongissimusThoracisT11S3Z*(..Thorax.Right.LongissimusThoracisT11S3Node_pos[1] - .LSNode_pos[1]))};
    AnyFloat LongissimusThoracisT12S3Via3Node_pos = {.LSNode_pos[0]      ,.LSNode_pos[1],(..Thorax.Right.LongissimusThoracisT12S3Node_pos[2] - ..Thorax.LongissimusThoracisT12S3Z*(..Thorax.Right.LongissimusThoracisT12S3Node_pos[1] - .LSNode_pos[1]))};
    AnyFloat LongissimusThoracisR4L4Via11Node_pos     = {.LSNode_pos[0]+0.002,.LSNode_pos[1],(..Thorax.Right.LongissimusThoracisR4L4Node_pos[2]      - ..Thorax.LongissimusThoracisR4L4Z     *(..Thorax.Right.LongissimusThoracisR4L4Node_pos[1]      - .LSNode_pos[1]))};
    AnyFloat LongissimusThoracisR5L5Via10Node_pos     = {.LSNode_pos[0]+0.004,.LSNode_pos[1],(..Thorax.Right.LongissimusThoracisR5L5Node_pos[2]      - ..Thorax.LongissimusThoracisR5L5Z     *(..Thorax.Right.LongissimusThoracisR5L5Node_pos[1]      - .LSNode_pos[1]))};
    AnyFloat LongissimusThoracisR6S1Via9Node_pos      = {.LSNode_pos[0]+0.004,.LSNode_pos[1],(..Thorax.Right.LongissimusThoracisR6S1Node_pos[2]      - ..Thorax.LongissimusThoracisR6S1Z     *(..Thorax.Right.LongissimusThoracisR6S1Node_pos[1]      - .LSNode_pos[1]))};
    AnyFloat LongissimusThoracisR7S2Via8Node_pos      = {.LSNode_pos[0]      ,.LSNode_pos[1],(..Thorax.Right.LongissimusThoracisR7S2Node_pos[2]      - ..Thorax.LongissimusThoracisR7S2Z     *(..Thorax.Right.LongissimusThoracisR7S2Node_pos[1]      - .LSNode_pos[1]))};
    AnyFloat LongissimusThoracisR8S3Via7Node_pos      = {.LSNode_pos[0]      ,.LSNode_pos[1],(..Thorax.Right.LongissimusThoracisR8S3Node_pos[2]      - ..Thorax.LongissimusThoracisR8S3Z     *(..Thorax.Right.LongissimusThoracisR8S3Node_pos[1]      - .LSNode_pos[1]))};
    AnyFloat LongissimusThoracisR9S4Via6Node_pos      = {.LSNode_pos[0]      ,.LSNode_pos[1],(..Thorax.Right.LongissimusThoracisR9S4Node_pos[2]      - ..Thorax.LongissimusThoracisR9S4Z     *(..Thorax.Right.LongissimusThoracisR9S4Node_pos[1]      - .LSNode_pos[1]))};
    AnyFloat LongissimusThoracisR10S3Via5Node_pos = {.LSNode_pos[0]      ,.LSNode_pos[1],(..Thorax.Right.LongissimusThoracisR10S3Node_pos[2] - ..Thorax.LongissimusThoracisR10S3Z*(..Thorax.Right.LongissimusThoracisR10S3Node_pos[1] - .LSNode_pos[1]))};
    AnyFloat LongissimusThoracisR11S3Via4Node_pos = {.LSNode_pos[0]      ,.LSNode_pos[1],(..Thorax.Right.LongissimusThoracisR11S3Node_pos[2] - ..Thorax.LongissimusThoracisR11S3Z*(..Thorax.Right.LongissimusThoracisR11S3Node_pos[1] - .LSNode_pos[1]))};
    AnyFloat LongissimusThoracisR12S3Via3Node_pos = {.LSNode_pos[0]      ,.LSNode_pos[1],(..R12.Right.LongissimusThoracisR12S3Node_pos[2] - ..R12.LongissimusThoracisR12S3Z*(..R12.Right.LongissimusThoracisR12S3Node_pos[1] - .LSNode_pos[1]))};
    AnyVec3 PsoasMajorL3_1Node_pos = {0.068, 0.071, 0.022};
    AnyVec3 PsoasMajorL3_2Node_pos = {0.030,0.079,0.028};
    AnyFloat PsoasMajorT12Via2Node_pos = {0.065,0.079,(..Thorax.Right.PsoasMajorT12Node_pos[2] - ..Thorax.PsoasMajorT12Z*(..Thorax.Right.PsoasMajorT12Node_pos[1] - 0.079))};
    AnyFloat PsoasMajorL1_1Via1Node_pos  = {0.065,0.079,(..L1.Right.PsoasMajorL1_1Node_pos[2] -        .PsoasMajorL1_1Z          *(..L1.Right.PsoasMajorL1_1Node_pos[1]      - 0.079))};
    AnyFloat PsoasMajorL1_2Via2Node_pos  = {0.035,0.079,(..L1.Right.PsoasMajorL1_2Node_pos[2] - ..L2.PsoasMajorL1_2Z          *(..L1.Right.PsoasMajorL1_2Node_pos[1]      - 0.079))};
    AnyFloat PsoasMajorL2_2Via1Node_pos  = {0.035,0.079,(..L2.Right.PsoasMajorL2_2Node_pos[2] - ..L2.PsoasMajorL2_2Z          *(..L2.Right.PsoasMajorL2_2Node_pos[1]      - 0.079))};
    AnyFloat IliocostalisLumborumL3Node_pos = {0.01900000, 0.07800000, 0.03500000};
    AnyFloat LongissimusThoracisL3ICNode_pos = {0.02200000, 0.07900000, 0.02800000};
    AnyFloat ContactNode_pos = {-0.01000000, 0.05000000, 0.05000000};
    AnyFloat QuadratusLumborumL3Node_pos = {0.02600000, 0.07900000, 0.03300000};
    AnyFloat ObliquusExternusR8Node_pos = {0.1580000, 0.06800000, 0.01500000};
    AnyFloat ObliquusInternusRS2Node_pos = {0.1580000, 0.06800000, 0.01500000};
    AnyFloat MultifidusThoracisL3T10Node_pos = {0.02000000, 0.07900000, 0.02400000};
    AnyFloat MultifidusThoracisL3T11Node_pos = {0.02000000, 0.07900000, 0.02400000};
    AnyFloat MultifidusThoracisL3T12Node_pos = {0.02000000, 0.07900000, 0.02400000};
    AnyFloat O_LatissimusDorsi4_pos = {0.01700000, 0.07750000, 0.0000000};

    #if BM_TRUNK_CAVITY_MODEL == _CAVITY_MODEL_VOLUME_
      AnyFloat Transversus_Ins_pos = {0.02600000, 0.07900000, 0.03300000};
    #endif
    AnyFloat SuperiorEndplateNode_pos = 0.5*(.SuperiorEndplateAnteriorNode_pos + .SuperiorEndplatePosteriorNode_pos) + {0,-0.000800,0.019600}; // Offset added manually to match the vertebra surface
    AnyFloat InferiorEndplateNode_pos = {0.050543, 0.067534, 0.022487};
  };

  AnyFolder Left = {
    AnyFloat MultifidusLumborumL1L3Node_pos = .Right.MultifidusLumborumL1L3Node_pos * ..MirrorTransform;
    AnyFloat MultifidusLumborumL3L5Node_pos = .Right.MultifidusLumborumL3L5Node_pos * ..MirrorTransform;
    AnyFloat MultifidusLumborumL3S1Node_pos = .Right.MultifidusLumborumL3S1Node_pos * ..MirrorTransform;
    AnyFloat MultifidusLumborumL3S2Node_pos = .Right.MultifidusLumborumL3S2Node_pos * ..MirrorTransform;

    AnyFloat LongissimusThoracisT3L3Node_pos          = .Right.LongissimusThoracisT3L3Node_pos          *  ..MirrorTransform;
    AnyFloat LongissimusThoracisR3L3Node_pos          = .Right.LongissimusThoracisR3L3Node_pos          *  ..MirrorTransform;
    AnyFloat IliocostalisLumborumL1ViaNode_pos       = .Right.IliocostalisLumborumL1ViaNode_pos       *  ..MirrorTransform;
    AnyFloat IliocostalisLumborumL2ViaNode_pos       = .Right.IliocostalisLumborumL2ViaNode_pos       *  ..MirrorTransform;
    AnyFloat LongissimusThoracisL1ICViaNode_pos     = .Right.LongissimusThoracisL1ICViaNode_pos     *  ..MirrorTransform;
    AnyFloat LongissimusThoracisL2ICViaNode_pos     = .Right.LongissimusThoracisL2ICViaNode_pos     *  ..MirrorTransform;
    AnyFloat IliocostalisLumborumR5Via9Node_pos    = .Right.IliocostalisLumborumR5Via9Node_pos    *  ..MirrorTransform;
    AnyFloat IliocostalisLumborumR6Via8Node_pos    = .Right.IliocostalisLumborumR6Via8Node_pos    *  ..MirrorTransform;
    AnyFloat IliocostalisLumborumR7Via7Node_pos      = .Right.IliocostalisLumborumR7Via7Node_pos      *  ..MirrorTransform;
    AnyFloat IliocostalisLumborumR8Via6Node_pos      = .Right.IliocostalisLumborumR8Via6Node_pos      *  ..MirrorTransform;
    AnyFloat IliocostalisLumborumR9Via5Node_pos      = .Right.IliocostalisLumborumR9Via5Node_pos      *  ..MirrorTransform;
    AnyFloat IliocostalisLumborumR10Via4Node_pos     = .Right.IliocostalisLumborumR10Via4Node_pos     *  ..MirrorTransform;
    AnyFloat IliocostalisLumborumR11Via3Node_pos     = .Right.IliocostalisLumborumR11Via3Node_pos     *  ..MirrorTransform;
    AnyFloat IliocostalisLumborumR12Via3Node_pos     = .Right.IliocostalisLumborumR12Via3Node_pos     *  ..MirrorTransform;
    AnyFloat LongissimusThoracisT4L4Via11Node_pos     = .Right.LongissimusThoracisT4L4Via11Node_pos     *  ..MirrorTransform;
    AnyFloat LongissimusThoracisT5L5Via10Node_pos     = .Right.LongissimusThoracisT5L5Via10Node_pos     *  ..MirrorTransform;
    AnyFloat LongissimusThoracisT6S1Via9Node_pos      = .Right.LongissimusThoracisT6S1Via9Node_pos      *  ..MirrorTransform;
    AnyFloat LongissimusThoracisT7S2Via8Node_pos      = .Right.LongissimusThoracisT7S2Via8Node_pos      *  ..MirrorTransform;
    AnyFloat LongissimusThoracisT8S3Via7Node_pos      = .Right.LongissimusThoracisT8S3Via7Node_pos      *  ..MirrorTransform;
    AnyFloat LongissimusThoracisT9S4Via6Node_pos      = .Right.LongissimusThoracisT9S4Via6Node_pos      *  ..MirrorTransform;
    AnyFloat LongissimusThoracisT10S3Via5Node_pos = .Right.LongissimusThoracisT10S3Via5Node_pos *  ..MirrorTransform;
    AnyFloat LongissimusThoracisT11S3Via4Node_pos = .Right.LongissimusThoracisT11S3Via4Node_pos *  ..MirrorTransform;
    AnyFloat LongissimusThoracisT12S3Via3Node_pos = .Right.LongissimusThoracisT12S3Via3Node_pos *  ..MirrorTransform;
    AnyFloat LongissimusThoracisR4L4Via11Node_pos     = .Right.LongissimusThoracisR4L4Via11Node_pos     *  ..MirrorTransform;
    AnyFloat LongissimusThoracisR5L5Via10Node_pos     = .Right.LongissimusThoracisR5L5Via10Node_pos     *  ..MirrorTransform;
    AnyFloat LongissimusThoracisR6S1Via9Node_pos      = .Right.LongissimusThoracisR6S1Via9Node_pos      *  ..MirrorTransform;
    AnyFloat LongissimusThoracisR7S2Via8Node_pos      = .Right.LongissimusThoracisR7S2Via8Node_pos      *  ..MirrorTransform;
    AnyFloat LongissimusThoracisR8S3Via7Node_pos      = .Right.LongissimusThoracisR8S3Via7Node_pos      *  ..MirrorTransform;
    AnyFloat LongissimusThoracisR9S4Via6Node_pos      = .Right.LongissimusThoracisR9S4Via6Node_pos      *  ..MirrorTransform;
    AnyFloat LongissimusThoracisR10S3Via5Node_pos = .Right.LongissimusThoracisR10S3Via5Node_pos *  ..MirrorTransform;
    AnyFloat LongissimusThoracisR11S3Via4Node_pos = .Right.LongissimusThoracisR11S3Via4Node_pos *  ..MirrorTransform;
    AnyFloat LongissimusThoracisR12S3Via3Node_pos = .Right.LongissimusThoracisR12S3Via3Node_pos *  ..MirrorTransform;

    AnyFloat PsoasMajorL3_1Node_pos = .Right.PsoasMajorL3_1Node_pos * ..MirrorTransform;
    AnyFloat PsoasMajorL3_2Node_pos = .Right.PsoasMajorL3_2Node_pos * ..MirrorTransform;
    AnyFloat PsoasMajorT12Via2Node_pos = .Right.PsoasMajorT12Via2Node_pos * ..MirrorTransform;
    AnyFloat PsoasMajorL1_1Via1Node_pos  = .Right.PsoasMajorL1_1Via1Node_pos * ..MirrorTransform;
    AnyFloat PsoasMajorL1_2Via2Node_pos  = .Right.PsoasMajorL1_2Via2Node_pos * ..MirrorTransform;
    AnyFloat PsoasMajorL2_2Via1Node_pos  = .Right.PsoasMajorL2_2Via1Node_pos * ..MirrorTransform;

    AnyFloat IliocostalisLumborumL3Node_pos = .Right.IliocostalisLumborumL3Node_pos * ..MirrorTransform;
    AnyFloat LongissimusThoracisL3ICNode_pos = .Right.LongissimusThoracisL3ICNode_pos * ..MirrorTransform;
    AnyFloat QuadratusLumborumL3Node_pos = .Right.QuadratusLumborumL3Node_pos * ..MirrorTransform;
    AnyFloat ObliquusExternusR8Node_pos = .Right.ObliquusExternusR8Node_pos * ..MirrorTransform;
    AnyFloat ObliquusInternusRS2Node_pos = .Right.ObliquusInternusRS2Node_pos * ..MirrorTransform;
    AnyFloat ContactNode_pos = .Right.ContactNode_pos * ..MirrorTransform;
    AnyFloat MultifidusThoracisL3T10Node_pos = .Right.MultifidusThoracisL3T10Node_pos * ..MirrorTransform;
    AnyFloat MultifidusThoracisL3T11Node_pos = .Right.MultifidusThoracisL3T11Node_pos * ..MirrorTransform;
    AnyFloat MultifidusThoracisL3T12Node_pos = .Right.MultifidusThoracisL3T12Node_pos * ..MirrorTransform;
    AnyFloat O_LatissimusDorsi4_pos = .Right.O_LatissimusDorsi4_pos * ..MirrorTransform;

    #if BM_TRUNK_CAVITY_MODEL == _CAVITY_MODEL_VOLUME_
      AnyFloat Transversus_Ins_pos = .Right.Transversus_Ins_pos * ..MirrorTransform;
    #endif
    AnyFloat SuperiorEndplateNode_pos = .Right.SuperiorEndplateNode_pos * ..MirrorTransform;
    AnyFloat InferiorEndplateNode_pos = .Right.InferiorEndplateNode_pos * ..MirrorTransform;
  };
};

AnyFolder L2 = {
  AnyFloat sCoM_pos={0.043, 0.110, 0.000000};
  AnyFloat ScalingNode_pos = {0.0000000, 0.0000000, 0.0000000};
  AnyFloat L2L3JntNode_pos = {0.04400000, 0.09400000, 0.0000000};
  AnyFloat L1L2JntNode_pos = {0.03400000, 0.1230000, 0.0000000};
  AnyVec3 LSNode_pos = {-0.004,0.074,0};
  AnyFloat SpinalisL2T1Node_pos = {-0.005,0.077,0};
  AnyVec3 LSNode2_pos = {-0.004,0.074,-0.001};
  AnyFloat LINodeInferior_pos = {0.006000000, 0.06900000, 0.0000000};
  AnyFloat LINodeSuperior_pos = {0.009000000, 0.1000000, 0.0000000};
  AnyVar IliocostalisLumborumL1Z = (.L1.Right.IliocostalisLumborumL1Node_pos[2]-.Pelvis.Right.IliocostalisLumborumL1Node_pos[2])/(.L1.Right.IliocostalisLumborumL1Node_pos[1]-.Pelvis.Right.IliocostalisLumborumL1Node_pos[1]);
  AnyVar LongissimusThoracisL1ICZ = (.L1.Right.LongissimusThoracisL1ICNode_pos[2]-.Pelvis.Right.LongissimusThoracisL1ICNode_pos[2])/(.L1.Right.LongissimusThoracisL1ICNode_pos[1]-.Pelvis.Right.LongissimusThoracisL1ICNode_pos[1]);
  AnyVar PsoasMajorL1_2Z = (.L1.Right.PsoasMajorL1_2Node_pos[2]-.Pelvis.Right.IliopubicEminenceViaNode_pos[2])/(.L1.Right.PsoasMajorL1_2Node_pos[1]-.Pelvis.Right.IliopubicEminenceViaNode_pos[1]);
  AnyVar PsoasMajorL2_2Z = (.L2.Right.PsoasMajorL2_2Node_pos[2]-.Pelvis.Right.IliopubicEminenceViaNode_pos[2])/(.L2.Right.PsoasMajorL2_2Node_pos[1]-.Pelvis.Right.IliopubicEminenceViaNode_pos[1]);
  AnyVar PsoasMajorL3_2Z = (.L3.Right.PsoasMajorL3_2Node_pos[2]-.Pelvis.Right.IliopubicEminenceViaNode_pos[2])/(.L3.Right.PsoasMajorL3_2Node_pos[1]-.Pelvis.Right.IliopubicEminenceViaNode_pos[1]);
  AnyVar PsoasMajorL4_2Z = (.L4.Right.PsoasMajorL4_2Node_pos[2]-.Pelvis.Right.IliopubicEminenceViaNode_pos[2])/(.L4.Right.PsoasMajorL4_2Node_pos[1]-.Pelvis.Right.IliopubicEminenceViaNode_pos[1]);
  AnyVar PsoasMajorL5_2Z = (.L5.Right.PsoasMajorL5_2Node_pos[2]-.Pelvis.Right.IliopubicEminenceViaNode_pos[2])/(.L5.Right.PsoasMajorL5_2Node_pos[1]-.Pelvis.Right.IliopubicEminenceViaNode_pos[1]);
  AnyFloat MidPoint_pos = {0.03900000, 0.1085000, 0.0000000};
  AnyFloat SupportNode_pos = {-0.01100000, 0.07350000, 0.0000000};
  AnyFloat BuckleContactNode_pos = {0.05900000, 0.1160000, 0.0000000};
  AnyFloat SuperiorEndplateAnteriorNode_pos = {0.050000, 0.127800, 0.000000};
  AnyFloat SuperiorEndplatePosteriorNode_pos = {0.028200, 0.118700, 0.000000};
  AnyFloat InferiorEndplateAnteriorNode_pos = {0.061111, 0.101067, 0.000000};
  AnyFloat InferiorEndplatePosteriorNode_pos = {0.033377, 0.093237, 0.000000};

  AnyFolder Right = {
    AnyFloat MultifidusLumborumL2L4Node_pos = {0.01100000, 0.07900000, 0.005000000};
    AnyFloat MultifidusLumborumL2L5_1Node_pos = {0.007000000, 0.07500000, 0.005000000};
    AnyFloat MultifidusLumborumL2L5_2Node_pos = {0.004000000, 0.06800000, 0.0000000};
    AnyFloat MultifidusLumborumL2S1Node_pos = {0.004000000, 0.06800000, 0.0000000};
    AnyFloat MultifidusLumborumtL2ICNode_pos = {0.004000000, 0.06800000, 0.0000000};

    AnyFloat IliocostalisLumborumL1ViaNode_pos       = {.LSNode_pos[0]+0.005,.LSNode_pos[1],(..L1.Right.IliocostalisLumborumL1Node_pos[2]          - .IliocostalisLumborumL1Z                *(..L1.Right.IliocostalisLumborumL1Node_pos[1]          - .LSNode_pos[1]))};
    AnyFloat LongissimusThoracisL1ICViaNode_pos     = {.LSNode_pos[0]+0.005,.LSNode_pos[1],(..L1.Right.LongissimusThoracisL1ICNode_pos[2]        - .LongissimusThoracisL1ICZ              *(..L1.Right.LongissimusThoracisL1ICNode_pos[1]        - .LSNode_pos[1]))};
    AnyFloat IliocostalisLumborumR5Via8Node_pos    = {.LSNode_pos[0]-0.005,.LSNode_pos[1],(..Thorax.Right.IliocostalisLumborumR5Node_pos[2]    - ..Thorax.IliocostalisLumborumR5Z   *(..Thorax.Right.IliocostalisLumborumR5Node_pos[1]    - .LSNode_pos[1]))};
    AnyFloat IliocostalisLumborumR6Via7Node_pos    = {.LSNode_pos[0]-0.005,.LSNode_pos[1],(..Thorax.Right.IliocostalisLumborumR6Node_pos[2]    - ..Thorax.IliocostalisLumborumR6Z   *(..Thorax.Right.IliocostalisLumborumR6Node_pos[1]    - .LSNode_pos[1]))};
    AnyFloat IliocostalisLumborumR7Via6Node_pos      = {.LSNode_pos[0]-0.005,.LSNode_pos[1],(..Thorax.Right.IliocostalisLumborumR7Node_pos[2]      - ..Thorax.IliocostalisLumborumR7Z     *(..Thorax.Right.IliocostalisLumborumR7Node_pos[1]      - .LSNode_pos[1]))};
    AnyFloat IliocostalisLumborumR8Via5Node_pos      = {.LSNode_pos[0]-0.005,.LSNode_pos[1],(..Thorax.Right.IliocostalisLumborumR8Node_pos[2]      - ..Thorax.IliocostalisLumborumR8Z     *(..Thorax.Right.IliocostalisLumborumR8Node_pos[1]      - .LSNode_pos[1]))};
    AnyFloat IliocostalisLumborumR9Via4Node_pos      = {.LSNode_pos[0]-0.005,.LSNode_pos[1],(..Thorax.Right.IliocostalisLumborumR9Node_pos[2]      - ..Thorax.IliocostalisLumborumR9Z     *(..Thorax.Right.IliocostalisLumborumR9Node_pos[1]      - .LSNode_pos[1]))};
    AnyFloat IliocostalisLumborumR10Via3Node_pos     = {.LSNode_pos[0]-0.005,.LSNode_pos[1],(..Thorax.Right.IliocostalisLumborumR10Node_pos[2]     - ..Thorax.IliocostalisLumborumR10Z    *(..Thorax.Right.IliocostalisLumborumR10Node_pos[1]     - .LSNode_pos[1]))};
    AnyFloat IliocostalisLumborumR11Via2Node_pos     = {.LSNode_pos[0]-0.005,.LSNode_pos[1],(..Thorax.Right.IliocostalisLumborumR11Node_pos[2]     - ..Thorax.IliocostalisLumborumR11Z    *(..Thorax.Right.IliocostalisLumborumR11Node_pos[1]     - .LSNode_pos[1]))};
    AnyFloat IliocostalisLumborumR12Via2Node_pos     = {.LSNode_pos[0]+0.001,.LSNode_pos[1],(..R12.Right.IliocostalisLumborumR12Node_pos[2]     - ..R12.IliocostalisLumborumR12Z    *(..R12.Right.IliocostalisLumborumR12Node_pos[1]     - .LSNode_pos[1]))};
    AnyFloat LongissimusThoracisT3L3Via11Node_pos     = {.LSNode_pos[0]+0.005,.LSNode_pos[1],(..Thorax.Right.LongissimusThoracisT3L3Node_pos[2]      - ..Thorax.LongissimusThoracisT3L3Z     *(..Thorax.Right.LongissimusThoracisT3L3Node_pos[1]      - .LSNode_pos[1]))};
    AnyFloat LongissimusThoracisT4L4Via10Node_pos     = {.LSNode_pos[0]+0.002,.LSNode_pos[1],(..Thorax.Right.LongissimusThoracisT4L4Node_pos[2]      - ..Thorax.LongissimusThoracisT4L4Z     *(..Thorax.Right.LongissimusThoracisT4L4Node_pos[1]      - .LSNode_pos[1]))};
    AnyFloat LongissimusThoracisT5L5Via9Node_pos      = {.LSNode_pos[0]+0.004,.LSNode_pos[1],(..Thorax.Right.LongissimusThoracisT5L5Node_pos[2]      - ..Thorax.LongissimusThoracisT5L5Z     *(..Thorax.Right.LongissimusThoracisT5L5Node_pos[1]      - .LSNode_pos[1]))};
    AnyFloat LongissimusThoracisT6S1Via8Node_pos      = {.LSNode_pos[0]+0.002,.LSNode_pos[1],(..Thorax.Right.LongissimusThoracisT6S1Node_pos[2]      - ..Thorax.LongissimusThoracisT6S1Z     *(..Thorax.Right.LongissimusThoracisT6S1Node_pos[1]      - .LSNode_pos[1]))};
    AnyFloat LongissimusThoracisT7S2Via7Node_pos      = {.LSNode_pos[0]      ,.LSNode_pos[1],(..Thorax.Right.LongissimusThoracisT7S2Node_pos[2]      - ..Thorax.LongissimusThoracisT7S2Z     *(..Thorax.Right.LongissimusThoracisT7S2Node_pos[1]      - .LSNode_pos[1]))};
    AnyFloat LongissimusThoracisT8S3Via6Node_pos      = {.LSNode_pos[0]      ,.LSNode_pos[1],(..Thorax.Right.LongissimusThoracisT8S3Node_pos[2]      - ..Thorax.LongissimusThoracisT8S3Z     *(..Thorax.Right.LongissimusThoracisT8S3Node_pos[1]      - .LSNode_pos[1]))};
    AnyFloat LongissimusThoracisT9S4Via5Node_pos      = {.LSNode_pos[0]      ,.LSNode_pos[1],(..Thorax.Right.LongissimusThoracisT9S4Node_pos[2]      - ..Thorax.LongissimusThoracisT9S4Z     *(..Thorax.Right.LongissimusThoracisT9S4Node_pos[1]      - .LSNode_pos[1]))};
    AnyFloat LongissimusThoracisT10S3Via4Node_pos = {.LSNode_pos[0]      ,.LSNode_pos[1],(..Thorax.Right.LongissimusThoracisT10S3Node_pos[2] - ..Thorax.LongissimusThoracisT10S3Z*(..Thorax.Right.LongissimusThoracisT10S3Node_pos[1] - .LSNode_pos[1]))};
    AnyFloat LongissimusThoracisT11S3Via3Node_pos = {.LSNode_pos[0]      ,.LSNode_pos[1],(..Thorax.Right.LongissimusThoracisT11S3Node_pos[2] - ..Thorax.LongissimusThoracisT11S3Z*(..Thorax.Right.LongissimusThoracisT11S3Node_pos[1] - .LSNode_pos[1]))};
    AnyFloat LongissimusThoracisT12S3Via2Node_pos = {.LSNode_pos[0]      ,.LSNode_pos[1],(..Thorax.Right.LongissimusThoracisT12S3Node_pos[2] - ..Thorax.LongissimusThoracisT12S3Z*(..Thorax.Right.LongissimusThoracisT12S3Node_pos[1] - .LSNode_pos[1]))};
    AnyFloat LongissimusThoracisR3L3Via11Node_pos     = {.LSNode_pos[0]+0.005,.LSNode_pos[1],(..Thorax.Right.LongissimusThoracisR3L3Node_pos[2]      - ..Thorax.LongissimusThoracisR3L3Z     *(..Thorax.Right.LongissimusThoracisR3L3Node_pos[1]      - .LSNode_pos[1]))};
    AnyFloat LongissimusThoracisR4L4Via10Node_pos     = {.LSNode_pos[0]+0.002,.LSNode_pos[1],(..Thorax.Right.LongissimusThoracisR4L4Node_pos[2]      - ..Thorax.LongissimusThoracisR4L4Z     *(..Thorax.Right.LongissimusThoracisR4L4Node_pos[1]      - .LSNode_pos[1]))};
    AnyFloat LongissimusThoracisR5L5Via9Node_pos      = {.LSNode_pos[0]+0.004,.LSNode_pos[1],(..Thorax.Right.LongissimusThoracisR5L5Node_pos[2]      - ..Thorax.LongissimusThoracisR5L5Z     *(..Thorax.Right.LongissimusThoracisR5L5Node_pos[1]      - .LSNode_pos[1]))};
    AnyFloat LongissimusThoracisR6S1Via8Node_pos      = {.LSNode_pos[0]+0.002,.LSNode_pos[1],(..Thorax.Right.LongissimusThoracisR6S1Node_pos[2]      - ..Thorax.LongissimusThoracisR6S1Z     *(..Thorax.Right.LongissimusThoracisR6S1Node_pos[1]      - .LSNode_pos[1]))};
    AnyFloat LongissimusThoracisR7S2Via7Node_pos      = {.LSNode_pos[0]      ,.LSNode_pos[1],(..Thorax.Right.LongissimusThoracisR7S2Node_pos[2]      - ..Thorax.LongissimusThoracisR7S2Z     *(..Thorax.Right.LongissimusThoracisR7S2Node_pos[1]      - .LSNode_pos[1]))};
    AnyFloat LongissimusThoracisR8S3Via6Node_pos      = {.LSNode_pos[0]      ,.LSNode_pos[1],(..Thorax.Right.LongissimusThoracisR8S3Node_pos[2]      - ..Thorax.LongissimusThoracisR8S3Z     *(..Thorax.Right.LongissimusThoracisR8S3Node_pos[1]      - .LSNode_pos[1]))};
    AnyFloat LongissimusThoracisR9S4Via5Node_pos      = {.LSNode_pos[0]      ,.LSNode_pos[1],(..Thorax.Right.LongissimusThoracisR9S4Node_pos[2]      - ..Thorax.LongissimusThoracisR9S4Z     *(..Thorax.Right.LongissimusThoracisR9S4Node_pos[1]      - .LSNode_pos[1]))};
    AnyFloat LongissimusThoracisR10S3Via4Node_pos = {.LSNode_pos[0]      ,.LSNode_pos[1],(..Thorax.Right.LongissimusThoracisR10S3Node_pos[2] - ..Thorax.LongissimusThoracisR10S3Z*(..Thorax.Right.LongissimusThoracisR10S3Node_pos[1] - .LSNode_pos[1]))};
    AnyFloat LongissimusThoracisR11S3Via3Node_pos = {.LSNode_pos[0]      ,.LSNode_pos[1],(..Thorax.Right.LongissimusThoracisR11S3Node_pos[2] - ..Thorax.LongissimusThoracisR11S3Z*(..Thorax.Right.LongissimusThoracisR11S3Node_pos[1] - .LSNode_pos[1]))};
    AnyFloat LongissimusThoracisR12S3Via2Node_pos = {.LSNode_pos[0]      ,.LSNode_pos[1],(..R12.Right.LongissimusThoracisR12S3Node_pos[2] - ..R12.LongissimusThoracisR12S3Z*(..R12.Right.LongissimusThoracisR12S3Node_pos[1] - .LSNode_pos[1]))};
    AnyVec3 IliocostalisLumborumL2Node_pos = {0.013,0.104,0.034};
    AnyVec3 LongissimusThoracisL2ICNode_pos = {0.015,0.105,0.027};
    AnyVec3 LongissimusThoracisT2L2Node_pos = {-0.005,0.082,0.0};
    AnyVec3 LongissimusThoracisC2L2Node_pos = {-0.005,0.082,0.0};
    AnyVec3 PsoasMajorL2_1Node_pos = {0.06, 0.104, 0.022};
    AnyVec3 PsoasMajorL2_2Node_pos = {0.024,0.106,0.025};
    AnyFloat PsoasMajorT12Via1Node_pos = {0.060,0.110,(..Thorax.Right.PsoasMajorT12Node_pos[2] - ..Thorax.PsoasMajorT12Z*(..Thorax.Right.PsoasMajorT12Node_pos[1] - 0.110))};
    AnyFloat PsoasMajorL1_2Via1Node_pos  = {0.026,0.105,(..L1.Right.PsoasMajorL1_2Node_pos[2]      - ..L2.PsoasMajorL1_2Z     *(..L1.Right.PsoasMajorL1_2Node_pos[1]      - 0.105))};
    AnyFloat QuadratusLumborumL2Node_pos = {0.01900000, 0.1050000, 0.03200000};
    AnyFloat ObliquusExternusR7Node_pos = {0.1580000, 0.09800000, 0.01500000};
    AnyFloat ObliquusInternusRS1Node_pos = {0.1580000, 0.09800000, 0.01500000};
    AnyFloat MultifidusThoracisL2T9Node_pos = {0.01300000, 0.1050000, 0.02300000};
    AnyFloat MultifidusThoracisL2T10Node_pos = {0.01300000, 0.1050000, 0.02300000};
    AnyFloat MultifidusThoracisL2T11Node_pos = {0.01300000, 0.1050000, 0.02300000};
    AnyFloat ContactNode_pos = {-0.01000000, 0.07000000, 0.0000000};
    AnyFloat O_serratus_posterior_inferior_pos = {-0.003, 0.075 , 0.0};
    AnyFloat O_serratus_posterior_inferior_L2R12ViaNodepos = {-0.02, 0.112, 0.04};

    AnyFloat DiaphragmNode1_pos     = {0.053, 0.115, 0.016};
    AnyFloat DiaphragmNode2_pos     = {0.039, 0.1085, 0.022};

    #if BM_TRUNK_CAVITY_MODEL == _CAVITY_MODEL_VOLUME_
      AnyFloat Transversus_Ins_pos = {0.01900000, 0.1050000, 0.03200000};
    #endif
    AnyFloat SuperiorEndplateNode_pos = 0.5*(.SuperiorEndplateAnteriorNode_pos + .SuperiorEndplatePosteriorNode_pos) + {0,-0.000800,0.019000}; // Offset added manually to match the vertebra surface
    AnyFloat InferiorEndplateNode_pos = {0.044785, 0.098792, 0.021756};
  };

  AnyFolder Left = {
    AnyFloat MultifidusLumborumL2L4Node_pos = .Right.MultifidusLumborumL2L4Node_pos * ..MirrorTransform;
    AnyFloat MultifidusLumborumL2L5_1Node_pos = .Right.MultifidusLumborumL2L5_1Node_pos * ..MirrorTransform;
    AnyFloat MultifidusLumborumL2L5_2Node_pos = .Right.MultifidusLumborumL2L5_2Node_pos * ..MirrorTransform;
    AnyFloat MultifidusLumborumL2S1Node_pos = .Right.MultifidusLumborumL2S1Node_pos * ..MirrorTransform;
    AnyFloat MultifidusLumborumtL2ICNode_pos = .Right.MultifidusLumborumtL2ICNode_pos * ..MirrorTransform;
    AnyFloat IliocostalisLumborumL2Node_pos          = .Right.IliocostalisLumborumL2Node_pos          * ..MirrorTransform;
    AnyFloat LongissimusThoracisL2ICNode_pos        = .Right.LongissimusThoracisL2ICNode_pos        * ..MirrorTransform;
    AnyFloat LongissimusThoracisT2L2Node_pos          = .Right.LongissimusThoracisT2L2Node_pos          * ..MirrorTransform;
    AnyFloat LongissimusThoracisC2L2Node_pos          = .Right.LongissimusThoracisC2L2Node_pos          * ..MirrorTransform;
    AnyFloat IliocostalisLumborumL1ViaNode_pos       = .Right.IliocostalisLumborumL1ViaNode_pos       * ..MirrorTransform;
    AnyFloat LongissimusThoracisL1ICViaNode_pos     = .Right.LongissimusThoracisL1ICViaNode_pos     * ..MirrorTransform;
    AnyFloat IliocostalisLumborumR5Via8Node_pos    = .Right.IliocostalisLumborumR5Via8Node_pos    * ..MirrorTransform;
    AnyFloat IliocostalisLumborumR6Via7Node_pos    = .Right.IliocostalisLumborumR6Via7Node_pos    * ..MirrorTransform;
    AnyFloat IliocostalisLumborumR7Via6Node_pos      = .Right.IliocostalisLumborumR7Via6Node_pos      * ..MirrorTransform;
    AnyFloat IliocostalisLumborumR8Via5Node_pos      = .Right.IliocostalisLumborumR8Via5Node_pos      * ..MirrorTransform;
    AnyFloat IliocostalisLumborumR9Via4Node_pos      = .Right.IliocostalisLumborumR9Via4Node_pos      * ..MirrorTransform;
    AnyFloat IliocostalisLumborumR10Via3Node_pos     = .Right.IliocostalisLumborumR10Via3Node_pos     * ..MirrorTransform;
    AnyFloat IliocostalisLumborumR11Via2Node_pos     = .Right.IliocostalisLumborumR11Via2Node_pos     * ..MirrorTransform;
    AnyFloat IliocostalisLumborumR12Via2Node_pos     = .Right.IliocostalisLumborumR12Via2Node_pos     * ..MirrorTransform;
    AnyFloat LongissimusThoracisT3L3Via11Node_pos     = .Right.LongissimusThoracisT3L3Via11Node_pos     * ..MirrorTransform;
    AnyFloat LongissimusThoracisT4L4Via10Node_pos     = .Right.LongissimusThoracisT4L4Via10Node_pos     * ..MirrorTransform;
    AnyFloat LongissimusThoracisT5L5Via9Node_pos      = .Right.LongissimusThoracisT5L5Via9Node_pos      * ..MirrorTransform;
    AnyFloat LongissimusThoracisT6S1Via8Node_pos      = .Right.LongissimusThoracisT6S1Via8Node_pos      * ..MirrorTransform;
    AnyFloat LongissimusThoracisT7S2Via7Node_pos      = .Right.LongissimusThoracisT7S2Via7Node_pos      * ..MirrorTransform;
    AnyFloat LongissimusThoracisT8S3Via6Node_pos      = .Right.LongissimusThoracisT8S3Via6Node_pos      * ..MirrorTransform;
    AnyFloat LongissimusThoracisT9S4Via5Node_pos      = .Right.LongissimusThoracisT9S4Via5Node_pos      * ..MirrorTransform;
    AnyFloat LongissimusThoracisT10S3Via4Node_pos = .Right.LongissimusThoracisT10S3Via4Node_pos * ..MirrorTransform;
    AnyFloat LongissimusThoracisT11S3Via3Node_pos = .Right.LongissimusThoracisT11S3Via3Node_pos * ..MirrorTransform;
    AnyFloat LongissimusThoracisT12S3Via2Node_pos = .Right.LongissimusThoracisT12S3Via2Node_pos * ..MirrorTransform;
    AnyFloat LongissimusThoracisR3L3Via11Node_pos     = .Right.LongissimusThoracisR3L3Via11Node_pos     * ..MirrorTransform;
    AnyFloat LongissimusThoracisR4L4Via10Node_pos     = .Right.LongissimusThoracisR4L4Via10Node_pos     * ..MirrorTransform;
    AnyFloat LongissimusThoracisR5L5Via9Node_pos      = .Right.LongissimusThoracisR5L5Via9Node_pos      * ..MirrorTransform;
    AnyFloat LongissimusThoracisR6S1Via8Node_pos      = .Right.LongissimusThoracisR6S1Via8Node_pos      * ..MirrorTransform;
    AnyFloat LongissimusThoracisR7S2Via7Node_pos      = .Right.LongissimusThoracisR7S2Via7Node_pos      * ..MirrorTransform;
    AnyFloat LongissimusThoracisR8S3Via6Node_pos      = .Right.LongissimusThoracisR8S3Via6Node_pos      * ..MirrorTransform;
    AnyFloat LongissimusThoracisR9S4Via5Node_pos      = .Right.LongissimusThoracisR9S4Via5Node_pos      * ..MirrorTransform;
    AnyFloat LongissimusThoracisR10S3Via4Node_pos = .Right.LongissimusThoracisR10S3Via4Node_pos * ..MirrorTransform;
    AnyFloat LongissimusThoracisR11S3Via3Node_pos = .Right.LongissimusThoracisR11S3Via3Node_pos * ..MirrorTransform;
    AnyFloat LongissimusThoracisR12S3Via2Node_pos = .Right.LongissimusThoracisR12S3Via2Node_pos * ..MirrorTransform;

    AnyFloat PsoasMajorL2_1Node_pos = .Right.PsoasMajorL2_1Node_pos * ..MirrorTransform;
    AnyFloat PsoasMajorL2_2Node_pos = .Right.PsoasMajorL2_2Node_pos * ..MirrorTransform;
    AnyFloat PsoasMajorT12Via1Node_pos = .Right.PsoasMajorT12Via1Node_pos * ..MirrorTransform;
    AnyFloat PsoasMajorL1_2Via1Node_pos  = .Right.PsoasMajorL1_2Via1Node_pos * ..MirrorTransform;
    AnyFloat QuadratusLumborumL2Node_pos = .Right.QuadratusLumborumL2Node_pos * ..MirrorTransform;
    AnyFloat ObliquusExternusR7Node_pos = .Right.ObliquusExternusR7Node_pos * ..MirrorTransform;
    AnyFloat ObliquusInternusRS1Node_pos = .Right.ObliquusInternusRS1Node_pos * ..MirrorTransform;
    AnyFloat MultifidusThoracisL2T9Node_pos = .Right.MultifidusThoracisL2T9Node_pos * ..MirrorTransform;
    AnyFloat MultifidusThoracisL2T10Node_pos = .Right.MultifidusThoracisL2T10Node_pos * ..MirrorTransform;
    AnyFloat MultifidusThoracisL2T11Node_pos = .Right.MultifidusThoracisL2T11Node_pos * ..MirrorTransform;
    AnyFloat ContactNode_pos = .Right.ContactNode_pos * ..MirrorTransform;
    AnyFloat O_serratus_posterior_inferior_pos = .Right.O_serratus_posterior_inferior_pos * ..MirrorTransform;
    AnyFloat O_serratus_posterior_inferior_L2R12ViaNodepos = .Right.O_serratus_posterior_inferior_L2R12ViaNodepos * ..MirrorTransform;

    AnyFloat DiaphragmNode1_pos     = .Right.DiaphragmNode1_pos * ..MirrorTransform;
    AnyFloat DiaphragmNode2_pos     = .Right.DiaphragmNode2_pos * ..MirrorTransform;

    #if BM_TRUNK_CAVITY_MODEL == _CAVITY_MODEL_VOLUME_
      AnyFloat Transversus_Ins_pos = .Right.Transversus_Ins_pos * ..MirrorTransform;
    #endif
    AnyFloat SuperiorEndplateNode_pos = .Right.SuperiorEndplateNode_pos * ..MirrorTransform;
    AnyFloat InferiorEndplateNode_pos = .Right.InferiorEndplateNode_pos * ..MirrorTransform;
  };
};
AnyFolder L1 = {
  AnyFloat sCoM_pos={0.031, 0.139, 0.000000};
  AnyFloat ScalingNode_pos = {0.0000000, 0.0000000, 0.0000000};
  AnyFloat L1L2JntNode_pos = {0.03400000, 0.1230000, 0.0000000};
  AnyFloat T12L1JntNode_pos = {0.02200000, 0.1540000, 0.0000000};
  AnyFloat LSNode_pos = {-0.01700000, 0.1060000, 0.0000000};
  AnyFloat LINodeInferior_pos = {-0.006000000, 0.1000000, 0.0000000};
  AnyFloat LINodeSuperior_pos = {-0.003000000, 0.1310000, 0.0000000};
  AnyFloat MidPoint_pos = {0.02800000, 0.1385000, 0.0000000};
  AnyFloat SupportNode_pos = {-0.01700000, 0.1085000, 0.0000000};
  AnyFloat BuckleContactNode_pos = {0.04800000, 0.1460000, 0.0000000};
  AnyFloat SuperiorEndplateAnteriorNode_pos = {0.039000, 0.157900, 0.000000};
  AnyFloat SuperiorEndplatePosteriorNode_pos = {0.017094, 0.149706, 0.000000};
  AnyFloat InferiorEndplateAnteriorNode_pos = {0.049638, 0.132982, 0.000000};
  AnyFloat InferiorEndplatePosteriorNode_pos = {0.021313, 0.120145, 0.000000};

  AnyFloat SpinalisL2T1Node_pos = {-0.019+0.005,0.106,0};
  AnyFloat SpinalisL1T2Node_pos = {-0.018+0.005,0.108,0};
  AnyFloat SpinalisL1T3Node_pos = {-0.01750000, 0.1144000, 0.0000000};
  AnyFloat SpinalisL1T4Node_pos = {-0.01770000, 0.1134000, 0.0000000};
  AnyFloat SpinalisL1T5Node_pos = {-0.01780000, 0.1124000, 0.0000000};

  AnyFolder Right = {
    AnyFloat MultifidusLumborumL1L3Node_pos = {-0.001000000, 0.1100000, 0.005000000};
    AnyFloat MultifidusLumborumL1L4Node_pos = {-0.005000000, 0.1060000, 0.005000000};
    AnyFloat MultifidusLumborumL1L5Node_pos = {-0.009000000, 0.1000000, 0.0000000};
    AnyFloat MultifidusLumborumL1S1Node_pos = {-0.009000000, 0.1000000, 0.0000000};
    AnyFloat MultifidusLumborumtL1ICNode_pos = {-0.009000000, 0.1000000, 0.0000000};

    // Erector Spinae Nodes
    AnyVec3 IliocostalisLumborumL1Node_pos = {0.002,0.136,0.034};
    AnyVec3 LongissimusThoracisL1ICNode_pos = {0.003,0.136,0.027};
    AnyVec3 LongissimusThoracisT1L1Node_pos = {-0.017,0.114,0.0};
    AnyVec3 LongissimusThoracisC1L1Node_pos = {-0.017,0.114,0.0};

    AnyFloat IliocostalisLumborumR5Via7Node_pos    = {.LSNode_pos[0]      ,.LSNode_pos[1],(..Thorax.Right.IliocostalisLumborumR5Node_pos[2]    - ..Thorax.IliocostalisLumborumR5Z   *(..Thorax.Right.IliocostalisLumborumR5Node_pos[1]    - .LSNode_pos[1]))};
    AnyFloat IliocostalisLumborumR6Via6Node_pos    = {.LSNode_pos[0]      ,.LSNode_pos[1],(..Thorax.Right.IliocostalisLumborumR6Node_pos[2]    - ..Thorax.IliocostalisLumborumR6Z   *(..Thorax.Right.IliocostalisLumborumR6Node_pos[1]    - .LSNode_pos[1]))};
    AnyFloat IliocostalisLumborumR7Via5Node_pos      = {.LSNode_pos[0]      ,.LSNode_pos[1],(..Thorax.Right.IliocostalisLumborumR7Node_pos[2]      - ..Thorax.IliocostalisLumborumR7Z     *(..Thorax.Right.IliocostalisLumborumR7Node_pos[1]      - .LSNode_pos[1]))};
    AnyFloat IliocostalisLumborumR8Via4Node_pos      = {.LSNode_pos[0]      ,.LSNode_pos[1],(..Thorax.Right.IliocostalisLumborumR8Node_pos[2]      - ..Thorax.IliocostalisLumborumR8Z     *(..Thorax.Right.IliocostalisLumborumR8Node_pos[1]      - .LSNode_pos[1]))};
    AnyFloat IliocostalisLumborumR9Via3Node_pos      = {.LSNode_pos[0]      ,.LSNode_pos[1],(..Thorax.Right.IliocostalisLumborumR9Node_pos[2]      - ..Thorax.IliocostalisLumborumR9Z     *(..Thorax.Right.IliocostalisLumborumR9Node_pos[1]      - .LSNode_pos[1]))};
    AnyFloat IliocostalisLumborumR10Via2Node_pos     = {.LSNode_pos[0]      ,.LSNode_pos[1],(..Thorax.Right.IliocostalisLumborumR10Node_pos[2]     - ..Thorax.IliocostalisLumborumR10Z    *(..Thorax.Right.IliocostalisLumborumR10Node_pos[1]     - .LSNode_pos[1]))};
    AnyFloat IliocostalisLumborumR11Via1Node_pos     = {.LSNode_pos[0]      ,.LSNode_pos[1],(..Thorax.Right.IliocostalisLumborumR11Node_pos[2]     - ..Thorax.IliocostalisLumborumR11Z    *(..Thorax.Right.IliocostalisLumborumR11Node_pos[1]     - .LSNode_pos[1]))};
    AnyFloat IliocostalisLumborumR12Via1Node_pos     = {.LSNode_pos[0]+0.01 ,.LSNode_pos[1],(..R12.Right.IliocostalisLumborumR12Node_pos[2]     - ..R12.IliocostalisLumborumR12Z    *(..R12.Right.IliocostalisLumborumR12Node_pos[1]     - .LSNode_pos[1]))};
    AnyFloat LongissimusThoracisT2L2Via11Node_pos     = {.LSNode_pos[0]+0.01 ,.LSNode_pos[1],(..Thorax.Right.LongissimusThoracisT2L2Node_pos[2]      - ..Thorax.LongissimusThoracisT2L2Z     *(..Thorax.Right.LongissimusThoracisT2L2Node_pos[1]      - .LSNode_pos[1]))};
    AnyFloat LongissimusThoracisT3L3Via10Node_pos     = {.LSNode_pos[0]+0.012,.LSNode_pos[1],(..Thorax.Right.LongissimusThoracisT3L3Node_pos[2]      - ..Thorax.LongissimusThoracisT3L3Z     *(..Thorax.Right.LongissimusThoracisT3L3Node_pos[1]      - .LSNode_pos[1]))};
    AnyFloat LongissimusThoracisT4L4Via9Node_pos      = {.LSNode_pos[0]+0.012,.LSNode_pos[1],(..Thorax.Right.LongissimusThoracisT4L4Node_pos[2]      - ..Thorax.LongissimusThoracisT4L4Z     *(..Thorax.Right.LongissimusThoracisT4L4Node_pos[1]      - .LSNode_pos[1]))};
    AnyFloat LongissimusThoracisT5L5Via8Node_pos      = {.LSNode_pos[0]+0.010,.LSNode_pos[1],(..Thorax.Right.LongissimusThoracisT5L5Node_pos[2]      - ..Thorax.LongissimusThoracisT5L5Z     *(..Thorax.Right.LongissimusThoracisT5L5Node_pos[1]      - .LSNode_pos[1]))};
    AnyFloat LongissimusThoracisT6S1Via7Node_pos      = {.LSNode_pos[0]+0.008,.LSNode_pos[1],(..Thorax.Right.LongissimusThoracisT6S1Node_pos[2]      - ..Thorax.LongissimusThoracisT6S1Z     *(..Thorax.Right.LongissimusThoracisT6S1Node_pos[1]      - .LSNode_pos[1]))};
    AnyFloat LongissimusThoracisT7S2Via6Node_pos      = {.LSNode_pos[0]+0.008,.LSNode_pos[1],(..Thorax.Right.LongissimusThoracisT7S2Node_pos[2]      - ..Thorax.LongissimusThoracisT7S2Z     *(..Thorax.Right.LongissimusThoracisT7S2Node_pos[1]      - .LSNode_pos[1]))};
    AnyFloat LongissimusThoracisT8S3Via5Node_pos      = {.LSNode_pos[0]+0.008,.LSNode_pos[1],(..Thorax.Right.LongissimusThoracisT8S3Node_pos[2]      - ..Thorax.LongissimusThoracisT8S3Z     *(..Thorax.Right.LongissimusThoracisT8S3Node_pos[1]      - .LSNode_pos[1]))};
    AnyFloat LongissimusThoracisT9S4Via4Node_pos      = {.LSNode_pos[0]+0.008,.LSNode_pos[1],(..Thorax.Right.LongissimusThoracisT9S4Node_pos[2]      - ..Thorax.LongissimusThoracisT9S4Z     *(..Thorax.Right.LongissimusThoracisT9S4Node_pos[1]      - .LSNode_pos[1]))};
    AnyFloat LongissimusThoracisT10S3Via3Node_pos = {.LSNode_pos[0]+0.008,.LSNode_pos[1],(..Thorax.Right.LongissimusThoracisT10S3Node_pos[2] - ..Thorax.LongissimusThoracisT10S3Z*(..Thorax.Right.LongissimusThoracisT10S3Node_pos[1] - .LSNode_pos[1]))};
    AnyFloat LongissimusThoracisT11S3Via2Node_pos = {.LSNode_pos[0]+0.008,.LSNode_pos[1],(..Thorax.Right.LongissimusThoracisT11S3Node_pos[2] - ..Thorax.LongissimusThoracisT11S3Z*(..Thorax.Right.LongissimusThoracisT11S3Node_pos[1] - .LSNode_pos[1]))};
    AnyFloat LongissimusThoracisT12S3Via1Node_pos = {.LSNode_pos[0]+0.010,.LSNode_pos[1],(..Thorax.Right.LongissimusThoracisT12S3Node_pos[2] - ..Thorax.LongissimusThoracisT12S3Z*(..Thorax.Right.LongissimusThoracisT12S3Node_pos[1] - .LSNode_pos[1]))};
    AnyFloat LongissimusThoracisR3L3Via10Node_pos     = {.LSNode_pos[0]+0.012,.LSNode_pos[1],(..Thorax.Right.LongissimusThoracisR3L3Node_pos[2]      - ..Thorax.LongissimusThoracisR3L3Z     *(..Thorax.Right.LongissimusThoracisR3L3Node_pos[1]      - .LSNode_pos[1]))};
    AnyFloat LongissimusThoracisR4L4Via9Node_pos      = {.LSNode_pos[0]+0.012,.LSNode_pos[1],(..Thorax.Right.LongissimusThoracisR4L4Node_pos[2]      - ..Thorax.LongissimusThoracisR4L4Z     *(..Thorax.Right.LongissimusThoracisR4L4Node_pos[1]      - .LSNode_pos[1]))};
    AnyFloat LongissimusThoracisR5L5Via8Node_pos      = {.LSNode_pos[0]+0.010,.LSNode_pos[1],(..Thorax.Right.LongissimusThoracisR5L5Node_pos[2]      - ..Thorax.LongissimusThoracisR5L5Z     *(..Thorax.Right.LongissimusThoracisR5L5Node_pos[1]      - .LSNode_pos[1]))};
    AnyFloat LongissimusThoracisR6S1Via7Node_pos      = {.LSNode_pos[0]+0.008,.LSNode_pos[1],(..Thorax.Right.LongissimusThoracisR6S1Node_pos[2]      - ..Thorax.LongissimusThoracisR6S1Z     *(..Thorax.Right.LongissimusThoracisR6S1Node_pos[1]      - .LSNode_pos[1]))};
    AnyFloat LongissimusThoracisR7S2Via6Node_pos      = {.LSNode_pos[0]+0.008,.LSNode_pos[1],(..Thorax.Right.LongissimusThoracisR7S2Node_pos[2]      - ..Thorax.LongissimusThoracisR7S2Z     *(..Thorax.Right.LongissimusThoracisR7S2Node_pos[1]      - .LSNode_pos[1]))};
    AnyFloat LongissimusThoracisR8S3Via5Node_pos      = {.LSNode_pos[0]+0.008,.LSNode_pos[1],(..Thorax.Right.LongissimusThoracisR8S3Node_pos[2]      - ..Thorax.LongissimusThoracisR8S3Z     *(..Thorax.Right.LongissimusThoracisR8S3Node_pos[1]      - .LSNode_pos[1]))};
    AnyFloat LongissimusThoracisR9S4Via4Node_pos      = {.LSNode_pos[0]+0.008,.LSNode_pos[1],(..Thorax.Right.LongissimusThoracisR9S4Node_pos[2]      - ..Thorax.LongissimusThoracisR9S4Z     *(..Thorax.Right.LongissimusThoracisR9S4Node_pos[1]      - .LSNode_pos[1]))};
    AnyFloat LongissimusThoracisR10S3Via3Node_pos = {.LSNode_pos[0]+0.008,.LSNode_pos[1],(..Thorax.Right.LongissimusThoracisR10S3Node_pos[2] - ..Thorax.LongissimusThoracisR10S3Z*(..Thorax.Right.LongissimusThoracisR10S3Node_pos[1] - .LSNode_pos[1]))};
    AnyFloat LongissimusThoracisR11S3Via2Node_pos = {.LSNode_pos[0]+0.008,.LSNode_pos[1],(..Thorax.Right.LongissimusThoracisR11S3Node_pos[2] - ..Thorax.LongissimusThoracisR11S3Z*(..Thorax.Right.LongissimusThoracisR11S3Node_pos[1] - .LSNode_pos[1]))};
    AnyFloat LongissimusThoracisR12S3Via1Node_pos = {.LSNode_pos[0]+0.010,.LSNode_pos[1],(..R12.Right.LongissimusThoracisR12S3Node_pos[2] - ..R12.LongissimusThoracisR12S3Z*(..R12.Right.LongissimusThoracisR12S3Node_pos[1] - .LSNode_pos[1]))};

    AnyVec3 PsoasMajorL1_1Node_pos = {0.054, 0.134, 0.022};
    AnyVec3 PsoasMajorL1_2Node_pos = {0.012,0.137,0.025};
    AnyFloat QuadratusLumborumL1Node_pos = {0.008000000, 0.1370000, 0.03200000};
    AnyFloat MultifidusThoracisL1T8Node_pos = {0.002000000, 0.1360000, 0.02300000};
    AnyFloat MultifidusThoracisL1T9Node_pos = {0.002000000, 0.1360000, 0.02300000};
    AnyFloat MultifidusThoracisL1T10Node_pos = {0.002000000, 0.1360000, 0.02300000};
    AnyFloat ContactNode_pos = {-0.02000000, 0.1000000, 0.05000000};
    AnyFloat O_LatissimusDorsi3_pos = {-0.02000000, 0.1385000, 0.0000000};
    AnyFloat SuperiorEndplateNode_pos = 0.5*(.SuperiorEndplateAnteriorNode_pos + .SuperiorEndplatePosteriorNode_pos) + {0,-0.000900,0.018800}; // Offset added manually to match the vertebra surface
    AnyFloat InferiorEndplateNode_pos = {0.033096, 0.129084, 0.021837};
    AnyFloat O_serratus_posterior_inferior_pos = {-0.02, 0.105 , 0.0};
    AnyFloat O_serratus_posterior_inferior_L1R11ViaNodepos = {-0.035, 0.14, 0.04};

    AnyFloat DiaphragmL1_3Node_pos     = {0.002, 0.136, 0.034};
    AnyFloat DiaphragmNode1_pos     = {0.042, 0.146, 0.014};
    AnyFloat DiaphragmNode2_pos     = {0.028, 0.1385, 0.022};

    #if BM_TRUNK_CAVITY_MODEL == _CAVITY_MODEL_VOLUME_
      AnyFloat Transversus_Ins_pos = {0.008000000, 0.1370000, 0.03200000};
    #endif
    AnyFloat ICSpringSupNode_pos = ..R12.Right.ICSpringInfNodeL1_pos;
  };

  AnyFolder Left = {
    AnyFloat MultifidusLumborumL1L3Node_pos = .Right.MultifidusLumborumL1L3Node_pos * ..MirrorTransform;
    AnyFloat MultifidusLumborumL1L4Node_pos = .Right.MultifidusLumborumL1L4Node_pos * ..MirrorTransform;
    AnyFloat MultifidusLumborumL1L5Node_pos = .Right.MultifidusLumborumL1L5Node_pos * ..MirrorTransform;
    AnyFloat MultifidusLumborumL1S1Node_pos = .Right.MultifidusLumborumL1S1Node_pos * ..MirrorTransform;
    AnyFloat MultifidusLumborumtL1ICNode_pos = .Right.MultifidusLumborumtL1ICNode_pos * ..MirrorTransform;
    AnyFloat IliocostalisLumborumL1Node_pos          = .Right.IliocostalisLumborumL1Node_pos         * ..MirrorTransform;
    AnyFloat LongissimusThoracisL1ICNode_pos        = .Right.LongissimusThoracisL1ICNode_pos       * ..MirrorTransform;
    AnyFloat LongissimusThoracisT1L1Node_pos          = .Right.LongissimusThoracisT1L1Node_pos         * ..MirrorTransform;
    AnyFloat LongissimusThoracisC1L1Node_pos          = .Right.LongissimusThoracisC1L1Node_pos         * ..MirrorTransform;
    AnyFloat IliocostalisLumborumR5Via7Node_pos    = .Right.IliocostalisLumborumR5Via7Node_pos   * ..MirrorTransform;
    AnyFloat IliocostalisLumborumR6Via6Node_pos    = .Right.IliocostalisLumborumR6Via6Node_pos   * ..MirrorTransform;
    AnyFloat IliocostalisLumborumR7Via5Node_pos      = .Right.IliocostalisLumborumR7Via5Node_pos     * ..MirrorTransform;
    AnyFloat IliocostalisLumborumR8Via4Node_pos      = .Right.IliocostalisLumborumR8Via4Node_pos     * ..MirrorTransform;
    AnyFloat IliocostalisLumborumR9Via3Node_pos      = .Right.IliocostalisLumborumR9Via3Node_pos     * ..MirrorTransform;
    AnyFloat IliocostalisLumborumR10Via2Node_pos     = .Right.IliocostalisLumborumR10Via2Node_pos    * ..MirrorTransform;
    AnyFloat IliocostalisLumborumR11Via1Node_pos     = .Right.IliocostalisLumborumR11Via1Node_pos    * ..MirrorTransform;
    AnyFloat IliocostalisLumborumR12Via1Node_pos     = .Right.IliocostalisLumborumR12Via1Node_pos    * ..MirrorTransform;
    AnyFloat LongissimusThoracisT2L2Via11Node_pos     = .Right.LongissimusThoracisT2L2Via11Node_pos    * ..MirrorTransform;
    AnyFloat LongissimusThoracisT3L3Via10Node_pos     = .Right.LongissimusThoracisT3L3Via10Node_pos    * ..MirrorTransform;
    AnyFloat LongissimusThoracisT4L4Via9Node_pos      = .Right.LongissimusThoracisT4L4Via9Node_pos     * ..MirrorTransform;
    AnyFloat LongissimusThoracisT5L5Via8Node_pos      = .Right.LongissimusThoracisT5L5Via8Node_pos     * ..MirrorTransform;
    AnyFloat LongissimusThoracisT6S1Via7Node_pos      = .Right.LongissimusThoracisT6S1Via7Node_pos     * ..MirrorTransform;
    AnyFloat LongissimusThoracisT7S2Via6Node_pos      = .Right.LongissimusThoracisT7S2Via6Node_pos     * ..MirrorTransform;
    AnyFloat LongissimusThoracisT8S3Via5Node_pos      = .Right.LongissimusThoracisT8S3Via5Node_pos     * ..MirrorTransform;
    AnyFloat LongissimusThoracisT9S4Via4Node_pos      = .Right.LongissimusThoracisT9S4Via4Node_pos     * ..MirrorTransform;
    AnyFloat LongissimusThoracisT10S3Via3Node_pos = .Right.LongissimusThoracisT10S3Via3Node_pos* ..MirrorTransform;
    AnyFloat LongissimusThoracisT11S3Via2Node_pos = .Right.LongissimusThoracisT11S3Via2Node_pos* ..MirrorTransform;
    AnyFloat LongissimusThoracisT12S3Via1Node_pos = .Right.LongissimusThoracisT12S3Via1Node_pos* ..MirrorTransform;
    AnyFloat LongissimusThoracisR3L3Via10Node_pos     = .Right.LongissimusThoracisR3L3Via10Node_pos    * ..MirrorTransform;
    AnyFloat LongissimusThoracisR4L4Via9Node_pos      = .Right.LongissimusThoracisR4L4Via9Node_pos     * ..MirrorTransform;
    AnyFloat LongissimusThoracisR5L5Via8Node_pos      = .Right.LongissimusThoracisR5L5Via8Node_pos     * ..MirrorTransform;
    AnyFloat LongissimusThoracisR6S1Via7Node_pos      = .Right.LongissimusThoracisR6S1Via7Node_pos     * ..MirrorTransform;
    AnyFloat LongissimusThoracisR7S2Via6Node_pos      = .Right.LongissimusThoracisR7S2Via6Node_pos     * ..MirrorTransform;
    AnyFloat LongissimusThoracisR8S3Via5Node_pos      = .Right.LongissimusThoracisR8S3Via5Node_pos     * ..MirrorTransform;
    AnyFloat LongissimusThoracisR9S4Via4Node_pos      = .Right.LongissimusThoracisR9S4Via4Node_pos     * ..MirrorTransform;
    AnyFloat LongissimusThoracisR10S3Via3Node_pos = .Right.LongissimusThoracisR10S3Via3Node_pos* ..MirrorTransform;
    AnyFloat LongissimusThoracisR11S3Via2Node_pos = .Right.LongissimusThoracisR11S3Via2Node_pos* ..MirrorTransform;
    AnyFloat LongissimusThoracisR12S3Via1Node_pos = .Right.LongissimusThoracisR12S3Via1Node_pos* ..MirrorTransform;

    AnyFloat PsoasMajorL1_1Node_pos = .Right.PsoasMajorL1_1Node_pos * ..MirrorTransform;
    AnyFloat PsoasMajorL1_2Node_pos = .Right.PsoasMajorL1_2Node_pos * ..MirrorTransform;

    AnyFloat QuadratusLumborumL1Node_pos = .Right.QuadratusLumborumL1Node_pos * ..MirrorTransform;
    AnyFloat ContactNode_pos = .Right.ContactNode_pos * ..MirrorTransform;
    AnyFloat MultifidusThoracisL1T8Node_pos = .Right.MultifidusThoracisL1T8Node_pos * ..MirrorTransform;
    AnyFloat MultifidusThoracisL1T9Node_pos = .Right.MultifidusThoracisL1T9Node_pos * ..MirrorTransform;
    AnyFloat MultifidusThoracisL1T10Node_pos = .Right.MultifidusThoracisL1T10Node_pos * ..MirrorTransform;
    AnyFloat O_LatissimusDorsi3_pos = .Right.O_LatissimusDorsi3_pos * ..MirrorTransform;
    AnyFloat O_serratus_posterior_inferior_pos = .Right.O_serratus_posterior_inferior_pos * ..MirrorTransform;
    AnyFloat O_serratus_posterior_inferior_L1R11ViaNodepos = .Right.O_serratus_posterior_inferior_L1R11ViaNodepos * ..MirrorTransform;

    AnyFloat DiaphragmL1_3Node_pos     = .Right.DiaphragmL1_3Node_pos * ..MirrorTransform;
    AnyFloat DiaphragmNode1_pos     = .Right.DiaphragmNode1_pos * ..MirrorTransform;
    AnyFloat DiaphragmNode2_pos     = .Right.DiaphragmNode2_pos * ..MirrorTransform;

    #if BM_TRUNK_CAVITY_MODEL == _CAVITY_MODEL_VOLUME_
      AnyFloat Transversus_Ins_pos = .Right.Transversus_Ins_pos * ..MirrorTransform;
    #endif
    AnyFloat ICSpringSupNode_pos = .Right.ICSpringSupNode_pos * ..MirrorTransform;
    AnyFloat SuperiorEndplateNode_pos = .Right.SuperiorEndplateNode_pos * ..MirrorTransform;
    AnyFloat InferiorEndplateNode_pos = .Right.InferiorEndplateNode_pos * ..MirrorTransform;
  };
};

// Definition of lumbar ligament attachment points
L1 = {
  // anterior longitudinal
  AnyMatrix AnteriorLongitudinal_inferior_points = {
    {0.047023423, 0.13314389, 0.015158961}, // 0
    {0.049201488, 0.13443066, 0.011142779}, // 1
    {0.050281875, 0.13469201, 0.0058461842}, // 2
    {0.050298702, 0.13466747, 0.0011466908}, // 3
    {0.050298702, 0.13466747, -0.0011466908}, // 7
    {0.050281875, 0.13469201, -0.0058461842}, // 6
    {0.049201488, 0.13443066, -0.011142779}, // 5
    {0.047023423, 0.13314389, -0.015158961} // 4
  };
    AnyMatrix AnteriorLongitudinal_superior_points = {
    {0.038520508, 0.15488319, 0.016360506}, // 0
    {0.041336741, 0.15616389, 0.011422847}, // 1
    {0.04203511, 0.15696719, 0.0070037721}, // 2
    {0.042445414, 0.15703242, 0.0014277771}, // 3
    {0.042445414, 0.15703242, -0.0014277771}, // 7
    {0.04203511, 0.15696719, -0.0070037721}, // 6
    {0.041336741, 0.15616389, -0.011422847}, // 5
    {0.038520508, 0.15488319, -0.016360506} // 4
  };

  // posterior longitudinal
  AnyMatrix PosteriorLongitudinal_inferior_points = {
    {0.020879447, 0.12066731, -0.012219477}, // 0
    {0.020960229, 0.12063493, -0.008610501}, // 1
    {0.021096209, 0.12036339, -0.0049696555}, // 2
    {0.020995678, 0.12054596, -0.00136789}, // 3
    {0.020995678, 0.12054596, 0.00136789}, // 7
    {0.021096209, 0.12036339, 0.0049696555}, // 6
    {0.020960229, 0.12063493, 0.008610501}, // 5
    {0.020879447, 0.12066731, 0.012219477} // 4
  };
    AnyMatrix PosteriorLongitudinal_superior_points = {
    {0.0095952041, 0.14566527, -0.0084417816}, // 0
    {0.011125911, 0.1456704, -0.006576601}, // 1
    {0.011826912, 0.14546385, -0.0038296275}, // 2
    {0.012168388, 0.14538944, -0.00090140203}, // 3
    {0.012168388, 0.14538944, 0.00090140203}, // 7
    {0.011826912, 0.14546385, 0.0038296275}, // 6
    {0.011125911, 0.1456704, 0.006576601}, // 5
    {0.0095952041, 0.14566527, 0.0084417816} // 4
  };

  AnyMatrix InterSpinous_inferior_points = {
    {-0.007475, 0.100604, 0.0},
    {-0.003800, 0.102218, 0.0},
    {-0.000644, 0.104679, 0.0},
  };
  AnyMatrix InterSpinous_superior_points = {

{-0.007132, 0.121145, 0.0},
{-0.005593, 0.124462, 0.0},
{-0.002815, 0.129300, 0.0},
};
  AnyMatrix SupraSpinous_inferior_points = {
    {-0.015987, 0.105321, 0.0},
    {-0.013163, 0.101991, 0.0},
    {-0.009921, 0.100612, 0.0},
  };
  AnyMatrix SupraSpinous_superior_points = {
{-0.015437, 0.103828, 0.0},
{-0.015783, 0.109454, 0.0},
{-0.013965, 0.114495, 0.0},
{-0.009360, 0.117751, 0.0},
};


  Right = {
    // ligamenta flavia (right/left)
    #ifdef OLD_FLAVUM
    AnyMatrix Flavum_inferior_points = {
      {0.0097889742, 0.11036516, 0.0088975653}, // 0
      {0.0083234906, 0.11170295, 0.0061299442}, // 1
      {0.0064946758, 0.11102886, 0.0037238491}, // 2
      {0.0039557745, 0.10894828, 0.0019159636}, // 3
      {0.003133039, 0.10830244, 0.00040198895} // 4
    };
    #else

    AnyMatrix Flavum_inferior_points = {
      {0.011831, 0.116989, 0.008524},
      {0.011078, 0.115957, 0.006663},
      {0.009435, 0.114380, 0.004823},
      {0.006911, 0.112834, 0.002476},
      {0.005296, 0.112169, 0.000248},
    };
    #endif
      AnyMatrix Flavum_superior_points = {
      {0.001752601, 0.14173491, 0.0098858634}, // 5
      {0.0017350145, 0.13798605, 0.0086812088}, // 6
      {0.00098915026, 0.135795, 0.0065331794}, // 7
      {-0.00024488091, 0.1335507, 0.0040505133}, // 8
      {-0.0016335803, 0.13099584, 0.00062834687} // 9
    };
    AnyMatrix InterTransverse_inferior_points = {
      {0.0048557948, 0.13405992, 0.032459691}, // 0
      {0.0064373696, 0.13417189, 0.030940562}, // 1
      {0.0076448121, 0.13381742, 0.028890738}, // 2
      {0.0081309574, 0.13360454, 0.027430074} // 3
    };
    AnyMatrix InterTransverse_superior_points = {
      {0.0022267541, 0.13921584, 0.031801593}, // 4
      {0.0033100559, 0.13978811, 0.030458629}, // 5
      {0.0039770845, 0.1401622, 0.029544018}, // 6
      {0.0043605329, 0.1407138, 0.028420486} // 7
    };

    AnyMatrix FacetCapsule_inferior_points = {
{0.005338, 0.119949, 0.015060},
{0.002261, 0.118638, 0.015964},
{0.000769, 0.117068, 0.012732},
{-0.000930, 0.114427, 0.009615},
{0.000489, 0.111235, 0.007566},
{0.003699, 0.110130, 0.004154},
{0.007257, 0.113053, 0.002869},
{0.009990, 0.117536, 0.004797},
{0.011186, 0.121144, 0.007838},
{0.011097, 0.121924, 0.011680},
{0.007730, 0.121286, 0.013723},
    };


    AnyMatrix FacetCapsule_superior_points = {
{0.001896, 0.145346, 0.018682},
{-0.001777, 0.142509, 0.020915},
{-0.004541, 0.139056, 0.020962},
{-0.002967, 0.135031, 0.019363},
{0.000197, 0.132933, 0.014657},
{-0.000056, 0.130250, 0.010757},
{-0.000251, 0.132532, 0.006386},
{0.002121, 0.135726, 0.005101},
{0.006069, 0.140535, 0.008245},
{0.004960, 0.145082, 0.009162},
{0.004938, 0.147686, 0.012732},
{0.003699, 0.146855, 0.016048},
    };

  };

  Left =  {
    AnyMatrix Flavum_inferior_points = .Right.Flavum_inferior_points * ..MirrorTransform;
    AnyMatrix Flavum_superior_points = .Right.Flavum_superior_points * ..MirrorTransform;
    AnyMatrix InterTransverse_inferior_points = .Right.InterTransverse_inferior_points * ..MirrorTransform;
    AnyMatrix InterTransverse_superior_points = .Right.InterTransverse_superior_points * ..MirrorTransform;
    AnyMatrix FacetCapsule_inferior_points = .Right.FacetCapsule_inferior_points * ..MirrorTransform;
    AnyMatrix FacetCapsule_superior_points = .Right.FacetCapsule_superior_points * ..MirrorTransform;
  };
};

L2 = {
  // anterior longitudinal
  AnyMatrix AnteriorLongitudinal_inferior_points = {
    {0.057574548, 0.103331, 0.015957423}, // 0
    {0.06081355, 0.10435115, 0.011085059}, // 1
    {0.061545856, 0.10322668, 0.0068594054}, // 2
    {0.06128278, 0.10216186, 0.0016252897}, // 3
    {0.06128278, 0.10216186, -0.0016252897}, // 7
    {0.061545856, 0.10322668, -0.0068594054}, // 6
    {0.06081355, 0.10435115, -0.011085059}, // 5
    {0.057574548, 0.103331, -0.015957423} // 4
  };
    AnyMatrix AnteriorLongitudinal_superior_points = {
    {0.048779089, 0.124726, 0.017250992}, // 4
    {0.051316414, 0.12601379, 0.013108321}, // 5
    {0.052899424, 0.1267536, 0.0077213952}, // 6
    {0.053192284, 0.12713107, 0.0012184896}, // 7
    {0.053192284, 0.12713107, -0.0012184896}, // 11
    {0.052899424, 0.1267536, -0.0077213952}, // 10
    {0.051316414, 0.12601379, -0.013108321}, // 9
    {0.048779089, 0.124726, -0.017250992} // 8
  };

  // posterior longitudinal
  AnyMatrix PosteriorLongitudinal_inferior_points = {
    {0.032579586, 0.093684964, -0.012520878}, // 0
    {0.032808624, 0.093541488, -0.00852881}, // 1
    {0.032922719, 0.093404219, -0.0046688416}, // 2
    {0.032938331, 0.093479075, -0.00096608041}, // 3
    {0.032938331, 0.093479075, 0.00096608041}, // 7
    {0.032922719, 0.093404219, 0.0046688416}, // 6
    {0.032808624, 0.093541488, 0.00852881}, // 5
    {0.032579586, 0.093684964, 0.012520878} // 4
  };
    AnyMatrix PosteriorLongitudinal_superior_points = {
    {0.021187386, 0.1149239, -0.0082797548}, // 4
    {0.022559147, 0.11514565, -0.0061075049}, // 5
    {0.023205342, 0.1147256, -0.0030627798}, // 6
    {0.023467895, 0.11478723, -0.00076327898}, // 7
    {0.023467895, 0.11478723, 0.00076327898}, // 11
    {0.023205342, 0.1147256, 0.0030627798}, // 10
    {0.022559147, 0.11514565, 0.0061075049}, // 9
    {0.021187386, 0.1149239, 0.0082797548} // 8
  };

  AnyMatrix InterSpinous_superior_points = {

{0.005202, 0.092492, 0.0},
{0.007173, 0.095690, 0.0},
{0.009888, 0.099645, 0.0},
};
  AnyMatrix InterSpinous_inferior_points = {
    {0.003844, 0.069562, 0.0},
    {0.006841, 0.070345, 0.0},
    {0.009328, 0.072295, 0.0},
  };
  AnyMatrix SupraSpinous_inferior_points = {
    {-0.004195, 0.075553, 0.0},
    {-0.003141, 0.072027, 0.0},
    {-0.000862, 0.070245, 0.0},
  };
  AnyMatrix SupraSpinous_superior_points = {
{-0.003050, 0.073102, 0.0},
{-0.003467, 0.078475, 0.0},
{-0.001492, 0.084101, 0.0},
{0.002498, 0.087810, 0.0},
  };

  Right = {
    #ifdef OLD_FLAVUM
    AnyMatrix Flavum_inferior_points = {
      {0.019622432, 0.080720164, 0.0050937855}, // 0
      {0.017806701, 0.079342641, 0.0036593869}, // 1
      {0.015771376, 0.077405073, 0.0021995467}, // 2
      {0.014282648, 0.075969152, 0.00096979801}, // 3
      {0.014020124, 0.075628534, 0.00026983305} // 4
    };
    #else
    AnyMatrix Flavum_inferior_points = {
      {0.022761, 0.090296, 0.007115},
      {0.022071, 0.089342, 0.005302},
      {0.021297, 0.088565, 0.003843},
      {0.020107, 0.087595, 0.002157},
      {0.019015, 0.086109, 0.000074},
    };
    #endif
      AnyMatrix Flavum_superior_points = {
      {0.012899628, 0.10910523, 0.0099896509}, // 0
      {0.013091916, 0.10638189, 0.0082912184}, // 1
      {0.012033239, 0.10363468, 0.0058237538}, // 2
      {0.010866416, 0.10143732, 0.0032887799}, // 3
      {0.010244204, 0.099979073, 0.00086072885} // 4
    };
    AnyMatrix InterTransverse_inferior_points = {
      {0.01603917, 0.10271169, 0.03237262}, // 0
      {0.017491501, 0.10284663, 0.031195937}, // 1
      {0.018932857, 0.10292166, 0.029377453} // 2
    };
    AnyMatrix InterTransverse_superior_points = {
      {0.013602033, 0.10806194, 0.031771947}, // 3
      {0.015320526, 0.1087049, 0.030115142}, // 4
      {0.016047345, 0.10949369, 0.028233146} // 5
    };
    AnyFloat ICSpringSupNode_pos = ..R12.Right.ICSpringInfNodeL2_pos;

    AnyMatrix FacetCapsule_inferior_points = {

{0.017939, 0.095179, 0.014751},
{0.015469, 0.094565, 0.015420},
{0.012012, 0.092860, 0.012324},
{0.010451, 0.087656, 0.009221},
{0.010207, 0.082362, 0.008492},
{0.012951, 0.079848, 0.007476},
{0.017429, 0.080097, 0.005972},
{0.020398, 0.081010, 0.005429},
{0.022212, 0.085349, 0.005234},
{0.022635, 0.089497, 0.006471},
{0.023079, 0.093856, 0.009950},
{0.020384, 0.094767, 0.013036},

    };


    AnyMatrix FacetCapsule_superior_points = {
{0.013275, 0.114236, 0.018601},
{0.009705, 0.111902, 0.020499},
{0.006677, 0.107576, 0.020994},
{0.006156, 0.103674, 0.017797},
{0.009996, 0.102474, 0.014651},
{0.011818, 0.101051, 0.010302},
{0.012097, 0.103466, 0.007557},
{0.015095, 0.105748, 0.006137},
{0.017216, 0.109975, 0.008506},
{0.017045, 0.114729, 0.009368},
{0.016847, 0.115987, 0.013636},
{0.015658, 0.115089, 0.016271},
    };
  };

  Left = {
    AnyMatrix Flavum_inferior_points = .Right.Flavum_inferior_points * ..MirrorTransform;
    AnyMatrix Flavum_superior_points = .Right.Flavum_superior_points * ..MirrorTransform;
    AnyMatrix InterTransverse_inferior_points = .Right.InterTransverse_inferior_points * ..MirrorTransform;
    AnyMatrix InterTransverse_superior_points = .Right.InterTransverse_superior_points * ..MirrorTransform;
    AnyFloat ICSpringSupNode_pos = .Right.ICSpringSupNode_pos * ..MirrorTransform;
    AnyMatrix FacetCapsule_inferior_points = .Right.FacetCapsule_inferior_points * ..MirrorTransform;
    AnyMatrix FacetCapsule_superior_points = .Right.FacetCapsule_superior_points * ..MirrorTransform;
  };
};

L3 = {
  // anterior longitudional
  AnyMatrix AnteriorLongitudinal_inferior_points = {
    {0.064751141, 0.069510028, 0.016383927}, // 0
    {0.067858376, 0.070028305, 0.01156163}, // 1
    {0.0685829, 0.069427527, 0.0075530852}, // 2
    {0.068260536, 0.068317875, 0.0022649057}, // 3
    {0.068260536, 0.068317875, -0.0022649057}, // 7
    {0.0685829, 0.069427527, -0.0075530852}, // 6
    {0.067858376, 0.070028305, -0.01156163}, // 5
    {0.064751141, 0.069510028, -0.016383927} // 4
  };
    AnyMatrix AnteriorLongitudinal_superior_points = {
    {0.059243083, 0.093249924, 0.017298907}, // 4
    {0.062423404, 0.093757123, 0.012446389}, // 5
    {0.063381687, 0.094687454, 0.0077703795}, // 6
    {0.063759431, 0.094925031, 0.0016529131}, // 7
    {0.063759431, 0.094925031, -0.0016529131}, // 11
    {0.063381687, 0.094687454, -0.0077703795}, // 10
    {0.062423404, 0.093757123, -0.012446389}, // 9
    {0.059243083, 0.093249924, -0.017298907} // 8
  };

  // posterior longitudional
  AnyMatrix PosteriorLongitudinal_inferior_points = {
    {0.036548797, 0.064536892, -0.012924769}, // 0
    {0.036761422, 0.064286582, -0.0098371729}, // 1
    {0.036977906, 0.064021297, -0.0060260394}, // 2
    {0.037168365, 0.063990258, -0.0014947631}, // 3
    {0.037168365, 0.063990258, 0.0014947631}, // 7
    {0.036977906, 0.064021297, 0.0060260394}, // 6
    {0.036761422, 0.064286582, 0.0098371729}, // 5
    {0.036548797, 0.064536892, 0.012924769} // 4
  };
    AnyMatrix PosteriorLongitudinal_superior_points = {
    {0.029360047, 0.088355638, -0.0085826013}, // 0
    {0.030877311, 0.088215783, -0.006242143}, // 1
    {0.031524524, 0.088148654, -0.003427767}, // 2
    {0.031688239, 0.087935388, -0.0005751882}, // 3
    {0.031688239, 0.087935388, 0.0005751882}, // 7
    {0.031524524, 0.088148654, 0.003427767}, // 6
    {0.030877311, 0.088215783, 0.006242143}, // 5
    {0.029360047, 0.088355638, 0.0085826013} // 4
  };

  AnyMatrix InterSpinous_inferior_points = {

{0.004993, 0.044303, 0.0},
{0.008916, 0.045162, 0.0},
{0.012380, 0.047194, 0.0},
};
  AnyMatrix InterSpinous_superior_points = {
{0.008595, 0.066852, 0.0},
{0.011721, 0.070826, 0.0},
{0.015240, 0.074320, 0.0},  };
  AnyMatrix SupraSpinous_inferior_points = {
    {-0.002543, 0.051873, 0.0},
    {-0.001623, 0.048143, 0.0},
    {0.000860, 0.045755, 0.0},
  };
  AnyMatrix SupraSpinous_superior_points = {
{-0.002195, 0.048382, 0.0},
{-0.001912, 0.053884, 0.0},
{0.000338, 0.059384, 0.0},
{0.005740, 0.063593, 0.0},
};

  Right = {
    #ifdef OLD_FLAVUM
    AnyMatrix Flavum_inferior_points = {
      {0.024466364, 0.052550077, 0.0080694333}, // 0
      {0.02291373, 0.05317799, 0.0065821758}, // 1
      {0.020722484, 0.052706726, 0.0044235853}, // 2
      {0.018261207, 0.051238552, 0.0027986497}, // 3
      {0.016405454, 0.049768522, 0.00098359759} // 4
    };
  #else
  AnyMatrix Flavum_inferior_points = {

    {0.027204, 0.062323, 0.007878},
    {0.026468, 0.061512, 0.006249},
    {0.025516, 0.060281, 0.004538},
    {0.023909, 0.059109, 0.002823},
    {0.022043, 0.057718, 0.000513},
  };
  #endif
      AnyMatrix Flavum_superior_points = {
      {0.019096829, 0.079239942, 0.0065340018}, // 5
      {0.017757267, 0.077524535, 0.0048216674}, // 6
      {0.016822493, 0.07630682, 0.0033755007}, // 7
      {0.015990833, 0.07522276, 0.002084167}, // 8
      {0.015641062, 0.074678175, 0.0011176565}, // 9
      {0.015616021, 0.074666984, 0.00034928389} // 10
    };
    AnyMatrix InterTransverse_inferior_points = {
      {0.022487836, 0.076806992, 0.033712227}, // 0
      {0.023522975, 0.076336168, 0.032357439}, // 1
      {0.024718681, 0.076081298, 0.030200958} // 2
    };
    AnyMatrix InterTransverse_superior_points = {
      {0.020607835, 0.082357883, 0.032497942}, // 3
      {0.022314627, 0.082837954, 0.030877151}, // 4
      {0.022839215, 0.083622307, 0.028859552} // 5
    };
    AnyFloat ICSpringSupNode_pos = ..R12.Right.ICSpringInfNodeL3_pos;

    AnyMatrix FacetCapsule_inferior_points = {
{0.022063, 0.068334, 0.015574},
{0.018587, 0.067377, 0.015015},
{0.016218, 0.065874, 0.012380},
{0.014298, 0.062682, 0.009563},
{0.013075, 0.059565, 0.009313},
{0.013304, 0.054791, 0.007945},
{0.016260, 0.053251, 0.006149},
{0.022710, 0.053806, 0.004743},
{0.025409, 0.057420, 0.005275},
{0.026735, 0.062848, 0.006774},
{0.027601, 0.068040, 0.011113},
{0.024608, 0.068520, 0.014155},

    };


    AnyMatrix FacetCapsule_superior_points = {
{0.023917, 0.088143, 0.017903},
{0.019054, 0.087413, 0.020758},
{0.011812, 0.082707, 0.021645},
{0.014573, 0.078033, 0.017366},
{0.017303, 0.075192, 0.011250},
{0.017438, 0.077132, 0.004796},
{0.022650, 0.077133, 0.004651},
{0.028999, 0.078612, 0.008805},
{0.029784, 0.084032, 0.009822},
{0.027025, 0.089411, 0.010177},
{0.025309, 0.089107, 0.014765},

};


  };

  Left = {
    AnyMatrix Flavum_inferior_points = .Right.Flavum_inferior_points * ..MirrorTransform;
    AnyMatrix Flavum_superior_points = .Right.Flavum_superior_points * ..MirrorTransform;
    AnyMatrix InterTransverse_inferior_points = .Right.InterTransverse_inferior_points * ..MirrorTransform;
    AnyMatrix InterTransverse_superior_points = .Right.InterTransverse_superior_points * ..MirrorTransform;
    AnyFloat ICSpringSupNode_pos = .Right.ICSpringSupNode_pos * ..MirrorTransform;
    AnyMatrix FacetCapsule_inferior_points = .Right.FacetCapsule_inferior_points * ..MirrorTransform;
    AnyMatrix FacetCapsule_superior_points = .Right.FacetCapsule_superior_points * ..MirrorTransform;
  };
};

L4 = {
  // anterior longitudinal
  AnyMatrix AnteriorLongitudinal_inferior_points = {
    {0.065665372, 0.032070912, 0.018576818}, // 0
    {0.070632696, 0.031425372, 0.013452207}, // 1
    {0.072335616, 0.031230655, 0.0081747118}, // 2
    {0.071089149, 0.028961115, 0.002217625}, // 3
    {0.071089149, 0.028961115, -0.002217625}, // 7
    {0.072335616, 0.031230655, -0.0081747118}, // 6
    {0.070632696, 0.031425372, -0.013452207}, // 5
    {0.065665372, 0.032070912, -0.018576818} // 4
  };
  AnyMatrix AnteriorLongitudinal_superior_points = {
    {0.066368327, 0.055918574, 0.018168697}, // 4
    {0.068831086, 0.055986334, 0.014068062}, // 5
    {0.070808627, 0.056038741, 0.0089828102}, // 6
    {0.071375117, 0.056263931, 0.0024006092}, // 7
    {0.071375117, 0.056263931, -0.0024006092}, // 11
    {0.070808627, 0.056038741, -0.0089828102}, // 10
    {0.068831086, 0.055986334, -0.014068062}, // 9
    {0.066368327, 0.055918574, -0.018168697} // 8
  };

  // posterior longitudinal
  AnyMatrix PosteriorLongitudinal_inferior_points = {
    {0.039065938, 0.03291709, -0.013164748}, // 0
    {0.039181635, 0.032807872, -0.0097954422}, // 1
    {0.039280057, 0.032721311, -0.0068495111}, // 2
    {0.039276872, 0.032724351, -0.0035454019}, // 3
    {0.039287318, 0.032798454, -0.00086226425}, // 4
    {0.039287318, 0.032798454, 0.00086226425}, // 9
    {0.039276872, 0.032724351, 0.0035454019}, // 8
    {0.039280057, 0.032721311, 0.0068495111}, // 7
    {0.039181635, 0.032807872, 0.0097954422}, // 6
    {0.039065938, 0.03291709, 0.013164748} // 5
  };
  AnyMatrix PosteriorLongitudinal_superior_points = {
    {0.035626598, 0.057991546, -0.0090697315}, // 5
    {0.037545022, 0.057346791, -0.0070020244}, // 6
    {0.038186558, 0.056843974, -0.0042984975}, // 7
    {0.038637511, 0.056488819, -0.00097088201}, // 8
    {0.038637511, 0.056488819, 0.00097088201}, // 12
    {0.038186558, 0.056843974, 0.0042984975}, // 11
    {0.037545022, 0.057346791, 0.0070020244}, // 10
    {0.035626598, 0.057991546, 0.0090697315} // 9
  };

  AnyMatrix InterSpinous_inferior_points = {
    {0.002746, 0.021229, 0.0},
    {0.005769, 0.020719, 0.0},
    {0.009972, 0.021425, 0.0},
  };
  AnyMatrix InterSpinous_superior_points = {
{0.010171, 0.040665, 0.0},
{0.014068, 0.043998, 0.0},
{0.019835, 0.047836, 0.0},
};
  AnyMatrix SupraSpinous_inferior_points = {
    {-0.002019, 0.027196, 0.0},
    {-0.000782, 0.024175, 0.0},
    {0.000311, 0.022353, 0.0},
  };
  AnyMatrix SupraSpinous_superior_points = {
{-0.002594, 0.026362, 0.0},
{-0.001296, 0.031990, 0.0},
{0.002352, 0.037065, 0.0},
{0.006356, 0.038927, 0.0},  };

  Right = {
    #ifdef OLD_FLAVUM
    AnyMatrix Flavum_inferior_points = {
      {0.023693217, 0.024466598, 0.0081655439}, // 0
      {0.023213774, 0.025568275, 0.0066028447}, // 1
      {0.021332877, 0.025901265, 0.0051220106}, // 2
      {0.018166002, 0.024882436, 0.0030279283} // 3
    };
  #else
  AnyMatrix Flavum_inferior_points = {

    {0.029380, 0.032176, 0.008844},
    {0.028506, 0.031980, 0.006864},
    {0.027082, 0.031360, 0.004704},
    {0.023443, 0.030445, 0.000471},
  };
  #endif
      AnyMatrix Flavum_superior_points = {
      {0.025561182, 0.052631639, 0.0080532227}, // 0
      {0.023956908, 0.051073529, 0.0057352032}, // 1
      {0.021845201, 0.049414657, 0.0034667489}, // 2
      {0.020550564, 0.048303124, 0.0016865467}, // 3
      {0.018457498, 0.047110029, 0.0003718338} // 4
    };
    AnyMatrix InterTransverse_inferior_points = {
      {0.027200408, 0.048421592, 0.033424348}, // 0
      {0.028510492, 0.047982153, 0.032341771}, // 1
      {0.029689614, 0.047478251, 0.03070564} // 2
    };
    AnyMatrix InterTransverse_superior_points = {
      {0.026383108, 0.054332439, 0.033355895}, // 3
      {0.028233221, 0.054545075, 0.03125751}, // 4
      {0.02929138, 0.05495768, 0.029159691} // 5
    };
    AnyMatrix IlioLumbar_points = {
      {0.026663143, 0.049603499, 0.034746464}, // 2
      {0.025728673, 0.051269915, 0.034736015} // 0
    };
      #ifdef OLD_FC_INSERTIONS
    AnyMatrix FacetCapsule_inferior_points_initial = {
      {0.028514653, 0.032184672, 0.012970304}, // 7
      {0.023665652, 0.033639513, 0.015356287}, // 6
      {0.019371687, 0.032951582, 0.016672118}, // 5
      {0.017862709, 0.029813958, 0.014787494}, // 4
      {0.018750731, 0.025774168, 0.014082623}, // 3
      {0.021686072, 0.024383061, 0.0096637886}, // 2
      {0.024954988, 0.025990929, 0.0063330885}, // 1
      {0.028019806, 0.02865847, 0.00798635} // 0
    };
      #endif


    AnyMatrix FacetCapsule_inferior_points = {
{0.026451, 0.037784, 0.014228},
{0.022595, 0.037725, 0.015771},
{0.018912, 0.036297, 0.013875},
{0.016729, 0.033546, 0.011359},
{0.015543, 0.030441, 0.010168},
{0.016516, 0.027586, 0.007884},
{0.019151, 0.026550, 0.006007},
{0.022816, 0.026623, 0.003528},
{0.024912, 0.030314, 0.002774},
{0.028003, 0.033515, 0.005132},
{0.030140, 0.035016, 0.009226},
{0.028392, 0.036696, 0.012847},

};

AnyMatrix FacetCapsule_inferior_points_origin = {
{0.0264, 0.0404, 0.0152},
{0.0218, 0.0388, 0.0154},
{0.0179, 0.0352, 0.0126},
{0.0153, 0.0304, 0.0099},
{0.0159, 0.0275, 0.0069},
{0.0193, 0.0259, 0.0046},
{0.0238, 0.0271, 0.0041},
{0.0266, 0.0297, 0.0049},
{0.0291, 0.0326, 0.0078},
{0.0304, 0.0358, 0.0107},
{0.0290, 0.0381, 0.0129},
};


    AnyMatrix FacetCapsule_superior_points = {
{0.028407, 0.061371, 0.018589},
{0.023321, 0.060121, 0.021162},
{0.020705, 0.056747, 0.021670},
{0.019432, 0.053159, 0.020377},
{0.022283, 0.050195, 0.017743},
{0.021670, 0.047185, 0.013628},
{0.022705, 0.048959, 0.009140},
{0.028598, 0.053101, 0.007492},
{0.033300, 0.059025, 0.009311},
{0.032550, 0.061372, 0.013316},
{0.030730, 0.061615, 0.016350},

    };

  };

  Left = {
    AnyMatrix Flavum_inferior_points = .Right.Flavum_inferior_points * ..MirrorTransform;
    AnyMatrix Flavum_superior_points = .Right.Flavum_superior_points * ..MirrorTransform;
    AnyMatrix InterTransverse_inferior_points = .Right.InterTransverse_inferior_points * ..MirrorTransform;
    AnyMatrix InterTransverse_superior_points = .Right.InterTransverse_superior_points * ..MirrorTransform;
    AnyMatrix IlioLumbar_points = .Right.IlioLumbar_points * ..MirrorTransform;
    AnyMatrix FacetCapsule_inferior_points = .Right.FacetCapsule_inferior_points * ..MirrorTransform;
    AnyMatrix FacetCapsule_superior_points = .Right.FacetCapsule_superior_points * ..MirrorTransform;

};
};

L5 = {
  // anterior longitudinal
  AnyMatrix AnteriorLongitudinal_inferior_points = {
    {0.05586037, -0.003565243, 0.019846959}, // 0
    {0.059971396, -0.0044259825, 0.015129994}, // 1
    {0.062771425, -0.0053576953, 0.010347651}, // 2
    {0.062782943, -0.0068121678, 0.0027937563}, // 3
    {0.062782943, -0.0068121678, -0.0027937563}, // 7
    {0.062771425, -0.0053576953, -0.010347651}, // 6
    {0.059971396, -0.0044259825, -0.015129994}, // 5
    {0.05586037, -0.003565243, -0.019846959} // 4
  };
  AnyMatrix AnteriorLongitudinal_superior_points = {
    {0.065951601, 0.017523991, 0.018222023}, // 0
    {0.068356194, 0.016780337, 0.014568152}, // 1
    {0.070248976, 0.016280066, 0.010735105}, // 2
    {0.071057394, 0.016573131, 0.0043091201}, // 3
    {0.071201392, 0.016938696, 0.0014225501}, // 4
    {0.071201392, 0.016938696, -0.0014225501}, // 9
    {0.071057394, 0.016573131, -0.0043091201}, // 8
    {0.070248976, 0.016280066, -0.010735105}, // 7
    {0.068356194, 0.016780337, -0.014568152}, // 6
    {0.065951601, 0.017523991, -0.018222023} // 5
  };

  // posterior longitudinal
  AnyMatrix PosteriorLongitudinal_inferior_points = {
    {0.035646461, 0.0030093011, -0.012631331}, // 0
    {0.035694852, 0.0028004942, -0.0097521935}, // 1
    {0.035781357, 0.0026845131, -0.0061931843}, // 2
    {0.035822362, 0.0029134366, -0.0018317607}, // 3
    {0.035822362, 0.0029134366, 0.0018317607}, // 7
    {0.035781357, 0.0026845131, 0.0061931843}, // 6
    {0.035694852, 0.0028004942, 0.0097521935}, // 5
    {0.035646461, 0.0030093011, 0.012631331} // 4
  };
  AnyMatrix PosteriorLongitudinal_superior_points = {
    {0.037329946, 0.026159421, -0.0083489148}, // 4
    {0.038242269, 0.024931483, -0.0061750966}, // 5
    {0.038608193, 0.024628237, -0.0039361808}, // 6
    {0.038991857, 0.024510596, -0.0010041981}, // 7
    {0.038991857, 0.024510596, 0.0010041981}, // 11
    {0.038608193, 0.024628237, 0.0039361808}, // 10
    {0.038242269, 0.024931483, 0.0061750966}, // 9
    {0.037329946, 0.026159421, 0.0083489148} // 8
  };

  AnyMatrix InterSpinous_inferior_points = {
    {0.0082819751, 0.0066376831, 0.0}, // 4
    {0.014412889, 0.0046909456,  0.0}, // 5
    {0.019237997, 0.0054942751,  0.0} // 6
  };
  AnyMatrix InterSpinous_superior_points = {
{0.010428, 0.018417, 0.0},
{0.013530, 0.019717, 0.0},
{0.018397, 0.021401, 0.0},
  };
  AnyMatrix SupraSpinous_inferior_points = {
    {-0.001629, 0.010228, 0.0},
    {-0.000454, 0.008289, 0.0},
    {0.001605, 0.007132, 0.0},
  };
  AnyMatrix SupraSpinous_superior_points = {
{-0.001798, 0.010504, 0.0},
{-0.000214, 0.013493, 0.0},
{0.003780, 0.015670, 0.0},
{0.007389, 0.016730, 0.0},
  };

  Right = {
    AnyMatrix Flavum_inferior_points = {
      {0.017461671, -0.00034203081, 0.010265118}, // 0
      {0.017182179, 0.0018051132, 0.0074365065}, // 1
      {0.016235495, 0.003643787, 0.0043767761}, // 2
      {0.013709733, 0.0048366627, 0.001058849} // 3
    };
      AnyMatrix Flavum_superior_points = {
      {0.0257686, 0.023752984, 0.008014679}, // 1
      {0.023364812, 0.022686781, 0.0055336975}, // 2
      {0.021048427, 0.02204811, 0.0032154415}, // 3
      {0.020054411, 0.021710416, 0.001402049} // 4
    };
    AnyMatrix InterTransverse_inferior_points = {
      {0.025813533, 0.020395648, 0.034685168}, // 0
      {0.027673844, 0.018623793, 0.03309717}, // 1
      {0.028709035, 0.01782256, 0.031339206}, // 2
      {0.029541902, 0.017096797, 0.029639617} // 3
    };
    AnyMatrix InterTransverse_superior_points = {
      {0.027506746, 0.024354858, 0.032951295}, // 4
      {0.028110813, 0.024658041, 0.031877149}, // 5
      {0.028756918, 0.024858389, 0.030644391} // 6
    };
    AnyMatrix IlioLumbar_points = {
      {0.025780203, 0.019942364, 0.034528669}, // 2
      {0.026039002, 0.021922752, 0.035120416}, // 1
      {0.026119996, 0.023910621, 0.034199741} // 0
    };

#ifdef OLD_FC_INSERTIONS
    AnyMatrix FacetCapsule_superior_points_initial = {
{0.027951824, 0.03288779, 0.016330129}, // 7
      {0.02022622, 0.033123173, 0.018374585}, // 6
      {0.016266413, 0.03096866, 0.017961496}, // 5
      {0.016889028, 0.027398957, 0.016514672}, // 4
      {0.020844789, 0.023920517, 0.014153866}, // 3
      {0.024177607, 0.023318207, 0.011412853}, // 2
      {0.027379666, 0.025189629, 0.008878313}, // 1
      {0.030206576, 0.028664058, 0.0097878277} // 0
    };
      #endif


  AnyMatrix FacetCapsule_superior_points = {
{0.032509, 0.029628, 0.017134},
{0.027536, 0.030696, 0.020440},
{0.021231, 0.028641, 0.021618},
{0.020800, 0.022807, 0.017908},
{0.019124, 0.017701, 0.012592},
{0.020778, 0.020710, 0.006665},
{0.025786, 0.021616, 0.005173},
{0.031203, 0.021286, 0.007411},
{0.036282, 0.022551, 0.009770},
{0.037225, 0.027378, 0.009177},
{0.034510, 0.029088, 0.014192},
  };


  AnyMatrix FacetCapsule_superior_points_origin = {

{0.029462, 0.029570, 0.020311},
{0.023820, 0.029558, 0.021726},
{0.020285, 0.027750, 0.021660},
{0.019972, 0.024564, 0.019902},

{0.021784, 0.021223, 0.015818},
//{0.019033, 0.017729, 0.012238},
{0.020446, 0.019298, 0.007715}+{0.001,0.0008,0.002},
{0.023763, 0.022871, 0.005846},

{0.030338, 0.024514, 0.008516},
{0.033006, 0.028979, 0.009838},
{0.032424, 0.030070, 0.016910},
};


    AnyMatrix FacetCapsule_inferior_points = {
      {0.023554794, 0.0062639364, 0.013405222}, // 8
      {0.020962207, 0.0087260865, 0.014788995}, // 7
      {0.017685639, 0.0098779406, 0.016324323}, // 6
      {0.015253118, 0.0081919944, 0.016930284}, // 5
      {0.01417246, 0.0044662887, 0.016650205}, // 4
      {0.015580663, 0.001721879, 0.015702043}, // 3
      {0.018920697, -0.0015734598, 0.013513024}, // 2
      {0.021452507, 1.7647606e-05, 0.012445553}, // 1
      {0.024835624, 0.0040984685, 0.011769672} // 0
    };
  };

  Left = {
    AnyMatrix Flavum_inferior_points = .Right.Flavum_inferior_points * ..MirrorTransform;
    AnyMatrix Flavum_superior_points = .Right.Flavum_superior_points * ..MirrorTransform;
    AnyMatrix InterTransverse_inferior_points = .Right.InterTransverse_inferior_points * ..MirrorTransform;
    AnyMatrix InterTransverse_superior_points = .Right.InterTransverse_superior_points * ..MirrorTransform;
    AnyMatrix IlioLumbar_points = .Right.IlioLumbar_points * ..MirrorTransform;
    AnyMatrix FacetCapsule_superior_points = .Right.FacetCapsule_superior_points * ..MirrorTransform;
    AnyMatrix FacetCapsule_inferior_points = .Right.FacetCapsule_inferior_points * ..MirrorTransform;
    AnyMatrix FacetCapsule_superior_points_origin = .Right.FacetCapsule_superior_points_origin * ..MirrorTransform;
  };
};

Sacrum = {
  AnyMatrix AnteriorLongitudinal_superior_points = {
    {0.050220702, -0.019544508, 0.0188487}, // 0
    {0.052997079, -0.019938702, 0.013053258}, // 1
    {0.054649908, -0.020227201, 0.0085889641}, // 2
    {0.05564614, -0.019727277, 0.0015151878}, // 3
    {0.05564614, -0.019727277, -0.0015151878}, // 7
    {0.054649908, -0.020227201, -0.0085889641}, // 6
    {0.052997079, -0.019938702, -0.013053258}, // 5
    {0.050220702, -0.019544508, -0.0188487} // 4
  };

  AnyMatrix PosteriorLongitudinal_superior_points = {
    {0.033598036, -0.0035606022, -0.012623567}, // 0
    {0.034397848, -0.0035391951, -0.009711721}, // 1
    {0.033963565, -0.0032715176, -0.0062170485}, // 2
    {0.033867765, -0.003098699, -0.0013931599}, // 3
    {0.033867765, -0.003098699, 0.0013931599}, // 7
    {0.033963565, -0.0032715176, 0.0062170485}, // 6
    {0.034397848, -0.0035391951, 0.009711721}, // 5
    {0.033598036, -0.0035606022, 0.012623567} // 4
  };

  // inter/supraspinous
  AnyMatrix InterSpinous_superior_points = {
    {0.016041653, -0.0073485966, 0.0}, // 0
    {0.019610278, -0.0065655382, 0.0}, // 1
    {0.025027303, -0.0050291261, 0.0} // 2
  };
  AnyMatrix SupraSpinous_superior_points = {
    {-0.0041798004, -0.0026625034, 0.0}, // 0
    {-0.0012143528, -0.00074350671, 0.0}, // 1
    {0.0038814589, 0.0010828242, 0.0} // 2
  };

  Right = {
    AnyMatrix Flavum_superior_points = {
      {0.011563371, -0.00045760209, 0.0097934501}, // 0
      {0.01053727, -0.0014663456, 0.0080881612}, // 1
      {0.0082632322, -0.0014768793, 0.0045368569}, // 2
      {0.0073829419, -0.001123785, 0.00094872958} // 3
    };
    AnyMatrix InterTransverse_superior_points = {
      {0.029532963, 0.011041304, 0.042413116}, // 0
      {0.030496797, 0.0081166048, 0.038978308}, // 1
      {0.030144479, 0.0064435159, 0.036538783}, // 2
      {0.029036293, 0.0040552136, 0.031506613} // 3
    };
    AnyMatrix SacroSpinale_points = {
      {-0.039272524, -0.072104581, 0.030140953}, // 0
      {-0.03755787, -0.075290836, 0.030090412}, // 1
      {-0.039161991, -0.079393983, 0.03032312}, // 2
      {-0.03947727, -0.083036847, 0.030133704} // 3
    };
    AnyMatrix SacroTuberale_points = {
      {-0.040520106, -0.090864234, 0.027909124}, // 4
      {-0.039459459, -0.09486267, 0.027792675}, // 5
      {-0.038794037, -0.09806405, 0.027377987}, // 6
      {-0.039513092, -0.10154202, 0.024373012}, // 7
      {-0.040644545, -0.10145698, 0.021581171} // 8
    };
    AnyMatrix AnteriorSacroiliac_points = {
      {0.042682227, 0.0038164367, 0.043769188}, // 0
      {0.043406423, -0.0033426944, 0.04532345}, // 1
      {0.044079743, -0.009743602, 0.047340322}, // 2
      {0.045510333, -0.018739816, 0.047271591}, // 3
      {0.046137657, -0.024565807, 0.04660894}, // 4
      {0.047198594, -0.031229429, 0.047653601} // 5
    };
    AnyMatrix PosteriorSacroiliac_points = {
      {-0.0050632325, -0.0026237057, 0.033228781}, // 0
      {-0.014121523, -0.0083063962, 0.035172459}, // 1
      {-0.018806532, -0.015130682, 0.039319143}, // 2
      {-0.02023408, -0.02083474, 0.0404066}, // 3
      {-0.019816117, -0.029539732, 0.040496081}, // 4
      {-0.021420844, -0.033611428, 0.038849138}, // 5
      {-0.023773221, -0.037183411, 0.036443915} // 6
    };
    AnyMatrix SacralInterosseous_points = {
      {-0.0060343258, -0.004851568, 0.036069494}, // 0
      {0.00021551299, -0.0025338701, 0.036250018}, // 1
      {0.0049495734, -0.0031042774, 0.038225643}, // 2
      {0.010823128, -0.0056778095, 0.041293789}, // 3
      {0.016764108, -0.0089979013, 0.045280211}, // 4
      {0.023031916, -0.0078251921, 0.04521367}, // 5
      {0.028755948, -0.0066103344, 0.046431519} // 6
    };

    AnyMatrix FacetCapsule_superior_points = {
      {0.029247379, 0.011792262, 0.016710438}, // 0
      {0.026961204, 0.014162295, 0.022570236}, // 1
      {0.024917645, 0.013440545, 0.025794741}, // 2
      {0.022336507, 0.0086941514, 0.028435269}, // 3
      {0.019856349, 0.0076778918, 0.025362425}, // 4
      {0.018914774, 0.0066387183, 0.020071266}, // 5
      {0.019621495, 0.0092947334, 0.015487277}, // 6
      {0.02624125, 0.0083814822, 0.014795409} // 7
    };
  };

  Left = {
    AnyFloat Flavum_superior_points = .Right.Flavum_superior_points * ..MirrorTransform;
    AnyFloat InterTransverse_superior_points = .Right.InterTransverse_superior_points * ..MirrorTransform;
    AnyFloat SacroSpinale_points = .Right.SacroSpinale_points * ..MirrorTransform;
    AnyFloat SacroTuberale_points = .Right.SacroTuberale_points * ..MirrorTransform;
    AnyFloat AnteriorSacroiliac_points = .Right.AnteriorSacroiliac_points * ..MirrorTransform;
    AnyFloat PosteriorSacroiliac_points = .Right.PosteriorSacroiliac_points * ..MirrorTransform;
    AnyFloat SacralInterosseous_points = .Right.SacralInterosseous_points * ..MirrorTransform;
    AnyFloat FacetCapsule_superior_points = .Right.FacetCapsule_superior_points * ..MirrorTransform;
  };
};

Pelvis = {

  Right = {
    AnyFloat SpinaIschiadica_pos = {0.0025, -0.085, 0.045};
    AnyFloat TuberIschiadicum_pos = {-0.007, -0.14, 0.055};
    AnyMatrix SacroSpinale_points = {
      {-0.001334457, -0.097866282, 0.054901212}, // 0
      {-0.0046072481, -0.10228985, 0.053689059}, // 1
      {-0.0072997194, -0.10459531, 0.05141658}, // 2
      {-0.0054296581, -0.11101329, 0.051972922} // 3
    };
    AnyMatrix SacroTuberale_points = {
      {-0.015070383, -0.14186086, 0.058580924}, // 4
      {-0.017211588, -0.14474043, 0.05794603}, // 5
      {-0.019521238, -0.14731532, 0.054596331}, // 6
      {-0.017036935, -0.15380971, 0.050569218} // 7
    };
    AnyMatrix IlioLumbar_points = {
      {0.026683837, 0.011464207, 0.056025729}, // 0
      {0.025945492, 0.015256666, 0.058715221}, // 1
      {0.025489448, 0.021426864, 0.06248882}, // 2
      {0.025803784, 0.028268639, 0.066447221}, // 3
      {0.026799718, 0.030271174, 0.067589849} // 4
    };
    AnyMatrix AnteriorSacroiliac_points = {
      {0.030056952, 0.0079632457, 0.058044612}, // 0
      {0.033559598, 0.00089892896, 0.059365928}, // 1
      {0.032592643, -0.0052515226, 0.064164795}, // 2
      {0.035019659, -0.015635312, 0.064064637}, // 3
      {0.038601175, -0.026298411, 0.063929394}, // 4
      {0.04023689, -0.034295205, 0.064356811}, // 5
      {0.040769376, -0.039805852, 0.064211354} // 6
    };
    AnyMatrix PosteriorSacroiliac_points = {
      {-0.01948013, -0.0066992375, 0.04082283}, // 7
      {-0.018274534, -0.011840978, 0.039235428}, // 8
      {-0.018954832, -0.016153853, 0.042733088}, // 9
      {-0.015814429, -0.021247407, 0.044533659}, // 10
      {-0.014339349, -0.02564645, 0.04713935}, // 11
      {-0.013266316, -0.031103427, 0.048926704}, // 12
      {-0.013848224, -0.035973944, 0.048017405}, // 13
      {-0.016289998, -0.040891584, 0.047031738}, // 14
      {-0.017109921, -0.043299414, 0.047253743} // 15
    };
    AnyMatrix SacralInterosseous_points = {
      {-0.0060732746, -0.0031134638, 0.038492054}, // 1
      {-0.0020545647, -0.0038233444, 0.039502114}, // 2
      {0.0036688002, -0.0052476563, 0.041262511}, // 3
      {0.008035209, -0.0062136757, 0.043269485}, // 4
      {0.014985715, -0.0025625555, 0.047792729}, // 10
      {0.01987242, 0.0018544313, 0.051348612}, // 11
      {0.023755495, 0.0034671051, 0.053890537} // 12
    };
  };

  Left = {
    AnyFloat SpinaIschiadica_pos = .Right.SpinaIschiadica_pos * ..MirrorTransform;
    AnyFloat TuberIschiadicum_pos = .Right.TuberIschiadicum_pos * ..MirrorTransform;
    AnyFloat SacroSpinale_points = .Right.SacroSpinale_points * ..MirrorTransform;
    AnyFloat SacroTuberale_points = .Right.SacroTuberale_points * ..MirrorTransform;
    AnyMatrix IlioLumbar_points = .Right.IlioLumbar_points * ..MirrorTransform;
    AnyMatrix AnteriorSacroiliac_points = .Right.AnteriorSacroiliac_points * ..MirrorTransform;
    AnyMatrix PosteriorSacroiliac_points = .Right.PosteriorSacroiliac_points * ..MirrorTransform;
    AnyMatrix SacralInterosseous_points = .Right.SacralInterosseous_points * ..MirrorTransform;
  };
};
