AnyFolder Skull = {

  AnyVar HeadWithoutNeckHeight = 0.14;
  AnyVar HeadHeight = HeadWithoutNeckHeight; ///<The height of the body parts from C7-T1 to ear canal
  AnyVar HeadDepth = 0.2299; ///<distance from most anterior point on the forehead to the most posterior point on the back of the head
  AnyVar HeadWidth = 0.1800; ///<distance from  most lateral point to most medial point on head
  AnyVar NeckLength = 0.1390; ///<vertical distance from .Segments.ThoraxSeg.T1C7JntNode.sRel to Segments.C1Seg.C1C0JntNode.sRel

  AnyFloat Jii                                     = {181.0,173.0,236.0}/10000;
  AnyFloat sCoM_pos                                = {0.0,0.0,0.0};
  AnyFloat C1C0JntNode_pos                         = {0.0000000, 0.0000000, 0.0000000};
  AnyFloat NeckNode_pos                            = {0.0000000, 0.0000000, 0.0000000};
  AnyFloat TopOfHead_pos                           = {0.0000000, 0.1400000, 0.0000000};
  AnyFloat SkullContactNode_pos                    = {-0.1100000, 0.03000000, 0.0000000};
  AnyFloat ChinBonyTip_pos                         = {0.10, -0.11, 0.0};

  AnyFolder Right = {
    AnyFloat LumpedHyoidT1C0Node_pos                = {0.02400000, -0.001000000, 0.01800000};
    AnyFloat LongusColliT1C0Node_pos                = {0.02000000, -0.01000000, 0.008000000};
    AnyFloat LongusCapitisC0Node_pos                = {0.03000000, -0.01000000, 0.008000000};
    AnyFloat SpleniusCapitisNode_pos                = {-0.01100000, -0.03200000, 0.06400000};
    AnyFloat SemispinalisCapitisNode_pos            = {-0.08800000, 0.001000000, 0.02800000};
    AnyFloat LongissimusCapitisNode_pos             = {-0.009000000, -0.02500000, 0.06200000};
  };

  AnyFolder Left = {
    AnyFloat LumpedHyoidT1C0Node_pos            =     .Right.LumpedHyoidT1C0Node_pos * ..MirrorTransform;
    AnyFloat LongusColliT1C0Node_pos            =     .Right.LongusColliT1C0Node_pos * ..MirrorTransform;
    AnyFloat LongusCapitisC0Node_pos            =     .Right.LongusCapitisC0Node_pos * ..MirrorTransform;
    AnyFloat SpleniusCapitisNode_pos            =     .Right.SpleniusCapitisNode_pos * ..MirrorTransform;
    AnyFloat SemispinalisCapitisNode_pos        =     .Right.SemispinalisCapitisNode_pos * ..MirrorTransform;
    AnyFloat LongissimusCapitisNode_pos         =     .Right.LongissimusCapitisNode_pos * ..MirrorTransform;
  };
};


AnyFolder Sternum = {
  AnyFloat RACP_CO6Node_pos            = {0.141 , 0.26599976, 0};
  AnyFloat ManubriosternalJointNode_Pos    = {0.090100003, 0.37379976, 0.00};
  AnyFloat ManubriosternalJointWidth = 0.05;
  AnyFloat ij_pos = {0.06, 0.422, 0};
  AnyFloat scj_pos = {0.023300, 0.009100 , 0.020700};
  AnyFloat MidNode_pos    = {0.140100003, 0.26379976, 0.00};

  AnyFolder Right = {
    // ----------------------------------------------CS Nodes-----------------------------------------------
    AnyFloat CS1Node_pos                 ={ 0.063500003, 0.41249976, 0.02};
    AnyFloat CS2Node_pos                 ={ 0.090100003, 0.37379976, 0.0176};
    AnyFloat CS3Node_pos                 ={ 0.1015, 0.34879976, 0.0183};
    AnyFloat CS4Node_pos                 ={ 0.1145, 0.31849976, 0.019};
    AnyFloat CS5Node_pos                 ={ 0.1235, 0.29179976, 0.0197};
    AnyFloat CS6Node_pos                 ={ 0.1315, 0.26929976, 0.019};
    AnyFloat CS7Node_pos                 ={ 0.1345, 0.25749976, 0.016};
    AnyFloat CS8Node_pos                 ={ 0.1365, 0.25049976, 0.014};
    AnyFloat CS9Node_pos                 ={ 0.1375, 0.24349976, 0.012};
    AnyFloat CS10Node_pos                ={ 0.138, 0.23749976, 0.01};


    // ----------------------------------------------Inter chondral Nodes-----------------------------------------------
    AnyFloat IC1Node_pos                 ={ 0.063500003, 0.41249976, 0.02};
    AnyFloat IC2Node_pos                 ={ 0.090100003, 0.37379976, 0.0176};
    AnyFloat IC3Node_pos                 ={ 0.1015, 0.34879976, 0.0183};
    AnyFloat IC4Node_pos                 ={ 0.1145, 0.31849976, 0.019};
    AnyFloat IC5Node_pos                 ={ 0.1235, 0.29179976, 0.0197};
    AnyFloat IC6Node_pos                 ={ 0.1315, 0.26929976, 0.019}+{0.01,-0.01,0.04};
    AnyFloat IC7Node_pos                 ={ 0.1345, 0.25749976, 0.016}+{0.015,-0.04,0.04};
    AnyFloat IC8Node_pos                 ={ 0.1365, 0.25049976, 0.014}+{0.02,-0.07,0.05};
    AnyFloat IC9Node_pos                 ={ 0.1375, 0.24349976, 0.012}+{0.02,-0.1,0.085};
    AnyFloat IC10Node_pos                ={ 0.138, 0.23749976, 0.01} +{0.01,-0.11,0.095};

    //----------------------------------------------CC Node_pos------------------------------------------------
    AnyFloat R1Node_pos                 = ..R1.Right.CC_pos;
    AnyFloat R2Node_pos                 = ..R2.Right.CC_pos;
    AnyFloat R3Node_pos                 = ..R3.Right.CC_pos;
    AnyFloat R4Node_pos                 = ..R4.Right.CC_pos;
    AnyFloat R5Node_pos                 = ..R5.Right.CC_pos;
    AnyFloat R6Node_pos                 = ..R6.Right.CC_pos;
    AnyFloat R7Node_pos                 = ..R7.Right.CC_pos;
    AnyFloat R8Node_pos                 = ..R8.Right.CC_pos;
    AnyFloat R9Node_pos                 = ..R9.Right.CC_pos;
    AnyFloat R10Node_pos                = ..R10.Right.CC_pos;
    AnyFloat CC11SpringAntNode_pos = ..R11.Right.CCSpringAntNode_pos;
    AnyFloat CC12SpringAntNode_pos = ..R12.Right.CCSpringAntNode_pos;

    AnyFloat LumpedHyoidStC0Ins_pos = {0.060000003, 0.41999976,  0.018};
    AnyFloat TransversusThoracisR2StNode_pos         = {0.12692172, 0.26931780,   0.005};
    AnyFloat TransversusThoracisR3StNode_pos         = {0.12925102, 0.25923181,   0.005};
    AnyFloat TransversusThoracisR4StNode_pos         = {0.13158032, 0.24914581,   0.005};
    AnyFloat TransversusThoracisR5StNode_pos         = {0.13589801, 0.24411453,   0.005};
    AnyFloat TransversusThoracisR6StNode_pos         = {0.14021569, 0.23908326,   0.005};
    AnyFloat TransversusThoracisNode_pos            = {0.14021569, 0.23908326,   0.005};
    AnyFloat OICI_C9Node_pos         = {0.14556067,0.14319959, 0.1200842}+{0.005,0.003,-0.005}; //OIC6
    AnyFloat OICI_C8Node_pos         = {0.16391572,0.1695137, 0.078600362};

    AnyFloat DiaphragmCC_1_pos     = {0.1409616, 0.232155, 0.022334};
    AnyFloat DiaphragmCC_2_pos     = {0.1487132, 0.215477, 0.041995};
    AnyFloat DiaphragmCC_3_pos     = {0.1530339, 0.200077, 0.054261};
    AnyFloat DiaphragmCC_4_pos     = {0.1557339, 0.181577, 0.068261};
    AnyFloat DiaphragmCC_5_pos     = {0.1558708, 0.157630, 0.085920};
    AnyFloat DiaphragmCC_6_pos     = {0.1466687, 0.138380, 0.101421};
    AnyFloat DiaphragmCC_7_pos     = {0.1268028, 0.118733, 0.120133};
    AnyFloat DiaphragmXiphoidNode_pos = {0.1403280, 0.231191, 0.002};

    AnyFloat IntercostalisInternusR1R2_elem_sternum_pos = {0.07012063, 0.4041974, 0.02339074};
    AnyFloat IntercostalisInternusR2R3_elem_sternum_pos = {0.092012063, 0.3701974, 0.03039074};
    AnyFloat IntercostalisInternusR3R4_elem_sternum_pos = {0.10512063, 0.3421974, 0.0389074};
    AnyFloat IntercostalisInternusR4R5_elem_sternum_pos = {0.11812063, 0.3111974, 0.06239074};
    AnyFloat IntercostalisInternusR5R6_elem_sternum_pos = {0.12712063, 0.2831974, 0.06739074};
    AnyFloat IntercostalisInternusR6R7_elem_sternum_pos = {0.13812063, 0.2511974, 0.07639074};
    AnyFloat IntercostalisInternusR7R8_elem_sternum_pos = {0.15012063, 0.2101974, 0.08639074};
    AnyFloat IntercostalisInternusR8R9_elem_sternum_pos = {0.15512063, 0.1761974, 0.09439074};
    AnyFloat IntercostalisInternusR9R10_elem_sternum_pos = {0.15012063, 0.1401974, 0.105539074};


    AnyFloat CostalCartilageJointNode_Pos= {0.136, 0.241, 0.022};


  };

  AnyFolder Left = {
    // ----------------------------------------------CS Nodes-----------------------------------------------
    AnyFloat CS1Node_pos                 = .Right.CS1Node_pos * ..MirrorTransform;
    AnyFloat CS2Node_pos                 = .Right.CS2Node_pos * ..MirrorTransform;
    AnyFloat CS3Node_pos                 = .Right.CS3Node_pos * ..MirrorTransform;
    AnyFloat CS4Node_pos                 = .Right.CS4Node_pos * ..MirrorTransform;
    AnyFloat CS5Node_pos                 = .Right.CS5Node_pos * ..MirrorTransform;
    AnyFloat CS6Node_pos                 = .Right.CS6Node_pos * ..MirrorTransform;
    AnyFloat CS7Node_pos                 = .Right.CS7Node_pos * ..MirrorTransform;
    AnyFloat CS8Node_pos                 = .Right.CS8Node_pos * ..MirrorTransform;
    AnyFloat CS9Node_pos                 = .Right.CS9Node_pos * ..MirrorTransform;
    AnyFloat CS10Node_pos                = .Right.CS10Node_pos * ..MirrorTransform;


     // ----------------------------------------------Inter chondral Nodes-----------------------------------------------
    AnyFloat IC1Node_pos                 =.Right.IC1Node_pos * ..MirrorTransform;
    AnyFloat IC2Node_pos                 =.Right.IC2Node_pos * ..MirrorTransform;
    AnyFloat IC3Node_pos                 =.Right.IC3Node_pos * ..MirrorTransform;
    AnyFloat IC4Node_pos                 =.Right.IC4Node_pos * ..MirrorTransform;
    AnyFloat IC5Node_pos                 =.Right.IC5Node_pos * ..MirrorTransform;
    AnyFloat IC6Node_pos                 =.Right.IC6Node_pos * ..MirrorTransform;
    AnyFloat IC7Node_pos                 =.Right.IC7Node_pos * ..MirrorTransform;
    AnyFloat IC8Node_pos                 =.Right.IC8Node_pos * ..MirrorTransform;
    AnyFloat IC9Node_pos                 =.Right.IC9Node_pos * ..MirrorTransform;
    AnyFloat IC10Node_pos                =.Right.IC10Node_pos * ..MirrorTransform;


    //----------------------------------------------CC Node_poss------------------------------------------------
    AnyFloat R1Node_pos                 = .Right.R1Node_pos * ..MirrorTransform;
    AnyFloat R2Node_pos                 = .Right.R2Node_pos * ..MirrorTransform;
    AnyFloat R3Node_pos                 = .Right.R3Node_pos * ..MirrorTransform;
    AnyFloat R4Node_pos                 = .Right.R4Node_pos * ..MirrorTransform;
    AnyFloat R5Node_pos                 = .Right.R5Node_pos * ..MirrorTransform;
    AnyFloat R6Node_pos                 = .Right.R6Node_pos * ..MirrorTransform;
    AnyFloat R7Node_pos                 = .Right.R7Node_pos * ..MirrorTransform;
    AnyFloat R8Node_pos                 = .Right.R8Node_pos * ..MirrorTransform;
    AnyFloat R9Node_pos                 = .Right.R9Node_pos * ..MirrorTransform;
    AnyFloat R10Node_pos                = .Right.R10Node_pos * ..MirrorTransform;
    AnyFloat CC11SpringAntNode_pos = .Right.CC11SpringAntNode_pos * ..MirrorTransform;
    AnyFloat CC12SpringAntNode_pos = .Right.CC12SpringAntNode_pos * ..MirrorTransform;

    AnyFloat LumpedHyoidStC0Ins_pos = .Right.LumpedHyoidStC0Ins_pos * ..MirrorTransform;
    AnyFloat TransversusThoracisR2StNode_pos = .Right.TransversusThoracisR2StNode_pos * ..MirrorTransform;
    AnyFloat TransversusThoracisR3StNode_pos = .Right.TransversusThoracisR3StNode_pos * ..MirrorTransform;
    AnyFloat TransversusThoracisR4StNode_pos = .Right.TransversusThoracisR4StNode_pos * ..MirrorTransform;
    AnyFloat TransversusThoracisR5StNode_pos = .Right.TransversusThoracisR5StNode_pos * ..MirrorTransform;
    AnyFloat TransversusThoracisR6StNode_pos = .Right.TransversusThoracisR6StNode_pos * ..MirrorTransform;
    AnyFloat TransversusThoracisNode_pos = .Right.TransversusThoracisNode_pos * ..MirrorTransform;
    AnyFloat OICI_C9Node_pos = .Right.OICI_C9Node_pos * ..MirrorTransform;
    AnyFloat OICI_C8Node_pos = .Right.OICI_C8Node_pos * ..MirrorTransform;
    AnyFloat DiaphragmCC_1_pos     = .Right.DiaphragmCC_1_pos * ..MirrorTransform;
    AnyFloat DiaphragmCC_2_pos     = .Right.DiaphragmCC_2_pos * ..MirrorTransform;
    AnyFloat DiaphragmCC_3_pos     = .Right.DiaphragmCC_3_pos * ..MirrorTransform;
    AnyFloat DiaphragmCC_4_pos     = .Right.DiaphragmCC_4_pos * ..MirrorTransform;
    AnyFloat DiaphragmCC_5_pos     = .Right.DiaphragmCC_5_pos * ..MirrorTransform;
    AnyFloat DiaphragmCC_6_pos     = .Right.DiaphragmCC_6_pos * ..MirrorTransform;
    AnyFloat DiaphragmCC_7_pos     = .Right.DiaphragmCC_7_pos * ..MirrorTransform;
    AnyFloat DiaphragmXiphoidNode_pos = .Right.DiaphragmXiphoidNode_pos * ..MirrorTransform;

    AnyFloat IntercostalisInternusR1R2_elem_sternum_pos = .Right.IntercostalisInternusR1R2_elem_sternum_pos * ..MirrorTransform;
    AnyFloat IntercostalisInternusR2R3_elem_sternum_pos = .Right.IntercostalisInternusR2R3_elem_sternum_pos * ..MirrorTransform;
    AnyFloat IntercostalisInternusR3R4_elem_sternum_pos = .Right.IntercostalisInternusR3R4_elem_sternum_pos * ..MirrorTransform;
    AnyFloat IntercostalisInternusR4R5_elem_sternum_pos = .Right.IntercostalisInternusR4R5_elem_sternum_pos * ..MirrorTransform;
    AnyFloat IntercostalisInternusR5R6_elem_sternum_pos = .Right.IntercostalisInternusR5R6_elem_sternum_pos * ..MirrorTransform;
    AnyFloat IntercostalisInternusR6R7_elem_sternum_pos = .Right.IntercostalisInternusR6R7_elem_sternum_pos * ..MirrorTransform;
    AnyFloat IntercostalisInternusR7R8_elem_sternum_pos = .Right.IntercostalisInternusR7R8_elem_sternum_pos * ..MirrorTransform;
    AnyFloat IntercostalisInternusR8R9_elem_sternum_pos = .Right.IntercostalisInternusR8R9_elem_sternum_pos * ..MirrorTransform;
    AnyFloat IntercostalisInternusR9R10_elem_sternum_pos = .Right.IntercostalisInternusR9R10_elem_sternum_pos * ..MirrorTransform;

    AnyFloat CostalCartilageJointNode_Pos= .Right.CostalCartilageJointNode_Pos* ..MirrorTransform;

  };
};

AnyFolder T12 = {
  AnyFloat T12L1JntNode_pos = {0.02200000, 0.1540000, 0.0000000};
  AnyFloat T11T12JntNode_pos = {0.01000000, 0.1830000, 0.0000000};
  AnyFloat SuperiorEndplateAnteriorNode_pos = {0.026300, 0.187400, 0.000000};
  AnyFloat SuperiorEndplatePosteriorNode_pos = {0.004900, 0.179600, 0.000000};
  AnyFloat MidPoint_pos ={-0.035,0.20,0};
  AnyFloat SpinalisT12T5NodeOrg_pos =  {-0.03+0.01,0.13,0};
  AnyFloat SpinalisT12T4NodeOrg_pos =  {-0.031+0.01,0.129,0};
  AnyFloat SpinalisL1T3Via1Node_pos =  {-0.030+0.01,0.126,0};
  AnyFloat SpinalisL1T2Via1Node_pos =  {-0.031+0.01,0.126,0};
  AnyFloat SpinalisL2T1Via2Node_pos =  {-0.032+0.01,0.124,0};
  AnyFloat LSNode_pos = {-0.030,0.128,0};
  AnyFloat LINodeInferior_pos = {-0.02000000, 0.1260000, 0.0000000};
  AnyMatrix AnteriorLongitudinal_inferior_points = {
    {0.032715049, 0.16524756, 0.014964505}, // 0
    {0.036063518, 0.16646305, 0.0094447779}, // 1
    {0.037278961, 0.16690223, 0.0047992077}, // 2
    {0.037653368, 0.16670372, 0.0015426559}, // 3
    {0.037653368, 0.16670372, -0.0015426559}, // 7
    {0.037278961, 0.16690223, -0.0047992077}, // 6
    {0.036063518, 0.16646305, -0.0094447779}, // 5
    {0.032715049, 0.16524756, -0.014964505} // 4
  };
    AnyMatrix AnteriorLongitudinal_superior_points = {
    {0.02531381, 0.18389118, 0.016675469}, // 4
    {0.02865658, 0.18464467, 0.011080897}, // 5
    {0.02948226, 0.18529736, 0.0071247183}, // 6
    {0.029812604, 0.18587472, 0.0010437377}, // 7
    {0.029812604, 0.18587472, -0.0010437377}, // 11
    {0.02948226, 0.18529736, -0.0071247183}, // 10
    {0.02865658, 0.18464467, -0.011080897}, // 9
    {0.02531381, 0.18389118, -0.016675469} // 8
  };

  AnyMatrix PosteriorLongitudinal_inferior_points = {
    {0.010498777, 0.15250418, -0.011519786}, // 0
    {0.011023735, 0.1522266, -0.0081960149}, // 1
    {0.011458493, 0.15201104, -0.0051755877}, // 2
    {0.012163402, 0.15204482, -0.00098839984}, // 3
    {0.012163402, 0.15204482, 0.00098839984}, // 7
    {0.011458493, 0.15201104, 0.0051755877}, // 6
    {0.011023735, 0.1522266, 0.0081960149}, // 5
    {0.010498777, 0.15250418, 0.011519786} // 4
  };
  AnyMatrix PosteriorLongitudinal_superior_points = {
    {-0.0028706165, 0.17529432, -0.0082452875}, // 4
    {-0.0015809161, 0.17528237, -0.0059503061}, // 5
    {-0.0003336182, 0.17531992, -0.0032297857}, // 6
    {-0.00047455309, 0.17511511, -0.00050451676}, // 7
    {-0.00047455309, 0.17511511, 0.00050451676}, // 11
    {-0.0003336182, 0.17531992, 0.0032297857}, // 10
    {-0.0015809161, 0.17528237, 0.0059503061}, // 9
    {-0.0028706165, 0.17529432, 0.0082452875} // 8
  };

  AnyMatrix InterSpinous_inferior_points = {
    {-0.019229, 0.128018, 0.0},
    {-0.017269, 0.130004, 0.0},
    {-0.015134, 0.132400, 0.0},
  };
  AnyMatrix InterSpinous_superior_points = {
    {-0.019781129, 0.15004937, 0.0}, // 11
    {-0.018961165, 0.15252106, 0.0}, // 12
    {-0.017151916, 0.15631355, 0.0}, // 13
    {-0.015325118, 0.15926327, 0.0} // 14
  };
  AnyMatrix SupraSpinous_inferior_points = {
    {-0.028818, 0.128895, 0.0},
    {-0.025490, 0.127173, 0.0},
    {-0.023046, 0.126676, 0.0},
  };
  AnyMatrix SupraSpinous_superior_points = {
    {-0.024977697, 0.1376518,  0.0}, // 7
    {-0.022866406, 0.14073367, 0.0}, // 8
    {-0.021405665, 0.14459755, 0.0}, // 9
    {-0.02049695, 0.1475562,   0.0} // 10
  };
  AnyFloat O_serratus_posterior_inferior_pos          = {-0.03, 0.13 , 0.0};

  AnyFolder Right = {
    AnyFloat CV_pos          = {0.001021013, 0.1777127, 0.022195}+{0,0,0};
    AnyFloat CT_pos          = {-0.019, 0.17, 0.019298}+{0.015,0.005,0.01};
    AnyFloat CTsup_pos       = CT_pos + {0, ..AllRibs.CTOffset[0], 0};
    AnyFloat CTinf_pos       = CT_pos - {0, ..AllRibs.CTOffset[0], 0};
    AnyFloat SemispinalisThoracisTransversus_pos = {-0.012,0.165,0.020};
    AnyFloat MultifidusThoracisT12T7NodeOrg_pos =  {-0.012,0.165,0.020};
    AnyFloat MultifidusThoracisT12T8NodeOrg_pos =  {-0.012,0.165,0.020};
    AnyFloat MultifidusThoracisT12T9NodeOrg_pos =  {-0.012,0.165,0.020};
    AnyFloat SET12T8NodeOrg_pos  =  {-0.017,0.175,0.019};
    AnyFloat SET12T9NodeOrg_pos  =  {-0.013,0.176,0.016};
    AnyFloat SET12T10NodeOrg_pos =  {-0.010,0.176,0.013};
    AnyFloat QuadratusLumborumT12Node_pos = {-0.007,0.165,0.025};
    AnyFloat O_serratus_posterior_inferior_T12R10ViaNodepos = {-0.045, 0.165, 0.04};


    #ifdef OLD_FLAVUM
    AnyMatrix Flavum_inferior_points = {
      {-0.0019179583, 0.14068496, 0.0081109246}, // 0
      {-0.0015655934, 0.14173293, 0.0057401443}, // 1
      {-0.0026454865, 0.14300975, 0.0039641079}, // 2
      {-0.0038648127, 0.1449239, 0.0013751532} // 3
    };
    #else
    AnyMatrix Flavum_inferior_points = {
      {-0.001233, 0.149044, 0.008657},
      {-0.001281, 0.148086, 0.007074},
      {-0.002128, 0.146770, 0.004840},
      {-0.002948, 0.145783, 0.002833},
      {-0.0039898, 0.145737, 0.000794},

    };
    #endif
    AnyMatrix Flavum_superior_points = {
      {-0.011011065, 0.16901238, 0.0085586915}, // 0
      {-0.011568789, 0.16666178, 0.006770975}, // 1
      {-0.012964548, 0.1644344, 0.0042314832}, // 2
      {-0.013662889, 0.16314887, 0.0026480057}, // 3
      {-0.013688772, 0.16262536, 0.0004050963} // 4
    };
    AnyMatrix InterTransverse_inferior_points = {
      {-0.0070208078, 0.16409548, 0.024307221}, // 0
      {-0.0047504921, 0.1629663, 0.023706794}, // 1
      {-0.0036784101, 0.16064459, 0.023898097}, // 2
      {-0.0014563673, 0.16054673, 0.021069655} // 3
    };
    AnyMatrix InterTransverse_superior_points = {
      {-0.020269588, 0.17223091, 0.018110266}, // 4
      {-0.019071123, 0.17384318, 0.018537948}, // 5
      {-0.015952731, 0.17472452, 0.019264854} // 6
    };
    AnyMatrix SuperiorCostoTransverse_points = {
      {-0.009512309, 0.1639246, 0.018970255}, // 10
      {-0.01509854, 0.16540758, 0.016613193}, // 11
      {-0.019511398, 0.16679101, 0.01638563} // 12
    };
    AnyMatrix LateralCostoTransverse_points = {
      {-0.020274594, 0.17079954, 0.019519268}, // 7
      {-0.017027859, 0.17315747, 0.01948774}, // 8
      {-0.014600418, 0.17500624, 0.019172601} // 9
    };
    AnyMatrix CostoTransverse_points = {
      {-0.0032981616, 0.1732309, 0.01981141}, // 5
      {-0.0088600479, 0.1719657, 0.020984067} // 6
    };
    AnyMatrix Radiate_superior_points = {
      {-0.0066699968, 0.16868317, 0.023077173}, // 0
      {-0.003221629, 0.16832922, 0.02333495}, // 1
      {-9.8602184e-05, 0.17047393, 0.021810055}, // 2
      {0.0023577141, 0.17342177, 0.020243166}, // 3
      {0.0029306612, 0.17587548, 0.020078054} // 4
    };
    #ifndef CYL_FC_INSERTIONS
    AnyMatrix FacetCapsule_inferior_points = {
      {-0.005296, 0.152162, 0.013605},
      {-0.008736, 0.150327, 0.015083},
      {-0.011712, 0.148667, 0.015368},
      {-0.013184, 0.145429, 0.012514},
      {-0.013450, 0.142414, 0.010253},
      {-0.010625, 0.140948, 0.008381},
      {-0.006723, 0.140929, 0.005508},
      {-0.003626, 0.142698, 0.004164},
      {-0.001998, 0.145035, 0.004442},
      {-0.001425, 0.148529, 0.006837},
      {-0.001418, 0.150127, 0.009559},
      {-0.002635, 0.151317, 0.011934},
    };
    #else
    AnyMatrix FacetCapsule_inferior_points_initial = {
      {-0.00074794126, 0.14295551, 0.010232115}, // 0
      {-0.0023452956, 0.13951986, 0.010963738}, // 1
      {-0.0019631963, 0.14479633, 0.011997868}, // 2
      {-0.0052791424, 0.13967894, 0.013689602} // 3
    };

    #endif
    AnyMatrix FacetCapsule_superior_points = {
      {-0.01161419, 0.16901995, 0.0098765967}, // 0
      {-0.01427044, 0.16769332, 0.012601973}, // 1
      {-0.020343581, 0.17095661, 0.016282003}, // 2
      {-0.018246248, 0.17446314, 0.017767565}, // 3
      {-0.014716108, 0.1753699, 0.015601753}, // 4
      {-0.011272418, 0.17493643, 0.011138272}, // 5
      {-0.010944561, 0.17214499, 0.0097275516} // 6
    };
    AnyFloat SuperiorEndplateNode_pos = 0.5*(.SuperiorEndplateAnteriorNode_pos + .SuperiorEndplatePosteriorNode_pos) + {0,-0.000900,0.018900}; // Offset added manually to match the vertebra surface
  };

  AnyFolder Left = {
    AnyFloat CV_pos          = .Right.CV_pos * ..MirrorTransform;
    AnyFloat CT_pos          = .Right.CT_pos * ..MirrorTransform;
    AnyFloat CTsup_pos       = .Right.CTsup_pos * ..MirrorTransform;
    AnyFloat CTinf_pos       = .Right.CTinf_pos * ..MirrorTransform;
    AnyFloat SemispinalisThoracisTransversus_pos = .Right.SemispinalisThoracisTransversus_pos * ..MirrorTransform;
    AnyFloat MultifidusThoracisT12T7NodeOrg_pos = .Right.MultifidusThoracisT12T7NodeOrg_pos * ..MirrorTransform;
    AnyFloat MultifidusThoracisT12T8NodeOrg_pos = .Right.MultifidusThoracisT12T8NodeOrg_pos * ..MirrorTransform;
    AnyFloat MultifidusThoracisT12T9NodeOrg_pos = .Right.MultifidusThoracisT12T9NodeOrg_pos * ..MirrorTransform;
    AnyFloat SET12T8NodeOrg_pos = .Right.SET12T8NodeOrg_pos * ..MirrorTransform;
    AnyFloat SET12T9NodeOrg_pos = .Right.SET12T9NodeOrg_pos * ..MirrorTransform;
    AnyFloat SET12T10NodeOrg_pos = .Right.SET12T10NodeOrg_pos * ..MirrorTransform;
    AnyFloat QuadratusLumborumT12Node_pos = .Right.QuadratusLumborumT12Node_pos * ..MirrorTransform;
    AnyFloat O_serratus_posterior_inferior_T12R10ViaNodepos = .Right.O_serratus_posterior_inferior_T12R10ViaNodepos * ..MirrorTransform;

    AnyFloat Flavum_inferior_points = .Right.Flavum_inferior_points * ..MirrorTransform;
    AnyFloat Flavum_superior_points = .Right.Flavum_superior_points * ..MirrorTransform;
    AnyMatrix InterTransverse_inferior_points = .Right.InterTransverse_inferior_points * ..MirrorTransform;
    AnyMatrix InterTransverse_superior_points = .Right.InterTransverse_superior_points * ..MirrorTransform;
    AnyMatrix SuperiorCostoTransverse_points = .Right.SuperiorCostoTransverse_points * ..MirrorTransform;
    AnyMatrix Radiate_superior_points = .Right.Radiate_superior_points * ..MirrorTransform;
    AnyMatrix LateralCostoTransverse_points = .Right.LateralCostoTransverse_points * ..MirrorTransform;
    AnyMatrix CostoTransverse_points = .Right.CostoTransverse_points * ..MirrorTransform;
    AnyMatrix FacetCapsule_inferior_points = .Right.FacetCapsule_inferior_points * ..MirrorTransform;
    AnyMatrix FacetCapsule_superior_points = .Right.FacetCapsule_superior_points * ..MirrorTransform;
    AnyFloat SuperiorEndplateNode_pos = .Right.SuperiorEndplateNode_pos * ..MirrorTransform;
  };
};

AnyFolder T11 = {
  AnyFloat T11T12JntNode_pos = .T12.T11T12JntNode_pos;
  AnyFloat T10T11JntNode_pos = {-0.002, 0.213, 0.0};
  AnyFloat SuperiorEndplateAnteriorNode_pos = {0.014300, 0.216200, 0.000000};
  AnyFloat SuperiorEndplatePosteriorNode_pos = {-0.004600, 0.210100, 0.000000};
  AnyFloat SpinalisT11T6NodeOrg_pos =  {-0.04+0.01,0.166,0};
  AnyFloat SpinalisT12T5Via1Node_pos =  {-0.04+0.01,0.16,0};
  AnyFloat SpinalisT12T4Via1Node_pos =  {-0.041+0.01,0.159,0};
  AnyFloat SpinalisL1T3Via2Node_pos =  {-0.042+0.01,0.158,0};
  AnyFloat SpinalisL1T2Via2Node_pos =  {-0.043+0.01,0.157,0};
  AnyFloat SpinalisL2T1Via3Node_pos =  {-0.044+0.01,0.156,0};
  AnyFloat LSNode_pos = {-0.04200000, 0.1600000, 0.0000000};
  // anterior longitudinal
  AnyMatrix AnteriorLongitudinal_inferior_points = {
    {0.020263825, 0.19309582, 0.016678013}, // 0
    {0.023382245, 0.19427921, 0.013103375}, // 1
    {0.025519485, 0.19454703, 0.0079956362}, // 2
    {0.026955375, 0.19528872, 0.0019417171}, // 3
    {0.026955375, 0.19528872, -0.0019417171}, // 7
    {0.025519485, 0.19454703, -0.0079956362}, // 6
    {0.023382245, 0.19427921, -0.013103375}, // 5
    {0.020263825, 0.19309582, -0.016678013} // 4
  };
  AnyMatrix AnteriorLongitudinal_superior_points = {
    {0.014483058, 0.21345446, 0.017372463}, // 3
    {0.017667973, 0.21487756, 0.011927554}, // 4
    {0.019018129, 0.21542785, 0.0070107253}, // 5
    {0.01947064, 0.21568315, 0.001887435}, // 6
    {0.01947064, 0.21568315, -0.001887435}, // 10
    {0.019018129, 0.21542785, -0.0070107253}, // 9
    {0.017667973, 0.21487756, -0.011927554}, // 8
    {0.014483058, 0.21345446, -0.017372463} // 7
  };

  AnyMatrix PosteriorLongitudinal_inferior_points = {
    {-0.0016279535, 0.18315674, -0.010297113}, // 1
    {-0.0010151971, 0.18278585, -0.0067749396}, // 2
    {-0.00030710502, 0.18235119, -0.0040187947}, // 3
    {0.00020850559, 0.18192793, -0.00060743955}, // 4
    {0.00020850559, 0.18192793, 0.00060743955}, // 8
    {-0.00030710502, 0.18235119, 0.0040187947}, // 7
    {-0.0010151971, 0.18278585, 0.0067749396}, // 6
    {-0.0016279535, 0.18315674, 0.010297113} // 5
  };
  AnyMatrix PosteriorLongitudinal_superior_points = {
    {-0.013104647, 0.20618865, -0.0080896793}, // 5
    {-0.011532077, 0.20632739, -0.006081284}, // 6
    {-0.010786514, 0.20627123, -0.0038489019}, // 7
    {-0.010494405, 0.20621952, -0.0006961507}, // 8
    {-0.010494405, 0.20621952, 0.0006961507}, // 12
    {-0.010786514, 0.20627123, 0.0038489019}, // 11
    {-0.011532077, 0.20632739, 0.006081284}, // 10
    {-0.013104647, 0.20618865, 0.0080896793} // 9
  };

  AnyMatrix InterSpinous_inferior_points = {
    {-0.023253301, 0.16750403, 0.0}, // 3
    {-0.021421045, 0.16944821, 0.0}, // 4
    {-0.019426003, 0.17167553, 0.0} // 5
  };
  AnyMatrix InterSpinous_superior_points = {
    {-0.030388057, 0.18252772, 0.0}, // 9
    {-0.02903194, 0.18603086, 0.0}, // 10
    {-0.027276477, 0.18983899, 0.0} // 11
  };
  AnyMatrix SupraSpinous_inferior_points = {
    {-0.031190617, 0.15928054, 0.0}, // 0
    {-0.028613158, 0.16135952, 0.0}, // 1
    {-0.025196521, 0.16516107, 0.0} // 2
  };
  AnyMatrix SupraSpinous_superior_points = {
    {-0.034863114, 0.17121927, 0.0}, // 6
    {-0.03295932, 0.17471737, 0.0}, // 7
    {-0.031665958, 0.17884849, 0.0} // 8
  };
  AnyFloat O_serratus_posterior_inferior_pos          = {-0.04, 0.16 , 0.0};

  AnyFolder Right = {
    AnyFloat CV_pos  = {-0.01, 0.207, 0.022195}+{0,-0.005,0.0};
    AnyFloat CT_pos  = {-0.029, 0.201, 0.019298}+ {0.005,0.00,0.0085};


    AnyFloat CTsup_pos       = CT_pos + {0, ..AllRibs.CTOffset[1], 0};
    AnyFloat CTinf_pos       = CT_pos - {0, ..AllRibs.CTOffset[1], 0};
    AnyFloat SubcostalisR8R11_Org_pos = {-0.024680909, 0.19310249, 0.04120000};
    AnyFloat SubcostalisR9R11_Org_pos = {-0.026680909, 0.19010249, 0.04720000};
    AnyFloat SemispinalisThoracisTransversus_pos = {-0.022,0.195,0.020};
    AnyFloat SemispinalisThoracisViaNode_pos = {-0.022,0.195,0.018};
    AnyFloat MultifidusThoracisT11T6NodeOrg_pos =  {-0.022,0.195,0.020};
    AnyFloat MultifidusThoracisT11T7NodeOrg_pos =  {-0.022,0.195,0.020};
    AnyFloat MultifidusThoracisT11T8NodeOrg_pos =  {-0.022,0.195,0.020};
    AnyFloat SET11T7NodeOrg_pos =  {-0.025,0.207,0.019};
    AnyFloat SET11T8NodeOrg_pos =  {-0.021,0.207,0.016};
    AnyFloat SET11T9NodeOrg_pos =  {-0.018,0.207,0.013};
    AnyFloat IC_AntIns_pos = { 0.020758200, 0.139809, 0.1197700};
    AnyFloat IC_IntIns_pos = {-0.015823900, 0.162020, 0.1027650};
    AnyFloat IC_PosIns_pos = {-0.032458100, 0.180197, 0.0773241};
    AnyFloat IliocostalisThoracisR5R11Node_pos     = {-0.035,0.201, 0.036};
    AnyFloat IliocostalisThoracisR6R12Via5Node_pos = {-0.035,0.195, 0.038};
    AnyFloat O_serratus_posterior_inferior_T11R9ViaNodepos = {-0.05, 0.19, 0.04};
    AnyFloat LevatorCostarumT11R12_pos = {-0.03006422, 0.196194, 0.01912587};

    AnyMatrix Flavum_inferior_points = {
      {-0.013253346, 0.1714647, 0.0073480252}, // 0
      {-0.01302831, 0.17220141, 0.0057724877}, // 1
      {-0.014370829, 0.17332239, 0.0041852635}, // 2
      {-0.015882276, 0.17418264, 0.0026241436}, // 3
      {-0.015960103, 0.1751802, 0.00051116693} // 4
    };
    AnyMatrix Flavum_superior_points = {
      {-0.021802418, 0.19987229, 0.0090524442}, // 5
      {-0.022508221, 0.19724812, 0.0068649831}, // 6
      {-0.023534432, 0.19547288, 0.0051518031}, // 7
      {-0.024511309, 0.19362585, 0.0027788174}, // 8
      {-0.024350546, 0.19345354, 0.00047313469} // 9
    };
    AnyMatrix InterTransverse_inferior_points = {
      {-0.014848527, 0.19124891, 0.023771198}, // 2
      {-0.010282482, 0.19275247, 0.021557059}, // 1
      {-0.011955254, 0.19036373, 0.020082334} // 0
    };
    AnyMatrix InterTransverse_superior_points = {
      {-0.031207796, 0.20315848, 0.017890301}, // 0
      {-0.029581627, 0.20469676, 0.018347731}, // 1
      {-0.027238039, 0.20621771, 0.018041724} // 2
    };
    AnyMatrix SuperiorCostoTransverse_points = {
      {-0.022857498, 0.19733472, 0.019543407}, // 2
      {-0.025942892, 0.2000313, 0.018534515}, // 1
      {-0.030357927, 0.20115401, 0.01911311} // 0
    };
    AnyMatrix LateralCostoTransverse_points = {
      {-0.026786646, 0.20464805, 0.019512558}, // 3
      {-0.022460263, 0.20206508, 0.021652736} // 4
    };
    AnyMatrix CostoTransverse_points = {
      {-0.02015101, 0.20291458, 0.020902146}, // 0
      {-0.014126556, 0.20337677, 0.01996587} // 1
    };
    AnyMatrix Radiate_inferior_points = {
      {0.0067461492, 0.18716815, 0.020528797}, // 5
      {0.0032048505, 0.18631242, 0.019923344}, // 4
      {-0.00059592788, 0.18529694, 0.018259082}, // 3
      {-0.0032776538, 0.18501307, 0.01610261} // 2
    };
    AnyMatrix Radiate_superior_points = {
      {-0.010922052, 0.19999349, 0.022440977}, // 6
      {-0.0087663466, 0.2021105, 0.020910796}, // 7
      {-0.0072304714, 0.20423082, 0.020500259}, // 8
      {-0.0078168064, 0.20668447, 0.019433374} // 9
    };
    AnyMatrix FacetCapsule_inferior_points = {
      {-0.012234623, 0.17204469, 0.008102946}, // 0
      {-0.013550797, 0.17008463, 0.010655575}, // 1
      {-0.016783359, 0.1706509, 0.013374899}, // 2
      {-0.012383742, 0.17503874, 0.011089634} // 3
    };
    AnyMatrix FacetCapsule_superior_points = {
      {-0.02219528, 0.20230214, 0.010839206}, // 0
      {-0.023995809, 0.20095515, 0.012661044}, // 1
      {-0.028111806, 0.2021722, 0.015164094}, // 2
      {-0.029350536, 0.20416309, 0.016641339}, // 3
      {-0.026888931, 0.2064776, 0.017283168}, // 4
      {-0.023650734, 0.20664901, 0.01506565}, // 5
      {-0.020960305, 0.2071673, 0.012953227}, // 6
      {-0.021967918, 0.20638394, 0.0091695329} // 7
    };
    AnyFloat SuperiorEndplateNode_pos = 0.5*(.SuperiorEndplateAnteriorNode_pos + .SuperiorEndplatePosteriorNode_pos) + {0,-0.000900,0.018100}; // Offset added manually to match the vertebra surface
  };

  AnyFolder Left = {
    AnyFloat CV_pos          = .Right.CV_pos * ..MirrorTransform;
    AnyFloat CT_pos          = .Right.CT_pos * ..MirrorTransform;
    AnyFloat CTsup_pos       = .Right.CTsup_pos * ..MirrorTransform;
    AnyFloat CTinf_pos       = .Right.CTinf_pos * ..MirrorTransform;
    AnyFloat SubcostalisR8R11_Org_pos = .Right.SubcostalisR8R11_Org_pos * ..MirrorTransform;
    AnyFloat SubcostalisR9R11_Org_pos = .Right.SubcostalisR9R11_Org_pos * ..MirrorTransform;
    AnyFloat SemispinalisThoracisTransversus_pos = .Right.SemispinalisThoracisTransversus_pos * ..MirrorTransform;
    AnyFloat SemispinalisThoracisViaNode_pos   = .Right.SemispinalisThoracisViaNode_pos * ..MirrorTransform;
    AnyFloat IC_AntIns_pos = .Right.IC_AntIns_pos * ..MirrorTransform;
    AnyFloat IC_IntIns_pos = .Right.IC_IntIns_pos * ..MirrorTransform;
    AnyFloat IC_PosIns_pos = .Right.IC_PosIns_pos * ..MirrorTransform;
    AnyFloat IliocostalisThoracisR5R11Node_pos     = .Right.IliocostalisThoracisR5R11Node_pos * ..MirrorTransform;
    AnyFloat IliocostalisThoracisR6R12Via5Node_pos = .Right.IliocostalisThoracisR6R12Via5Node_pos * ..MirrorTransform;
    AnyFloat MultifidusThoracisT11T6NodeOrg_pos = .Right.MultifidusThoracisT11T6NodeOrg_pos * ..MirrorTransform;
    AnyFloat MultifidusThoracisT11T7NodeOrg_pos = .Right.MultifidusThoracisT11T7NodeOrg_pos * ..MirrorTransform;
    AnyFloat MultifidusThoracisT11T8NodeOrg_pos = .Right.MultifidusThoracisT11T8NodeOrg_pos * ..MirrorTransform;
    AnyFloat SET11T7NodeOrg_pos = .Right.SET11T7NodeOrg_pos * ..MirrorTransform;
    AnyFloat SET11T8NodeOrg_pos = .Right.SET11T8NodeOrg_pos * ..MirrorTransform;
    AnyFloat SET11T9NodeOrg_pos = .Right.SET11T9NodeOrg_pos * ..MirrorTransform;
    AnyFloat O_serratus_posterior_inferior_T11R9ViaNodepos = .Right.O_serratus_posterior_inferior_T11R9ViaNodepos * ..MirrorTransform;
    AnyFloat LevatorCostarumT11R12_pos = .Right.LevatorCostarumT11R12_pos * ..MirrorTransform;

    AnyFloat Flavum_inferior_points = .Right.Flavum_inferior_points * ..MirrorTransform;
    AnyFloat Flavum_superior_points = .Right.Flavum_superior_points * ..MirrorTransform;
    AnyFloat InterTransverse_inferior_points = .Right.InterTransverse_inferior_points * ..MirrorTransform;
    AnyFloat InterTransverse_superior_points = .Right.InterTransverse_superior_points * ..MirrorTransform;
    AnyFloat SuperiorCostoTransverse_points = .Right.SuperiorCostoTransverse_points * ..MirrorTransform;
    AnyFloat Radiate_inferior_points = .Right.Radiate_inferior_points * ..MirrorTransform;
    AnyFloat Radiate_superior_points = .Right.Radiate_superior_points * ..MirrorTransform;
    AnyFloat LateralCostoTransverse_points = .Right.LateralCostoTransverse_points * ..MirrorTransform;
    AnyFloat CostoTransverse_points = .Right.CostoTransverse_points * ..MirrorTransform;
    AnyMatrix FacetCapsule_inferior_points = .Right.FacetCapsule_inferior_points * ..MirrorTransform;
    AnyMatrix FacetCapsule_superior_points = .Right.FacetCapsule_superior_points * ..MirrorTransform;
    AnyFloat SuperiorEndplateNode_pos = .Right.SuperiorEndplateNode_pos * ..MirrorTransform;
  };
};

AnyFolder T10 = {
  AnyFloat T10T11JntNode_pos= .T11.T10T11JntNode_pos;
  AnyFloat T9T10JntNode_pos = {-0.01, 0.244, 0.0};
  AnyFloat SuperiorEndplateAnteriorNode_pos = {0.007500, 0.245900, 0.000000};
  AnyFloat SuperiorEndplatePosteriorNode_pos = {-0.011600, 0.241700, 0.000000};
  AnyMatrix AnteriorLongitudinal_inferior_points = {
    {0.013154788, 0.22389938, 0.014540319}, // 0
    {0.01656363, 0.22478749, 0.0089872703}, // 1
    {0.01758991, 0.22478488, 0.0019073504}, // 2
    {0.01758991, 0.22478488, -0.0019073504}, // 5
    {0.01656363, 0.22478749, -0.0089872703}, // 4
    {0.013154788, 0.22389938, -0.014540319} // 3
  };
    AnyMatrix AnteriorLongitudinal_superior_points = {
    {0.0081534674, 0.24257074, 0.015652191}, // 3
    {0.011166312, 0.24316818, 0.0098677613}, // 4
    {0.011873323, 0.24374467, 0.0021288879}, // 5
    {0.011873323, 0.24374467, -0.0021288879}, // 8
    {0.011166312, 0.24316818, -0.0098677613}, // 7
    {0.0081534674, 0.24257074, -0.015652191} // 6
  };

  AnyMatrix PosteriorLongitudinal_inferior_points = {
    {-0.011417127, 0.21253671, -0.0099533591}, // 0
    {-0.010916479, 0.21230528, -0.0072411229}, // 1
    {-0.010120147, 0.21188521, -0.0049484745}, // 2
    {-0.010409979, 0.21191561, -0.0006909474}, // 3
    {-0.010409979, 0.21191561, 0.0006909474}, // 7
    {-0.010120147, 0.21188521, 0.0049484745}, // 6
    {-0.010916479, 0.21230528, 0.0072411229}, // 5
    {-0.011417127, 0.21253671, 0.0099533591} // 4
  };
    AnyMatrix PosteriorLongitudinal_superior_points = {
    {-0.021357644, 0.23831603, -0.0084670465}, // 4
    {-0.020614116, 0.23786728, -0.0068391487}, // 5
    {-0.019676274, 0.23769581, -0.0047656111}, // 6
    {-0.019401269, 0.23780736, -0.0031362178}, // 7
    {-0.01905697, 0.23811202, -0.00072925625}, // 8
    {-0.01905697, 0.23811202, 0.00072925625}, // 13
    {-0.019401269, 0.23780736, 0.0031362178}, // 12
    {-0.019676274, 0.23769581, 0.0047656111}, // 11
    {-0.020614116, 0.23786728, 0.0068391487}, // 10
    {-0.021357644, 0.23831603, 0.0084670465} // 9
  };

  AnyMatrix InterSpinous_inferior_points = {
    {-0.030402653, 0.20285648, 0.0}, // 3
    {-0.028506441, 0.20528942, 0.0}, // 4
    {-0.026501073, 0.2073731, 0.0} // 5
  };
    AnyMatrix InterSpinous_superior_points = {
    {-0.038640056, 0.21470796, 0.0}, // 10
    {-0.037933361, 0.21746734, 0.0}, // 11
    {-0.036705308, 0.22157954, 0.0} // 12
  };
    AnyMatrix SupraSpinous_inferior_points = {
    {-0.036498178, 0.19346547, 0.0}, // 0
    {-0.03450758, 0.19734883, 0.0}, // 1
    {-0.032545071, 0.20033966, 0.0} // 2
  };
    AnyMatrix SupraSpinous_superior_points = {
    {-0.044718884, 0.1977188, 0.0}, // 6
    {-0.04263198, 0.20205165, 0.0}, // 7
    {-0.041143108, 0.20613365, 0.0}, // 8
    {-0.039469808, 0.21156844, 0.0} // 9
  };

  AnyFolder Right = {
//    AnyFloat CV_pos          = {-0.017, 0.239, 0.022195};
 #ifndef CV_Vertebra_Mid
    AnyFloat CV_Vertebra_pos          = {-0.014, 0.231, 0.022195};
    AnyFloat CV_Rib_pos          = {-0.025, 0.234, 0.024195};
    AnyFloat CV_pos          = (CV_Vertebra_pos + CV_Rib_pos)/2;
#else
   AnyFloat CV_pos   = {-0.014, 0.230, 0.022195};
 #endif
//    AnyFloat CT_pos          = {-0.03694792, 0.2328644, 0.0192};
//    AnyFloat CT_pos          = {-0.04194792, 0.2328644, 0.0305};
    AnyFloat CT_pos          = {-0.03494792, 0.2303644, 0.0283}; //Z Literature = 0.0253
//    AnyFloat CT_pos          = CV_pos + {-0.45,0.005,0.78} * ..CVCTDistance[2];
    AnyFloat CTsup_pos       = CT_pos + {0, ..AllRibs.CTOffset[2], 0};
    AnyFloat CTinf_pos       = CT_pos - {0, ..AllRibs.CTOffset[2], 0};

    AnyFloat SemispinalisThoracisTransversus_pos = {-0.036,0.230, 0.019};
    AnyFloat SemispinalisThoracisViaNode_pos = {-0.032,0.230, 0.016};
    AnyFloat LevatorCostarumT10R11_pos = {-0.04164089, 0.2302117, 0.01826163};
    AnyFloat LevatorCostarumT10R12_pos = {-0.04264089, 0.2302117, 0.01626163};

    AnyMatrix Flavum_inferior_points = {
      {-0.023662511, 0.20351231, 0.0085810013}, // 0
      {-0.023185443, 0.20452194, 0.0059924116}, // 1
      {-0.023824487, 0.20542158, 0.0044978755}, // 2
      {-0.024669107, 0.20677239, 0.0022752138}, // 3
      {-0.025246795, 0.20757352, 0.00064497546} // 4
    };
    AnyMatrix Flavum_superior_points = {
      {-0.031315219, 0.23096004, 0.0083958367}, // 5
      {-0.032806162, 0.22821774, 0.0059417267}, // 6
      {-0.034157101, 0.22621156, 0.0036091784}, // 7
      {-0.034331374, 0.22558455, 0.0022041118}, // 8
      {-0.034112349, 0.22532682, 0.00037596843} // 9
    };
    AnyMatrix InterTransverse_inferior_points = {
      {-0.022248164, 0.22583796, 0.023962427}, // 3
      {-0.025112472, 0.22328261, 0.023603752}, // 2
      {-0.023207134, 0.22197014, 0.022928825}, // 1
      {-0.021339651, 0.22167984, 0.020030759} // 0
    };
    AnyMatrix InterTransverse_superior_points = {
      {-0.040384073, 0.23545885, 0.018115873}, // 4
      {-0.038679313, 0.23661008, 0.018210495}, // 5
      {-0.03684118, 0.23798706, 0.018279612}, // 6
      {-0.035182856, 0.23900151, 0.017819285} // 0
    };
    AnyMatrix SuperiorCostoTransverse_points = {
      {-0.033955012, 0.22853085, 0.017340641}, // 12
      {-0.036560379, 0.22991802, 0.016352536}, // 11
      {-0.040732954, 0.23074464, 0.01657955} // 10
    };
    AnyMatrix LateralCostoTransverse_points = {
      {-0.035445455, 0.23615825, 0.019809047}, // 13
      {-0.039819457, 0.23658128, 0.03134333} // 14
    };
    AnyMatrix CostoTransverse_points = {
      {-0.030883554, 0.23702945, 0.019359173}, // 8
      {-0.023980193, 0.23660004, 0.01866563} // 9
    };
    AnyMatrix Radiate_inferior_points = {
      {-0.0034178586, 0.2163343, 0.019234523}, // 3
      {-0.0062788068, 0.21668848, 0.020082016}, // 2
      {-0.0084811347, 0.21654205, 0.019516921}, // 1
      {-0.012293853, 0.2149519, 0.017129492} // 0
    };
    AnyMatrix Radiate_superior_points = {
      {-0.028080234, 0.22777373, 0.024868585}, // 2
      {-0.022398705, 0.23056464, 0.023541208}, // 1
      {-0.020481845, 0.23408489, 0.021124037} // 0
    };
    AnyMatrix FacetCapsule_inferior_points = {
      {-0.023407182, 0.20319708, 0.0096857212}, // 0
      {-0.026417708, 0.20333889, 0.013421031}, // 1
      {-0.029089862, 0.20570178, 0.0153928}, // 2
      {-0.026135314, 0.20758954, 0.014407111}, // 3
      {-0.022688273, 0.20736584, 0.01143374}, // 4
      {-0.022225482, 0.20564935, 0.0072774421} // 5
    };
    AnyMatrix FacetCapsule_superior_points = {
      {-0.030601813, 0.23411596, 0.0093798805}, // 5
      {-0.029597165, 0.23642612, 0.0097635156}, // 4
      {-0.029232237, 0.23891474, 0.011894715}, // 3
      {-0.033903506, 0.23912151, 0.016560974}, // 2
      {-0.037683625, 0.23709413, 0.016556531}, // 1
      {-0.033965949, 0.23435241, 0.013462891} // 0
    };
    AnyFloat SuperiorEndplateNode_pos = 0.5*(.SuperiorEndplateAnteriorNode_pos + .SuperiorEndplatePosteriorNode_pos) + {0,-0.000900,0.018100}; // Offset added manually to match the vertebra surface
  };

  AnyFolder Left = {
    AnyFloat CV_pos          = .Right.CV_pos * ..MirrorTransform;
    AnyFloat CT_pos          = .Right.CT_pos * ..MirrorTransform;
    AnyFloat CTsup_pos       = .Right.CTsup_pos * ..MirrorTransform;
    AnyFloat CTinf_pos       = .Right.CTinf_pos * ..MirrorTransform;

    AnyFloat SemispinalisThoracisTransversus_pos = .Right.SemispinalisThoracisTransversus_pos * ..MirrorTransform;
    AnyFloat SemispinalisThoracisViaNode_pos = .Right.SemispinalisThoracisViaNode_pos * ..MirrorTransform;
    AnyFloat LevatorCostarumT10R11_pos = .Right.LevatorCostarumT10R11_pos * ..MirrorTransform;
    AnyFloat LevatorCostarumT10R12_pos = .Right.LevatorCostarumT10R12_pos * ..MirrorTransform;

    AnyFloat Flavum_inferior_points = .Right.Flavum_inferior_points * ..MirrorTransform;
    AnyFloat Flavum_superior_points = .Right.Flavum_superior_points * ..MirrorTransform;
    AnyFloat InterTransverse_inferior_points = .Right.InterTransverse_inferior_points * ..MirrorTransform;
    AnyFloat InterTransverse_superior_points = .Right.InterTransverse_superior_points * ..MirrorTransform;
    AnyFloat SuperiorCostoTransverse_points = .Right.SuperiorCostoTransverse_points * ..MirrorTransform;
    AnyMatrix Radiate_inferior_points = .Right.Radiate_inferior_points * ..MirrorTransform;
    AnyMatrix Radiate_superior_points = .Right.Radiate_superior_points * ..MirrorTransform;
    AnyMatrix LateralCostoTransverse_points = .Right.LateralCostoTransverse_points * ..MirrorTransform;
    AnyMatrix CostoTransverse_points = .Right.CostoTransverse_points * ..MirrorTransform;
    AnyMatrix FacetCapsule_inferior_points = .Right.FacetCapsule_inferior_points * ..MirrorTransform;
    AnyMatrix FacetCapsule_superior_points = .Right.FacetCapsule_superior_points * ..MirrorTransform;
    AnyFloat SuperiorEndplateNode_pos = .Right.SuperiorEndplateNode_pos * ..MirrorTransform;
  };
};

AnyFolder T9 = {
  AnyFloat T9T10JntNode_pos = .T10.T9T10JntNode_pos;
  AnyFloat T8T9JntNode_pos = {-0.015, 0.271, 0.0};
  AnyFloat SuperiorEndplateAnteriorNode_pos = {0.002800, 0.271200, 0.000000};
  AnyFloat SuperiorEndplatePosteriorNode_pos = {-0.017400, 0.269600, 0.000000};
  AnyFloat SpinalisT11T6Via2Node_pos =  {-0.059+0.01,0.23,0};
  AnyFloat SpinalisT12T5Via3Node_pos =  {-0.060+0.01,0.228,0};
  AnyFloat SpinalisT12T4Via3Node_pos =  {-0.061+0.01,0.227,0};
  AnyFloat SpinalisL1T3Via4Node_pos =  {-0.062+0.01,0.226,0};
  AnyFloat SpinalisL1T2Via4Node_pos =  {-0.063+0.01,0.225,0};
  AnyFloat SpinalisL2T1Via5Node_pos =  {-0.064+0.01,0.224,0};
  AnyMatrix AnteriorLongitudinal_inferior_points = {
    {0.0057095741, 0.25220802, 0.013540292}, // 0
    {0.0086105615, 0.25260353, 0.0081807766}, // 1
    {0.0098781651, 0.25269046, 0.0015065962}, // 2
    {0.0098781651, 0.25269046, -0.0015065962}, // 5
    {0.0086105615, 0.25260353, -0.0081807766}, // 4
    {0.0057095741, 0.25220802, -0.013540292} // 3
  };
    AnyMatrix AnteriorLongitudinal_superior_points = {
    {0.0031586154, 0.26836827, 0.015074396}, // 3
    {0.0059324577, 0.26911858, 0.0088929683}, // 4
    {0.0067440881, 0.26913098, 0.0017160925}, // 5
    {0.0067440881, 0.26913098, -0.0017160925}, // 8
    {0.0059324577, 0.26911858, -0.0088929683}, // 7
    {0.0031586154, 0.26836827, -0.015074396} // 6
  };

  AnyMatrix PosteriorLongitudinal_inferior_points = {
    {-0.020354826, 0.24573961, -0.01051055}, // 0
    {-0.020203097, 0.24560149, -0.0077872714}, // 1
    {-0.01997957, 0.24543099, -0.005434582}, // 2
    {-0.020066008, 0.24519075, -0.00078855082}, // 3
    {-0.020066008, 0.24519075, 0.00078855082}, // 7
    {-0.01997957, 0.24543099, 0.005434582}, // 6
    {-0.020203097, 0.24560149, 0.0077872714}, // 5
    {-0.020354826, 0.24573961, 0.01051055} // 4
  };
    AnyMatrix PosteriorLongitudinal_superior_points = {
    {-0.02742992, 0.26764631, -0.0081362193}, // 4
    {-0.025864774, 0.26717284, -0.0064832312}, // 5
    {-0.025154375, 0.26699629, -0.0044063046}, // 6
    {-0.0246381, 0.26705754, -0.0025854015}, // 7
    {-0.024682054, 0.26699513, -0.00056599791}, // 8
    {-0.024682054, 0.26699513, 0.00056599791}, // 13
    {-0.0246381, 0.26705754, 0.0025854015}, // 12
    {-0.025154375, 0.26699629, 0.0044063046}, // 11
    {-0.025864774, 0.26717284, 0.0064832312}, // 10
    {-0.02742992, 0.26764631, 0.0081362193} // 9
  };

  AnyMatrix InterSpinous_inferior_points = {
    {-0.041647185, 0.23805179, 0.0}, // 4
    {-0.039587982, 0.23978348, 0.0}, // 5
    {-0.03661019, 0.24262343, 0.0} // 6
  };
    AnyMatrix InterSpinous_superior_points = {
    {-0.047681101, 0.24798986, 0.0}, // 11
    {-0.045622624, 0.25212035, 0.0}, // 12
    {-0.043464184, 0.25591958, 0.0} // 13
  };
    AnyMatrix SupraSpinous_inferior_points = {
    {-0.052465208, 0.22816321, 0.0}, // 0
    {-0.049243838, 0.23003012, 0.0}, // 1
    {-0.046640288, 0.232885, 0.0}, // 2
    {-0.043779269, 0.2362342, 0.0} // 3
  };
    AnyMatrix SupraSpinous_superior_points = {
    {-0.056587406, 0.2347181, 0.0}, // 7
    {-0.054055661, 0.23731805, 0.0}, // 8
    {-0.051832099, 0.24043803, 0.0}, // 9
    {-0.049438659, 0.24450119, 0.0} // 10
  };

  AnyFolder Right = {
    AnyFloat SemispinalisThoracisTransversus_pos = {-0.041,0.265, 0.021};
    AnyFloat SemispinalisThoracisViaNode_pos = {-0.04,0.265, 0.014};
    AnyFloat MultifidusThoracisT9T4NodeOrg_pos =  {-0.048,0.262,0.020};
    AnyFloat MultifidusThoracisT9T5NodeOrg_pos =  {-0.048,0.262,0.020};
    AnyFloat MultifidusThoracisT9T6NodeOrg_pos =  {-0.048,0.262,0.020};
    AnyFloat MultifidusThoracisT12T9NodeIns_pos =  {-0.051,0.232,0.005};
    AnyFloat SET9T5NodeOrg_pos =  {-0.041,0.271,0.021};
    AnyFloat SET9T6NodeOrg_pos =  {-0.036,0.271,0.018};
    AnyFloat SET9T7NodeOrg_pos =  {-0.032,0.271,0.015};
    AnyFloat SET12T9NodeIns_pos =  {-0.047,0.242,0.005};
    AnyFloat SET11T9NodeIns_pos =  {-0.047,0.242,0.005};
    AnyFloat LevatorCostarumT9R10_pos = {-0.04842323, 0.2659475, 0.026};
    AnyFloat LevatorCostarumT9R11_pos = {-0.04994128, 0.2659475, 0.023};
//    AnyFloat CV_pos          = {-0.026, 0.268, 0.022195};
 #ifndef CV_Vertebra_Mid
    AnyFloat CV_Vertebra_pos          = {-0.024, 0.259, 0.022195};
    AnyFloat CV_Rib_pos          = {-0.028, 0.261, 0.022195};
    AnyFloat CV_pos          = (CV_Vertebra_pos + CV_Rib_pos)/2;
#else
   AnyFloat CV_pos   = {-0.024, 0.258, 0.022195};
 #endif
//    AnyFloat CT_pos          = {-0.04442323, 0.2629474, 0.0222};
//    AnyFloat CT_pos          = {-0.04842323, 0.2639474, 0.0305};
//    AnyFloat CT_pos          = CV_pos + {-0.5,0.005,0.785} * ..CVCTDistance[3];
    AnyFloat CT_pos          = {-0.03742323, 0.2589474, 0.0290}; //Z Literature = 0.028
    AnyFloat CTsup_pos       = CT_pos + {0, ..AllRibs.CTOffset[3], 0};
    AnyFloat CTinf_pos       = CT_pos - {0, ..AllRibs.CTOffset[3], 0};
    AnyFloat CVI_pos         = {-0.02030403, -0.02129442,  0.022090};
    AnyMatrix Flavum_inferior_points = {
      {-0.032709274, 0.23950249, 0.0077092815}, // 0
      {-0.032229062, 0.23984534, 0.0065535014}, // 1
      {-0.032910746, 0.24090855, 0.0045717042}, // 2
      {-0.033797506, 0.24208541, 0.0023881162}, // 3
      {-0.034377497, 0.24280027, 0.00071463198} // 4
    };
    AnyMatrix Flavum_superior_points = {
      {-0.037181783, 0.26337931, 0.0086400751}, // 5
      {-0.038993225, 0.26090643, 0.0058460208}, // 6
      {-0.040666834, 0.25923252, 0.0028682267}, // 7
      {-0.041414659, 0.2583487, 0.00026484081} // 8
    };
    AnyMatrix InterTransverse_inferior_points = {
      {-0.047469791, 0.26565406, 0.027185448}, // 2
      {-0.043848366, 0.26536062, 0.02453625}, // 1
      {-0.041901752, 0.26358539, 0.023214139} // 0
    };
    AnyMatrix InterTransverse_superior_points = {
      {-0.048408166, 0.26714233, 0.025954803}, // 3
      {-0.047015321, 0.26805964, 0.025127325}, // 4
      {-0.044112403, 0.26926726, 0.022758026} // 5
    };
    AnyMatrix SuperiorCostoTransverse_points = {
      {-0.04080306, 0.25985298, 0.019840114}, // 9
      {-0.045436062, 0.26163331, 0.022032605}, // 8
      {-0.048509233, 0.26392007, 0.024398165} // 7
    };
    AnyMatrix LateralCostoTransverse_points = {
      {-0.035705339, 0.26281714, 0.027340453}, // 10
      {-0.034958176, 0.25960433, 0.02467908}, // 11
      {-0.032559399, 0.2583304, 0.023541225} // 12
    };
    AnyMatrix CostoTransverse_points = {
      {-0.034648899, 0.26395515, 0.021733239}, // 0
      {-0.030401403, 0.26318336, 0.022213928} // 1
    };
    AnyMatrix Radiate_inferior_points = {
      {-0.015017199, 0.24791127, 0.019167906}, // 2
      {-0.019242857, 0.24831553, 0.01804724}, // 1
      {-0.02187019, 0.24765337, 0.015347804} // 0
    };
    AnyMatrix Radiate_superior_points = {
      {-0.014169079, 0.26741278, 0.021445066}, // 6
      {-0.016913664, 0.26572537, 0.021307237}, // 5
      {-0.020468876, 0.26600036, 0.020273425}, // 4
      {-0.02438942, 0.26696065, 0.019029921} // 3
    };
    AnyMatrix FacetCapsule_inferior_points = {
      {-0.037155893, 0.23964593, 0.011231388}, // 6
      {-0.034392852, 0.23911823, 0.0096377749}, // 5
      {-0.032673866, 0.23935711, 0.0098203877}, // 3
      {-0.032773353, 0.24057418, 0.012161202}, // 2
      {-0.035339151, 0.24035694, 0.013943737}, // 1
      {-0.038242437, 0.24003777, 0.013954584} // 0
    };
    AnyMatrix FacetCapsule_superior_points = {
      {-0.04124942, 0.26738834, 0.015899535}, // 0
      {-0.036877912, 0.26957929, 0.015192983}, // 1
      {-0.033634584, 0.26912439, 0.011213488}, // 2
      {-0.03521499, 0.26605988, 0.0091631822}, // 3
      {-0.037198197, 0.2635217, 0.009206255}, // 4
      {-0.039122906, 0.26215303, 0.011397129}, // 5
      {-0.040701903, 0.26432401, 0.01434355} // 6
    };
    AnyFloat SuperiorEndplateNode_pos = 0.5*(.SuperiorEndplateAnteriorNode_pos + .SuperiorEndplatePosteriorNode_pos) + {0,-0.000700,0.017900}; // Offset added manually to match the vertebra surface
  };

  AnyFolder Left = {
    AnyFloat SemispinalisThoracisTransversus_pos = .Right.SemispinalisThoracisTransversus_pos * ..MirrorTransform;
    AnyFloat SemispinalisThoracisViaNode_pos = .Right.SemispinalisThoracisViaNode_pos * ..MirrorTransform;
    AnyFloat LevatorCostarumT9R10_pos = .Right.LevatorCostarumT9R10_pos * ..MirrorTransform;
    AnyFloat LevatorCostarumT9R11_pos = .Right.LevatorCostarumT9R11_pos * ..MirrorTransform;
    AnyFloat MultifidusThoracisT9T4NodeOrg_pos = .Right.MultifidusThoracisT9T4NodeOrg_pos * ..MirrorTransform;
    AnyFloat MultifidusThoracisT9T5NodeOrg_pos = .Right.MultifidusThoracisT9T5NodeOrg_pos * ..MirrorTransform;
    AnyFloat MultifidusThoracisT9T6NodeOrg_pos = .Right.MultifidusThoracisT9T6NodeOrg_pos * ..MirrorTransform;
    AnyFloat MultifidusThoracisT12T9NodeIns_pos = .Right.MultifidusThoracisT12T9NodeIns_pos * ..MirrorTransform;
    AnyFloat SET9T5NodeOrg_pos = .Right.SET9T5NodeOrg_pos * ..MirrorTransform;
    AnyFloat SET9T6NodeOrg_pos = .Right.SET9T6NodeOrg_pos * ..MirrorTransform;
    AnyFloat SET9T7NodeOrg_pos = .Right.SET9T7NodeOrg_pos * ..MirrorTransform;
    AnyFloat SET12T9NodeIns_pos = .Right.SET12T9NodeIns_pos * ..MirrorTransform;
    AnyFloat SET11T9NodeIns_pos = .Right.SET11T9NodeIns_pos * ..MirrorTransform;
    AnyFloat CV_pos = .Right.CV_pos * ..MirrorTransform;
    AnyFloat CT_pos = .Right.CT_pos * ..MirrorTransform;
    AnyFloat CTsup_pos       = .Right.CTsup_pos * ..MirrorTransform;
    AnyFloat CTinf_pos       = .Right.CTinf_pos * ..MirrorTransform;
    AnyFloat CVI_pos = .Right.CVI_pos * ..MirrorTransform;
    AnyFloat Flavum_inferior_points = .Right.Flavum_inferior_points * ..MirrorTransform;
    AnyFloat Flavum_superior_points = .Right.Flavum_superior_points * ..MirrorTransform;
    AnyMatrix InterTransverse_inferior_points = .Right.InterTransverse_inferior_points * ..MirrorTransform;
    AnyMatrix InterTransverse_superior_points = .Right.InterTransverse_superior_points * ..MirrorTransform;
    AnyMatrix SuperiorCostoTransverse_points = .Right.SuperiorCostoTransverse_points * ..MirrorTransform;
    AnyMatrix Radiate_inferior_points = .Right.Radiate_inferior_points * ..MirrorTransform;
    AnyMatrix Radiate_superior_points = .Right.Radiate_superior_points * ..MirrorTransform;
    AnyMatrix LateralCostoTransverse_points = .Right.LateralCostoTransverse_points * ..MirrorTransform;
    AnyMatrix CostoTransverse_points = .Right.CostoTransverse_points * ..MirrorTransform;
    AnyMatrix FacetCapsule_inferior_points = .Right.FacetCapsule_inferior_points * ..MirrorTransform;
    AnyMatrix FacetCapsule_superior_points = .Right.FacetCapsule_superior_points * ..MirrorTransform;
    AnyFloat SuperiorEndplateNode_pos = .Right.SuperiorEndplateNode_pos * ..MirrorTransform;
  };
};

AnyFolder T8 = {
  AnyFloat T8T9JntNode_pos = .T9.T8T9JntNode_pos;
  AnyFloat T7T8JntNode_pos = {-0.018, 0.297, 0.0};
  AnyFloat SuperiorEndplateAnteriorNode_pos = {-0.001300, 0.295900, 0.000000};
  AnyFloat SuperiorEndplatePosteriorNode_pos = {-0.021600, 0.295000, 0.000000};
  AnyFloat SpinalisL1T3ViaNode_pos =  {-0.0398+0.01,0.280,0.0};
  AnyFloat SpinalisT11T6Via3Node_pos =  {-0.065+0.01,0.252,0};
  AnyFloat SpinalisT12T5Via4Node_pos =  {-0.066+0.01,0.251,0};
  AnyFloat SpinalisT12T4Via4Node_pos =  {-0.067+0.01,0.25,0};
  AnyFloat SpinalisL1T3Via5Node_pos =  {-0.068+0.01,0.249,0};
  AnyFloat SpinalisL1T2Via5Node_pos =  {-0.069+0.01,0.248,0};
  AnyFloat SpinalisL2T1Via6Node_pos =  {-0.070+0.01,0.247,0};
  AnyMatrix AnteriorLongitudinal_inferior_points = {
    {-2.8995826e-05, 0.27673057, 0.014624255}, // 0
    {0.0037067926, 0.27723742, 0.0082128877}, // 1
    {0.0046073101, 0.27692685, 0.0017649361}, // 2
    {0.0046073101, 0.27692685, -0.0017649361}, // 5
    {0.0037067926, 0.27723742, -0.0082128877}, // 4
    {-2.8995826e-05, 0.27673057, -0.014624255} // 3
  };
  AnyMatrix AnteriorLongitudinal_superior_points = {
    {-0.00057953061, 0.29297897, 0.014734266}, // 3
    {0.0018947357, 0.29342753, 0.0085584316}, // 4
    {0.0027137131, 0.29361296, 0.0020282406}, // 5
    {0.0027137131, 0.29361296, -0.0020282406}, // 8
    {0.0018947357, 0.29342753, -0.0085584316}, // 7
    {-0.00057953061, 0.29297897, -0.014734266} // 6
  };

  AnyMatrix PosteriorLongitudinal_inferior_points = {
    {-0.024826759, 0.27285048, -0.0098338723}, // 0
    {-0.024712013, 0.27267185, -0.0071164789}, // 1
    {-0.024744457, 0.27275035, -0.0037975591}, // 3
    {-0.024826759, 0.27285048, 0.0098338723}, // 4
    {-0.024689151, 0.2727631, 0.00050359906}, // 8
    {-0.024744457, 0.27275035, 0.0037975591}, // 7
    {-0.024712013, 0.27267185, 0.0071164789} // 5
  };
  AnyMatrix PosteriorLongitudinal_superior_points = {
    {-0.030491831, 0.29310063, -0.0077080093}, // 5
    {-0.029289279, 0.29249391, -0.0053511015}, // 6
    {-0.028346624, 0.29244474, -0.0026174556}, // 7
    {-0.028299971, 0.29261819, -0.00046522109}, // 8
    {-0.028299971, 0.29261819, 0.00046522109}, // 12
    {-0.028346624, 0.29244474, 0.0026174556}, // 11
    {-0.029289279, 0.29249391, 0.0053511015}, // 10
    {-0.030491831, 0.29310063, 0.0077080093} // 9
  };

  AnyMatrix InterSpinous_inferior_points = {
    {-0.044626907, 0.26241857, 0.0}, // 4
    {-0.041881029, 0.26511112, 0.0}, // 5
    {-0.039197799, 0.26844519, 0.0} // 6
  };
  AnyMatrix InterSpinous_superior_points = {
    {-0.049521729, 0.27315888, 0.0}, // 11
    {-0.048026316, 0.27599928, 0.0}, // 12
    {-0.046359316, 0.27823788, 0.0} // 13
  };
  AnyMatrix SupraSpinous_inferior_points = {
    {-0.05398874, 0.25218278, 0.0}, // 0
    {-0.051790629, 0.25385275, 0.0}, // 1
    {-0.049816862, 0.25632873, 0.0}, // 2
    {-0.047051474, 0.25974044, 0.0} // 3
  };
  AnyMatrix SupraSpinous_superior_points = {
    {-0.05871053, 0.25886357, 0.0}, // 7
    {-0.056519702, 0.26130208, 0.0}, // 8
    {-0.053887498, 0.2652573, 0.0}, // 9
    {-0.051180352, 0.26995978, 0.0} // 10
  };

  AnyFolder Right = {
    AnyFloat SemispinalisThoracisTransversus_pos = {-0.045,0.288,0.023};
    AnyFloat SemispinalisThoracisViaNode_pos = {-0.045,0.288,0.012};
    AnyFloat SemispinalisThoracisT1ViaNode_pos = {-0.042,0.288,0.014};
    AnyFloat SemispinalisThoracisT8C7ViaNode_pos = {-0.0415,0.288,0.014};
    AnyFloat SemispinalisThoracisC6ViaNode_pos = {-0.041,0.288,0.014};
    AnyFloat SemispinalisThoracisT9T4ViaNode_pos = {-0.045,0.288,0.016};
    AnyFloat MultifidusThoracisT8T3NodeOrg_pos =  {-0.050,0.287,0.020};
    AnyFloat MultifidusThoracisT8T4NodeOrg_pos =  {-0.050,0.287,0.020};
    AnyFloat MultifidusThoracisT8T5NodeOrg_pos =  {-0.050,0.287,0.020};
    AnyFloat MultifidusThoracisT12T8NodeIns_pos =  {-0.056,0.253,0.005};
    AnyFloat MultifidusThoracisT11T8NodeIns_pos =  {-0.056,0.253,0.005};
    AnyFloat SET8T4NodeOrg_pos =  {-0.041,0.293,0.020};
    AnyFloat SET8T5NodeOrg_pos =  {-0.036,0.293,0.017};
    AnyFloat SET8T6NodeOrg_pos =  {-0.032,0.293,0.014};
    AnyFloat SET12T8NodeIns_pos =  {-0.050,0.265,0.005};
    AnyFloat SET11T8NodeIns_pos =  {-0.050,0.265,0.005};
    AnyFloat SET10T8NodeIns_pos =  {-0.050,0.265,0.005};
    AnyFloat LevatorCostarumT8R9_pos = {    -0.05468091, 0.2881025, 0.0312};
    AnyFloat LevatorCostarumT8R10_pos = {    -0.05468091, 0.2881025, 0.0262};
//    AnyFloat CV_pos          = {-0.027, 0.293, 0.021195};
 #ifndef CV_Vertebra_Mid
    AnyFloat CV_Vertebra_pos          = {-0.027, 0.284, 0.021195};
    AnyFloat CV_Rib_pos          = {-0.035, 0.289, 0.028195};
    AnyFloat CV_pos          = (CV_Vertebra_pos + CV_Rib_pos)/2;
#else
   AnyFloat CV_pos   = {-0.027, 0.283, 0.021195};
 #endif
//    AnyFloat CT_pos          = {-0.051, 0.289, 0.0305};
//    AnyFloat CT_pos          = CV_pos + {-0.55,0.01,0.785} * ..CVCTDistanc//e[4];
//    AnyFloat CT_pos          = {-0.047, 0.282, 0.0305};
    AnyFloat CT_pos          = {-0.037, 0.286, 0.0302};
    AnyFloat CTsup_pos       = CT_pos + {0, ..AllRibs.CTOffset[4], 0};
    AnyFloat CTinf_pos       = CT_pos - {0, ..AllRibs.CTOffset[4], 0};
    AnyFloat CVI_pos         = {-0.01945747, -0.02170748,  0.0240500};
    AnyMatrix Flavum_inferior_points = {
      {-0.036367223, 0.26724002, 0.0073057949}, // 0
      {-0.035754502, 0.26836351, 0.0051921559}, // 1
      {-0.036874689, 0.26913646, 0.0034379736}, // 2
      {-0.037810668, 0.26952726, 0.0020748167}, // 3
      {-0.04052582, 0.26647842, 0.00026829739} // 4
    };
    AnyMatrix Flavum_superior_points = {
      {-0.04027738, 0.28530335, 0.0073080179}, // 5
      {-0.041981433, 0.28306228, 0.0055229287}, // 6
      {-0.043410487, 0.28135568, 0.0034659244}, // 7
      {-0.044608727, 0.28000015, 0.0016214708}, // 8
      {-0.044487216, 0.28012493, 0.00032854831} // 9
    };
    AnyMatrix InterTransverse_inferior_points = {
      {-0.052655037, 0.28719196, 0.03097821}, // 2
      {-0.051089335, 0.28661609, 0.028877061}, // 1
      {-0.049298685, 0.28604707, 0.02626149} // 0
    };
    AnyMatrix InterTransverse_superior_points = {
      {-0.053658303, 0.28978884, 0.030928569}, // 3
      {-0.050732616, 0.29111588, 0.027399885}, // 4
      {-0.046354853, 0.29194701, 0.022906682} // 5
    };
    AnyMatrix SuperiorCostoTransverse_points = {
      {-0.047356322, 0.28410128, 0.022667199}, // 4
      {-0.051938925, 0.2850242, 0.025829595}, // 3
      {-0.054885607, 0.28700098, 0.032183636} // 2
    };
    AnyMatrix LateralCostoTransverse_points = {
      {-0.04907082, 0.28891113, 0.029112658}, // 5
      {-0.043220099, 0.28775615, 0.024228346}, // 6
      {-0.03822941, 0.2871418, 0.021326153} // 7
    };
    AnyMatrix CostoTransverse_points = {
      {-0.039873417, 0.2874952, 0.021566395}, // 0
      {-0.035209887, 0.28737727, 0.021383582} // 1
    };
    AnyMatrix Radiate_inferior_points = {
      {-0.016637174, 0.27367622, 0.0185284}, // 11
      {-0.018962294, 0.27579263, 0.01916416}, // 10
      {-0.02232608, 0.27770814, 0.018415565}, // 9
      {-0.025821017, 0.27880913, 0.017439863} // 8
    };
    AnyMatrix Radiate_superior_points = {
      {-0.019539421, 0.29293254, 0.020659104}, // 16
      {-0.021714631, 0.29086024, 0.020704821}, // 15
      {-0.024412276, 0.2903291, 0.020111261}, // 14
      {-0.027184458, 0.29082254, 0.019707449}, // 13
      {-0.029477181, 0.29299617, 0.017934363} // 12
    };
    AnyMatrix FacetCapsule_inferior_points = {
      {-0.043337867, 0.2687189, 0.015221336}, // 0
      {-0.039823674, 0.26957047, 0.014599065}, // 1
      {-0.036769886, 0.26988035, 0.012962939}, // 2
      {-0.034852117, 0.26946157, 0.010480917}, // 3
      {-0.036092006, 0.26683974, 0.0087964563}, // 4
      {-0.03877468, 0.26525709, 0.010107419}, // 6
      {-0.041039079, 0.2646403, 0.013608908} // 7
    };
    AnyMatrix FacetCapsule_superior_points = {
      {-0.03840927, 0.29103595, 0.0099690631}, // 0
      {-0.041066397, 0.28798392, 0.011842214}, // 1
      {-0.044161312, 0.28761563, 0.014775989}, // 2
      {-0.045013487, 0.28916165, 0.016408237}, // 3
      {-0.043417677, 0.29149896, 0.017385771}, // 4
      {-0.039867688, 0.29258505, 0.014782596} // 5
    };
    AnyFloat SuperiorEndplateNode_pos = 0.5*(.SuperiorEndplateAnteriorNode_pos + .SuperiorEndplatePosteriorNode_pos) + {0,-0.000900,0.018400}; // Offset added manually to match the vertebra surface
  };

  AnyFolder Left = {
    AnyFloat SemispinalisThoracisTransversus_pos = .Right.SemispinalisThoracisTransversus_pos * ..MirrorTransform;
    AnyFloat SemispinalisThoracisViaNode_pos = .Right.SemispinalisThoracisViaNode_pos * ..MirrorTransform;
    AnyFloat SemispinalisThoracisT1ViaNode_pos = .Right.SemispinalisThoracisT1ViaNode_pos * ..MirrorTransform;
    AnyFloat SemispinalisThoracisT8C7ViaNode_pos = .Right.SemispinalisThoracisT8C7ViaNode_pos * ..MirrorTransform;
    AnyFloat SemispinalisThoracisC6ViaNode_pos = .Right.SemispinalisThoracisC6ViaNode_pos * ..MirrorTransform;
    AnyFloat SemispinalisThoracisT9T4ViaNode_pos = .Right.SemispinalisThoracisT9T4ViaNode_pos * ..MirrorTransform;
    AnyFloat LevatorCostarumT8R9_pos = .Right.LevatorCostarumT8R9_pos * ..MirrorTransform;
    AnyFloat LevatorCostarumT8R10_pos = .Right.LevatorCostarumT8R10_pos * ..MirrorTransform;
    AnyFloat MultifidusThoracisT8T3NodeOrg_pos = .Right.MultifidusThoracisT8T3NodeOrg_pos * ..MirrorTransform;
    AnyFloat MultifidusThoracisT8T4NodeOrg_pos = .Right.MultifidusThoracisT8T4NodeOrg_pos * ..MirrorTransform;
    AnyFloat MultifidusThoracisT8T5NodeOrg_pos = .Right.MultifidusThoracisT8T5NodeOrg_pos * ..MirrorTransform;
    AnyFloat MultifidusThoracisT12T8NodeIns_pos = .Right.MultifidusThoracisT12T8NodeIns_pos * ..MirrorTransform;
    AnyFloat MultifidusThoracisT11T8NodeIns_pos = .Right.MultifidusThoracisT11T8NodeIns_pos * ..MirrorTransform;
    AnyFloat SET8T4NodeOrg_pos = .Right.SET8T4NodeOrg_pos * ..MirrorTransform;
    AnyFloat SET8T5NodeOrg_pos = .Right.SET8T5NodeOrg_pos * ..MirrorTransform;
    AnyFloat SET8T6NodeOrg_pos = .Right.SET8T6NodeOrg_pos * ..MirrorTransform;
    AnyFloat SET12T8NodeIns_pos = .Right.SET12T8NodeIns_pos * ..MirrorTransform;
    AnyFloat SET11T8NodeIns_pos = .Right.SET11T8NodeIns_pos * ..MirrorTransform;
    AnyFloat SET10T8NodeIns_pos = .Right.SET10T8NodeIns_pos * ..MirrorTransform;
    AnyFloat CV_pos = .Right.CV_pos * ..MirrorTransform;
    AnyFloat CT_pos = .Right.CT_pos * ..MirrorTransform;
    AnyFloat CTsup_pos       = .Right.CTsup_pos * ..MirrorTransform;
    AnyFloat CTinf_pos       = .Right.CTinf_pos * ..MirrorTransform;
    AnyFloat CVI_pos   = .Right.CVI_pos * ..MirrorTransform;
    AnyFloat Flavum_inferior_points = .Right.Flavum_inferior_points * ..MirrorTransform;
    AnyFloat Flavum_superior_points = .Right.Flavum_superior_points * ..MirrorTransform;
    AnyFloat InterTransverse_inferior_points = .Right.InterTransverse_inferior_points * ..MirrorTransform;
    AnyFloat InterTransverse_superior_points = .Right.InterTransverse_superior_points * ..MirrorTransform;
    AnyFloat SuperiorCostoTransverse_points = .Right.SuperiorCostoTransverse_points * ..MirrorTransform;
    AnyFloat Radiate_inferior_points = .Right.Radiate_inferior_points * ..MirrorTransform;
    AnyFloat Radiate_superior_points = .Right.Radiate_superior_points * ..MirrorTransform;
    AnyFloat LateralCostoTransverse_points = .Right.LateralCostoTransverse_points * ..MirrorTransform;
    AnyFloat CostoTransverse_points = .Right.CostoTransverse_points * ..MirrorTransform;
    AnyMatrix FacetCapsule_inferior_points = .Right.FacetCapsule_inferior_points * ..MirrorTransform;
    AnyMatrix FacetCapsule_superior_points = .Right.FacetCapsule_superior_points * ..MirrorTransform;
    AnyFloat SuperiorEndplateNode_pos = .Right.SuperiorEndplateNode_pos * ..MirrorTransform;
  };
};

AnyFolder T7 = {
  AnyFloat T7T8JntNode_pos = .T8.T7T8JntNode_pos;
  AnyFloat T6T7JntNode_pos = {-0.019, 0.323, 0.0};
  AnyFloat SuperiorEndplateAnteriorNode_pos = {-0.002600, 0.320800, 0.000000};
  AnyFloat SuperiorEndplatePosteriorNode_pos = {-0.021200, 0.321600, 0.000000};
  AnyFloat SpinalisT11T6Via4Node_pos =  {-0.07+0.01,0.277,0};
  AnyFloat SpinalisT12T5Via5Node_pos =  {-0.071+0.01,0.277,0};
  AnyFloat SpinalisT12T4Via5Node_pos =  {-0.072+0.01,0.275,0};
  AnyFloat SpinalisL1T3Via6Node_pos =  {-0.073+0.01,0.275,0};
  AnyFloat SpinalisL1T2Via6Node_pos =  {-0.074+0.01,0.275,0};
  AnyFloat SpinalisL2T1Via7Node_pos =  {-0.075+0.01,0.274,0};
  AnyMatrix AnteriorLongitudinal_inferior_points = {
    {-0.0024042851, 0.30257258, 0.0134827}, // 0
    {0.00016203318, 0.30229089, 0.0086193318}, // 1
    {0.0013275273, 0.30201384, 0.0018055296}, // 2
    {0.0013275273, 0.30201384, -0.0018055296}, // 5
    {0.00016203318, 0.30229089, -0.0086193318}, // 4
    {-0.0024042851, 0.30257258, -0.0134827} // 3
  };
  AnyMatrix AnteriorLongitudinal_superior_points = {
    {-0.0031455453, 0.31857398, 0.014590127}, // 0
    {-0.00040273392, 0.31836218, 0.0090970937}, // 1
    {0.00067008304, 0.31868267, 0.0011980145}, // 2
    {0.00067008304, 0.31868267, -0.0011980145}, // 5
    {-0.00040273392, 0.31836218, -0.0090970937}, // 4
    {-0.0031455453, 0.31857398, -0.014590127} // 3
  };

  AnyMatrix PosteriorLongitudinal_inferior_points = {
    {-0.026822427, 0.30048478, -0.0097041642}, // 0
    {-0.026704373, 0.30046272, -0.006772608}, // 1
    {-0.026764344, 0.30051169, -0.0035228964}, // 2
    {-0.02685765, 0.30062833, -0.00037389025}, // 3
    {-0.02685765, 0.30062833, 0.00037389025}, // 7
    {-0.026764344, 0.30051169, 0.0035228964}, // 6
    {-0.026704373, 0.30046272, 0.006772608}, // 5
    {-0.026822427, 0.30048478, 0.0097041642} // 4
  };
  AnyMatrix PosteriorLongitudinal_superior_points = {
    {-0.03036641, 0.32027462, -0.0067912103}, // 4
    {-0.029442735, 0.31997511, -0.0051204171}, // 5
    {-0.029061232, 0.31955069, -0.0030886794}, // 6
    {-0.028962191, 0.31955755, -0.00048380584}, // 7
    {-0.028962191, 0.31955755, 0.00048380584}, // 11
    {-0.029061232, 0.31955069, 0.0030886794}, // 10
    {-0.029442735, 0.31997511, 0.0051204171}, // 9
    {-0.03036641, 0.32027462, 0.0067912103} // 8
  };

  AnyMatrix InterSpinous_inferior_points = {
    {-0.050455917, 0.29001874, 0.0}, // 4
    {-0.046918727, 0.29318804, 0.0}, // 5
    {-0.044199441, 0.29631656, 0.0} // 6
  };
  AnyMatrix InterSpinous_superior_points = {
    {-0.054180082, 0.30033267, 0.0}, // 11
    {-0.051123865, 0.30402443, 0.0}, // 12
    {-0.047743045, 0.30728531, 0.0} // 13
  };
  AnyMatrix SupraSpinous_inferior_points = {
    {-0.061127167, 0.276939, 0.0}, // 0
    {-0.058787562, 0.27954939, 0.0}, // 1
    {-0.056222331, 0.28307909, 0.0}, // 2
    {-0.052761309, 0.28756931, 0.0} // 3
  };
  AnyMatrix SupraSpinous_superior_points = {
    {-0.065599173, 0.28332672, 0.0}, // 7
    {-0.062911235, 0.2866846, 0.0}, // 8
    {-0.060055371, 0.29031447, 0.0}, // 9
    {-0.056447543, 0.29668352, 0.0} // 10
  };

  AnyFolder Right = {
    AnyFloat SemispinalisThoracisTransversus_pos = {-0.045,0.315,0.023};
    AnyFloat SemispinalisThoracisT4ViaNode_pos = {-0.051,0.315,0.008};
    AnyFloat SemispinalisThoracisT3ViaNode_pos = {-0.049,0.315,0.008};
    AnyFloat SemispinalisThoracisT2ViaNode_pos = {-0.046,0.315,0.008};
    AnyFloat SemispinalisThoracisViaNode_pos = {-0.045,0.315,0.011};
    AnyFloat SemispinalisThoracisC7ViaNode_pos = {-0.043,0.315,0.011};
    AnyFloat SemispinalisThoracisT7C6ViaNode_pos = {-0.0425,0.315,0.011};
    AnyFloat SemispinalisThoracisT7T9T4ViaNode_pos = {-0.051,0.315,0.01};
    AnyFloat SemispinalisThoracisT9T1ViaNode_pos = {-0.049,0.315,0.012};
    AnyFloat SemispinalisThoracisT8T4ViaNode_pos = {-0.049,0.315,0.02};
    AnyFloat MultifidusThoracisT7T2NodeOrg_pos =  {-0.052,0.315,0.020};
    AnyFloat MultifidusThoracisT7T3NodeOrg_pos =  {-0.052,0.315,0.020};
    AnyFloat MultifidusThoracisT7T4NodeOrg_pos =  {-0.052,0.315,0.020};
    AnyFloat MultifidusThoracisT12T7NodeIns_pos =  {-0.063,0.277,0.005};
    AnyFloat MultifidusThoracisT11T7NodeIns_pos =  {-0.063,0.277,0.005};
    AnyFloat MultifidusThoracisT10T7NodeIns_pos =  {-0.063,0.277,0.005};
    AnyFloat SET7T3NodeOrg_pos =  {-0.041,0.321,0.020};
    AnyFloat SET7T4NodeOrg_pos =  {-0.036,0.321,0.017};
    AnyFloat SET7T5NodeOrg_pos =  {-0.032,0.321,0.014};
    AnyFloat SET11T7NodeIns_pos =  {-0.058,0.288,0.005};
    AnyFloat SET10T7NodeIns_pos =  {-0.058,0.288,0.005};
    AnyFloat SET9T7NodeIns_pos  =  {-0.058,0.288,0.005};
    AnyFloat LevatorCostarumT7R8_pos = {    -0.05678678, 0.317918, 0.03};
    AnyFloat LevatorCostarumT7R9_pos = {    -0.05678678, 0.317918, 0.025};
//    AnyFloat CV_pos          = {-0.028, 0.320, 0.021195};
 #ifndef CV_Vertebra_Mid
    AnyFloat CV_Vertebra_pos          = {-0.028, 0.315, 0.021195};
    AnyFloat CV_Rib_pos          = {-0.033, 0.317, 0.027195};
    AnyFloat CV_pos          = (CV_Vertebra_pos + CV_Rib_pos)/2;
#else
   AnyFloat CV_pos   = {-0.028, 0.315, 0.021195};
 #endif
//    AnyFloat CT_pos          = {-0.050, 0.318, 0.029};
//    AnyFloat CT_pos          = CV_pos + {-0.62393,0.02526,0.78107} * ..CVCTDistance[5];
    AnyFloat CT_pos          = {-0.038, 0.3165, 0.0330};
    AnyFloat CTsup_pos       = CT_pos + {0, ..AllRibs.CTOffset[5], 0};
    AnyFloat CTinf_pos       = CT_pos - {0, ..AllRibs.CTOffset[5], 0};
    AnyFloat CVI_pos         = {-0.01853459, -0.02269443,  0.0249250};
    AnyMatrix Flavum_inferior_points = {
      {-0.041250087, 0.29435337, 0.0070699695}, // 0
      {-0.040911369, 0.29477677, 0.0060091806}, // 1
      {-0.042764306, 0.29674482, 0.0021395036}, // 2
      {-0.043047324, 0.2972604, 0.00061125978} // 3
    };
    AnyMatrix Flavum_superior_points = {
      {-0.03999643, 0.31456143, 0.0079663889}, // 4
      {-0.042763729, 0.31158629, 0.005128331}, // 5
      {-0.04501956, 0.30932522, 0.0027291349}, // 6
      {-0.045314293, 0.30909109, 0.0003206119} // 7
    };
    AnyMatrix InterTransverse_inferior_points = {
      {-0.053311247, 0.31658372, 0.03043679}, // 2
      {-0.05183496, 0.31596094, 0.02820332}, // 1
      {-0.049534954, 0.31525943, 0.025297295} // 0
    };
    AnyMatrix InterTransverse_superior_points = {
      {-0.054291368, 0.31884459, 0.028891416}, // 3
      {-0.051362678, 0.31965753, 0.026491547}, // 4
      {-0.046171043, 0.32062006, 0.021942571} // 5
    };
    AnyMatrix SuperiorCostoTransverse_points = {
      {-0.046688296, 0.31279343, 0.020991651}, // 8
      {-0.049577545, 0.31405964, 0.023503548}, // 7
      {-0.052314829, 0.31512713, 0.026691435}, // 6
      {-0.053918559, 0.31640589, 0.030404083} // 5
    };
    AnyMatrix LateralCostoTransverse_points = {
      {-0.049953017, 0.31827345, 0.028789349}, // 2
      {-0.04705349, 0.31787232, 0.026460247}, // 3
      {-0.042687196, 0.31701127, 0.02239948} // 4
    };
    AnyMatrix CostoTransverse_points = {
      {-0.036255438, 0.31753886, 0.01919755}, // 0
      {-0.030668339, 0.31696531, 0.019975051} // 1
    };
    AnyMatrix Radiate_inferior_points = {
      {-0.017298084, 0.3019743, 0.018997991}, // 3
      {-0.018972745, 0.30452868, 0.019238263}, // 2
      {-0.022316581, 0.30627212, 0.018218115}, // 1
      {-0.02547838, 0.30688757, 0.017644633} // 0
    };
    AnyMatrix Radiate_superior_points = {
      {-0.026229888, 0.31999758, 0.017954888}, // 0
      {-0.024429902, 0.31834048, 0.01950749}, // 1
      {-0.022129854, 0.31780288, 0.019954182}, // 2
      {-0.019805407, 0.31801906, 0.020325746}, // 3
      {-0.017623171, 0.31896564, 0.020249711} // 4
    };
    AnyMatrix FacetCapsule_inferior_points = {
      {-0.042405315, 0.29303104, 0.010364878}, // 0
      {-0.046922181, 0.29188928, 0.01247395}, // 1
      {-0.048615478, 0.29353777, 0.014317595}, // 2
      {-0.046668172, 0.29560554, 0.014633575}, // 3
      {-0.042591244, 0.2950412, 0.012812058} // 4
    };
    AnyMatrix FacetCapsule_superior_points = {
      {-0.038336214, 0.31883413, 0.0092584481}, // 5
      {-0.041070156, 0.31705239, 0.01143978}, // 6
      {-0.043376386, 0.31692231, 0.013684774}, // 7
      {-0.044297557, 0.3184385, 0.015591009}, // 8
      {-0.043102399, 0.32018563, 0.016775433}, // 9
      {-0.039195467, 0.3210662, 0.01544275}, // 10
      {-0.036080107, 0.32129556, 0.011059701} // 11
    };
    AnyFloat SuperiorEndplateNode_pos = 0.5*(.SuperiorEndplateAnteriorNode_pos + .SuperiorEndplatePosteriorNode_pos) + {0,-0.000700,0.017100}; // Offset added manually to match the vertebra surface
  };

  AnyFolder Left = {
    AnyFloat SemispinalisThoracisTransversus_pos = .Right.SemispinalisThoracisTransversus_pos * ..MirrorTransform;
    AnyFloat SemispinalisThoracisT4ViaNode_pos = .Right.SemispinalisThoracisT4ViaNode_pos * ..MirrorTransform;
    AnyFloat SemispinalisThoracisT3ViaNode_pos = .Right.SemispinalisThoracisT3ViaNode_pos * ..MirrorTransform;
    AnyFloat SemispinalisThoracisT2ViaNode_pos = .Right.SemispinalisThoracisT2ViaNode_pos * ..MirrorTransform;
    AnyFloat SemispinalisThoracisViaNode_pos = .Right.SemispinalisThoracisViaNode_pos * ..MirrorTransform;
    AnyFloat SemispinalisThoracisC7ViaNode_pos = .Right.SemispinalisThoracisC7ViaNode_pos * ..MirrorTransform;
    AnyFloat SemispinalisThoracisT7C6ViaNode_pos = .Right.SemispinalisThoracisT7C6ViaNode_pos * ..MirrorTransform;
    AnyFloat SemispinalisThoracisT7T9T4ViaNode_pos = .Right.SemispinalisThoracisT7T9T4ViaNode_pos * ..MirrorTransform;
    AnyFloat SemispinalisThoracisT9T1ViaNode_pos = .Right.SemispinalisThoracisT9T1ViaNode_pos * ..MirrorTransform;
    AnyFloat SemispinalisThoracisT8T4ViaNode_pos = .Right.SemispinalisThoracisT8T4ViaNode_pos * ..MirrorTransform;
    AnyFloat LevatorCostarumT7R8_pos = .Right.LevatorCostarumT7R8_pos * ..MirrorTransform;
    AnyFloat LevatorCostarumT7R9_pos = .Right.LevatorCostarumT7R9_pos * ..MirrorTransform;
    AnyFloat MultifidusThoracisT7T2NodeOrg_pos = .Right.MultifidusThoracisT7T2NodeOrg_pos * ..MirrorTransform;
    AnyFloat MultifidusThoracisT7T3NodeOrg_pos = .Right.MultifidusThoracisT7T3NodeOrg_pos * ..MirrorTransform;
    AnyFloat MultifidusThoracisT7T4NodeOrg_pos = .Right.MultifidusThoracisT7T4NodeOrg_pos * ..MirrorTransform;
    AnyFloat MultifidusThoracisT12T7NodeIns_pos = .Right.MultifidusThoracisT12T7NodeIns_pos * ..MirrorTransform;
    AnyFloat MultifidusThoracisT11T7NodeIns_pos = .Right.MultifidusThoracisT11T7NodeIns_pos * ..MirrorTransform;
    AnyFloat MultifidusThoracisT10T7NodeIns_pos = .Right.MultifidusThoracisT10T7NodeIns_pos * ..MirrorTransform;
    AnyFloat SET7T3NodeOrg_pos = .Right.SET7T3NodeOrg_pos * ..MirrorTransform;
    AnyFloat SET7T4NodeOrg_pos = .Right.SET7T4NodeOrg_pos * ..MirrorTransform;
    AnyFloat SET7T5NodeOrg_pos = .Right.SET7T5NodeOrg_pos * ..MirrorTransform;
    AnyFloat SET11T7NodeIns_pos = .Right.SET11T7NodeIns_pos * ..MirrorTransform;
    AnyFloat SET10T7NodeIns_pos = .Right.SET10T7NodeIns_pos * ..MirrorTransform;
    AnyFloat SET9T7NodeIns_pos  = .Right.SET9T7NodeIns_pos * ..MirrorTransform;
    AnyFloat CV_pos = .Right.CV_pos * ..MirrorTransform;
    AnyFloat CT_pos = .Right.CT_pos * ..MirrorTransform;
    AnyFloat CTsup_pos       = .Right.CTsup_pos * ..MirrorTransform;
    AnyFloat CTinf_pos       = .Right.CTinf_pos * ..MirrorTransform;
    AnyFloat CVI_pos = .Right.CVI_pos * ..MirrorTransform;
    AnyFloat Flavum_inferior_points = .Right.Flavum_inferior_points * ..MirrorTransform;
    AnyFloat Flavum_superior_points = .Right.Flavum_superior_points * ..MirrorTransform;
    AnyFloat InterTransverse_inferior_points = .Right.InterTransverse_inferior_points * ..MirrorTransform;
    AnyFloat InterTransverse_superior_points = .Right.InterTransverse_superior_points * ..MirrorTransform;
    AnyFloat SuperiorCostoTransverse_points = .Right.SuperiorCostoTransverse_points * ..MirrorTransform;
    AnyFloat Radiate_inferior_points = .Right.Radiate_inferior_points * ..MirrorTransform;
    AnyFloat Radiate_superior_points = .Right.Radiate_superior_points * ..MirrorTransform;
    AnyFloat LateralCostoTransverse_points = .Right.LateralCostoTransverse_points * ..MirrorTransform;
    AnyFloat CostoTransverse_points = .Right.CostoTransverse_points * ..MirrorTransform;
    AnyMatrix FacetCapsule_inferior_points = .Right.FacetCapsule_inferior_points * ..MirrorTransform;
    AnyMatrix FacetCapsule_superior_points = .Right.FacetCapsule_superior_points * ..MirrorTransform;
    AnyFloat SuperiorEndplateNode_pos = .Right.SuperiorEndplateNode_pos * ..MirrorTransform;
  };
};

AnyFolder T6 = {
  AnyFloat T6T7JntNode_pos = .T7.T6T7JntNode_pos;
  AnyFloat T5T6JntNode_pos = {-0.018, 0.348, 0.0};
  AnyFloat SuperiorEndplateAnteriorNode_pos = {-0.002800, 0.344700, 0.000000};
  AnyFloat SuperiorEndplatePosteriorNode_pos = {-0.019300, 0.346700, 0.000000};
  AnyFloat SpinalisT11T6NodeIns_pos =  {-0.073+0.01,0.307,0};
  AnyFloat SpinalisT12T5Via6Node_pos =  {-0.074+0.01,0.309,0};
  AnyFloat SpinalisT12T4Via6Node_pos=  {-0.075+0.01,0.309,0};
  AnyFloat SpinalisL1T3Via7Node_pos =  {-0.076+0.01,0.309,0};
  AnyFloat SpinalisL1T2Via7Node_pos =  {-0.077+0.01,0.309,0};
  AnyFloat SpinalisL2T1Via8Node_pos =  {-0.078+0.01,0.309,0};
  AnyFloat SternumNode_pos = {0.1115,0.3055,0};
  AnyMatrix AnteriorLongitudinal_inferior_points = {
    {-0.0039061913, 0.32685724, 0.013698276}, // 0
    {-0.0012441871, 0.32645762, 0.0083423657}, // 1
    {-0.00024326559, 0.32651386, 0.0013849288}, // 2
    {-0.00024326559, 0.32651386, -0.0013849288}, // 5
    {-0.0012441871, 0.32645762, -0.0083423657}, // 4
    {-0.0039061913, 0.32685724, -0.013698276} // 3
  };
  AnyMatrix AnteriorLongitudinal_superior_points = {
    {-0.0031131806, 0.34176928, 0.01450136}, // 0
    {-0.00034950298, 0.34143719, 0.009208777}, // 1
    {0.00048012959, 0.34122065, 0.00179294}, // 2
    {0.00048012959, 0.34122065, -0.00179294}, // 5
    {-0.00034950298, 0.34143719, -0.009208777}, // 4
    {-0.0031131806, 0.34176928, -0.01450136} // 3
  };

  AnyMatrix PosteriorLongitudinal_inferior_points = {
    {-0.028338412, 0.32701409, -0.0080254897}, // 0
    {-0.028261023, 0.32690552, -0.0053307107}, // 1
    {-0.028245658, 0.3268919, -0.0028365159}, // 2
    {-0.028197324, 0.32683232, -0.00052528852}, // 3
    {-0.028197324, 0.32683232, 0.00052528852}, // 7
    {-0.028245658, 0.3268919, 0.0028365159}, // 6
    {-0.028261023, 0.32690552, 0.0053307107}, // 5
    {-0.028338412, 0.32701409, 0.0080254897} // 4
  };
  AnyMatrix PosteriorLongitudinal_superior_points = {
    {-0.028374778, 0.3460972, -0.0077328626}, // 4
    {-0.027357712, 0.34539247, -0.0061511537}, // 5
    {-0.026850419, 0.34478024, -0.004316147}, // 6
    {-0.026490482, 0.34440193, -0.00052687956}, // 7
    {-0.026490482, 0.34440193, 0.00052687956}, // 11
    {-0.026850419, 0.34478024, 0.004316147}, // 10
    {-0.027357712, 0.34539247, 0.0061511537}, // 9
    {-0.028374778, 0.3460972, 0.0077328626} // 8
  };

  AnyMatrix InterSpinous_inferior_points = {
    {-0.053299937, 0.31925735, 0.0}, // 5
    {-0.049637292, 0.32189223, 0.0}, // 6
    {-0.045637023, 0.32513124, 0.0} // 7
  };
  AnyMatrix InterSpinous_superior_points = {
    {-0.057486236, 0.32826632, 0.0}, // 12
    {-0.054485813, 0.33140212, 0.0}, // 13
    {-0.049803659, 0.33543381, 0.0} // 14
  };
  AnyMatrix SupraSpinous_inferior_points = {
    {-0.065180145, 0.30743301, 0.0}, // 0
    {-0.063022763, 0.3091858, 0.0}, // 1
    {-0.060761791, 0.31170586, 0.0}, // 2
    {-0.058257081, 0.31453559, 0.0}, // 3
    {-0.055466227, 0.31751719, 0.0} // 4
  };
  AnyMatrix SupraSpinous_superior_points = {
    {-0.070232697, 0.31328672, 0.0}, // 8
    {-0.067012683, 0.31627059, 0.0}, // 9
    {-0.063912868, 0.3194325, 0.0}, // 10
    {-0.060001802, 0.32464784, 0.0} // 11
  };

  AnyFolder Right = {
    AnyFloat MultifidusThoracisT6T1NodeOrg_pos =  {-0.052,0.345,0.020};
    AnyFloat MultifidusThoracisT6T2NodeOrg_pos =  {-0.052,0.345,0.020};
    AnyFloat MultifidusThoracisT6T3NodeOrg_pos =  {-0.052,0.345,0.020};
    AnyFloat MultifidusThoracisT11T6NodeIns_pos =  {-0.067,0.307,0.005};
    AnyFloat MultifidusThoracisT10T6NodeIns_pos =  {-0.067,0.307,0.005};
    AnyFloat MultifidusThoracisT9T6NodeIns_pos  =  {-0.067,0.307,0.005};
    AnyFloat SET6T2NodeOrg_pos =  {-0.041,0.350,0.020};
    AnyFloat SET6T3NodeOrg_pos =  {-0.036,0.350,0.017};
    AnyFloat SET6T4NodeOrg_pos =  {-0.032,0.350,0.014};
    AnyFloat SET10T6NodeIns_pos =  {-0.058,0.322,0.005};
    AnyFloat SET9T6NodeIns_pos  =  {-0.058,0.322,0.005};
    AnyFloat SET8T6NodeIns_pos  =  {-0.058,0.322,0.005};
    AnyFloat LevatorCostarumT6R7_pos = {    -0.05491288, 0.3467098, 0.0313};
    AnyFloat LevatorCostarumT6R8_pos = {    -0.05491288, 0.3467098, 0.0263};
//    AnyFloat CV_pos          = {-0.024, 0.345, 0.021195};
 #ifndef CV_Vertebra_Mid
    AnyFloat CV_Vertebra_pos          = {-0.025, 0.339, 0.021195};
    AnyFloat CV_Rib_pos          = {-0.033, 0.339, 0.031195};
    AnyFloat CV_pos          = (CV_Vertebra_pos + CV_Rib_pos)/2;
#else
   AnyFloat CV_pos   = {-0.025, 0.339, 0.021195};
 #endif
//    AnyFloat CT_pos          = {-0.05091288, 0.3467098, 0.03};
//    AnyFloat CT_pos          = CV_pos + {-0.62952,0.08359,0.77247} * ..CVCTDistance[6];
    AnyFloat CT_pos          = {-0.03491288, 0.3397098, 0.0333};
    AnyFloat CTsup_pos       = CT_pos + {0, ..AllRibs.CTOffset[6], 0};
    AnyFloat CTinf_pos       = CT_pos - {0, ..AllRibs.CTOffset[6], 0};
    AnyFloat CVI_pos         = {-0.03103957, 0.3146915,  0.022735};
    AnyMatrix Flavum_inferior_points = {
      {-0.04342743, 0.32287213, 0.0066477018}, // 0
      {-0.043775432, 0.32387331, 0.0045331889}, // 1
      {-0.045090195, 0.32523674, 0.0020029326}, // 2
      {-0.045575555, 0.3252573, 0.00042784429} // 3
    };
    AnyMatrix Flavum_superior_points = {
      {-0.041794792, 0.3414835, 0.0070564551}, // 4
      {-0.043659948, 0.33968404, 0.0047689658}, // 5
      {-0.045401435, 0.33818614, 0.0020371075}, // 6
      {-0.045755018, 0.3379426, 0.00039351635} // 7
    };
    AnyMatrix InterTransverse_inferior_points = {
      {-0.054040015, 0.34623846, 0.03079691}, // 2
      {-0.052083924, 0.34523305, 0.027900182}, // 1
      {-0.050393034, 0.34456453, 0.025864616} // 0
    };
    AnyMatrix InterTransverse_superior_points = {
      {-0.05304902, 0.34865016, 0.029011795}, // 3
      {-0.05077517, 0.34933674, 0.026872421}, // 4
      {-0.046576977, 0.3492831, 0.02286629} // 5
    };
    AnyMatrix SuperiorCostoTransverse_points = {
      {-0.04712791, 0.34156579, 0.020794967}, // 7
      {-0.051749036, 0.34405023, 0.025014864}, // 6
      {-0.05389981, 0.34577826, 0.029653415} // 5
    };
    AnyMatrix LateralCostoTransverse_points = {
      {-0.046070524, 0.34630436, 0.025769709}, // 2
      {-0.043652348, 0.34427753, 0.023286402}, // 3
      {-0.040643796, 0.34237647, 0.021267312} // 4
    };
    AnyMatrix CostoTransverse_points = {
      {-0.03258618, 0.34042466, 0.021826668}, // 0
      {-0.02785999, 0.33922771, 0.020387661} // 1
    };
    AnyMatrix Radiate_inferior_points = {
      {-0.020383764, 0.32712868, 0.018487638}, // 3
      {-0.022642421, 0.32898077, 0.018371226}, // 2
      {-0.025279704, 0.33043835, 0.017435858}, // 1
      {-0.028141044, 0.33166194, 0.016103664} // 0
    };
    AnyMatrix Radiate_superior_points = {
      {-0.015653344, 0.34412524, 0.020149261}, // 8
      {-0.017438414, 0.34270325, 0.020257963}, // 7
      {-0.020416852, 0.34181029, 0.019876376}, // 6
      {-0.023123516, 0.34288016, 0.019593159}, // 5
      {-0.025219902, 0.34543258, 0.017708786} // 4
    };
    AnyMatrix FacetCapsule_inferior_points = {
      {-0.044675313, 0.32228595, 0.0082999328}, // 0
      {-0.047260094, 0.32097882, 0.010625942}, // 1
      {-0.04873592, 0.32158142, 0.013906823}, // 2
      {-0.045951169, 0.3244721, 0.013612141}, // 3
      {-0.04228127, 0.32570216, 0.012133642}, // 4
      {-0.041418709, 0.32443783, 0.0095028756} // 5
    };
    AnyMatrix FacetCapsule_superior_points = {
      {-0.037785843, 0.34830159, 0.012412732}, // 6
      {-0.038324542, 0.34613046, 0.0092275338}, // 7
      {-0.0407748, 0.34384206, 0.0095766261}, // 8
      {-0.042733002, 0.34397134, 0.01225704}, // 9
      {-0.044689752, 0.34578478, 0.014816539}, // 10
      {-0.043906037, 0.34788695, 0.016649697}, // 11
      {-0.039965536, 0.34813538, 0.013845891} // 12
    };
    AnyFloat SuperiorEndplateNode_pos = 0.5*(.SuperiorEndplateAnteriorNode_pos + .SuperiorEndplatePosteriorNode_pos) + {0,-0.000400,0.017500}; // Offset added manually to match the vertebra surface
  };

  AnyFolder Left = {
    AnyFloat LevatorCostarumT6R7_pos = .Right.LevatorCostarumT6R7_pos * ..MirrorTransform;
    AnyFloat LevatorCostarumT6R8_pos =.Right.LevatorCostarumT6R8_pos * ..MirrorTransform;
    AnyFloat MultifidusThoracisT6T1NodeOrg_pos = .Right.MultifidusThoracisT6T1NodeOrg_pos * ..MirrorTransform;
    AnyFloat MultifidusThoracisT6T2NodeOrg_pos = .Right.MultifidusThoracisT6T2NodeOrg_pos * ..MirrorTransform;
    AnyFloat MultifidusThoracisT6T3NodeOrg_pos = .Right.MultifidusThoracisT6T3NodeOrg_pos * ..MirrorTransform;
    AnyFloat MultifidusThoracisT11T6NodeIns_pos = .Right.MultifidusThoracisT11T6NodeIns_pos * ..MirrorTransform;
    AnyFloat MultifidusThoracisT10T6NodeIns_pos = .Right.MultifidusThoracisT10T6NodeIns_pos * ..MirrorTransform;
    AnyFloat MultifidusThoracisT9T6NodeIns_pos  = .Right.MultifidusThoracisT9T6NodeIns_pos * ..MirrorTransform;
    AnyFloat SET6T2NodeOrg_pos = .Right.SET6T2NodeOrg_pos * ..MirrorTransform;
    AnyFloat SET6T3NodeOrg_pos = .Right.SET6T3NodeOrg_pos * ..MirrorTransform;
    AnyFloat SET6T4NodeOrg_pos = .Right.SET6T4NodeOrg_pos * ..MirrorTransform;
    AnyFloat SET10T6NodeIns_pos = .Right.SET10T6NodeIns_pos * ..MirrorTransform;
    AnyFloat SET9T6NodeIns_pos  = .Right.SET9T6NodeIns_pos * ..MirrorTransform;
    AnyFloat SET8T6NodeIns_pos  = .Right.SET8T6NodeIns_pos * ..MirrorTransform;
    AnyFloat CV_pos = .Right.CV_pos * ..MirrorTransform;
    AnyFloat CT_pos = .Right.CT_pos * ..MirrorTransform;
    AnyFloat CTsup_pos       = .Right.CTsup_pos * ..MirrorTransform;
    AnyFloat CTinf_pos       = .Right.CTinf_pos * ..MirrorTransform;
    AnyFloat CVI_pos = .Right.CVI_pos * ..MirrorTransform;
    AnyFloat Flavum_inferior_points = .Right.Flavum_inferior_points * ..MirrorTransform;
    AnyFloat Flavum_superior_points = .Right.Flavum_superior_points * ..MirrorTransform;
    AnyFloat InterTransverse_inferior_points = .Right.InterTransverse_inferior_points * ..MirrorTransform;
    AnyFloat InterTransverse_superior_points = .Right.InterTransverse_superior_points * ..MirrorTransform;
    AnyFloat SuperiorCostoTransverse_points = .Right.SuperiorCostoTransverse_points * ..MirrorTransform;
    AnyFloat Radiate_inferior_points = .Right.Radiate_inferior_points * ..MirrorTransform;
    AnyFloat Radiate_superior_points = .Right.Radiate_superior_points * ..MirrorTransform;
    AnyFloat LateralCostoTransverse_points = .Right.LateralCostoTransverse_points * ..MirrorTransform;
    AnyFloat CostoTransverse_points = .Right.CostoTransverse_points * ..MirrorTransform;
    AnyMatrix FacetCapsule_inferior_points = .Right.FacetCapsule_inferior_points * ..MirrorTransform;
    AnyMatrix FacetCapsule_superior_points = .Right.FacetCapsule_superior_points * ..MirrorTransform;
    AnyFloat SuperiorEndplateNode_pos = .Right.SuperiorEndplateNode_pos * ..MirrorTransform;
  };
};

AnyFolder T5 = {
  AnyFloat T5T6JntNode_pos = .T6.T5T6JntNode_pos;
  AnyFloat T4T5JntNode_pos = {-0.014, 0.373, 0.0};
  AnyFloat SuperiorEndplateAnteriorNode_pos = {-0.001200, 0.368600, 0.000000};
  AnyFloat SuperiorEndplatePosteriorNode_pos = {-0.016900, 0.372200, 0.000000};
  AnyFloat SpinalisT12T5NodeIns_pos =  {-0.069+0.006,0.338,0};
  AnyFloat SpinalisT12T4Via7Node_pos =  {-0.070+0.006,0.337,0};
  AnyFloat SpinalisL1T3Via8Node_pos =  {-0.071+0.006,0.336,0};
  AnyFloat SpinalisL1T2Via8Node_pos =  {-0.072+0.006,0.335,0};
  AnyFloat SpinalisL2T1Via9Node_pos =  {-0.073+0.006,0.334,0};
  AnyMatrix AnteriorLongitudinal_inferior_points = {
    {-0.0032699057, 0.350802, 0.013992273}, // 0
    {-0.0003323963, 0.34992394, 0.0081859203}, // 1
    {0.0004966241, 0.34949806, 0.0017040668}, // 2
    {0.0004966241, 0.34949806, -0.0017040668}, // 5
    {-0.0003323963, 0.34992394, -0.0081859203}, // 4
    {-0.0032699057, 0.350802, -0.013992273} // 3
  };
 AnyMatrix AnteriorLongitudinal_superior_points = {
    {-0.00067526486, 0.36564165, 0.014596731}, // 3
    {0.0021651718, 0.36516461, 0.0077116019}, // 4
    {0.0026204325, 0.36513844, 0.00132882}, // 5
    {0.0026204325, 0.36513844, -0.00132882}, // 8
    {0.0021651718, 0.36516461, -0.0077116019}, // 7
    {-0.00067526486, 0.36564165, -0.014596731} // 6
  };

  AnyMatrix PosteriorLongitudinal_inferior_points = {
    {-0.025486333, 0.35354093, -0.0079667252}, // 0
    {-0.025203183, 0.35314441, -0.0059258565}, // 1
    {-0.024969522, 0.35281441, -0.003427723}, // 2
    {-0.024843603, 0.35257998, -0.00056082546}, // 3
    {-0.024843603, 0.35257998, 0.00056082546}, // 7
    {-0.024969522, 0.35281441, 0.003427723}, // 6
    {-0.025203183, 0.35314441, 0.0059258565}, // 5
    {-0.025486333, 0.35354093, 0.0079667252} // 4
  };
  AnyMatrix PosteriorLongitudinal_superior_points = {
    {-0.023638478, 0.37242728, -0.0079473872}, // 4
    {-0.023255741, 0.37207913, -0.0057568201}, // 5
    {-0.022891205, 0.3713339, -0.0029728839}, // 6
    {-0.022864312, 0.37122959, -0.00049196387}, // 7
    {-0.022864312, 0.37122959, 0.00049196387}, // 11
    {-0.022891205, 0.3713339, 0.0029728839}, // 10
    {-0.023255741, 0.37207913, 0.0057568201}, // 9
    {-0.023638478, 0.37242728, 0.0079473872} // 8
  };

  AnyMatrix InterSpinous_inferior_points = {
    {-0.045467488, 0.35011169, 0.0}, // 4
    {-0.04205358, 0.35278922, 0.0}, // 5
    {-0.03914196, 0.35488701, 0.0} // 6
  };
  AnyMatrix InterSpinous_superior_points = {
    {-0.050943989, 0.3582038, 0.0}, // 11
    {-0.048059247, 0.36090565, 0.0}, // 12
    {-0.043492697, 0.36412147, 0.0} // 13
  };
  AnyMatrix SupraSpinous_inferior_points = {
    {-0.06042403, 0.3376354, 0.0}, // 0
    {-0.057608113, 0.34026465, 0.0}, // 1
    {-0.053892024, 0.34373698, 0.0}, // 2
    {-0.04894131, 0.34782693, 0.0} // 3
  };
  AnyMatrix SupraSpinous_superior_points = {
    {-0.065858811, 0.34323668, 0.0}, // 7
    {-0.062409502, 0.3459315, 0.0}, // 8
    {-0.058034785, 0.34976625, 0.0}, // 9
    {-0.054098967, 0.35467213, 0.0} // 10
  };

  AnyFolder Right = {
    AnyFloat MultifidusThoracisT5T1NodeOrg_pos =  {-0.045,0.375,0.020};
    AnyFloat MultifidusThoracisT5T2NodeOrg_pos =  {-0.045,0.375,0.020};
    AnyFloat MultifidusThoracisT10T5NodeIns_pos =  {-0.063,0.338,0.005};
    AnyFloat MultifidusThoracisT9T5NodeIns_pos  =  {-0.063,0.338,0.005};
    AnyFloat MultifidusThoracisT8T5NodeIns_pos  =  {-0.063,0.338,0.005};
    AnyFloat SET5T1Node_pos =  {-0.041,0.377,0.022};
    AnyFloat SET5T2Node_pos =  {-0.036,0.377,0.019};
    AnyFloat SET5T3Node_pos =  {-0.032,0.377,0.016};
    AnyFloat SET9T5NodeIns_pos =  {-0.055,0.350,0.005};
    AnyFloat SET8T5NodeIns_pos =  {-0.055,0.350,0.005};
    AnyFloat SET7T5NodeIns_pos =  {-0.055,0.350,0.005};
    AnyFloat LevatorCostarumT5R6_pos = {    -0.04803573, 0.3752539, 0.031};
    AnyFloat LevatorCostarumT5R7_pos = {    -0.04803573, 0.3752539, 0.026};
//    AnyFloat CV_pos          = {-0.02209405, 0.371, 0.021195};
 #ifndef CV_Vertebra_Mid
    AnyFloat CV_Vertebra_pos          = {-0.02309405, 0.365, 0.021195};
    AnyFloat CV_Rib_pos          = {-0.02809405, 0.363, 0.029195};
    AnyFloat CV_pos          = (CV_Vertebra_pos + CV_Rib_pos)/2;
#else
   AnyFloat CV_pos   = {-0.02309405, 0.365, 0.021195};
 #endif
//    AnyFloat CT_pos          = {-0.045, 0.3745, 0.02985755};
//    AnyFloat CT_pos          = CV_pos + {-0.66891,0.09902,0.73672} * ..CVCTDistance[7];
    AnyFloat CT_pos          = {-0.034, 0.3652, 0.0330};
    AnyFloat CTsup_pos       = CT_pos + {0, ..AllRibs.CTOffset[7], 0};
    AnyFloat CTinf_pos       = CT_pos - {0, ..AllRibs.CTOffset[7], 0};
    AnyFloat CVI_pos         = {-0.01246007, -0.02302716,  0.023970};
    AnyMatrix Flavum_inferior_points = {
      {-0.0397592, 0.35048258, 0.0066913194}, // 0
      {-0.039512441, 0.35143536, 0.0049353489}, // 1
      {-0.040267099, 0.35259792, 0.0030879399}, // 2
      {-0.041793309, 0.35298693, 0.00048952416} // 3
    };
    AnyMatrix Flavum_superior_points = {
      {-0.036522828, 0.36875087, 0.0071919546}, // 4
      {-0.039719589, 0.36637691, 0.0038226794}, // 5
      {-0.041288458, 0.36537078, 0.001757543}, // 6
      {-0.041238867, 0.36543626, 0.00035243446} // 7
    };
    AnyMatrix InterTransverse_inferior_points = {
      {-0.046315864, 0.3744469, 0.029956497}, // 2
      {-0.045062598, 0.37364742, 0.027876316}, // 1
      {-0.043609377, 0.37264451, 0.025351336} // 0
    };
    AnyMatrix InterTransverse_superior_points = {
      {-0.04553742, 0.3772293, 0.028455155}, // 3
      {-0.043154687, 0.37744308, 0.025950804}, // 4
      {-0.039358165, 0.37704289, 0.022331022} // 5
    };
    AnyMatrix SuperiorCostoTransverse_points = {
      {-0.042223185, 0.36985618, 0.021393983}, // 2
      {-0.045719057, 0.37221098, 0.02499282}, // 1
      {-0.048036117, 0.37405831, 0.028375365} // 0
    };
    AnyMatrix LateralCostoTransverse_points = {
      {-0.04439966, 0.37513056, 0.029217603}, // 0
      {-0.040503863, 0.37371641, 0.025852507}, // 1
      {-0.035004269, 0.37162369, 0.020655733} // 2
    };
    AnyMatrix CostoTransverse_points = {
      {-0.021467198, 0.36233577, 0.018566659}, // 0
      {-0.027878225, 0.36627868, 0.022184648}, // 1
      {-0.030143034, 0.36634159, 0.021969952} // 2
    };
    AnyMatrix Radiate_inferior_points = {
      {-0.016478239, 0.35360894, 0.019168699}, // 2
      {-0.01844845, 0.35617208, 0.019005798}, // 1
      {-0.022600453, 0.355854, 0.017348452} // 0
    };
    AnyMatrix Radiate_superior_points = {
      {-0.025283223, 0.36978188, 0.019889878}, // 3
      {-0.021636419, 0.36875799, 0.019223491}, // 4
      {-0.016571453, 0.36821973, 0.020248035} // 5
    };
    AnyMatrix FacetCapsule_inferior_points = {
      {-0.038564835, 0.35093415, 0.010250073}, // 0
      {-0.038906239, 0.35053441, 0.0064758104}, // 1
      {-0.044510692, 0.35083199, 0.0051949415}, // 2
      {-0.047885314, 0.35039735, 0.0095910737} // 3
    };
    AnyMatrix FacetCapsule_superior_points = {
      {-0.033695448, 0.37480104, 0.012339653}, // 4
      {-0.033247899, 0.37344041, 0.0095522525}, // 5
      {-0.03475938, 0.37112361, 0.0088611627}, // 6
      {-0.036398575, 0.37089407, 0.010949392}, // 7
      {-0.037745565, 0.37147546, 0.013257564}, // 8
      {-0.038831729, 0.37298006, 0.014605085}, // 9
      {-0.036278442, 0.37500584, 0.014873266} // 10
    };
    AnyFloat SuperiorEndplateNode_pos = 0.5*(.SuperiorEndplateAnteriorNode_pos + .SuperiorEndplatePosteriorNode_pos) + {0,-0.000300,0.016900}; // Offset added manually to match the vertebra surface
  };

  AnyFolder Left = {
    AnyFloat LevatorCostarumT5R6_pos = .Right.LevatorCostarumT5R6_pos * ..MirrorTransform;
    AnyFloat LevatorCostarumT5R7_pos = .Right.LevatorCostarumT5R7_pos * ..MirrorTransform;
    AnyFloat MultifidusThoracisT5T1NodeOrg_pos = .Right.MultifidusThoracisT5T1NodeOrg_pos * ..MirrorTransform;
    AnyFloat MultifidusThoracisT5T2NodeOrg_pos = .Right.MultifidusThoracisT5T2NodeOrg_pos * ..MirrorTransform;
    AnyFloat MultifidusThoracisT10T5NodeIns_pos = .Right.MultifidusThoracisT10T5NodeIns_pos * ..MirrorTransform;
    AnyFloat MultifidusThoracisT9T5NodeIns_pos  = .Right.MultifidusThoracisT9T5NodeIns_pos * ..MirrorTransform;
    AnyFloat MultifidusThoracisT8T5NodeIns_pos  = .Right.MultifidusThoracisT8T5NodeIns_pos * ..MirrorTransform;
    AnyFloat SET5T1Node_pos = .Right.SET5T1Node_pos * ..MirrorTransform;
    AnyFloat SET5T2Node_pos = .Right.SET5T2Node_pos * ..MirrorTransform;
    AnyFloat SET5T3Node_pos = .Right.SET5T3Node_pos * ..MirrorTransform;
    AnyFloat SET9T5NodeIns_pos = .Right.SET9T5NodeIns_pos * ..MirrorTransform;
    AnyFloat SET8T5NodeIns_pos = .Right.SET8T5NodeIns_pos * ..MirrorTransform;
    AnyFloat SET7T5NodeIns_pos = .Right.SET7T5NodeIns_pos * ..MirrorTransform;
    AnyFloat CV_pos = .Right.CV_pos * ..MirrorTransform;
    AnyFloat CT_pos = .Right.CT_pos * ..MirrorTransform;
    AnyFloat CTsup_pos       = .Right.CTsup_pos * ..MirrorTransform;
    AnyFloat CTinf_pos       = .Right.CTinf_pos * ..MirrorTransform;
    AnyFloat CVI_pos = .Right.CVI_pos * ..MirrorTransform;
    AnyFloat Flavum_inferior_points = .Right.Flavum_inferior_points * ..MirrorTransform;
    AnyFloat Flavum_superior_points = .Right.Flavum_superior_points * ..MirrorTransform;
    AnyFloat InterTransverse_inferior_points = .Right.InterTransverse_inferior_points * ..MirrorTransform;
    AnyFloat InterTransverse_superior_points = .Right.InterTransverse_superior_points * ..MirrorTransform;
    AnyFloat SuperiorCostoTransverse_points = .Right.SuperiorCostoTransverse_points * ..MirrorTransform;
    AnyFloat LateralCostoTransverse_points = .Right.LateralCostoTransverse_points * ..MirrorTransform;
    AnyFloat CostoTransverse_points = .Right.CostoTransverse_points * ..MirrorTransform;
    AnyFloat Radiate_inferior_points = .Right.Radiate_inferior_points * ..MirrorTransform;
    AnyFloat Radiate_superior_points = .Right.Radiate_superior_points * ..MirrorTransform;
    AnyFloat FacetCapsule_inferior_points = .Right.FacetCapsule_inferior_points * ..MirrorTransform;
    AnyFloat FacetCapsule_superior_points = .Right.FacetCapsule_superior_points * ..MirrorTransform;
    AnyFloat SuperiorEndplateNode_pos = .Right.SuperiorEndplateNode_pos * ..MirrorTransform;
  };
};
AnyFolder T4 = {
  AnyFloat T4T5JntNode_pos = .T5.T4T5JntNode_pos;
  AnyFloat T3T4JntNode_pos = {-0.009, 0.397, 0.0};
  AnyFloat SuperiorEndplateAnteriorNode_pos = {0.003100, 0.393000, 0.000000};
  AnyFloat SuperiorEndplatePosteriorNode_pos = {-0.012900, 0.397400, 0.000000};
  AnyFloat SpinalisT12T4NodeIns_pos =  {-0.064+0.004,0.361,0};
  AnyFloat SpinalisL1T3Via9Node_pos =  {-0.065+0.004,0.360,0};
  AnyFloat SpinalisL1T2Via9Node_pos =  {-0.066+0.004,0.359,0};
  AnyFloat SpinalisL2T1Via10Node_pos=  {-0.067+0.004,0.359,0};
  AnyFloat SemispinalisThoracisSpinous_pos = {-0.067+0.004,0.359,0};
  AnyMatrix AnteriorLongitudinal_inferior_points = {
    {0.00097868941, 0.37507743, 0.015397767}, // 0
    {0.0025795551, 0.37420332, 0.011388062}, // 1
    {0.0039111981, 0.3738167, 0.0066935951}, // 2
    {0.0040395921, 0.37321118, 0.0018881249}, // 3
    {0.0040395921, 0.37321118, -0.0018881249}, // 7
    {0.0039111981, 0.3738167, -0.0066935951}, // 6
    {0.0025795551, 0.37420332, -0.011388062}, // 5
    {0.00097868941, 0.37507743, -0.015397767} // 4
  };
  AnyMatrix AnteriorLongitudinal_superior_points = {
    {0.0038738195, 0.39029831, 0.016038826}, // 3
    {0.0066398354, 0.38924482, 0.0088753486}, // 4
    {0.0070343316, 0.38928524, 0.002171976}, // 5
    {0.0070343316, 0.38928524, -0.002171976}, // 8
    {0.0066398354, 0.38924482, -0.0088753486}, // 7
    {0.0038738195, 0.39029831, -0.016038826} // 6
  };

  AnyMatrix PosteriorLongitudinal_inferior_points = {
    {-0.021439124, 0.37890881, -0.0082745161}, // 0
    {-0.021401159, 0.37874275, -0.0060686558}, // 1
    {-0.021195868, 0.37829286, -0.0038815625}, // 2
    {-0.021080939, 0.37808493, -0.00088876626}, // 3
    {-0.021080939, 0.37808493, 0.00088876626}, // 7
    {-0.021195868, 0.37829286, 0.0038815625}, // 6
    {-0.021401159, 0.37874275, 0.0060686558}, // 5
    {-0.021439124, 0.37890881, 0.0082745161} // 4
  };
  AnyMatrix PosteriorLongitudinal_superior_points = {
    {-0.018058168, 0.39776173, -0.0092122862}, // 4
    {-0.017437035, 0.39677343, -0.0070030647}, // 5
    {-0.016989447, 0.39627331, -0.0041379305}, // 6
    {-0.01681296, 0.39638117, -0.00079426926}, // 7
    {-0.01681296, 0.39638117, 0.00079426926}, // 11
    {-0.016989447, 0.39627331, 0.0041379305}, // 10
    {-0.017437035, 0.39677343, 0.0070030647}, // 9
    {-0.018058168, 0.39776173, 0.0092122862} // 8
  };

  AnyMatrix InterSpinous_inferior_points = {
    {-0.042175401, 0.37613666, 0.0}, // 4
    {-0.038655099, 0.37859941, 0.0}, // 5
    {-0.035243411, 0.3808133, 0.0} // 6
  };
  AnyMatrix InterSpinous_superior_points = {
    {-0.046772271, 0.38490024, 0.0}, // 11
    {-0.043823544, 0.3873648, 0.0}, // 12
    {-0.039466362, 0.39012975, 0.0} // 13
  };
  AnyMatrix SupraSpinous_inferior_points = {
    {-0.057621818, 0.36237341, 0.0}, // 0
    {-0.052881289, 0.3672753, 0.0}, // 1
    {-0.049470976, 0.37097692, 0.0}, // 2
    {-0.045144998, 0.37461123, 0.0} // 3
  };
  AnyMatrix SupraSpinous_superior_points = {
    {-0.060820699, 0.36755732, 0.0}, // 7
    {-0.057280179, 0.37131363, 0.0}, // 8
    {-0.053842556, 0.37532532, 0.0}, // 9
    {-0.049625002, 0.38175285, 0.0} // 10
  };

  AnyFolder Right = {
    AnyFloat MultifidusThoracisT4T1NodeOrg_pos =  {-0.040,0.400,0.020};
    AnyFloat MultifidusThoracisT9T4NodeIns_pos =  {-0.059,0.361,0.005};
    AnyFloat MultifidusThoracisT8T4NodeIns_pos =  {-0.059,0.361,0.005};
    AnyFloat MultifidusThoracisT7T4NodeIns_pos =  {-0.059,0.361,0.005};
    AnyFloat SET4T1NodeOrg_pos =  {-0.034,0.403,0.022};
    AnyFloat SET4T2NodeOrg_pos =  {-0.029,0.403,0.019};
    AnyFloat SET8T4NodeIns_pos =  {-0.052,0.374,0.005};
    AnyFloat SET7T4NodeIns_pos =  {-0.052,0.374,0.005};
    AnyFloat SET6T4NodeIns_pos =  {-0.052,0.374,0.005};
    AnyFloat LevatorCostarumT4R5_pos = {    -0.04471707, 0.4016499, 0.0311};
//    AnyFloat CV_pos          = {-0.01587247, 0.397, 0.02250161};
 #ifndef CV_Vertebra_Mid
    AnyFloat CV_Vertebra_pos          = {-0.01587247, 0.390, 0.02250161};
    AnyFloat CV_Rib_pos          = {-0.02787247, 0.390, 0.02750161};
    AnyFloat CV_pos          = (CV_Vertebra_pos + CV_Rib_pos)/2;
#else
   AnyFloat CV_pos   = {-0.01587247, 0.391, 0.02250161};
 #endif
//    AnyFloat CT_pos          = {-0.039, 0.4015, 0.031};
//    AnyFloat CT_pos          = CV_pos + {-0.63826,0.18387,0.74754} * ..CVCTDistance[8];
    AnyFloat CT_pos          = {-0.030, 0.3925, 0.032};
    AnyFloat CTsup_pos       = CT_pos + {0, ..AllRibs.CTOffset[8], 0};
    AnyFloat CTinf_pos       = CT_pos - {0, ..AllRibs.CTOffset[8], 0};
    AnyFloat CVI_pos         = {-0.01444762, -0.02313355,  0.02495};
    AnyMatrix Flavum_inferior_points = {
      {-0.035523545, 0.37681252, 0.0074051707}, // 0
      {-0.035967194, 0.37841994, 0.0048661213}, // 1
      {-0.036249556, 0.37984797, 0.0025666179}, // 2
      {-0.035449583, 0.38088158, 0.00047400815} // 3
    };
    AnyMatrix Flavum_superior_points = {
      {-0.030889539, 0.39555886, 0.0090287821}, // 0
      {-0.032996207, 0.39389887, 0.0070699262}, // 1
      {-0.034705512, 0.39263809, 0.0044736285}, // 2
      {-0.035457909, 0.39222008, 0.00075887295} // 3
    };
    AnyMatrix InterTransverse_inferior_points = {
      {-0.041786965, 0.40080956, 0.031495567}, // 2
      {-0.040675785, 0.39974996, 0.029198773}, // 1
      {-0.038984615, 0.39860323, 0.026443528} // 0
    };
    AnyMatrix InterTransverse_superior_points = {
      {-0.041300308, 0.40339389, 0.030795509}, // 3
      {-0.038517546, 0.40375131, 0.028306613}, // 4
      {-0.034923289, 0.40318838, 0.024515066} // 5
    };
    AnyMatrix SuperiorCostoTransverse_points = {
      {-0.03796665, 0.3963289, 0.023274669}, // 2
      {-0.041924786, 0.39915964, 0.027232198}, // 1
      {-0.04346152, 0.4011752, 0.031521566} // 0
    };
    AnyMatrix LateralCostoTransverse_points = {
      {-0.039394166, 0.40141791, 0.030398719}, // 0
      {-0.036147531, 0.39986062, 0.027575236}, // 1
      {-0.030785875, 0.39799422, 0.022433393} // 2
    };
    AnyMatrix CostoTransverse_points = {
      {-0.024360178, 0.39215714, 0.023335658}, // 0
      {-0.026375445, 0.39316919, 0.023102328}, // 1
      {-0.029897088, 0.39488912, 0.023648189} // 2
    };
    AnyMatrix Radiate_inferior_points = {
      {-0.018079687, 0.38006747, 0.018948294}, // 0
      {-0.013144975, 0.38039213, 0.020716628}, // 1
      {-0.0095941266, 0.37751988, 0.020654334} // 2
    };
    AnyMatrix Radiate_superior_points = {
      {-0.019308127, 0.39497781, 0.02102001}, // 3
      {-0.01523638, 0.39428115, 0.020487905}, // 4
      {-0.010547468, 0.39283431, 0.021819895} // 5
    };
    AnyMatrix FacetCapsule_inferior_points = {
      {-0.040210437, 0.37707916, 0.0070713377}, // 0
      {-0.037705857, 0.3766191, 0.0086451359}, // 1
      {-0.036045965, 0.37594229, 0.010745954}, // 2
      {-0.042260736, 0.37564278, 0.009613934}, // 3
      {-0.042410173, 0.37694663, 0.0062335758} // 4
    };
    AnyMatrix FacetCapsule_superior_points = {
      {-0.028415035, 0.39949888, 0.011158742}, // 0
      {-0.031017898, 0.39813769, 0.012876699}, // 1
      {-0.033646788, 0.39839354, 0.015487914}, // 2
      {-0.03476743, 0.39998934, 0.017578905}, // 3
      {-0.032300029, 0.40131995, 0.017370217}, // 4
      {-0.028288729, 0.40078285, 0.013874146} // 5
    };
    AnyFloat SuperiorEndplateNode_pos = 0.5*(.SuperiorEndplateAnteriorNode_pos + .SuperiorEndplatePosteriorNode_pos) + {0,-0.000400,0.018600}; // Offset added manually to match the vertebra surface
  };

  AnyFolder Left = {
    AnyFloat LevatorCostarumT4R5_pos =  .Right.LevatorCostarumT4R5_pos * ..MirrorTransform;
    AnyFloat MultifidusThoracisT4T1NodeOrg_pos =  .Right.MultifidusThoracisT4T1NodeOrg_pos * ..MirrorTransform;
    AnyFloat MultifidusThoracisT9T4NodeIns_pos =  .Right.MultifidusThoracisT9T4NodeIns_pos * ..MirrorTransform;
    AnyFloat MultifidusThoracisT8T4NodeIns_pos =  .Right.MultifidusThoracisT8T4NodeIns_pos * ..MirrorTransform;
    AnyFloat MultifidusThoracisT7T4NodeIns_pos =  .Right.MultifidusThoracisT7T4NodeIns_pos * ..MirrorTransform;
    AnyFloat SET4T1NodeOrg_pos =  .Right.SET4T1NodeOrg_pos * ..MirrorTransform;
    AnyFloat SET4T2NodeOrg_pos =  .Right.SET4T2NodeOrg_pos * ..MirrorTransform;
    AnyFloat SET8T4NodeIns_pos =  .Right.SET8T4NodeIns_pos * ..MirrorTransform;
    AnyFloat SET7T4NodeIns_pos =  .Right.SET7T4NodeIns_pos * ..MirrorTransform;
    AnyFloat SET6T4NodeIns_pos =  .Right.SET6T4NodeIns_pos * ..MirrorTransform;
    AnyFloat CV_pos = .Right.CV_pos * ..MirrorTransform;
    AnyFloat CT_pos = .Right.CT_pos * ..MirrorTransform;
    AnyFloat CTsup_pos       = .Right.CTsup_pos * ..MirrorTransform;
    AnyFloat CTinf_pos       = .Right.CTinf_pos * ..MirrorTransform;
    AnyFloat CVI_pos = .Right.CVI_pos * ..MirrorTransform;
    AnyFloat Flavum_inferior_points = .Right.Flavum_inferior_points * ..MirrorTransform;
    AnyFloat Flavum_superior_points = .Right.Flavum_superior_points * ..MirrorTransform;
    AnyMatrix InterTransverse_inferior_points = .Right.InterTransverse_inferior_points * ..MirrorTransform;
    AnyMatrix InterTransverse_superior_points = .Right.InterTransverse_superior_points * ..MirrorTransform;
    AnyMatrix SuperiorCostoTransverse_points = .Right.SuperiorCostoTransverse_points * ..MirrorTransform;
    AnyMatrix LateralCostoTransverse_points = .Right.LateralCostoTransverse_points * ..MirrorTransform;
    AnyMatrix CostoTransverse_points = .Right.CostoTransverse_points * ..MirrorTransform;
    AnyMatrix Radiate_inferior_points = .Right.Radiate_inferior_points * ..MirrorTransform;
    AnyMatrix Radiate_superior_points = .Right.Radiate_superior_points * ..MirrorTransform;
    AnyMatrix FacetCapsule_inferior_points = .Right.FacetCapsule_inferior_points * ..MirrorTransform;
    AnyMatrix FacetCapsule_superior_points = .Right.FacetCapsule_superior_points * ..MirrorTransform;
    AnyFloat SuperiorEndplateNode_pos = .Right.SuperiorEndplateNode_pos * ..MirrorTransform;
  };
};

AnyFolder T3 = {
  AnyFloat T3T4JntNode_pos = .T4.T3T4JntNode_pos;
  AnyFloat T2T3JntNode_pos = {-0.003, 0.42, 0.0};
  AnyFloat SuperiorEndplateAnteriorNode_pos = {0.010000, 0.415200, 0.000000};
  AnyFloat SuperiorEndplatePosteriorNode_pos = {-0.005000, 0.420300, 0.000000};
  AnyFloat SpinalisL1T2Via10Node_pos =  {-0.056+0.003,0.39,0};
  AnyFloat SpinalisL2T1Via11Node_pos =  {-0.058+0.003,0.39,0};
  AnyFloat SemispinalisThoracisSpinous_pos = {-0.056+0.003,0.39,0};
  AnyMatrix AnteriorLongitudinal_inferior_points = {
    {0.0054523242, 0.39810166, 0.013605706}, // 0
    {0.0086870221, 0.39785364, 0.0073726587}, // 1
    {0.0091233291, 0.39716786, 0.00099994324}, // 2
    {0.0091233291, 0.39716786, -0.00099994324}, // 5
    {0.0086870221, 0.39785364, -0.0073726587}, // 4
    {0.0054523242, 0.39810166, -0.013605706} // 3
  };
  AnyMatrix AnteriorLongitudinal_superior_points = {
    {0.0089545315, 0.41286296, 0.014920889}, // 3
    {0.01167144, 0.41170117, 0.0087645939}, // 4
    {0.012470994, 0.41192171, 0.0017736038}, // 5
    {0.012470994, 0.41192171, -0.0017736038}, // 8
    {0.01167144, 0.41170117, -0.0087645939}, // 7
    {0.0089545315, 0.41286296, -0.014920889} // 6
  };

  AnyMatrix PosteriorLongitudinal_inferior_points = {
    {-0.015292466, 0.4031997, -0.010254031}, // 0
    {-0.01459608, 0.40233138, -0.0070809335}, // 1
    {-0.014175843, 0.40171835, -0.0039440165}, // 2
    {-0.0140767, 0.40152329, -0.00049294269}, // 3
    {-0.0140767, 0.40152329, 0.00049294269}, // 7
    {-0.014175843, 0.40171835, 0.0039440165}, // 6
    {-0.01459608, 0.40233138, 0.0070809335}, // 5
    {-0.015292466, 0.4031997, 0.010254031} // 4
  };
  AnyMatrix PosteriorLongitudinal_superior_points = {
    {-0.012227519, 0.42094579, -0.0080755884}, // 4
    {-0.010513552, 0.41970176, -0.0056307046}, // 5
    {-0.0099494783, 0.41973907, -0.0026776989}, // 6
    {-0.0094025433, 0.41975588, -0.0004835478}, // 7
    {-0.0094025433, 0.41975588, 0.0004835478}, // 11
    {-0.0099494783, 0.41973907, 0.0026776989}, // 10
    {-0.010513552, 0.41970176, 0.0056307046}, // 9
    {-0.012227519, 0.42094579, 0.0080755884} // 8
  };

  AnyMatrix InterSpinous_inferior_points = {
    {-0.034414984, 0.4018212, 0.0}, // 4
    {-0.031288948, 0.40390417, 0.0}, // 5
    {-0.027312512, 0.40657648, 0.0} // 6
  };
  AnyMatrix InterSpinous_superior_points = {
    {-0.03846395, 0.41051307, 0.0}, // 11
    {-0.035773356, 0.41253874, 0.0}, // 12
    {-0.030998092, 0.41512349, 0.0} // 13
  };
  AnyMatrix SupraSpinous_inferior_points = {
    {-0.049454201, 0.38984773, 0.0}, // 0
    {-0.046210751, 0.39283589, 0.0}, // 1
    {-0.042782221, 0.39620048, 0.0}, // 2
    {-0.038063169, 0.40006521, 0.0} // 3
  };
  AnyMatrix SupraSpinous_superior_points = {
    {-0.05330386, 0.39496747, 0.0}, // 7
    {-0.049413253, 0.39847639, 0.0}, // 8
    {-0.045636266, 0.40289599, 0.0}, // 9
    {-0.041408367, 0.40771165, 0.0} // 10
  };
  AnyFloat O_serratus_posterior_superior_pos           = {-0.053, 0.395 , 0.0};

  AnyFolder Right = {
    AnyFloat LongusColliT3C6Node_pos = {0.01000000, 0.4080000, 0.008000000};
    AnyFloat MultifidusThoracisT8T3NodeIns_pos =  {-0.050,0.390,0.005};
    AnyFloat MultifidusThoracisT7T3NodeIns_pos =  {-0.050,0.390,0.005};
    AnyFloat MultifidusThoracisT6T3NodeIns_pos =  {-0.050,0.390,0.005};
    AnyFloat SET3T1NodeOrg_pos =  {-0.022,0.427,0.018};
    AnyFloat SET7T3NodeIns_pos =  {-0.045,0.399,0.005};
    AnyFloat SET6T3NodeIns_pos =  {-0.045,0.399,0.005};
    AnyFloat SET5T3NodeIns_pos =  {-0.045,0.399,0.005};
    AnyFloat LevatorCostarumT3R4_pos = {    -0.03450346, 0.4267904, 0.032};
    //    AnyFloat CV_pos          = {-0.008899595, 0.4202411, 0.02134288};
    #ifndef CV_Vertebra_Mid
      AnyFloat CV_Vertebra_pos          = {-0.011899595, 0.4152411, 0.02134288};
      AnyFloat CV_Rib_pos          = {-0.020899595, 0.4152411, 0.02634288};
      AnyFloat CV_pos          = (CV_Vertebra_pos + CV_Rib_pos)/2;
    #else
      AnyFloat CV_pos   = {-0.011899595, 0.4152411, 0.02134288};
    #endif
//    AnyFloat CT_pos          = {-0.032, 0.425, 0.0305};
//    AnyFloat CT_pos          = CV_pos + {-0.68252,0.19524,0.70431} * ..CVCTDistance[9];
    AnyFloat CT_pos          = {-0.023, 0.417, 0.032};
    AnyFloat CTsup_pos       = CT_pos + {0, ..AllRibs.CTOffset[9], 0};
    AnyFloat CTinf_pos       = CT_pos - {0, ..AllRibs.CTOffset[9], 0};
    AnyFloat CVI_pos         = {-0.01624215, -0.02249397,  0.0231000};
    AnyMatrix Flavum_inferior_points = {
      {-0.0298592, 0.40153551, 0.0074813762}, // 0
      {-0.02876615, 0.40205172, 0.006048677}, // 1
      {-0.029290874, 0.40344405, 0.0039597177}, // 2
      {-0.029634008, 0.40450108, 0.0017788376}, // 3
      {-0.029975127, 0.40467492, 0.0006712352} // 4
    };
    AnyMatrix Flavum_superior_points = {
      {-0.021151418, 0.41935384, 0.0077074468}, // 0
      {-0.024326302, 0.41814762, 0.0060846112}, // 1
      {-0.026310852, 0.4167712, 0.0034897656}, // 2
      {-0.027360097, 0.41630074, 0.00044676894} // 3
    };
    AnyMatrix InterTransverse_inferior_points = {
      {-0.033597004, 0.42497593, 0.030876601}, // 2
      {-0.032638878, 0.42401484, 0.028424175}, // 1
      {-0.031197079, 0.42301598, 0.025701156} // 0
    };
    AnyMatrix InterTransverse_superior_points = {
      {-0.032198235, 0.42745578, 0.028472887}, // 3
      {-0.029718244, 0.42727366, 0.025416652}, // 4
      {-0.025626201, 0.42650488, 0.020521788} // 5
    };
    AnyMatrix SuperiorCostoTransverse_points = {
      {-0.02978446, 0.42011914, 0.020927386}, // 2
      {-0.03336262, 0.42317662, 0.025428476}, // 1
      {-0.035108067, 0.42507729, 0.029670341} // 0
    };
    AnyMatrix LateralCostoTransverse_points = {
      {-0.031989444, 0.42608795, 0.030918647}, // 0
      {-0.029028606, 0.42459652, 0.027494958}, // 1
      {-0.024735671, 0.42308635, 0.022897996} // 2
    };
    AnyMatrix CostoTransverse_points = {
      {-0.015174811, 0.41499776, 0.021544235}, // 0
      {-0.018429607, 0.41579467, 0.021534391}, // 1
      {-0.022886073, 0.41715476, 0.022522213} // 2
    };
    AnyMatrix Radiate_inferior_points = {
      {-0.006864374, 0.4029144, 0.019045077}, // 2
      {-0.010312254, 0.40490991, 0.018007031}, // 1
      {-0.012716162, 0.40674371, 0.017000612} // 0
    };
    AnyMatrix Radiate_superior_points = {
      {-0.017999612, 0.42062128, 0.018769436}, // 3
      {-0.013711144, 0.41911361, 0.019055312}, // 4
      {-0.0095466254, 0.41780171, 0.018601958} // 5
    };
    AnyMatrix FacetCapsule_inferior_points = {
      {-0.029564945, 0.40106383, 0.0098442184}, // 0
      {-0.031432755, 0.40110162, 0.0090410076}, // 1
      {-0.034291986, 0.40082455, 0.010772411}, // 2
      {-0.03536284, 0.40161395, 0.014003161}, // 3
      {-0.033895511, 0.4028537, 0.014351617}, // 4
      {-0.030660249, 0.40295827, 0.013380091} // 5
    };
    AnyMatrix FacetCapsule_superior_points = {
      {-0.021082086, 0.42274708, 0.0096442075}, // 6
      {-0.023939615, 0.4216814, 0.011896968}, // 7
      {-0.025899423, 0.42208004, 0.013990041}, // 8
      {-0.02639425, 0.42415157, 0.016204678}, // 9
      {-0.023314647, 0.425372, 0.016126996}, // 10
      {-0.020487256, 0.42505884, 0.014352377}, // 11
      {-0.019462775, 0.42392865, 0.010978536} // 12
    };
    AnyFloat SuperiorEndplateNode_pos = 0.5*(.SuperiorEndplateAnteriorNode_pos + .SuperiorEndplatePosteriorNode_pos) + {0,-0.000500,0.016600}; // Offset added manually to match the vertebra surface
  };

  AnyFolder Left = {
    AnyFloat LevatorCostarumT3R4_pos = .Right.LevatorCostarumT3R4_pos * ..MirrorTransform;
    AnyFloat MultifidusThoracisT8T3NodeIns_pos =  .Right.MultifidusThoracisT8T3NodeIns_pos * ..MirrorTransform;
    AnyFloat MultifidusThoracisT7T3NodeIns_pos =  .Right.MultifidusThoracisT7T3NodeIns_pos * ..MirrorTransform;
    AnyFloat MultifidusThoracisT6T3NodeIns_pos =  .Right.MultifidusThoracisT6T3NodeIns_pos * ..MirrorTransform;
    AnyFloat SET3T1NodeOrg_pos =  .Right.SET3T1NodeOrg_pos * ..MirrorTransform;
    AnyFloat SET7T3NodeIns_pos =  .Right.SET7T3NodeIns_pos * ..MirrorTransform;
    AnyFloat SET6T3NodeIns_pos =  .Right.SET6T3NodeIns_pos * ..MirrorTransform;
    AnyFloat SET5T3NodeIns_pos =  .Right.SET5T3NodeIns_pos * ..MirrorTransform;
    AnyFloat CV_pos = .Right.CV_pos * ..MirrorTransform;
    AnyFloat CT_pos = .Right.CT_pos * ..MirrorTransform;
    AnyFloat CTsup_pos          = .Right.CTsup_pos * ..MirrorTransform;
    AnyFloat CTinf_pos       = .Right.CTinf_pos * ..MirrorTransform;
    AnyFloat CVI_pos = .Right.CVI_pos * ..MirrorTransform;
    AnyFloat Flavum_inferior_points = .Right.Flavum_inferior_points * ..MirrorTransform;
    AnyFloat Flavum_superior_points = .Right.Flavum_superior_points * ..MirrorTransform;
    AnyFloat InterTransverse_inferior_points = .Right.InterTransverse_inferior_points * ..MirrorTransform;
    AnyFloat InterTransverse_superior_points = .Right.InterTransverse_superior_points * ..MirrorTransform;
    AnyFloat SuperiorCostoTransverse_points = .Right.SuperiorCostoTransverse_points * ..MirrorTransform;
    AnyFloat LateralCostoTransverse_points = .Right.LateralCostoTransverse_points * ..MirrorTransform;
    AnyFloat CostoTransverse_points = .Right.CostoTransverse_points * ..MirrorTransform;
    AnyFloat Radiate_inferior_points = .Right.Radiate_inferior_points * ..MirrorTransform;
    AnyFloat Radiate_superior_points = .Right.Radiate_superior_points * ..MirrorTransform;
    AnyFloat FacetCapsule_inferior_points = .Right.FacetCapsule_inferior_points * ..MirrorTransform;
    AnyFloat FacetCapsule_superior_points = .Right.FacetCapsule_superior_points * ..MirrorTransform;
    AnyFloat LongusColliT3C6Node_pos = .Right.LongusColliT3C6Node_pos * ..MirrorTransform;
    AnyFloat SuperiorEndplateNode_pos = .Right.SuperiorEndplateNode_pos * ..MirrorTransform;
  };
};

AnyFolder T2 = {
  AnyFloat T2T3JntNode_pos = .T3.T2T3JntNode_pos;
  AnyFloat T1T2JntNode_pos = {0.004, 0.442, 0.0};
  AnyFloat SuperiorEndplateAnteriorNode_pos = {0.016000, 0.436200, 0.000000};
  AnyFloat SuperiorEndplatePosteriorNode_pos = {0.002700, 0.441700, 0.000000};
  AnyFloat SpinalisL1T2NodeIns_pos =   {-0.047+0.002,0.415,0};
  AnyFloat SpinalisL2T1Via12Node_pos = {-0.048+0.002,0.418,0};
  AnyFloat SemispinalisThoracisSpinous_pos = {-0.047+0.002,0.415,0};
  AnyMatrix AnteriorLongitudinal_inferior_points = {
    {0.011029888, 0.42044431, 0.012170446}, // 0
    {0.01339056, 0.4197109, 0.0072623086}, // 1
    {0.013770072, 0.41892955, 0.0013492197}, // 2
    {0.013770072, 0.41892955, -0.0013492197}, // 5
    {0.01339056, 0.4197109, -0.0072623086}, // 4
    {0.011029888, 0.42044431, -0.012170446} // 3
  };
  AnyMatrix AnteriorLongitudinal_superior_points = {
    {0.015444878, 0.43407986, 0.012995616}, // 3
    {0.01729021, 0.43318281, 0.0078465901}, // 4
    {0.017826477, 0.43322918, 0.0017502984}, // 5
    {0.017826477, 0.43322918, -0.0017502984}, // 8
    {0.01729021, 0.43318281, -0.0078465901}, // 7
    {0.015444878, 0.43407986, -0.012995616} // 6
  };

  AnyMatrix PosteriorLongitudinal_inferior_points = {
    {-0.0087978011, 0.42673165, -0.0093407212}, // 0
    {-0.0083346739, 0.42607734, -0.0072484561}, // 1
    {-0.0079769772, 0.42544663, -0.0039881035}, // 2
    {-0.0079842787, 0.42542517, -0.00065867254}, // 3
    {-0.0079842787, 0.42542517, 0.00065867254}, // 7
    {-0.0079769772, 0.42544663, 0.0039881035}, // 6
    {-0.0083346739, 0.42607734, 0.0072484561}, // 5
    {-0.0087978011, 0.42673165, 0.0093407212} // 4
  };
  AnyMatrix PosteriorLongitudinal_superior_points = {
    {-0.0037028422, 0.44299415, -0.0073256027}, // 4
    {-0.0030922201, 0.44227913, -0.0053935745}, // 5
    {-0.0030257315, 0.4416236, -0.0028220192}, // 6
    {-0.002889269, 0.44127116, -0.000564844}, // 7
    {-0.002889269, 0.44127116, 0.000564844}, // 11
    {-0.0030257315, 0.4416236, 0.0028220192}, // 10
    {-0.0030922201, 0.44227913, 0.0053935745}, // 9
    {-0.0037028422, 0.44299415, 0.0073256027} // 8
  };

  AnyMatrix InterSpinous_inferior_points = {
    {-0.025481565, 0.42582896, 0.0}, // 4
    {-0.022075828, 0.42806756, 0.0}, // 5
    {-0.01859998, 0.43026006, 0.0} // 6
  };
  AnyMatrix InterSpinous_superior_points = {
    {-0.030245766, 0.43305984, 0.0}, // 11
    {-0.026847057, 0.43543854, 0.0}, // 12
    {-0.022994487, 0.43783647, 0.0} // 13
  };
  AnyMatrix SupraSpinous_inferior_points = {
    {-0.041373201, 0.41458026, 0.0}, // 0
    {-0.037796188, 0.41735673, 0.0}, // 1
    {-0.034210794, 0.4202626, 0.0}, // 2
    {-0.028535971, 0.42441711, 0.0} // 3
  };
  AnyMatrix SupraSpinous_superior_points = {
    {-0.043747377, 0.41995636, 0.0}, // 7
    {-0.039909095, 0.42309123, 0.0}, // 8
    {-0.037093546, 0.42603704, 0.0}, // 9
    {-0.032920714, 0.4304564, 0.0} // 10
  };
  AnyFloat O_serratus_posterior_superior_pos           = {-0.04, 0.42 , 0.0};

  AnyFolder Right = {
    AnyFloat MultifidusThoracisT7T2NodeIns_pos =  {-0.040,0.415,0.005};
    AnyFloat MultifidusThoracisT6T2NodeIns_pos =  {-0.040,0.415,0.005};
    AnyFloat MultifidusThoracisT5T2NodeIns_pos =  {-0.040,0.415,0.005};
    AnyFloat SET6T2NodeIns_pos =  {-0.036,0.424,0.005};
    AnyFloat SET5T2NodeIns_pos =  {-0.036,0.424,0.005};
    AnyFloat SET4T2NodeIns_pos =  {-0.036,0.424,0.005};
    AnyFloat LongusColliT2C5Node_pos = {0.01500000, 0.4280000, 0.008000000};
    AnyFloat LongusColliT3C6Node_pos = {0.01500000, 0.4280000, 0.008000000};
    AnyFloat LevatorCostarumT2R3_pos = {    -0.02408159, 0.4497715, 0.0301};
//    AnyFloat CV_pos          = {-0.002462161, 0.44199, 0.01985294};
//    AnyFloat CV_pos          = CT_pos - {-0.67907,0.1712,0.71383}*0.025;
 #ifndef CV_Vertebra_Mid
    AnyFloat CV_Vertebra_pos          = {-0.004462161, 0.43599, 0.01985294};
    AnyFloat CV_Rib_pos          = {-0.013951486, 0.43999, 0.02973728};
    AnyFloat CV_pos          = (CV_Vertebra_pos + CV_Rib_pos)/2;
 #else
   AnyFloat CV_pos   = {-0.004462161, 0.43599, 0.01985294};
 #endif
    AnyFloat CVI_pos         = {-0.01468841, -0.02142329,  0.023015};
//    AnyFloat CT_pos          = {-0.022, 0.449, 0.029};
//    AnyFloat CT_pos          = {-0.022, 0.444, 0.035};
//    AnyFloat CT_pos          = CV_pos + {-0.67907,0.1712,0.71383}*..CVCTDistance[10];
    AnyFloat CT_pos          = {-0.017, 0.441, 0.038};
    AnyFloat CTsup_pos       = CT_pos + {0, ..AllRibs.CTOffset[10], 0};
    AnyFloat CTinf_pos       = CT_pos - {0, ..AllRibs.CTOffset[10], 0};
    AnyMatrix Flavum_inferior_points = {
      {-0.020701904, 0.42548797, 0.0064013954}, // 0
      {-0.021077711, 0.42660263, 0.004317007}, // 1
      {-0.021544769, 0.42748547, 0.002766904}, // 2
      {-0.022029743, 0.42816368, 0.00079096633} // 3
    };
    AnyMatrix Flavum_superior_points = {
      {-0.013960105, 0.44175234, 0.0071588093}, // 4
      {-0.016774837, 0.44063205, 0.0051870719}, // 5
      {-0.018816618, 0.43959153, 0.003521604}, // 6
      {-0.01936841, 0.43930164, 0.00022485286} // 7
    };
    AnyMatrix InterTransverse_inferior_points = {
      {-0.023735391, 0.4488112, 0.029102283}, // 2
      {-0.022026815, 0.44731379, 0.026103057}, // 1
      {-0.020827398, 0.44586059, 0.023655355} // 0
    };
    AnyMatrix InterTransverse_superior_points = {
      {-0.023310933, 0.4512226, 0.028725179}, // 3
      {-0.019824028, 0.45077264, 0.025475306}, // 4
      {-0.016589006, 0.44944301, 0.021064404} // 5
    };
    AnyMatrix SuperiorCostoTransverse_points = {
      {-0.020727694, 0.44383815, 0.020360118}, // 2
      {-0.022947855, 0.44645542, 0.023848668}, // 1
      {-0.025059693, 0.44890422, 0.028050039} // 0
    };
    AnyMatrix LateralCostoTransverse_points = {
      {-0.022610342, 0.44971392, 0.029508289}, // 0
      {-0.020096505, 0.44853354, 0.026816875}, // 1
      {-0.016037561, 0.44599733, 0.022079654} // 2
    };
    AnyMatrix CostoTransverse_points = {
      {-0.0083814869, 0.43759471, 0.020321308}, // 0
      {-0.011138193, 0.43870491, 0.020209791}, // 1
      {-0.013814127, 0.44009823, 0.021056363} // 2
    };
    AnyMatrix Radiate_inferior_points = {
      {0.0014642453, 0.42469031, 0.017784892}, // 2
      {-0.001183539, 0.42700529, 0.017912047}, // 1
      {-0.0053992416, 0.42922524, 0.016475143} // 0
    };
    AnyMatrix Radiate_superior_points = {
      {-0.01246886, 0.44484127, 0.018254329}, // 3
      {-0.0080730217, 0.44228199, 0.017525325}, // 4
      {-0.0028542504, 0.44040525, 0.017535876} // 5
    };
    AnyMatrix FacetCapsule_inferior_points = {
      {-0.021194041, 0.42495972, 0.0084525952}, // 0
      {-0.024845658, 0.42472008, 0.0088748522}, // 1
      {-0.026428286, 0.42471933, 0.01221198} // 2
    };
    AnyMatrix FacetCapsule_superior_points = {
      {-0.010391716, 0.44593963, 0.010219962}, // 0
      {-0.013302737, 0.44262126, 0.0079436004}, // 1
      {-0.016663952, 0.44076058, 0.0090349494}, // 2
      {-0.018619265, 0.44196022, 0.012953175}, // 3
      {-0.018108871, 0.44612038, 0.014705665}, // 4
      {-0.014764435, 0.447584, 0.01522966}, // 5
      {-0.011727875, 0.44676933, 0.012655426} // 6
    };
    AnyFloat SuperiorEndplateNode_pos = 0.5*(.SuperiorEndplateAnteriorNode_pos + .SuperiorEndplatePosteriorNode_pos) + {0,-0.000500,0.015900}; // Offset added manually to match the vertebra surface
  };

  AnyFolder Left = {
    AnyFloat LevatorCostarumT2R3_pos =  .Right.LevatorCostarumT2R3_pos * ..MirrorTransform;
    AnyFloat MultifidusThoracisT7T2NodeIns_pos =  .Right.MultifidusThoracisT7T2NodeIns_pos * ..MirrorTransform;
    AnyFloat MultifidusThoracisT6T2NodeIns_pos =  .Right.MultifidusThoracisT6T2NodeIns_pos * ..MirrorTransform;
    AnyFloat MultifidusThoracisT5T2NodeIns_pos =  .Right.MultifidusThoracisT5T2NodeIns_pos * ..MirrorTransform;
    AnyFloat SET6T2NodeIns_pos =  .Right.SET6T2NodeIns_pos * ..MirrorTransform;
    AnyFloat SET5T2NodeIns_pos =  .Right.SET5T2NodeIns_pos * ..MirrorTransform;
    AnyFloat SET4T2NodeIns_pos =  .Right.SET4T2NodeIns_pos * ..MirrorTransform;
    AnyFloat CV_pos = .Right.CV_pos * ..MirrorTransform;
    AnyFloat CVI_pos = .Right.CVI_pos * ..MirrorTransform;
    AnyFloat CT_pos = .Right.CT_pos * ..MirrorTransform;
    AnyFloat CTsup_pos          = .Right.CTsup_pos * ..MirrorTransform;
    AnyFloat CTinf_pos       = .Right.CTinf_pos * ..MirrorTransform;
    AnyFloat Flavum_inferior_points = .Right.Flavum_inferior_points * ..MirrorTransform;
    AnyFloat Flavum_superior_points = .Right.Flavum_superior_points * ..MirrorTransform;
    AnyMatrix InterTransverse_inferior_points = .Right.InterTransverse_inferior_points * ..MirrorTransform;
    AnyMatrix InterTransverse_superior_points = .Right.InterTransverse_superior_points * ..MirrorTransform;
    AnyMatrix SuperiorCostoTransverse_points = .Right.SuperiorCostoTransverse_points * ..MirrorTransform;
    AnyMatrix LateralCostoTransverse_points = .Right.LateralCostoTransverse_points * ..MirrorTransform;
    AnyMatrix CostoTransverse_points = .Right.CostoTransverse_points * ..MirrorTransform;
    AnyMatrix Radiate_inferior_points = .Right.Radiate_inferior_points * ..MirrorTransform;
    AnyMatrix Radiate_superior_points = .Right.Radiate_superior_points * ..MirrorTransform;
    AnyMatrix FacetCapsule_inferior_points = .Right.FacetCapsule_inferior_points * ..MirrorTransform;
    AnyMatrix FacetCapsule_superior_points = .Right.FacetCapsule_superior_points * ..MirrorTransform;
    AnyFloat LongusColliT2C5Node_pos = .Right.LongusColliT2C5Node_pos * ..MirrorTransform;
    AnyFloat LongusColliT3C6Node_pos = .Right.LongusColliT3C6Node_pos * ..MirrorTransform;
    AnyFloat SuperiorEndplateNode_pos = .Right.SuperiorEndplateNode_pos * ..MirrorTransform;
  };
};

AnyFolder T1 = {
  AnyFloat T1T2JntNode_pos = .T2.T1T2JntNode_pos;
  AnyFloat T1C7JntNode_pos = {0.011, 0.461, 0.0};
  AnyFloat SpinalisL2T1NodeIns_pos =   {-0.039,0.438,0};
  AnyFloat SuperiorEndplateAnteriorNode_pos = {0.022700, 0.456400, 0.000000};
  AnyFloat SuperiorEndplatePosteriorNode_pos = {0.008600, 0.462600, 0.000000};
  AnyFloat SemispinalisThoracisSpinous_pos = {-0.039,0.438,0};
  AnyFloat C7Tip_pos = {-0.036,0.47,0};
  AnyMatrix AnteriorLongitudinal_inferior_points = {
    {0.016996624, 0.44139472, 0.012152981}, // 0
    {0.019062323, 0.44083259, 0.0082911635}, // 1
    {0.020095816, 0.44049877, 0.0042018653}, // 2
    {0.019893929, 0.440164, 0.00084159744}, // 3
    {0.019893929, 0.440164, -0.00084159744}, // 7
    {0.020095816, 0.44049877, -0.0042018653}, // 6
    {0.019062323, 0.44083259, -0.0082911635}, // 5
    {0.016996624, 0.44139472, -0.012152981} // 4
  };
  AnyMatrix AnteriorLongitudinal_superior_points = {
    {0.021254623, 0.45499867, 0.01357807}, // 4
    {0.023504267, 0.45405653, 0.007881565}, // 5
    {0.024136191, 0.45405185, 0.0012915881}, // 6
    {0.024136191, 0.45405185, -0.0012915881}, // 9
    {0.023504267, 0.45405653, -0.007881565}, // 8
    {0.021254623, 0.45499867, -0.01357807} // 7
  };

  AnyMatrix PosteriorLongitudinal_inferior_points = {
    {-0.0016456582, 0.44776925, -0.0085826488}, // 0
    {-0.0014159054, 0.4473795, -0.0056699389}, // 1
    {-0.0013707138, 0.44724229, -0.002349199}, // 2
    {-0.0013546498, 0.4471966, -0.00035049656}, // 3
    {-0.0013546498, 0.4471966, 0.00035049656}, // 7
    {-0.0013707138, 0.44724229, 0.002349199}, // 6
    {-0.0014159054, 0.4473795, 0.0056699389}, // 5
    {-0.0016456582, 0.44776925, 0.0085826488} // 4
  };
  AnyMatrix PosteriorLongitudinal_superior_points = {
    {0.003004964, 0.46353671, -0.0071157906}, // 4
    {0.0035960358, 0.46244055, -0.0052559422}, // 5
    {0.0038727147, 0.46201408, -0.0025037096}, // 6
    {0.0041588843, 0.46202803, -0.000662342}, // 7
    {0.0041588843, 0.46202803, 0.000662342}, // 11
    {0.0038727147, 0.46201408, 0.0025037096}, // 10
    {0.0035960358, 0.46244055, 0.0052559422}, // 9
    {0.003004964, 0.46353671, 0.0071157906} // 8
  };

  AnyMatrix InterSpinous_inferior_points = {
    {-0.017479863, 0.44751033, 0.0}, // 4
    {-0.014527358, 0.44934165, 0.0}, // 5
    {-0.011208244, 0.45176408, 0.0} // 6
  };
  AnyMatrix InterSpinous_superior_points = {
    {-0.022308849, 0.45433787, 0.0}, // 11
    {-0.019235885, 0.45654938, 0.0}, // 12
    {-0.015032368, 0.45905155, 0.0} // 13
  };
  AnyMatrix SupraSpinous_inferior_points = {
    {-0.031781059, 0.43768504, 0.0}, // 0
    {-0.028375648, 0.44045445, 0.0}, // 1
    {-0.025082242, 0.44330287, 0.0}, // 2
    {-0.020507712, 0.44620702, 0.0} // 3
  };
  AnyMatrix SupraSpinous_superior_points = {
    {-0.035218082, 0.4423551, 0.0}, // 7
    {-0.031624954, 0.44521117, 0.0}, // 8
    {-0.02846876, 0.44851345, 0.0}, // 9
    {-0.024908554, 0.45223349, 0.0} // 10
  };
  AnyFloat O_serratus_posterior_superior_pos           = {-0.033, 0.445 , 0.0};

  AnyFolder Right = {
    AnyFloat MultifidusThoracisT6T1NodeIns_pos =  {-0.032,0.438,0.005};
    AnyFloat MultifidusThoracisT5T1NodeIns_pos =  {-0.032,0.438,0.005};
    AnyFloat MultifidusThoracisT4T1NodeIns_pos =  {-0.032,0.438,0.005};
    AnyFloat SET5T1NodeIns_pos =  {-0.028,0.445,0.005};
    AnyFloat SET4T1NodeIns_pos =  {-0.028,0.445,0.005};
    AnyFloat SET3T1NodeIns_pos =  {-0.028,0.445,0.005};
    AnyFloat LongusColliT1C4Node_pos = {0.02200000, 0.4480000, 0.008000000};
    AnyFloat LongusColliT2C5Node_pos = {0.02200000, 0.4480000, 0.008000000};
    AnyFloat LongusColliT3C6Node_pos = {0.02200000, 0.4480000, 0.008000000};
    AnyFloat LumpedHyoidStC0Org_pos        = {   0.0500,    0.5990,    0.0180};
    AnyFloat LevatorCostarumT1R2_pos                   =  {-0.02237784, 0.4745558, 0.034};
    AnyFloat CVI_pos         = {-0.01779613, -0.02181709,  0.023630};
//    AnyFloat CV_pos          = {-0.01351486, 0.4626566, 0.02973728}; Initial
//    AnyFloat CV_pos          = {0.004951486, 0.4626566, 0.01973728}; On the superior-posterior Body of vertebrae
//    AnyFloat CV_pos          = CT_pos - {-0.54981,0.19732,0.81165}*0.025; from CT with Helical Axis
 #ifndef CV_Vertebra_Mid
   AnyFloat CV_Vertebra_pos   = {0.002951486, 0.4566566, 0.02173728};
    AnyFloat CV_Rib_pos          = {-0.013951486, 0.4606566, 0.02873728};
    AnyFloat CV_pos          = (CV_Vertebra_pos + CV_Rib_pos)/2;
 #else
   AnyFloat CV_pos   = {0.002951486, 0.4556566, 0.02173728};
 #endif
//    AnyFloat CT_pos          = {-0.019, 0.4735, 0.0375};
//    AnyFloat CT_pos          = CV_pos + {-0.54981,0.19732,0.81165}*..CVCTDistance[11];
    AnyFloat CT_pos          = {-0.013, 0.4625, 0.040};
    AnyFloat CTsup_pos       = CT_pos + {0, ..AllRibs.CTOffset[11], 0};
    AnyFloat CTinf_pos       = CT_pos - {0, ..AllRibs.CTOffset[11], 0};
    AnyFloat ICSpringInfNode_pos = ..R1.Right.ICSpringSupNode_pos;

    AnyMatrix Flavum_inferior_points = {
      {-0.013351166, 0.44660765, 0.0078916112}, // 0
      {-0.013054466, 0.44733965, 0.0053027812}, // 1
      {-0.013358867, 0.449058, 0.0025691176}, // 2
      {-0.014224271, 0.44957834, 0.00026244926} // 3
    };
    AnyMatrix Flavum_superior_points = {
      {-0.0039761323, 0.4626376, 0.006922394}, // 4
      {-0.0061072554, 0.46126774, 0.0056232125}, // 5
      {-0.0090594785, 0.46000308, 0.0028772624}, // 6
      {-0.010786358, 0.46021104, 0.00057258568} // 7
    };
    AnyMatrix InterTransverse_inferior_points = {
      {-0.020424861, 0.47284743, 0.036911022}, // 2
      {-0.019316847, 0.47148901, 0.033851374}, // 1
      {-0.018154752, 0.47015396, 0.030902926} // 0
    };
    AnyMatrix InterTransverse_superior_points = {
      {-0.019894013, 0.47519058, 0.03587107}, // 3
      {-0.01715154, 0.47437453, 0.032324299}, // 4
      {-0.012667952, 0.47209236, 0.02568181} // 5
    };
    AnyMatrix SuperiorCostoTransverse_points = {
      {-0.016125746, 0.46756008, 0.025411339}, // 2
      {-0.019231616, 0.47053453, 0.030783122}, // 1
      {-0.021479318, 0.47265267, 0.034340624} // 0
    };
    AnyMatrix LateralCostoTransverse_points = {
      {-0.020049151, 0.47411609, 0.038450383}, // 3
      {-0.016605349, 0.47178522, 0.03329597}, // 4
      {-0.012056282, 0.46890518, 0.027844828} // 5
    };
    AnyMatrix CostoTransverse_points = {
      {-0.0064804819, 0.4615227, 0.019758115}, // 0
      {-0.0031349445, 0.46033642, 0.02035787}, // 1
      {0.00026435271, 0.45896441, 0.020367736} // 2
    };
    AnyMatrix Radiate_inferior_points = {
      {0.0019651153, 0.44961417, 0.016535604}, // 0
      {0.0058532208, 0.44838372, 0.018256159}, // 1
      {0.0084399842, 0.44682017, 0.01824953} // 2
    };
    AnyMatrix Radiate_superior_points = {
      {0.0037022035, 0.46107224, 0.017576233}, // 3
      {0.0090416595, 0.45881292, 0.019238019}, // 4
      {0.013114003, 0.45766419, 0.019248892} // 5
    };
    AnyMatrix FacetCapsule_inferior_points = {
      {-0.01530077, 0.44778058, 0.0052222754}, // 0
      {-0.019506248, 0.44711202, 0.0064978665}, // 1
      {-0.018414544, 0.44614801, 0.01182553}, // 2
      {-0.016488632, 0.44879282, 0.013674987}, // 3
      {-0.012914121, 0.44968042, 0.012248348} // 4
    };
    AnyMatrix FacetCapsule_superior_points = {
      {-0.0037028133, 0.46600622, 0.009084845}, // 1
      {-0.0065915743, 0.46515164, 0.01056834}, // 2
      {-0.0079694903, 0.46651357, 0.013295349}, // 3
      {-0.0080572171, 0.46814886, 0.015519183}, // 4
      {-0.0059269615, 0.46854919, 0.015774079}, // 5
      {-0.0023481438, 0.46707314, 0.013616229}, // 6
      {-0.0014032533, 0.46636, 0.010356405} // 7
    };
    AnyFloat SuperiorEndplateNode_pos = 0.5*(.SuperiorEndplateAnteriorNode_pos + .SuperiorEndplatePosteriorNode_pos) + {0,-0.000500,0.016100}; // Offset added manually to match the vertebra surface
  };

  AnyFolder Left = {
    AnyFloat LumpedHyoidStC0Org_pos = .Right.LumpedHyoidStC0Org_pos * ..MirrorTransform;
    AnyFloat LevatorCostarumT1R2_pos = .Right.LevatorCostarumT1R2_pos * ..MirrorTransform;
    AnyFloat MultifidusThoracisT6T1NodeIns_pos =  .Right.MultifidusThoracisT6T1NodeIns_pos * ..MirrorTransform;
    AnyFloat MultifidusThoracisT5T1NodeIns_pos =  .Right.MultifidusThoracisT5T1NodeIns_pos * ..MirrorTransform;
    AnyFloat MultifidusThoracisT4T1NodeIns_pos =  .Right.MultifidusThoracisT4T1NodeIns_pos * ..MirrorTransform;
    AnyFloat SET5T1NodeIns_pos =  .Right.SET5T1NodeIns_pos * ..MirrorTransform;
    AnyFloat SET4T1NodeIns_pos =  .Right.SET4T1NodeIns_pos * ..MirrorTransform;
    AnyFloat SET3T1NodeIns_pos =  .Right.SET3T1NodeIns_pos * ..MirrorTransform;
    AnyFloat CVI_pos = .Right.CVI_pos * ..MirrorTransform;
    AnyFloat CV_pos = .Right.CV_pos * ..MirrorTransform;
    AnyFloat CT_pos = .Right.CT_pos * ..MirrorTransform;
    AnyFloat CTsup_pos = .Right.CTsup_pos * ..MirrorTransform;
    AnyFloat CTinf_pos       = .Right.CTinf_pos * ..MirrorTransform;
    AnyFloat ICSpringInfNode_pos = .Right.ICSpringInfNode_pos * ..MirrorTransform;
    AnyFloat Flavum_inferior_points = .Right.Flavum_inferior_points * ..MirrorTransform;
    AnyFloat Flavum_superior_points = .Right.Flavum_superior_points * ..MirrorTransform;
    AnyFloat InterTransverse_inferior_points = .Right.InterTransverse_inferior_points * ..MirrorTransform;
    AnyFloat InterTransverse_superior_points = .Right.InterTransverse_superior_points * ..MirrorTransform;
    AnyFloat SuperiorCostoTransverse_points = .Right.SuperiorCostoTransverse_points * ..MirrorTransform;
    AnyFloat LateralCostoTransverse_points = .Right.LateralCostoTransverse_points * ..MirrorTransform;
    AnyFloat CostoTransverse_points = .Right.CostoTransverse_points * ..MirrorTransform;
    AnyFloat Radiate_inferior_points = .Right.Radiate_inferior_points * ..MirrorTransform;
    AnyFloat Radiate_superior_points = .Right.Radiate_superior_points * ..MirrorTransform;
    AnyFloat FacetCapsule_inferior_points = .Right.FacetCapsule_inferior_points * ..MirrorTransform;
    AnyFloat FacetCapsule_superior_points = .Right.FacetCapsule_superior_points * ..MirrorTransform;
    AnyFloat LongusColliT1C4Node_pos = .Right.LongusColliT1C4Node_pos * ..MirrorTransform;
    AnyFloat LongusColliT2C5Node_pos = .Right.LongusColliT2C5Node_pos * ..MirrorTransform;
    AnyFloat LongusColliT3C6Node_pos = .Right.LongusColliT3C6Node_pos * ..MirrorTransform;
    AnyFloat SuperiorEndplateNode_pos = .Right.SuperiorEndplateNode_pos * ..MirrorTransform;
  };
};


//this file can be used to generate new points which are used to control the start and end of IC muscles
//the file should be used if the spline points  are change inf and sup for each rib are changed...
//#include "SplinePointsForICMus.any"


AnyFolder R1 = {
  AnyFolder Right = {
    AnyFloat IliocostalisThoracisC7R7Via1Node_pos = {-0.026407383458753451, 0.46088679805112104, 0.038975933553107217};
    AnyFloat IliocostalisThoracisR1R7Node_pos  = {-0.027103140255304824, 0.45986212809964644, 0.043820102622266294};
    AnyFloat IliocostalisCervicisR3C4Via2Node_pos = {-0.0245, 0.4760, 0.0385};
    AnyFloat IliocostalisCervicisR4C5Via2Node_pos = {-0.0240, 0.4740, 0.0405};
    AnyFloat IliocostalisCervicisR5C6Via2Node_pos = {-0.0235, 0.4720, 0.0425};
    AnyFloat IliocostalisCervicisR6C4Via2Node_pos = {-0.0230, 0.4700, 0.0445};
    AnyFloat CT_pos = ..T1.Right.CT_pos;
    AnyFloat CS_pos = {0.066729261209377583, 0.41757177820008412, 0.021515117354195493};
    AnyFloat CC_pos = {0.052109002670222102, 0.41701107046331864, 0.041864659035599633};
    AnyFloat CV_pos = ..T1.Right.CV_pos;
    AnyFloat CTsup_pos = ..T1.Right.CTsup_pos;
    AnyFloat CTinf_pos = ..T1.Right.CTinf_pos;
    AnyFloat R1R2IC_pos = {0.0011451273379845944, 0.4242708488979362, 0.083792821796973366};
    AnyFloat ScalenusAnteriorR1C6NodeIns_pos = {0.04340032409453376, 0.4228068056607262, 0.050236845847508482};
    AnyFloat ScalenusAnteriorR1C5NodeIns_pos = {0.042200861261168343, 0.42353657811710693, 0.05125110472633726};
    AnyFloat ScalenusAnteriorR1C4NodeIns_pos = {0.041001398427802919, 0.42426635057348766, 0.052265363605166038};
    AnyFloat ScalenusAnteriorR1C3NodeIns_pos = {0.03980193559443751, 0.42499612302986844, 0.053279622483994843};
    AnyFloat ScalenusMediusR1C7NodeIns_pos = {0.029106282482658258, 0.4311399287798704, 0.055107345601673796};
    AnyFloat ScalenusMediusR1C6NodeIns_pos = {0.027906819649292838, 0.43186970123625112, 0.056121604480502602};
    AnyFloat ScalenusMediusR1C5NodeIns_pos = {0.026707356815927417, 0.43259947369263185, 0.057135863359331379};
    AnyFloat ScalenusMediusR1C4NodeIns_pos = {0.025507893982562004, 0.43332924614901258, 0.058150122238160185};
    AnyFloat ScalenusMediusR1C3NodeIns_pos = {0.024308431149196584, 0.43405901860539331, 0.059164381116988934};
    AnyFloat ScalenusMediusR1C2NodeIns_pos = {0.023108968315831167, 0.43478879106177404, 0.06017863999581774};
    AnyFloat LevatorCostarumC7R1Ins_pos = {-0.023033814876328766, 0.46348659068708747, 0.040010396345889904};
    AnyFloat SubcostalisR1R3Org_pos = {-0.011349587234966201, 0.45258256721650381, 0.052800279339013018};
    AnyFloat SubcostalisR1R4Org_pos = {-0.012111781829487876, 0.45037513772653776, 0.058416889922533133};
    AnyFloat MidNode_pos = {0.0091749636568886003, 0.44027252731697275, 0.069388122712245787};
    AnyFloat ICSpringInfNode_pos = {0.019851286828444302, 0.42578971365848639, 0.086004161356122891};
    AnyFloat ICSpringSupNode_pos = {0.0087486382164920079, 0.46676750592483496, 0.064609592060697163};
    AnyFloat O_SerratusAnterior_pos = {0.019147049820294391, 0.39710804637414854, 0.092089818000095525};
    AnyMatrix SuperiorCostoTransverse_points = {
      {-0.0049321125176748845, 0.47179761799116587, 0.025378703020418711},
      {-0.0076192561837833614, 0.47377622045593037, 0.025589351939331095},
      {-0.0089141624327206403, 0.47462980401945343, 0.027494533873161163}
    };
    AnyMatrix LateralCostoTransverse_points = {
      {-0.0091068206329922644, 0.47448696044609157, 0.027528103256746643},
      {-0.0081912838776466435, 0.47032070838571671, 0.0252416610485246}
    };
    AnyMatrix CostoTransverse_points = {
      {-0.007505522073913834, 0.46803817518659502, 0.025690540869929765},
      {-0.0039343701414054008, 0.46723171020148802, 0.024712481945114578}
    };
    AnyMatrix Radiate_inferior_points = {
      {-0.010090020878102242, 0.4716727534485699, 0.027219376749031368},
      {-0.0083056853134984843, 0.46869060880122559, 0.027506238209654227},
      {-0.0071878580362283867, 0.46735461485559782, 0.027244923409113192},
      {-0.0043054689515172259, 0.46700807331450278, 0.025577719813079866}
    };
    AnyMatrix Radiate_superior_points = {
      {-0.0093248915973104876, 0.47177937285629445, 0.025849923390574958},
      {-0.005587551458331376, 0.46967229111926873, 0.024708515776069931},
      {-0.0038790124020390421, 0.46761139403117702, 0.024714209561374767}
    };


    #if IC_TYPE != OLD
    //  #if IC_TYPE== MULTI_OFFSET

     AnyMatrix IC_Inf_pos = {
 {-0.02369970204458885, 0.46320612836853009, 0.020240740682851019},
//       {-0.025, 0.462, 0.03},
{-0.026, 0.461, 0.038},
{-0.028, 0.46, 0.047},
{-0.02121502, 0.4578261, 0.05619234},
{-0.006577093, 0.4496612, 0.06745129},
{0.008610755, 0.440457, 0.0741386},
{0.03090198, 0.4271954, 0.06261172},
//{0.05319321, 0.4139338, 0.05108483}
 {0.059082734183173516, 0.41042995428526596, 0.048042874958657548}
};


    AnyMatrix IC_Sup_pos = {
{-0.010202836502927526, 0.45705042317502526, 0.022658756187717913},
      //      {-0.010240501599653708, 0.45719860273768104, 0.025444665539020722},
      {-0.010645249561883674, 0.45826137020198998, 0.034229980240651908},
      {-0.0094546636101301498, 0.45586088521825358, 0.044802886079568338},
      {-0.0044117916263176904, 0.45008096790338759, 0.05443908873804168},
      {0.0091002280881066697, 0.44308287433626664, 0.059505793265732965},
      {0.020621592655829437, 0.43406032397230182, 0.055076697535635738},
      {0.03080455946675139, 0.4285018234796365, 0.04914807187201492},
    //  {0.043060091835445444, 0.42199685301548778, 0.040098275673101785}
    {0.047205739845127367, 0.41979044343805855, 0.03708430381185418}
    };


AnyFloat Inn_Sup_Start_ABS_pos = {0.009037940838632701, 0.44257175839412405, 0.057926417470311894};
AnyFloat Inn_Inf_Start_ABS_pos = {0.0034683438112648865, 0.4435810141587378, 0.070585707896556119};
AnyFloat Inn_Sup_End_ABS_pos = {0.047205739845078157, 0.41979044343808469, 0.037084303811890373};
AnyFloat Inn_Inf_End_ABS_pos = {0.059082734183088972, 0.41042995428531626, 0.048042874958701257};
AnyFloat Ext_Sup_Start_ABS_pos = {0.009037940838632701, 0.44257175839412405, 0.057926417470311894};
AnyFloat Ext_Inf_Start_ABS_pos = {0.0034683438112648865, 0.4435810141587378, 0.070585707896556119};
AnyFloat Ext_Sup_End_ABS_pos = {0.047205739845078157, 0.41979044343808469, 0.037084303811890373};
AnyFloat Ext_Inf_End_ABS_pos = {0.059082734183088972, 0.41042995428531626, 0.048042874958701257};
AnyFloat Int_Sup_Start_ABS_pos = {-0.01020283650292887, 0.45705042317502892, 0.022658756187752628};
AnyFloat Int_Inf_Start_ABS_pos = {-0.02369970204459574, 0.46320612836852348, 0.020240740682904296};
AnyFloat Int_Sup_End_ABS_pos = {0.047205739845078157, 0.41979044343808469, 0.037084303811890373};
AnyFloat Int_Inf_End_ABS_pos = {0.059082734183088972, 0.41042995428531626, 0.048042874958701257};

 #endif
  #if IC_TYPE == OLD
  AnyMatrix IC_R1_Ext_Inf_pos = {
      {-0.025, 0.462, 0.040}+{0,0,-0.01},
      {-0.026, 0.461, 0.043}+{0,0,-0.005},
      {-0.028, 0.460, 0.047}+{0,0,0},
      {-0.02121501670764226, 0.45782613509188019, 0.056192341341662205},
      {-0.0065770932426774675, 0.44966115508577986, 0.067451293969625292},
      {0.0086107548292836678, 0.44045702477452076, 0.074138604486488902},
      0.5*(  {0.0086107548292836678, 0.44045702477452076, 0.074138604486488902}+      {0.053193207213828822, 0.41393382073055368, 0.051084825943083723}),
      {0.053193207213828822, 0.41393382073055368, 0.051084825943083723}
    };


    AnyMatrix IC_R1_Ext_Sup_pos = {
      {-0.010240501599653708, 0.45719860273768104, 0.025444665539020722},
      {-0.010645249561883674, 0.45826137020198998, 0.034229980240651908},
      {-0.0094546636101301498, 0.45586088521825358, 0.044802886079568338},
      {-0.0044117916263176904, 0.45008096790338759, 0.05443908873804168},
      {0.0091002280881066697, 0.44308287433626664, 0.059505793265732965},
      {0.020621592655829437, 0.43406032397230182, 0.055076697535635738},
      {0.03080455946675139, 0.4285018234796365, 0.04914807187201492},
      {0.043060091835445444, 0.42199685301548778, 0.040098275673101785}
    };


    AnyMatrix  IC_R1_Int_Inf_pos = IC_R1_Ext_Inf_pos;
    AnyMatrix  IC_R1_Int_Sup_pos =IC_R1_Ext_Sup_pos;
    AnyMatrix  IC_R1_Inn_Inf_pos =IC_R1_Ext_Inf_pos;

    Spline_template IC_R1_Ext_Inf0(
      NAME = IC_R1_Ext_Inf_pos,
      NUM_ELEM = 20,
      POINTS = .IC_R1_Ext_Inf_pos,
      START = 0.0,
      END = 0.0
    )={};
    Spline_template IC_R1_Int_Inf0(
      NAME = IC_R1_Int_Inf_pos,
      NUM_ELEM = 20,
      POINTS = .IC_R1_Int_Inf_pos,
      START = 0.0,
      END = 0.0
    )={};

    Spline_template_ABS_OFFSETS IC_R1_Ext_Inf(
      NAME = IC_R1_Ext_Inf_pos,
      NUM_ELEM = 20,
      POINTS = .IC_R1_Ext_Inf_pos,
      OFFSETS = ...R2.Right.OffSetCal.Offsets_Ext_Sup,
      SIGN = -1
    )={};
    Spline_template_ABS_OFFSETS IC_R1_Int_Inf(
      NAME = IC_R1_Int_Inf_pos,
      NUM_ELEM = 20,
      POINTS = .IC_R1_Int_Inf_pos,
      OFFSETS = ...R2.Right.OffSetCal.Offsets_Int_Sup,
      SIGN = -1
    )={};

    Spline_template_ABS_OFFSETS IC_R1_Inn_Inf(
      NAME = IC_R1_Inn_Inf_pos,
      NUM_ELEM = 20,
      POINTS = .IC_R1_Inn_Inf_pos,
      OFFSETS = ...R2.Right.OffSetCal.Offsets_Inn_Sup,
      SIGN = -1
    )={START=0.0;};

    #endif

    #if CC_ALIGNMENT  == MID | CC_ALIGNMENT == CV
    #if CC_ALIGNMENT == MID
    AnyFloat CC_AlignmentNode = {0.0058774108248878893, 0.44330834143499936, 0.064219350611639234};
    #endif
    #if CC_ALIGNMENT == CV
    AnyFloat CC_AlignmentNode = CV_pos;
    #endif
    #else
    // #if CC_ALIGNMENT == TANGENT
    AnyFloat CC_AlignmentNode = {0.032,0.431,0.055};
    #endif

  };

  AnyFolder Left = {
    AnyFloat IliocostalisThoracisC7R7Via1Node_pos = .Right.IliocostalisThoracisC7R7Via1Node_pos * ..MirrorTransform;
    AnyFloat IliocostalisThoracisR1R7Node_pos = .Right.IliocostalisThoracisR1R7Node_pos * ..MirrorTransform;
    AnyFloat IliocostalisCervicisR3C4Via2Node_pos = .Right.IliocostalisCervicisR3C4Via2Node_pos * ..MirrorTransform;
    AnyFloat IliocostalisCervicisR4C5Via2Node_pos = .Right.IliocostalisCervicisR4C5Via2Node_pos * ..MirrorTransform;
    AnyFloat IliocostalisCervicisR5C6Via2Node_pos = .Right.IliocostalisCervicisR5C6Via2Node_pos * ..MirrorTransform;
    AnyFloat IliocostalisCervicisR6C4Via2Node_pos = .Right.IliocostalisCervicisR6C4Via2Node_pos * ..MirrorTransform;
    AnyFloat CT_pos = .Right.CT_pos * ..MirrorTransform;
    AnyFloat CS_pos = .Right.CS_pos * ..MirrorTransform;
    AnyFloat CC_pos = .Right.CC_pos * ..MirrorTransform;
    AnyFloat CV_pos = .Right.CV_pos * ..MirrorTransform;
    AnyFloat CTsup_pos = .Right.CTsup_pos * ..MirrorTransform;
    AnyFloat CTinf_pos = .Right.CTinf_pos * ..MirrorTransform;
    AnyFloat R1R2IC_pos = .Right.R1R2IC_pos * ..MirrorTransform;
    AnyFloat ScalenusAnteriorR1C6NodeIns_pos = .Right.ScalenusAnteriorR1C6NodeIns_pos * ..MirrorTransform;
    AnyFloat ScalenusAnteriorR1C5NodeIns_pos = .Right.ScalenusAnteriorR1C5NodeIns_pos * ..MirrorTransform;
    AnyFloat ScalenusAnteriorR1C4NodeIns_pos = .Right.ScalenusAnteriorR1C4NodeIns_pos * ..MirrorTransform;
    AnyFloat ScalenusAnteriorR1C3NodeIns_pos = .Right.ScalenusAnteriorR1C3NodeIns_pos * ..MirrorTransform;
    AnyFloat ScalenusMediusR1C7NodeIns_pos = .Right.ScalenusMediusR1C7NodeIns_pos * ..MirrorTransform;
    AnyFloat ScalenusMediusR1C6NodeIns_pos = .Right.ScalenusMediusR1C6NodeIns_pos * ..MirrorTransform;
    AnyFloat ScalenusMediusR1C5NodeIns_pos = .Right.ScalenusMediusR1C5NodeIns_pos * ..MirrorTransform;
    AnyFloat ScalenusMediusR1C4NodeIns_pos = .Right.ScalenusMediusR1C4NodeIns_pos * ..MirrorTransform;
    AnyFloat ScalenusMediusR1C3NodeIns_pos = .Right.ScalenusMediusR1C3NodeIns_pos * ..MirrorTransform;
    AnyFloat ScalenusMediusR1C2NodeIns_pos = .Right.ScalenusMediusR1C2NodeIns_pos * ..MirrorTransform;
    AnyFloat LevatorCostarumC7R1Ins_pos = .Right.LevatorCostarumC7R1Ins_pos * ..MirrorTransform;
    AnyFloat SubcostalisR1R3Org_pos  = .Right.SubcostalisR1R3Org_pos * ..MirrorTransform;
    AnyFloat SubcostalisR1R4Org_pos = .Right.SubcostalisR1R4Org_pos * ..MirrorTransform;
    AnyFloat MidNode_pos = .Right.MidNode_pos * ..MirrorTransform;
    AnyFloat ICSpringInfNode_pos = .Right.ICSpringInfNode_pos * ..MirrorTransform;
    AnyFloat ICSpringSupNode_pos = .Right.ICSpringSupNode_pos * ..MirrorTransform;
    AnyFloat O_SerratusAnterior_pos = .Right.O_SerratusAnterior_pos * ..MirrorTransform;
    AnyMatrix SuperiorCostoTransverse_points = .Right.SuperiorCostoTransverse_points * ..MirrorTransform;
    AnyMatrix LateralCostoTransverse_points = .Right.LateralCostoTransverse_points * ..MirrorTransform;
    AnyMatrix CostoTransverse_points = .Right.CostoTransverse_points * ..MirrorTransform;
    AnyMatrix Radiate_inferior_points = .Right.Radiate_inferior_points * ..MirrorTransform;
    AnyMatrix Radiate_superior_points = .Right.Radiate_superior_points * ..MirrorTransform;

    #if IC_TYPE != OLD
//  #if IC_TYPE== MULTI_OFFSET
       AnyMatrix  IC_Inf_pos =.Right.IC_Inf_pos* ..MirrorTransform;
      AnyMatrix  IC_Sup_pos =.Right.IC_Sup_pos* ..MirrorTransform;


 AnyFloat Inn_Sup_Start_ABS_pos =.Right.Inn_Sup_Start_ABS_pos* ..MirrorTransform;
AnyFloat Inn_Inf_Start_ABS_pos = .Right.Inn_Inf_Start_ABS_pos* ..MirrorTransform;
AnyFloat Inn_Sup_End_ABS_pos = .Right.Inn_Sup_End_ABS_pos* ..MirrorTransform;
AnyFloat Inn_Inf_End_ABS_pos = .Right.Inn_Inf_End_ABS_pos* ..MirrorTransform;
AnyFloat Ext_Sup_Start_ABS_pos = .Right.Ext_Sup_Start_ABS_pos* ..MirrorTransform;
AnyFloat Ext_Inf_Start_ABS_pos = .Right.Ext_Inf_Start_ABS_pos* ..MirrorTransform;
AnyFloat Ext_Sup_End_ABS_pos = .Right.Ext_Sup_End_ABS_pos* ..MirrorTransform;
AnyFloat Ext_Inf_End_ABS_pos = .Right.Ext_Inf_End_ABS_pos* ..MirrorTransform;
AnyFloat Int_Sup_Start_ABS_pos = .Right.Int_Sup_Start_ABS_pos* ..MirrorTransform;
AnyFloat Int_Inf_Start_ABS_pos = .Right.Int_Inf_Start_ABS_pos* ..MirrorTransform;
AnyFloat Int_Sup_End_ABS_pos = .Right.Int_Sup_End_ABS_pos* ..MirrorTransform;
AnyFloat Int_Inf_End_ABS_pos = .Right.Int_Inf_End_ABS_pos* ..MirrorTransform;


      #endif

    #if IC_TYPE == OLD
     AnyMatrix  IC_R1_Ext_Inf_pos =.Right.IC_R1_Ext_Inf_pos* ..MirrorTransform;
    AnyMatrix  IC_R1_Ext_Sup_pos =.Right.IC_R1_Ext_Sup_pos* ..MirrorTransform;
    AnyMatrix  IC_R1_Int_Inf_pos =.Right.IC_R1_Int_Inf_pos* ..MirrorTransform;
    AnyMatrix  IC_R1_Int_Sup_pos =.Right.IC_R1_Int_Sup_pos* ..MirrorTransform;


    AnyFolder IC_R1_Ext_Inf = {AnyMatrix Points= ..Right.IC_R1_Ext_Inf.Points* ...MirrorTransform;};
    AnyFolder IC_R1_Int_Inf = {AnyMatrix Points= ..Right.IC_R1_Int_Inf.Points* ...MirrorTransform;};
    AnyFolder IC_R1_Inn_Inf = {AnyMatrix Points= ..Right.IC_R1_Inn_Inf.Points* ...MirrorTransform;};

    AnyFolder IC_R1_Ext_Inf0 = {AnyMatrix Points= ..Right.IC_R1_Ext_Inf0.Points* ...MirrorTransform;};
    AnyFolder IC_R1_Int_Inf0 = {AnyMatrix Points= ..Right.IC_R1_Int_Inf0.Points* ...MirrorTransform;};
    #endif

    AnyFloat CC_AlignmentNode =.Right.CC_AlignmentNode* ..MirrorTransform;

  };
};

AnyFolder R2 = {
  AnyFolder Right = {
    AnyFloat IliocostalisThoracisC7R7Via2Node_pos = {-0.029081587, 0.44477151, 0.0421};
    AnyFloat IliocostalisThoracisR1R7Via1Node_pos = {-0.029081587, 0.44677151, 0.0471};
    AnyFloat IliocostalisThoracisR2R8Node_pos  = {-0.029081587, 0.45077151, 0.0521};
    AnyFloat CT_pos         = ..T2.Right.CT_pos;
    AnyFloat CC_pos         = {0.085136813 , 0.37784236, 0.04556327};
    AnyFloat CV_pos         = ..T2.Right.CV_pos;
    AnyFloat CS_pos         = {0.090100003 , 0.37379976, 0.0176    };
    AnyFloat CTsup_pos       = ..T2.Right.CTsup_pos;
    AnyFloat CTinf_pos       = ..T2.Right.CTinf_pos;
    AnyFloat R2R3IC_pos     = { 0.00132, 0.40375, 0.11184};
    AnyFloat ScalenusPosteriorR2C7NodeIns_pos=  { 0.022018413, 0.41397151, 0.10300000};
    AnyFloat ScalenusPosteriorR2C6NodeIns_pos=  { 0.021018413, 0.41497151, 0.10300000};
    AnyFloat ScalenusPosteriorR2C5NodeIns_pos=  { 0.020018413, 0.41597151, 0.10300000};
    AnyFloat TransversusThoracisR2StNodeOrg_pos              =  { 0.085136813, 0.37784236, 0.04556327};
    AnyFloat TransversusThoracisR2R4NodeOrg_pos             =  { 0.085136813, 0.37784236, 0.04556327};
    AnyFloat LevatorCostarumT1R2Ins_pos               =  {-0.022081587, 0.44577151, 0.04410000};
    AnyFloat SubcostalisR2R4Org_pos                 =  {-0.014081587, 0.44577151, 0.06210000};
    AnyFloat SubcostalisR2R5Org_pos                 =  {-0.014081587, 0.44377151, 0.06810000};
    AnyFloat MidNode_pos = {0.03052761, 0.4113069, 0.1026202};
    AnyFloat ICSpringSupNode_pos = ..R1.Right.ICSpringInfNode_pos;
    AnyFloat ICSpringInfNode_pos = (MidNode_pos+..R3.Right.MidNode_pos)/2;
    AnyFloat O_SerratusAnterior_pos = {0.02860999, 0.3997, 0.10652};
    AnyFloat O_serratus_posterior_superior_pos = {-0.008, 0.433 , 0.085};
    AnyMatrix SuperiorCostoTransverse_points = {
      {-0.010076219, 0.4416838, 0.029304182},
       // 0
      {-0.013398619, 0.44347388, 0.035436824} // 1
    };
    AnyMatrix LateralCostoTransverse_points = {
      {-0.018684663, 0.44252217, 0.037334312}, // 1
      {-0.016167741, 0.44074425, 0.030119525} // 0
    };
    AnyMatrix CostoTransverse_points = {
      {-0.017036922, 0.4395366, 0.028849335}, // 1
      {-0.012672739, 0.44021073, 0.027322186} // 0
    };
    AnyMatrix Radiate_inferior_points = {
      {-0.018369492, 0.43798456, 0.031477649}, // 0
      {-0.015736267, 0.4381524, 0.027162651}, // 1
      {-0.013027948, 0.43973607, 0.026588211} // 2
    };
    AnyMatrix Radiate_superior_points = {
      {-0.012427215, 0.44008127, 0.026864532}, // 3
      {-0.0099018151, 0.44172701, 0.029374199} // 5
    };


  #if IC_TYPE != OLD
  //  #if IC_TYPE== MULTI_OFFSET

     AnyMatrix  IC_Inf_pos ={
      {-0.017681447540988531, 0.43661333027639804, 0.026483497035860129},
         {-0.024301533, 0.44702601, 0.051227413}, // 1
      {-0.022005307, 0.44463807, 0.069002196}, // 2
      {-0.015227474, 0.43772545, 0.084861241}, // 3
      {0.0010262483, 0.42321059, 0.10084606}, // 4
      {0.026268044, 0.40259653, 0.10835691}, // 5
      {0.052626908, 0.39137629, 0.094312221}, // 6
      {0.093074677580627485, 0.37104514416497841, 0.041560640397725161},
    };


     AnyMatrix  IC_Sup_pos =
     {
{-0.015668478916682507, 0.44466637860898134, 0.029399255788992384},

{-0.01910728, 0.4510974, 0.07093016},
{-0.001352615, 0.4319891, 0.09471633},
{0.015, 0.4219891, 0.09},
{0.03219988, 0.410267, 0.1003877},
{0.06101749, 0.3968529, 0.0878161},
{0.08079873, 0.3900958, 0.06617998},
{0.08713840824233321, 0.37854337303550739, 0.038729671380068297}};


AnyFloat Inn_Sup_Start_ABS_pos = {-0.0011943144427593187, 0.43345680106145851, 0.089191296752886812};
AnyFloat Inn_Inf_Start_ABS_pos = {-0.019519736605033311, 0.44212020093496474, 0.073732298530090945};
AnyFloat Inn_Sup_End_ABS_pos = {0.077128444295130771, 0.38971052240764659, 0.066241606111602375};
AnyFloat Inn_Inf_End_ABS_pos = {0.093074677580506138, 0.37104514416503942, 0.04156064039788343};
AnyFloat Ext_Sup_Start_ABS_pos = {-0.015668478916692825, 0.44466637860900066, 0.029399255789116979};
AnyFloat Ext_Inf_Start_ABS_pos = {-0.017681447541008394, 0.43661333027642935, 0.026483497035934361};
AnyFloat Ext_Sup_End_ABS_pos = {0.087138408242314183, 0.37854337303554203, 0.038729671380150654};
AnyFloat Ext_Inf_End_ABS_pos = {0.093074677580506138, 0.37104514416503942, 0.04156064039788343};
AnyFloat Int_Sup_Start_ABS_pos = {-0.011557292582890923, 0.44307406818816042, 0.077138328079859958};
AnyFloat Int_Inf_Start_ABS_pos = {-0.022727780917186569, 0.44502864544318732, 0.054633830706782661};
AnyFloat Int_Sup_End_ABS_pos = {0.087138408242314183, 0.37854337303554203, 0.038729671380150654};
AnyFloat Int_Inf_End_ABS_pos = {0.093074677580506138, 0.37104514416503942, 0.04156064039788343};


#endif

     #if IC_TYPE == OLD

 AnyMatrix  IC_R2_Ext_Inf_pos ={
      {-0.018942703, 0.43864787, 0.032231141}, // 0
      {-0.024301533, 0.44702601, 0.051227413}, // 1
      {-0.022005307, 0.44463807, 0.069002196}, // 2
      {-0.015227474, 0.43772545, 0.084861241}, // 3
      {0.0010262483, 0.42321059, 0.10084606}, // 4
      {0.026268044, 0.40259653, 0.10835691}, // 5
      {0.052626908, 0.39137629, 0.094312221}, // 6
      {0.08573743, 0.37471458, 0.050928786} // 7
    };

     AnyMatrix  IC_R2_Ext_Sup_pos ={
      {-0.011149844-0.01, 0.44107351+0.005, 0.028650511}+{0.005,0,0.015}, // 0
      {-0.01410728-0.005, 0.4460974+0.005, 0.060930159+0.01}, // 2
      {-0.0013526153, 0.43198907, 0.084716327+0.01}, // 3
      {0.015,        0.42198907, 0.08+0.01}, // 3!!!
      {0.032199875, 0.41026697, 0.095387653+0.005}, // 4
      {0.061017487, 0.39685294, 0.082816102+0.005}, // 5
      {0.075798728+0.005, 0.3900958, 0.066179976}, // 6
      {0.083975777, 0.38268977, 0.04883913} // 7
    };


    AnyMatrix  IC_R2_Int_Inf_pos = IC_R2_Ext_Inf_pos;
    AnyMatrix  IC_R2_Int_Sup_pos = IC_R2_Ext_Sup_pos;
    AnyMatrix  IC_R2_Inn_Inf_pos = IC_R2_Ext_Inf_pos;
    AnyMatrix  IC_R2_Inn_Sup_pos = IC_R2_Ext_Sup_pos;

    Spline_template IC_R2_Int_Inf0 ( NAME=IC_R2_Int_Inf_pos,NUM_ELEM=20,POINTS=.IC_R2_Int_Inf_pos,START =0.0,END =0.0)={};
    Spline_template IC_R2_Int_Sup0 ( NAME=IC_R2_Int_Inf_pos,NUM_ELEM=20,POINTS=.IC_R2_Int_Sup_pos,START =0.0,END =0.0)={};

    AnyFolder &Sup_spline = ..R1.Right.IC_R1_Int_Inf0;
    AnyFolder &Inf_spline =            IC_R2_Int_Sup0;

    AnyFloat Desired_Ext_angle =40;
    AnyFloat Desired_Int_angle =-45;
    AnyFloat Desired_Inn_angle =0;

    #include "../AngleCorrection.any"

    Spline_template_ABS_OFFSETS IC_R2_Ext_Inf ( NAME=IC_R2_Ext_Inf_pos,NUM_ELEM=20,POINTS=.IC_R2_Ext_Inf_pos,OFFSETS=...R3.Right.OffSetCal.Offsets_Ext_Sup,SIGN=-1)={};
    Spline_template_ABS_OFFSETS IC_R2_Int_Inf ( NAME=IC_R2_Int_Inf_pos,NUM_ELEM=20,POINTS=.IC_R2_Int_Inf_pos,OFFSETS=...R3.Right.OffSetCal.Offsets_Int_Sup,SIGN=-1)={};
    Spline_template_ABS_OFFSETS IC_R2_Inn_Inf ( NAME=IC_R2_Inn_Inf_pos,NUM_ELEM=20,POINTS=.IC_R2_Inn_Inf_pos,OFFSETS=...R3.Right.OffSetCal.Offsets_Inn_Sup,SIGN=-1)={START =0.0;};

    Spline_template_ABS_OFFSETS IC_R2_Ext_Sup ( NAME=IC_R2_Ext_Inf_pos,NUM_ELEM=20,POINTS=.IC_R2_Ext_Sup_pos,OFFSETS=.OffSetCal.Offsets_Ext_Inf,SIGN=1)={};
    Spline_template_ABS_OFFSETS IC_R2_Int_Sup ( NAME=IC_R2_Int_Inf_pos,NUM_ELEM=20,POINTS=.IC_R2_Int_Sup_pos,OFFSETS=.OffSetCal.Offsets_Int_Inf,SIGN=1)={};
    Spline_template_ABS_OFFSETS IC_R2_Inn_Sup ( NAME=IC_R2_Inn_Inf_pos,NUM_ELEM=20,POINTS=.IC_R2_Inn_Sup_pos,OFFSETS=.OffSetCal.Offsets_Inn_Inf,SIGN=1)={START =0.0;};
#endif

    AnyFloat IntercostalisInternusR1R2_elem_sternum_pos = {0.0813218, 0.3859283, 0.05407529};

    #if CC_ALIGNMENT  == MID | CC_ALIGNMENT == CV
    #if CC_ALIGNMENT == MID
    AnyFloat CC_AlignmentNode = {0.020153613219424101, 0.41356176433088698, 0.099482023921920112};
    #endif
    #if CC_ALIGNMENT == CV
    AnyFloat CC_AlignmentNode = CV_pos;
    #endif
    #else
    // #if CC_ALIGNMENT == TANGENT
    AnyFloat CC_AlignmentNode = {0.06953001, 0.3881878, 0.07308143}; //0.5*(IC_R2_Ext_Inf.Fun(0.8)+IC_R2_Ext_Sup.Fun(0.9));
    #endif

 };

  AnyFolder Left = {
    AnyFloat IliocostalisThoracisC7R7Via2Node_pos = .Right.IliocostalisThoracisC7R7Via2Node_pos * ..MirrorTransform;
    AnyFloat IliocostalisThoracisR1R7Via1Node_pos = .Right.IliocostalisThoracisR1R7Via1Node_pos * ..MirrorTransform;
    AnyFloat IliocostalisThoracisR2R8Node_pos = .Right.IliocostalisThoracisR2R8Node_pos * ..MirrorTransform;
    AnyFloat CT_pos = .Right.CT_pos * ..MirrorTransform;
    AnyFloat CC_pos = .Right.CC_pos * ..MirrorTransform;
    AnyFloat CV_pos = .Right.CV_pos * ..MirrorTransform;
    AnyFloat CS_pos = .Right.CS_pos * ..MirrorTransform;
    AnyFloat CTsup_pos = .Right.CTsup_pos * ..MirrorTransform;
    AnyFloat CTinf_pos = .Right.CTinf_pos * ..MirrorTransform;
    AnyFloat R2R3IC_pos = .Right.R2R3IC_pos * ..MirrorTransform;
    AnyFloat ScalenusPosteriorR2C7NodeIns_pos = .Right.ScalenusPosteriorR2C7NodeIns_pos * ..MirrorTransform;
    AnyFloat ScalenusPosteriorR2C6NodeIns_pos = .Right.ScalenusPosteriorR2C6NodeIns_pos * ..MirrorTransform;
    AnyFloat ScalenusPosteriorR2C5NodeIns_pos = .Right.ScalenusPosteriorR2C5NodeIns_pos * ..MirrorTransform;
    AnyFloat TransversusThoracisR2StNodeOrg_pos = .Right.TransversusThoracisR2StNodeOrg_pos * ..MirrorTransform;
    AnyFloat TransversusThoracisR2R4NodeOrg_pos = .Right.TransversusThoracisR2R4NodeOrg_pos * ..MirrorTransform;
    AnyFloat LevatorCostarumT1R2Ins_pos = .Right.LevatorCostarumT1R2Ins_pos * ..MirrorTransform;
    AnyFloat SubcostalisR2R4Org_pos = .Right.SubcostalisR2R4Org_pos * ..MirrorTransform;
    AnyFloat SubcostalisR2R5Org_pos = .Right.SubcostalisR2R5Org_pos * ..MirrorTransform;
    AnyFloat MidNode_pos = .Right.MidNode_pos * ..MirrorTransform;
    AnyFloat ICSpringSupNode_pos = .Right.ICSpringSupNode_pos * ..MirrorTransform;
    AnyFloat ICSpringInfNode_pos = .Right.ICSpringInfNode_pos * ..MirrorTransform;
    AnyFloat O_SerratusAnterior_pos = .Right.O_SerratusAnterior_pos * ..MirrorTransform;
    AnyFloat O_serratus_posterior_superior_pos = .Right.O_serratus_posterior_superior_pos * ..MirrorTransform;
    AnyMatrix SuperiorCostoTransverse_points = .Right.SuperiorCostoTransverse_points * ..MirrorTransform;
    AnyMatrix LateralCostoTransverse_points = .Right.LateralCostoTransverse_points * ..MirrorTransform;
    AnyMatrix CostoTransverse_points = .Right.CostoTransverse_points * ..MirrorTransform;
    AnyMatrix Radiate_inferior_points = .Right.Radiate_inferior_points * ..MirrorTransform;
    AnyMatrix Radiate_superior_points = .Right.Radiate_superior_points * ..MirrorTransform;

  #if IC_TYPE != OLD
  //  #if IC_TYPE== MULTI_OFFSET
    AnyMatrix  IC_Inf_pos =.Right.IC_Inf_pos* ..MirrorTransform;
    AnyMatrix  IC_Sup_pos =.Right.IC_Sup_pos* ..MirrorTransform;


 AnyFloat Inn_Sup_Start_ABS_pos =.Right.Inn_Sup_Start_ABS_pos* ..MirrorTransform;
AnyFloat Inn_Inf_Start_ABS_pos = .Right.Inn_Inf_Start_ABS_pos* ..MirrorTransform;
AnyFloat Inn_Sup_End_ABS_pos = .Right.Inn_Sup_End_ABS_pos* ..MirrorTransform;
AnyFloat Inn_Inf_End_ABS_pos = .Right.Inn_Inf_End_ABS_pos* ..MirrorTransform;
AnyFloat Ext_Sup_Start_ABS_pos = .Right.Ext_Sup_Start_ABS_pos* ..MirrorTransform;
AnyFloat Ext_Inf_Start_ABS_pos = .Right.Ext_Inf_Start_ABS_pos* ..MirrorTransform;
AnyFloat Ext_Sup_End_ABS_pos = .Right.Ext_Sup_End_ABS_pos* ..MirrorTransform;
AnyFloat Ext_Inf_End_ABS_pos = .Right.Ext_Inf_End_ABS_pos* ..MirrorTransform;
AnyFloat Int_Sup_Start_ABS_pos = .Right.Int_Sup_Start_ABS_pos* ..MirrorTransform;
AnyFloat Int_Inf_Start_ABS_pos = .Right.Int_Inf_Start_ABS_pos* ..MirrorTransform;
AnyFloat Int_Sup_End_ABS_pos = .Right.Int_Sup_End_ABS_pos* ..MirrorTransform;
AnyFloat Int_Inf_End_ABS_pos = .Right.Int_Inf_End_ABS_pos* ..MirrorTransform;


    #endif

 #if IC_TYPE == OLD
     AnyMatrix  IC_R2_Ext_Inf_pos =.Right.IC_R2_Ext_Inf_pos* ..MirrorTransform;
    AnyMatrix  IC_R2_Ext_Sup_pos =.Right.IC_R2_Ext_Sup_pos* ..MirrorTransform;
    AnyMatrix  IC_R2_Int_Inf_pos =.Right.IC_R2_Int_Inf_pos* ..MirrorTransform;
    AnyMatrix  IC_R2_Int_Sup_pos =.Right.IC_R2_Int_Sup_pos* ..MirrorTransform;


    AnyFolder IC_R2_Ext_Inf = {AnyMatrix Points= ..Right.IC_R2_Ext_Inf.Points* ...MirrorTransform;};
    AnyFolder IC_R2_Int_Inf = {AnyMatrix Points= ..Right.IC_R2_Int_Inf.Points* ...MirrorTransform;};
    AnyFolder IC_R2_Inn_Inf = {AnyMatrix Points= ..Right.IC_R2_Inn_Inf.Points* ...MirrorTransform;};
    AnyFolder IC_R2_Ext_Sup = {AnyMatrix Points= ..Right.IC_R2_Ext_Sup.Points* ...MirrorTransform;};
    AnyFolder IC_R2_Int_Sup = {AnyMatrix Points= ..Right.IC_R2_Int_Sup.Points* ...MirrorTransform;};
    AnyFolder IC_R2_Inn_Sup = {AnyMatrix Points= ..Right.IC_R2_Inn_Sup.Points* ...MirrorTransform;};

    AnyFolder IC_R2_Int_Inf0 = {AnyMatrix Points= ..Right.IC_R2_Int_Inf0.Points* ...MirrorTransform;};
    AnyFolder IC_R2_Int_Sup0 = {AnyMatrix Points= ..Right.IC_R2_Int_Sup0.Points* ...MirrorTransform;};

    #endif

    AnyFloat IntercostalisInternusR1R2_elem_sternum_pos = .Right.IntercostalisInternusR1R2_elem_sternum_pos* ..MirrorTransform;

    AnyFloat CC_AlignmentNode =.Right.CC_AlignmentNode* ..MirrorTransform;

  };

};

AnyFolder R3 = {
  AnyFolder Right = {
    AnyFloat IliocostalisThoracisC7R7Via3Node_pos= {-0.036503458, 0.42179043, 0.044};
    AnyFloat IliocostalisThoracisR1R7Via2Node_pos= {-0.037503458, 0.42379043, 0.048};
    AnyFloat IliocostalisThoracisR2R8Via1Node_pos= {-0.040503458, 0.42379043, 0.052};
    AnyFloat IliocostalisThoracisR3R9Node_pos = {-0.042503458, 0.42379043, 0.057};
    AnyFloat IliocostalisCervicisR3C4Node_pos = {-0.032,0.425,0.040};
    AnyFloat IliocostalisCervicisR4C5Via3Node_pos = {-0.033,0.425,0.042};
    AnyFloat IliocostalisCervicisR5C6Via3Node_pos = {-0.034,0.425,0.044};
    AnyFloat IliocostalisCervicisR6C4Via3Node_pos = {-0.035,0.425,0.046};
    AnyFloat CT_pos         = ..T3.Right.CT_pos;
    AnyFloat CC_pos         = { 0.103694640, 0.34876168, 0.05730716};
    AnyFloat CV_pos         = ..T3.Right.CV_pos;
    AnyFloat CS_pos         = { 0.101500000, 0.34879976, 0.01830000};
    AnyFloat CTsup_pos       = ..T3.Right.CTsup_pos;
    AnyFloat CTinf_pos       = ..T3.Right.CTinf_pos;
    AnyFloat R3R4IC_pos = { 0.00019, 0.37049, 0.12732};
    AnyFloat TransversusThoracisR3StNodeOrg_pos              =  {0.10369464  , 0.34876168, 0.05730716};
    AnyFloat TransversusThoracisR3R5NodeOrg_pos             =  {0.10369464  , 0.34876168, 0.05730716};
    AnyFloat LevatorCostarumT2R3Ins_pos               =  {-0.034503458, 0.42579043, 0.04      };
    AnyFloat SubcostalisR1R3Ins_pos                 =  {-0.024503458, 0.42279043, 0.042     };
    AnyFloat SubcostalisR3R5Org_pos                 =  {-0.030503458, 0.41979043, 0.064     };
    AnyFloat SubcostalisR3R6Org_pos                 =  {-0.030503458, 0.41779043, 0.068     };
    AnyFloat MidNode_pos = {0.03559559, 0.3783008, 0.1241529};
    AnyFloat ICSpringSupNode_pos = ..R2.Right.ICSpringInfNode_pos;
    AnyFloat ICSpringInfNode_pos = (MidNode_pos+..R4.Right.MidNode_pos)/2;
    AnyFloat O_SerratusAnterior_pos = {0.04395, 0.37111, 0.11227};
    AnyFloat O_serratus_posterior_superior_pos = {-0.028, 0.405 , 0.095};
    AnyMatrix SuperiorCostoTransverse_points = {
      {-0.01986438, 0.41989467, 0.026244665}, // 0
      {-0.023842698, 0.41952714, 0.026938559}, // 1
      {-0.025641432, 0.42138216, 0.030379009} // 2
    };
    AnyMatrix LateralCostoTransverse_points = {
      {-0.029545452, 0.41984692, 0.033658978}, // 1
      {-0.024838278, 0.41752678, 0.025499897} // 0
    };
    AnyMatrix CostoTransverse_points = {
      {-0.024427194, 0.41574371, 0.024427595}, // 1
      {-0.019641029, 0.41481873, 0.023526469} // 0
    };
    AnyMatrix Radiate_inferior_points = {
      {-0.024861353, 0.41314498, 0.025019549}, // 0
      {-0.020851536, 0.41234145, 0.025249466}, // 1
      {-0.019044751, 0.41377503, 0.024444327}, // 2
      {-0.017045591, 0.41493458, 0.025100527} // 3
    };
    AnyMatrix Radiate_superior_points = {
      {-0.018370727, 0.41509351, 0.024198942}, // 4
      {-0.018538373, 0.41690749, 0.024367539}, // 5
      {-0.019601654, 0.41777372, 0.024516283}, // 6
      {-0.021611381, 0.41699627, 0.024342347} // 0
    };


  #if IC_TYPE != OLD
  //  #if IC_TYPE== MULTI_OFFSET
        AnyMatrix  IC_Inf_pos ={
    {-0.02182967, 0.4123349, 0.02308999},
      {-0.037034649, 0.41832584, 0.057544731}, // 1
      {-0.030810276, 0.40311709, 0.098004624}, // 2
      {0.001079083, 0.38427711, 0.1221536}, // 3
      {0.034964878, 0.37215155, 0.12811416}, // 4
      {0.059461433, 0.36369967, 0.11884688}, // 8
      {0.078827739, 0.35814971, 0.1032183}, // 9
      {0.1104861, 0.3416186, 0.05210107}

      };


    AnyMatrix  IC_Sup_pos ={
     {-0.0187666, 0.4187286, 0.02413783},
          {-0.033473518, 0.42547563, 0.059466813}, // 1
      {-0.03046561, 0.41850704, 0.080411881}, // 2
      {-0.016685026, 0.40654439, 0.10207234}, // 3
      {0.0059138974, 0.39377439, 0.11716323}, // 4
      {0.026054693, 0.38651538, 0.12258696}, // 5
      {0.067609385, 0.37628782, 0.1087395}, // 6
      {0.1096871, 0.3533866, 0.05342887}
    };


AnyFloat Inn_Sup_Start_ABS_pos = {-0.030709688074181084, 0.4209315486647765, 0.071131795670044559};
AnyFloat Inn_Inf_Start_ABS_pos = {-0.031530767994501718, 0.4093121716265245, 0.078822898037735331};
AnyFloat Inn_Sup_End_ABS_pos = {0.10968709999987376, 0.35338660000006872, 0.053428870000165947};
AnyFloat Inn_Inf_End_ABS_pos = {0.11048609999990502, 0.34161860000004957, 0.052101070000153363};
AnyFloat Ext_Sup_Start_ABS_pos = {-0.018766600000044129, 0.41872860000002027, 0.024137830000105987};
AnyFloat Ext_Inf_Start_ABS_pos = {-0.021829670000045626, 0.41233490000001805, 0.023089990000103366};
AnyFloat Ext_Sup_End_ABS_pos = {0.10968709999987376, 0.35338660000006872, 0.053428870000165947};
AnyFloat Ext_Inf_End_ABS_pos = {0.11048609999990502, 0.34161860000004957, 0.052101070000153363};
AnyFloat Int_Sup_Start_ABS_pos = {-0.028411990794121919, 0.41765452806964465, 0.080178224566586173};
AnyFloat Int_Inf_Start_ABS_pos = {-0.031530767994501718, 0.4093121716265245, 0.078822898037735331};
AnyFloat Int_Sup_End_ABS_pos = {0.10968709999987376, 0.35338660000006872, 0.053428870000165947};
AnyFloat Int_Inf_End_ABS_pos = {0.11048609999990502, 0.34161860000004957, 0.052101070000153363};


#endif

     #if IC_TYPE == OLD
    AnyMatrix  IC_R3_Ext_Inf_pos ={
      {-0.023570428, 0.4128235, 0.027908294}, // 0
      {-0.037034649, 0.41832584, 0.057544731}, // 1
      {-0.030810276, 0.40311709, 0.098004624}, // 2
      {0.001079083, 0.38427711, 0.1221536}, // 3
      {0.034964878, 0.37215155, 0.12811416}, // 4
      {0.059461433, 0.36369967, 0.11884688}, // 8
      {0.078827739, 0.35814971, 0.1032183}, // 9
      {0.10249, 0.34569421, 0.064663537} // 10
      };
    AnyMatrix  IC_R3_Ext_Sup_pos ={
      {-0.020444594, 0.41941631, 0.028592704}, // 0
      {-0.033473518, 0.42547563, 0.059466813}, // 1
      {-0.03046561, 0.41850704, 0.080411881}, // 2
      {-0.016685026, 0.40654439, 0.10207234}, // 3
      {0.0059138974, 0.39377439, 0.11716323}, // 4
      {0.026054693, 0.38651538, 0.12258696}, // 5
      {0.067609385, 0.37628782, 0.1087395}, // 6
      {0.10115146, 0.3578842, 0.064158492} // 7
    };


    AnyMatrix  IC_R3_Int_Inf_pos = IC_R3_Ext_Inf_pos;
    AnyMatrix  IC_R3_Int_Sup_pos = IC_R3_Ext_Sup_pos;
    AnyMatrix  IC_R3_Inn_Inf_pos = IC_R3_Ext_Inf_pos;
    AnyMatrix  IC_R3_Inn_Sup_pos = IC_R3_Ext_Sup_pos;


    Spline_template IC_R3_Int_Inf0 ( NAME=IC_R3_Int_Inf_pos,NUM_ELEM=20,POINTS=.IC_R3_Int_Inf_pos,START =0,END =0)={};
    Spline_template IC_R3_Int_Sup0 ( NAME=IC_R3_Int_Inf_pos,NUM_ELEM=20,POINTS=.IC_R3_Int_Sup_pos,START =0,END =0)={};

    AnyFolder &Sup_spline = ..R2.Right.IC_R2_Int_Inf0;
    AnyFolder &Inf_spline = IC_R3_Int_Sup0;

    AnyFloat Desired_Ext_angle =40;
    AnyFloat Desired_Int_angle =-45;//-25;
    AnyFloat Desired_Inn_angle =0;


    #include "../AngleCorrection.any"

    Spline_template_ABS_OFFSETS IC_R3_Ext_Inf ( NAME=IC_R3_Ext_Inf_pos,NUM_ELEM=20,POINTS=.IC_R3_Ext_Inf_pos,OFFSETS=...R4.Right.OffSetCal.Offsets_Ext_Sup,SIGN=-1)={};
    Spline_template_ABS_OFFSETS IC_R3_Int_Inf ( NAME=IC_R3_Int_Inf_pos,NUM_ELEM=20,POINTS=.IC_R3_Int_Inf_pos,OFFSETS=...R4.Right.OffSetCal.Offsets_Int_Sup,SIGN=-1)={};
    Spline_template_ABS_OFFSETS IC_R3_Inn_Inf ( NAME=IC_R3_Inn_Inf_pos,NUM_ELEM=20,POINTS=.IC_R3_Inn_Inf_pos,OFFSETS=...R4.Right.OffSetCal.Offsets_Inn_Sup,SIGN=-1)={START=0.0;};

    Spline_template_ABS_OFFSETS IC_R3_Ext_Sup ( NAME=IC_R3_Ext_Inf_pos,NUM_ELEM=20,POINTS=.IC_R3_Ext_Sup_pos,OFFSETS=.OffSetCal.Offsets_Ext_Inf,SIGN=1)={};
    Spline_template_ABS_OFFSETS IC_R3_Int_Sup ( NAME=IC_R3_Int_Inf_pos,NUM_ELEM=20,POINTS=.IC_R3_Int_Sup_pos,OFFSETS=.OffSetCal.Offsets_Int_Inf,SIGN=1)={};
    Spline_template_ABS_OFFSETS IC_R3_Inn_Sup ( NAME=IC_R3_Inn_Inf_pos,NUM_ELEM=20,POINTS=.IC_R3_Inn_Sup_pos,OFFSETS=.OffSetCal.Offsets_Inn_Inf,SIGN=1)={START=0.0;};
#endif

    AnyFloat IntercostalisInternusR2R3_elem_sternum_pos = {0.1003218, 0.3559283, 0.05607529};

    #if CC_ALIGNMENT  == MID | CC_ALIGNMENT == CV
    #if CC_ALIGNMENT == MID
   AnyFloat CC_AlignmentNode = {0.014495580156575077, 0.38536013666558488, 0.12116595343512285};
    #endif
    #if CC_ALIGNMENT == CV
    AnyFloat CC_AlignmentNode = CV_pos;
    #endif
    #else
    // #if CC_ALIGNMENT == TANGENT
    AnyFloat CC_AlignmentNode = {0.08053445, 0.3621453, 0.09331822}; //0.5*(IC_R3_Ext_Inf.Fun(0.8)+IC_R3_Ext_Sup.Fun(0.9));
    #endif

  };

  AnyFolder Left = {
    AnyFloat IliocostalisThoracisC7R7Via3Node_pos = .Right.IliocostalisThoracisC7R7Via3Node_pos * ..MirrorTransform;
    AnyFloat IliocostalisThoracisR1R7Via2Node_pos = .Right.IliocostalisThoracisR1R7Via2Node_pos * ..MirrorTransform;
    AnyFloat IliocostalisThoracisR2R8Via1Node_pos = .Right.IliocostalisThoracisR2R8Via1Node_pos * ..MirrorTransform;
    AnyFloat IliocostalisThoracisR3R9Node_pos = .Right.IliocostalisThoracisR3R9Node_pos * ..MirrorTransform;
    AnyFloat IliocostalisCervicisR3C4Node_pos = .Right.IliocostalisCervicisR3C4Node_pos * ..MirrorTransform;
    AnyFloat IliocostalisCervicisR4C5Via3Node_pos = .Right.IliocostalisCervicisR4C5Via3Node_pos * ..MirrorTransform;
    AnyFloat IliocostalisCervicisR5C6Via3Node_pos = .Right.IliocostalisCervicisR5C6Via3Node_pos * ..MirrorTransform;
    AnyFloat IliocostalisCervicisR6C4Via3Node_pos = .Right.IliocostalisCervicisR6C4Via3Node_pos * ..MirrorTransform;
    AnyFloat CT_pos = .Right.CT_pos * ..MirrorTransform;
    AnyFloat CC_pos = .Right.CC_pos * ..MirrorTransform;
    AnyFloat CV_pos = .Right.CV_pos * ..MirrorTransform;
    AnyFloat CS_pos = .Right.CS_pos * ..MirrorTransform;
    AnyFloat CTsup_pos = .Right.CTsup_pos * ..MirrorTransform;
    AnyFloat CTinf_pos = .Right.CTinf_pos * ..MirrorTransform;
    AnyFloat R3R4IC_pos = .Right.R3R4IC_pos * ..MirrorTransform;
    AnyFloat TransversusThoracisR3StNodeOrg_pos = .Right.TransversusThoracisR3StNodeOrg_pos * ..MirrorTransform;
    AnyFloat TransversusThoracisR3R5NodeOrg_pos = .Right.TransversusThoracisR3R5NodeOrg_pos * ..MirrorTransform;
    AnyFloat LevatorCostarumT2R3Ins_pos = .Right.LevatorCostarumT2R3Ins_pos * ..MirrorTransform;
    AnyFloat SubcostalisR1R3Ins_pos = .Right.SubcostalisR1R3Ins_pos * ..MirrorTransform;
    AnyFloat SubcostalisR3R5Org_pos = .Right.SubcostalisR3R5Org_pos * ..MirrorTransform;
    AnyFloat SubcostalisR3R6Org_pos = .Right.SubcostalisR3R6Org_pos * ..MirrorTransform;
    AnyFloat MidNode_pos = .Right.MidNode_pos * ..MirrorTransform;
    AnyFloat ICSpringSupNode_pos = .Right.ICSpringSupNode_pos * ..MirrorTransform;
    AnyFloat ICSpringInfNode_pos = .Right.ICSpringInfNode_pos * ..MirrorTransform;
    AnyFloat O_SerratusAnterior_pos = .Right.O_SerratusAnterior_pos * ..MirrorTransform;
    AnyFloat O_serratus_posterior_superior_pos = .Right.O_serratus_posterior_superior_pos * ..MirrorTransform;
    AnyMatrix SuperiorCostoTransverse_points = .Right.SuperiorCostoTransverse_points * ..MirrorTransform;
    AnyMatrix Radiate_inferior_points = .Right.Radiate_inferior_points * ..MirrorTransform;
    AnyMatrix Radiate_superior_points = .Right.Radiate_superior_points * ..MirrorTransform;
    AnyMatrix LateralCostoTransverse_points = .Right.LateralCostoTransverse_points * ..MirrorTransform;
    AnyMatrix CostoTransverse_points = .Right.CostoTransverse_points * ..MirrorTransform;

  #if IC_TYPE != OLD
  //  #if IC_TYPE== MULTI_OFFSET
    AnyMatrix  IC_Inf_pos =.Right.IC_Inf_pos* ..MirrorTransform;
    AnyMatrix  IC_Sup_pos =.Right.IC_Sup_pos* ..MirrorTransform;


 AnyFloat Inn_Sup_Start_ABS_pos =.Right.Inn_Sup_Start_ABS_pos* ..MirrorTransform;
AnyFloat Inn_Inf_Start_ABS_pos = .Right.Inn_Inf_Start_ABS_pos* ..MirrorTransform;
AnyFloat Inn_Sup_End_ABS_pos = .Right.Inn_Sup_End_ABS_pos* ..MirrorTransform;
AnyFloat Inn_Inf_End_ABS_pos = .Right.Inn_Inf_End_ABS_pos* ..MirrorTransform;
AnyFloat Ext_Sup_Start_ABS_pos = .Right.Ext_Sup_Start_ABS_pos* ..MirrorTransform;
AnyFloat Ext_Inf_Start_ABS_pos = .Right.Ext_Inf_Start_ABS_pos* ..MirrorTransform;
AnyFloat Ext_Sup_End_ABS_pos = .Right.Ext_Sup_End_ABS_pos* ..MirrorTransform;
AnyFloat Ext_Inf_End_ABS_pos = .Right.Ext_Inf_End_ABS_pos* ..MirrorTransform;
AnyFloat Int_Sup_Start_ABS_pos = .Right.Int_Sup_Start_ABS_pos* ..MirrorTransform;
AnyFloat Int_Inf_Start_ABS_pos = .Right.Int_Inf_Start_ABS_pos* ..MirrorTransform;
AnyFloat Int_Sup_End_ABS_pos = .Right.Int_Sup_End_ABS_pos* ..MirrorTransform;
AnyFloat Int_Inf_End_ABS_pos = .Right.Int_Inf_End_ABS_pos* ..MirrorTransform;


#endif
 #if IC_TYPE == OLD
      AnyMatrix  IC_R3_Ext_Inf_pos =.Right.IC_R3_Ext_Inf_pos* ..MirrorTransform;
    AnyMatrix  IC_R3_Ext_Sup_pos =.Right.IC_R3_Ext_Sup_pos* ..MirrorTransform;
    AnyMatrix  IC_R3_Int_Inf_pos =.Right.IC_R3_Int_Inf_pos* ..MirrorTransform;
    AnyMatrix  IC_R3_Int_Sup_pos =.Right.IC_R3_Int_Sup_pos* ..MirrorTransform;


    AnyFolder IC_R3_Ext_Inf = {AnyMatrix Points= ..Right.IC_R3_Ext_Inf.Points* ...MirrorTransform;};
    AnyFolder IC_R3_Int_Inf = {AnyMatrix Points= ..Right.IC_R3_Int_Inf.Points* ...MirrorTransform;};
    AnyFolder IC_R3_Inn_Inf = {AnyMatrix Points= ..Right.IC_R3_Inn_Inf.Points* ...MirrorTransform;};
    AnyFolder IC_R3_Ext_Sup = {AnyMatrix Points= ..Right.IC_R3_Ext_Sup.Points* ...MirrorTransform;};
    AnyFolder IC_R3_Int_Sup = {AnyMatrix Points= ..Right.IC_R3_Int_Sup.Points* ...MirrorTransform;};
    AnyFolder IC_R3_Inn_Sup = {AnyMatrix Points= ..Right.IC_R3_Inn_Sup.Points* ...MirrorTransform;};

     AnyFolder IC_R3_Int_Inf0 = {AnyMatrix Points= ..Right.IC_R3_Int_Inf0.Points* ...MirrorTransform;};
    AnyFolder IC_R3_Int_Sup0 = {AnyMatrix Points= ..Right.IC_R3_Int_Sup0.Points* ...MirrorTransform;};


    #endif
    AnyFloat IntercostalisInternusR2R3_elem_sternum_pos = .Right.IntercostalisInternusR2R3_elem_sternum_pos* ..MirrorTransform;
    AnyFloat CC_AlignmentNode =.Right.CC_AlignmentNode* ..MirrorTransform;


  };
};

AnyFolder R4 = {
  AnyFolder Right = {
    AnyFloat IliocostalisThoracisC7R7Via4Node_pos  = {-0.043717071, 0.39464987, 0.044100000};
    AnyFloat IliocostalisThoracisR1R7Via3Node_pos  = {-0.044717071, 0.39464987, 0.048100000};
    AnyFloat IliocostalisThoracisR2R8Via2Node_pos  = {-0.047717071, 0.39614987, 0.051100000};
    AnyFloat IliocostalisThoracisR3R9Via1Node_pos  = {-0.049717071, 0.39514987, 0.055100000};
    AnyFloat IliocostalisThoracisR4R10Node_pos = {-0.050717071, 0.39364987, 0.058100000};
    AnyFloat IliocostalisCervicisR4C5Node_pos    = {-0.041, 0.398, 0.041};
    AnyFloat IliocostalisCervicisR5C6Via4Node_pos= {-0.042, 0.400, 0.043};
    AnyFloat IliocostalisCervicisR6C4Via4Node_pos= {-0.043, 0.400, 0.045};
    AnyFloat CT_pos         = ..T4.Right.CT_pos;
    AnyFloat CC_pos         = { 0.115409530, 0.32065415, 0.07320982};
    AnyFloat CV_pos         = ..T4.Right.CV_pos;
    AnyFloat CS_pos         = { 0.114500000, 0.31849976, 0.01900000};
    AnyFloat CTsup_pos       = ..T4.Right.CTsup_pos;
    AnyFloat CTinf_pos       = ..T4.Right.CTinf_pos;
    AnyFloat R4R5IC_pos = {-0.00062, 0.34343, 0.13403};
    AnyFloat TransversusThoracisR4StNodeOrg_pos              =  { 0.115409530, 0.32065415, 0.073209820};
    AnyFloat TransversusThoracisR4R6NodeOrg_pos             =  { 0.115409530, 0.32065415, 0.073209820};
    AnyFloat TransversusThoracisR2R4NodeIns_pos             =  { 0.109931830, 0.31825951, 0.022388114};
    AnyFloat LevatorCostarumT3R4Ins_pos               =  {-0.042717071, 0.39964987, 0.043100000};
    AnyFloat SubcostalisR1R4Ins_pos                 =  {-0.032717071, 0.39764987, 0.040100000};
    AnyFloat SubcostalisR2R4Ins_pos                 =  {-0.032717071, 0.39764987, 0.045100000};
    AnyFloat SubcostalisR4R6Org_pos                 =  {-0.045717071, 0.39064987, 0.061100000};
    AnyFloat SubcostalisR4R7Org_pos                 =  {-0.045717071, 0.38864987, 0.067100000};
    AnyFloat MidNode_pos = {0.03784623, 0.3472389, 0.1376857};
    AnyFloat ICSpringSupNode_pos = ..R3.Right.ICSpringInfNode_pos;
    AnyFloat ICSpringInfNode_pos = (MidNode_pos+..R5.Right.MidNode_pos)/2;
    AnyFloat O_SerratusAnterior_pos = {0.08394, 0.32619, 0.1048};
    AnyFloat O_serratus_posterior_superior_pos = {-0.045, 0.38 , 0.1};
    AnyMatrix SuperiorCostoTransverse_points = {
      {-0.028091278, 0.39467096, 0.027464954}, // 0
      {-0.031394251, 0.39581108, 0.029047087}, // 1
      {-0.033277594, 0.39663392, 0.032036733} // 2
    };
    AnyMatrix LateralCostoTransverse_points = {
      {-0.036944523, 0.39286897, 0.033018827}, // 1
      {-0.032663777, 0.39149144, 0.026154798} // 0
    };
    AnyMatrix CostoTransverse_points = {
      {-0.030402506, 0.39019313, 0.024485718}, // 1
      {-0.026426146, 0.38925669, 0.0245493} // 0
    };
    AnyMatrix Radiate_inferior_points = {
      {-0.03024259, 0.38586485, 0.025954116}, // 0
      {-0.028872572, 0.3867268, 0.0247344}, // 1
      {-0.026896816, 0.3880583, 0.024776887}, // 2
      {-0.025804402, 0.38986593, 0.026286671} // 3
    };
    AnyMatrix Radiate_superior_points = {
      {-0.025996627, 0.39020583, 0.025139976}, // 4
      {-0.026734808, 0.39271262, 0.025983285}, // 5
      {-0.02932753, 0.39347443, 0.02581301} // 6
    };


  #if IC_TYPE != OLD
  //  #if IC_TYPE== MULTI_OFFSET

     AnyMatrix  IC_Inf_pos ={
       {-0.02834696, 0.3863663, 0.02397153},
//      {-0.030626515, 0.38653669, 0.029119501}, // 0
      {-0.048842795, 0.38910306, 0.064804241}, // 1
      {-0.043197993, 0.37891242, 0.095794223}, // 2
      {-0.012850747, 0.35910887, 0.12545809}, // 3
      {0.021164261, 0.34600011, 0.13678311}, // 4
      {0.057819441, 0.33597353, 0.13681777}, // 5
      {0.086573161, 0.33033824, 0.12378481}, // 6
//      {0.11411961, 0.31528556, 0.080701791} // 7
      {0.1217232, 0.3113518, 0.06952127}
    };
    AnyMatrix  IC_Sup_pos ={
    {-0.02841282, 0.3957904, 0.02573589},
      // {-0.030439621, 0.39578053, 0.030819383}, // 0
      {-0.030027987, 0.39546958, 0.030601138}, // 1
      {-0.047614742, 0.39763018, 0.066148095}, // 2
      {-0.038083304, 0.38433284, 0.099429138}, // 3
      //{-0.011887622, 0.36987188, 0.1232352}, // 4
      {0.016238464, 0.35928881, 0.1336346}, // 5
      {0.054597002, 0.35057384, 0.13403317}, // 6
      {0.087341867, 0.34310144, 0.11764469}, // 7
      {0.1211457, 0.3228652, 0.06337274}
      //      {0.11252534, 0.32777411, 0.076454796} // 8
    };


AnyFloat Inn_Sup_Start_ABS_pos = {-0.04139828125656058, 0.39067859932911725, 0.081564282199775573};
AnyFloat Inn_Inf_Start_ABS_pos = {-0.043951856904749613, 0.38325031077783472, 0.079382747603542997};
AnyFloat Inn_Sup_End_ABS_pos = {0.12114569999989858, 0.32286520000006075, 0.063372740000162825};
AnyFloat Inn_Inf_End_ABS_pos = {0.12172319999989453, 0.31135180000005697, 0.069521270000162796};
AnyFloat Ext_Sup_Start_ABS_pos = {-0.028412820000004838, 0.39579039999999904, 0.0257358900000146};
AnyFloat Ext_Inf_Start_ABS_pos = {-0.02834696000006148, 0.38636630000000821, 0.023971530000122501};
AnyFloat Ext_Sup_End_ABS_pos = {0.12114569999989858, 0.32286520000006075, 0.063372740000162825};
AnyFloat Ext_Inf_End_ABS_pos = {0.12172319999989453, 0.31135180000005697, 0.069521270000162796};
AnyFloat Int_Sup_Start_ABS_pos = {-0.04139828125656058, 0.39067859932911725, 0.081564282199775573};
AnyFloat Int_Inf_Start_ABS_pos = {-0.043951856904749613, 0.38325031077783472, 0.079382747603542997};
AnyFloat Int_Sup_End_ABS_pos = {0.12114569999989858, 0.32286520000006075, 0.063372740000162825};
AnyFloat Int_Inf_End_ABS_pos = {0.12172319999989453, 0.31135180000005697, 0.069521270000162796};


    #endif
     #if IC_TYPE == OLD
     AnyMatrix  IC_R4_Ext_Inf_pos ={
      {-0.030626515, 0.38653669, 0.029119501}, // 0
      {-0.048842795, 0.38910306, 0.064804241}, // 1
      {-0.043197993, 0.37891242, 0.095794223}, // 2
      {-0.012850747, 0.35910887, 0.12545809}, // 3
      {0.021164261, 0.34600011, 0.13678311}, // 4
      {0.057819441, 0.33597353, 0.13681777}, // 5
      {0.086573161, 0.33033824, 0.12378481}, // 6
      {0.11411961, 0.31528556, 0.080701791} // 7
    };
    AnyMatrix  IC_R4_Ext_Sup_pos ={
      {-0.030439621, 0.39578053, 0.030819383}, // 0
      {-0.030027987, 0.39546958, 0.030601138}, // 1
      {-0.047614742, 0.39763018, 0.066148095}, // 2
      {-0.038083304, 0.38433284, 0.099429138}, // 3
      //{-0.011887622, 0.36987188, 0.1232352}, // 4
      {0.016238464, 0.35928881, 0.1336346}, // 5
      {0.054597002, 0.35057384, 0.13403317}, // 6
      {0.087341867, 0.34310144, 0.11764469}, // 7
      {0.11252534, 0.32777411, 0.076454796} // 8
    };


    AnyMatrix  IC_R4_Int_Inf_pos = IC_R4_Ext_Inf_pos;
    AnyMatrix  IC_R4_Int_Sup_pos = IC_R4_Ext_Sup_pos;
    AnyMatrix  IC_R4_Inn_Inf_pos = IC_R4_Ext_Inf_pos;
    AnyMatrix  IC_R4_Inn_Sup_pos = IC_R4_Ext_Sup_pos;


    Spline_template IC_R4_Int_Inf0 ( NAME=IC_R4_Int_Inf_pos,NUM_ELEM=20,POINTS=.IC_R4_Int_Inf_pos,START =0,END =0)={};
    Spline_template IC_R4_Int_Sup0 ( NAME=IC_R4_Int_Inf_pos,NUM_ELEM=20,POINTS=.IC_R4_Int_Sup_pos,START =0,END =0)={};

    AnyFolder &Sup_spline = ..R3.Right.IC_R3_Int_Inf0;
    AnyFolder &Inf_spline = IC_R4_Int_Sup0;

    AnyFloat Desired_Ext_angle =40;
    AnyFloat Desired_Int_angle =-40;
       AnyFloat Desired_Inn_angle =0;


    #include "../AngleCorrection.any"

    Spline_template_ABS_OFFSETS IC_R4_Ext_Inf ( NAME=IC_R4_Ext_Inf_pos,NUM_ELEM=20,POINTS=.IC_R4_Ext_Inf_pos,OFFSETS=...R5.Right.OffSetCal.Offsets_Ext_Sup,SIGN=-1)={};
    Spline_template_ABS_OFFSETS IC_R4_Int_Inf ( NAME=IC_R4_Int_Inf_pos,NUM_ELEM=20,POINTS=.IC_R4_Int_Inf_pos,OFFSETS=...R5.Right.OffSetCal.Offsets_Int_Sup,SIGN=-1)={};
    Spline_template_ABS_OFFSETS IC_R4_Inn_Inf ( NAME=IC_R4_Inn_Inf_pos,NUM_ELEM=20,POINTS=.IC_R4_Inn_Inf_pos,OFFSETS=...R5.Right.OffSetCal.Offsets_Inn_Sup,SIGN=-1)={START=0.0;};

    Spline_template_ABS_OFFSETS IC_R4_Ext_Sup ( NAME=IC_R4_Ext_Inf_pos,NUM_ELEM=20,POINTS=.IC_R4_Ext_Sup_pos,OFFSETS=.OffSetCal.Offsets_Ext_Inf,SIGN=1)={};
    Spline_template_ABS_OFFSETS IC_R4_Int_Sup ( NAME=IC_R4_Int_Inf_pos,NUM_ELEM=20,POINTS=.IC_R4_Int_Sup_pos,OFFSETS=.OffSetCal.Offsets_Int_Inf,SIGN=1)={};
    Spline_template_ABS_OFFSETS IC_R4_Inn_Sup ( NAME=IC_R4_Inn_Inf_pos,NUM_ELEM=20,POINTS=.IC_R4_Inn_Sup_pos,OFFSETS=.OffSetCal.Offsets_Inn_Inf,SIGN=1)={START=0.0;};
#endif
    AnyFloat IntercostalisInternusR3R4_elem_sternum_pos = {0.11233218, 0.3259283, 0.07507529};

    #if CC_ALIGNMENT  == MID | CC_ALIGNMENT == CV
    #if CC_ALIGNMENT == MID
    AnyFloat CC_AlignmentNode =  {0.012190006368401101, 0.3561443595703363, 0.13032257293900845};
    #endif
    #if CC_ALIGNMENT == CV
    AnyFloat CC_AlignmentNode = CV_pos;
    #endif
    #else
    // #if CC_ALIGNMENT == TANGENT
    AnyFloat CC_AlignmentNode = {0.08967386, 0.3330264, 0.1099282}; //0.5*(IC_R4_Ext_Inf.Fun(0.8)+IC_R4_Ext_Sup.Fun(0.9));
    #endif

  };

  AnyFolder Left = {
    AnyFloat IliocostalisThoracisC7R7Via4Node_pos = .Right.IliocostalisThoracisC7R7Via4Node_pos * ..MirrorTransform;
    AnyFloat IliocostalisThoracisR1R7Via3Node_pos = .Right.IliocostalisThoracisR1R7Via3Node_pos * ..MirrorTransform;
    AnyFloat IliocostalisThoracisR2R8Via2Node_pos = .Right.IliocostalisThoracisR2R8Via2Node_pos * ..MirrorTransform;
    AnyFloat IliocostalisThoracisR3R9Via1Node_pos = .Right.IliocostalisThoracisR3R9Via1Node_pos * ..MirrorTransform;
    AnyFloat IliocostalisThoracisR4R10Node_pos = .Right.IliocostalisThoracisR4R10Node_pos * ..MirrorTransform;
    AnyFloat IliocostalisCervicisR4C5Node_pos   = .Right.IliocostalisCervicisR4C5Node_pos * ..MirrorTransform;
    AnyFloat IliocostalisCervicisR5C6Via4Node_pos= .Right.IliocostalisCervicisR5C6Via4Node_pos * ..MirrorTransform;
    AnyFloat IliocostalisCervicisR6C4Via4Node_pos= .Right.IliocostalisCervicisR6C4Via4Node_pos * ..MirrorTransform;
    AnyFloat CT_pos = .Right.CT_pos * ..MirrorTransform;
    AnyFloat CC_pos = .Right.CC_pos * ..MirrorTransform;
    AnyFloat CV_pos = .Right.CV_pos * ..MirrorTransform;
    AnyFloat CS_pos = .Right.CS_pos * ..MirrorTransform;
    AnyFloat CTsup_pos = .Right.CTsup_pos * ..MirrorTransform;
    AnyFloat CTinf_pos = .Right.CTinf_pos * ..MirrorTransform;
    AnyFloat R4R5IC_pos = .Right.R4R5IC_pos * ..MirrorTransform;
    AnyFloat TransversusThoracisR4StNodeOrg_pos = .Right.TransversusThoracisR4StNodeOrg_pos * ..MirrorTransform;
    AnyFloat TransversusThoracisR4R6NodeOrg_pos = .Right.TransversusThoracisR4R6NodeOrg_pos * ..MirrorTransform;
    AnyFloat TransversusThoracisR2R4NodeIns_pos = .Right.TransversusThoracisR2R4NodeIns_pos * ..MirrorTransform;
    AnyFloat LevatorCostarumT3R4Ins_pos = .Right.LevatorCostarumT3R4Ins_pos * ..MirrorTransform;
    AnyFloat SubcostalisR1R4Ins_pos = .Right.SubcostalisR1R4Ins_pos * ..MirrorTransform;
    AnyFloat SubcostalisR2R4Ins_pos = .Right.SubcostalisR2R4Ins_pos * ..MirrorTransform;
    AnyFloat SubcostalisR4R6Org_pos = .Right.SubcostalisR4R6Org_pos * ..MirrorTransform;
    AnyFloat SubcostalisR4R7Org_pos = .Right.SubcostalisR4R7Org_pos * ..MirrorTransform;
    AnyFloat MidNode_pos = .Right.MidNode_pos * ..MirrorTransform;
    AnyFloat ICSpringSupNode_pos = .Right.ICSpringSupNode_pos * ..MirrorTransform;
    AnyFloat ICSpringInfNode_pos = .Right.ICSpringInfNode_pos * ..MirrorTransform;
    AnyFloat O_SerratusAnterior_pos = .Right.O_SerratusAnterior_pos * ..MirrorTransform;
    AnyFloat O_serratus_posterior_superior_pos = .Right.O_serratus_posterior_superior_pos * ..MirrorTransform;
    AnyMatrix SuperiorCostoTransverse_points = .Right.SuperiorCostoTransverse_points * ..MirrorTransform;
    AnyMatrix Radiate_inferior_points = .Right.Radiate_inferior_points * ..MirrorTransform;
    AnyMatrix Radiate_superior_points = .Right.Radiate_superior_points * ..MirrorTransform;
    AnyMatrix LateralCostoTransverse_points = .Right.LateralCostoTransverse_points * ..MirrorTransform;
    AnyMatrix CostoTransverse_points = .Right.CostoTransverse_points * ..MirrorTransform;

  #if IC_TYPE != OLD
  //  #if IC_TYPE== MULTI_OFFSET
    AnyMatrix  IC_Inf_pos =.Right.IC_Inf_pos* ..MirrorTransform;
    AnyMatrix  IC_Sup_pos =.Right.IC_Sup_pos* ..MirrorTransform;


       AnyFloat Inn_Sup_Start_ABS_pos =.Right.Inn_Sup_Start_ABS_pos* ..MirrorTransform;
AnyFloat Inn_Inf_Start_ABS_pos = .Right.Inn_Inf_Start_ABS_pos* ..MirrorTransform;
AnyFloat Inn_Sup_End_ABS_pos = .Right.Inn_Sup_End_ABS_pos* ..MirrorTransform;
AnyFloat Inn_Inf_End_ABS_pos = .Right.Inn_Inf_End_ABS_pos* ..MirrorTransform;
AnyFloat Ext_Sup_Start_ABS_pos = .Right.Ext_Sup_Start_ABS_pos* ..MirrorTransform;
AnyFloat Ext_Inf_Start_ABS_pos = .Right.Ext_Inf_Start_ABS_pos* ..MirrorTransform;
AnyFloat Ext_Sup_End_ABS_pos = .Right.Ext_Sup_End_ABS_pos* ..MirrorTransform;
AnyFloat Ext_Inf_End_ABS_pos = .Right.Ext_Inf_End_ABS_pos* ..MirrorTransform;
AnyFloat Int_Sup_Start_ABS_pos = .Right.Int_Sup_Start_ABS_pos* ..MirrorTransform;
AnyFloat Int_Inf_Start_ABS_pos = .Right.Int_Inf_Start_ABS_pos* ..MirrorTransform;
AnyFloat Int_Sup_End_ABS_pos = .Right.Int_Sup_End_ABS_pos* ..MirrorTransform;
AnyFloat Int_Inf_End_ABS_pos = .Right.Int_Inf_End_ABS_pos* ..MirrorTransform;


 #endif
     #if IC_TYPE == OLD
    AnyMatrix  IC_R4_Ext_Inf_pos =.Right.IC_R4_Ext_Inf_pos* ..MirrorTransform;
    AnyMatrix  IC_R4_Ext_Sup_pos =.Right.IC_R4_Ext_Sup_pos* ..MirrorTransform;
    AnyMatrix  IC_R4_Int_Inf_pos =.Right.IC_R4_Int_Inf_pos* ..MirrorTransform;
    AnyMatrix  IC_R4_Int_Sup_pos =.Right.IC_R4_Int_Sup_pos* ..MirrorTransform;


    AnyFolder IC_R4_Ext_Inf = {AnyMatrix Points= ..Right.IC_R4_Ext_Inf.Points* ...MirrorTransform;};
    AnyFolder IC_R4_Int_Inf = {AnyMatrix Points= ..Right.IC_R4_Int_Inf.Points* ...MirrorTransform;};
    AnyFolder IC_R4_Inn_Inf = {AnyMatrix Points= ..Right.IC_R4_Inn_Inf.Points* ...MirrorTransform;};
    AnyFolder IC_R4_Ext_Sup = {AnyMatrix Points= ..Right.IC_R4_Ext_Sup.Points* ...MirrorTransform;};
    AnyFolder IC_R4_Int_Sup = {AnyMatrix Points= ..Right.IC_R4_Int_Sup.Points* ...MirrorTransform;};
    AnyFolder IC_R4_Inn_Sup = {AnyMatrix Points= ..Right.IC_R4_Inn_Sup.Points* ...MirrorTransform;};

    AnyFolder IC_R4_Int_Inf0 = {AnyMatrix Points= ..Right.IC_R4_Int_Inf0.Points* ...MirrorTransform;};
    AnyFolder IC_R4_Int_Sup0 = {AnyMatrix Points= ..Right.IC_R4_Int_Sup0.Points* ...MirrorTransform;};
#endif
    AnyFloat IntercostalisInternusR3R4_elem_sternum_pos = .Right.IntercostalisInternusR3R4_elem_sternum_pos* ..MirrorTransform;

    AnyFloat CC_AlignmentNode =.Right.CC_AlignmentNode* ..MirrorTransform;

  };
};
AnyFolder R5 = {
  AnyFolder Right = {
    AnyFloat IC_AntIns_pos = { 0.032579700, 0.332561, 0.1432270};
    AnyFloat IliocostalisThoracisC7R7Via5Node_pos  = {-0.045035725, 0.36625394, 0.043000000};
    AnyFloat IliocostalisThoracisR1R7Via4Node_pos  = {-0.045035725, 0.36625394, 0.046000000};
    AnyFloat IliocostalisThoracisR2R8Via3Node_pos  = {-0.047035725, 0.36325394, 0.049000000};
    AnyFloat IliocostalisThoracisR3R9Via2Node_pos  = {-0.050035725, 0.36225394, 0.053000000};
    AnyFloat IliocostalisThoracisR4R10Via1Node_pos = {-0.051035725, 0.36125394, 0.056000000};
    AnyFloat IliocostalisCervicisR5C6Node_pos    = {-0.042, 0.369, 0.041};
    AnyFloat IliocostalisCervicisR6C4Via5Node_pos= {-0.0435, 0.369, 0.043};
    AnyFloat R5IliocostalisThoracisR5R11Node_pos = {-0.051035725, 0.36025394, 0.061000000};
    AnyFloat CT_pos          = ..T5.Right.CT_pos;
    AnyFloat CC_pos        = { 0.124428180, 0.29380424, 0.08968678};
    AnyFloat CV_pos          = ..T5.Right.CV_pos;
    AnyFloat CS_pos          = { 0.123500000, 0.29179976, 0.01970000};
    AnyFloat CTsup_pos       = ..T5.Right.CTsup_pos;
    AnyFloat CTinf_pos       = ..T5.Right.CTinf_pos;
    AnyFloat R5R6IC_pos = {-0.00251, 0.31687, 0.13730};
    AnyFloat TransversusThoracisR5StNodeOrg_pos              =  { 0.124428180, 0.29380424, 0.089686780};
    AnyFloat TransversusThoracisR3R5NodeIns_pos             =  { 0.119307980, 0.29155021, 0.024074174};
    AnyFloat TransversusThoracisR5R7NodeOrg_pos             =  { 0.124428180, 0.29380424, 0.089686780};
    AnyFloat LevatorCostarumT4R5Ins_pos               =  {-0.043035725, 0.36825394, 0.046000000};
    AnyFloat SubcostalisR2R5Ins_pos                 =  {-0.034035725, 0.36625394, 0.041000000};
    AnyFloat SubcostalisR3R5Ins_pos                 =  {-0.035035725, 0.36625394, 0.046000000};
    AnyFloat SubcostalisR5R7Org_pos                 =  {-0.041035725, 0.35725394, 0.059000000};
    AnyFloat SubcostalisR5R8Org_pos                 =  {-0.041035725, 0.35525394, 0.065000000};
    AnyFloat MidNode_pos = {0.04319623, 0.326153, 0.1460615};
    AnyFloat ICSpringSupNode_pos = ..R4.Right.ICSpringInfNode_pos;
    AnyFloat ICSpringInfNode_pos = (MidNode_pos+..R6.Right.MidNode_pos)/2;
    AnyFloat O_SerratusAnterior_pos = {0.095165, 0.29527, 0.106825};
    AnyFloat O_serratus_posterior_superior_pos = {-0.04, 0.35 , 0.1};
    AnyMatrix SuperiorCostoTransverse_points = {
      {-0.026723124, 0.36787787, 0.02912741}, // 0
      {-0.033060789, 0.36974567, 0.036282167} // 1
    };
    AnyMatrix LateralCostoTransverse_points = {
      {-0.037974034, 0.3642996, 0.03642061}, // 1
      {-0.030819474, 0.36354291, 0.028262293} // 0
    };
    AnyMatrix CostoTransverse_points = {
      {-0.030369902, 0.36347497, 0.027853288}, // 1
      {-0.026120087, 0.36264256, 0.026225053} // 0
    };
    AnyMatrix Radiate_inferior_points = {
      {-0.030704349, 0.35916761, 0.026935305}, // 0
      {-0.027604233, 0.35908955, 0.025894923}, // 1
      {-0.025575662, 0.3613416, 0.027457066}, // 3
      {-0.025512647, 0.36308748, 0.027628362} // 4
    };
    AnyMatrix Radiate_superior_points = {
      {-0.025908893, 0.36413506, 0.02709854}, // 5
      {-0.026135242, 0.36746579, 0.028979147} // 6
    };
    AnyMatrix IC_R5_Int_pos  ={
      {-0.033534902999999998, 0.36382961000000003, 0.040530507},
      {-0.043563742000000003, 0.35884591999999998, 0.069608204000000007},
      {-0.031813502, 0.34788462999999997, 0.10636218},
      {0.0063030925000000003, 0.33406304999999997, 0.13454393000000001},
      {0.048967056000000002, 0.32275513, 0.14226264},
      {0.1109179, 0.29778971999999998, 0.10704257}
    };


  #if IC_TYPE != OLD
  //  #if IC_TYPE== MULTI_OFFSET

    AnyMatrix  IC_Inf_pos ={
{-0.02856969, 0.3596802, 0.02553808},
      //      {-0.029712761, 0.35934612, 0.028082127}, // 0
      {-0.046966083, 0.35592982, 0.060331784}, // 1
      {-0.043104954, 0.34481016, 0.097551532}, // 2
      {-0.014466214, 0.33362693, 0.12621947}, // 3
      {0.011049142, 0.32557145, 0.1386406}, // 4
      {0.054093067, 0.31392643, 0.14473884}, // 6
      {0.092946313, 0.30238837, 0.12889554}, // 7
      {0.1329955, 0.2815456, 0.08252634}
      //{0.12039597, 0.28784719, 0.096243739} // 8
    };
    AnyMatrix  IC_Sup_pos ={
      {-0.02631678, 0.3685668, 0.02784232},
      //      {-0.027519384, 0.36832958, 0.030300746}, // 0
      {-0.044298816, 0.36631346, 0.059477735}, // 1
      {-0.04224132, 0.35796967, 0.089193285}, // 2
      {-0.018481437, 0.34822768, 0.12126185}, // 3
      {0.033037562, 0.3321318, 0.14400962}, // 4
      {0.066107795, 0.32260251, 0.14210719}, // 5
      {0.096536905, 0.31414285, 0.123967}, // 6
      {0.1328027, 0.2963737, 0.08132373}
      //      {0.12059447, 0.302122, 0.095023707} // 7
    };


AnyFloat Inn_Sup_Start_ABS_pos = {-0.04008159694134264, 0.35963994195765414, 0.08289462624540736};
AnyFloat Inn_Inf_Start_ABS_pos = {-0.043271880343430519, 0.35194229567949004, 0.071678859580967924};
AnyFloat Inn_Sup_End_ABS_pos = {0.13280269999989119, 0.29637370000005336, 0.081323730000127936};
AnyFloat Inn_Inf_End_ABS_pos = {0.13299549999987983, 0.28154560000006251, 0.082526340000139115};
AnyFloat Ext_Sup_Start_ABS_pos = {-0.026316780000053948, 0.36856679999999331, 0.02784232000009491};
AnyFloat Ext_Inf_Start_ABS_pos = {-0.028569690000055187, 0.35968019999998879, 0.025538080000104383};
AnyFloat Ext_Sup_End_ABS_pos = {0.13280269999989119, 0.29637370000005336, 0.081323730000127936};
AnyFloat Ext_Inf_End_ABS_pos = {0.13299549999987983, 0.28154560000006251, 0.082526340000139115};
AnyFloat Int_Sup_Start_ABS_pos = {-0.041514670057521734, 0.36208121298896628, 0.073613435623051768};
AnyFloat Int_Inf_Start_ABS_pos = {-0.043271880343430519, 0.35194229567949004, 0.071678859580967924};
AnyFloat Int_Sup_End_ABS_pos = {0.13280269999989119, 0.29637370000005336, 0.081323730000127936};
AnyFloat Int_Inf_End_ABS_pos = {0.13299549999987983, 0.28154560000006251, 0.082526340000139115};

    #endif


     #if IC_TYPE == OLD
  AnyMatrix  IC_R5_Ext_Inf_pos ={
      {-0.029712761, 0.35934612, 0.028082127}, // 0
      {-0.046966083, 0.35592982, 0.060331784}, // 1
      {-0.043104954, 0.34481016, 0.097551532}, // 2
      {-0.014466214, 0.33362693, 0.12621947}, // 3
      {0.011049142, 0.32557145, 0.1386406}, // 4
      {0.054093067, 0.31392643, 0.14473884}, // 6
      {0.092946313, 0.30238837, 0.12889554}, // 7
      {0.12039597, 0.28784719, 0.096243739} // 8
    };
    AnyMatrix  IC_R5_Ext_Sup_pos ={
      {-0.027519384, 0.36832958, 0.030300746}, // 0
      {-0.044298816, 0.36631346, 0.059477735}, // 1
      {-0.04224132, 0.35796967, 0.089193285}, // 2
      {-0.018481437, 0.34822768, 0.12126185}, // 3
      {0.033037562, 0.3321318, 0.14400962}, // 4
      {0.066107795, 0.32260251, 0.14210719}, // 5
      {0.096536905, 0.31414285, 0.123967}, // 6
      {0.12059447, 0.302122, 0.095023707} // 7
    };


    AnyMatrix  IC_R5_Int_Inf_pos = IC_R5_Ext_Inf_pos;
    AnyMatrix  IC_R5_Int_Sup_pos = IC_R5_Ext_Sup_pos;
    AnyMatrix  IC_R5_Inn_Inf_pos = IC_R5_Ext_Inf_pos;
    AnyMatrix  IC_R5_Inn_Sup_pos = IC_R5_Ext_Sup_pos;


    Spline_template IC_R5_Int_Inf0 ( NAME=IC_R5_Int_Inf_pos,NUM_ELEM=20,POINTS=.IC_R5_Int_Inf_pos,START =0,END =0)={};
    Spline_template IC_R5_Int_Sup0 ( NAME=IC_R5_Int_Inf_pos,NUM_ELEM=20,POINTS=.IC_R5_Int_Sup_pos,START =0,END =0)={};

    AnyFolder &Sup_spline = ..R4.Right.IC_R4_Int_Inf0;
    AnyFolder &Inf_spline = IC_R5_Int_Sup0;

    AnyFloat Desired_Ext_angle =40;
    AnyFloat Desired_Int_angle =-40;
      AnyFloat Desired_Inn_angle =0;


    #include "../AngleCorrection.any"

    Spline_template_ABS_OFFSETS IC_R5_Ext_Inf ( NAME=IC_R5_Ext_Inf_pos,NUM_ELEM=20,POINTS=.IC_R5_Ext_Inf_pos,OFFSETS=...R6.Right.OffSetCal.Offsets_Ext_Sup,SIGN=-1)={};
    Spline_template_ABS_OFFSETS IC_R5_Int_Inf ( NAME=IC_R5_Int_Inf_pos,NUM_ELEM=20,POINTS=.IC_R5_Int_Inf_pos,OFFSETS=...R6.Right.OffSetCal.Offsets_Int_Sup,SIGN=-1)={};
    Spline_template_ABS_OFFSETS IC_R5_Inn_Inf ( NAME=IC_R5_Inn_Inf_pos,NUM_ELEM=20,POINTS=.IC_R5_Inn_Inf_pos,OFFSETS=...R6.Right.OffSetCal.Offsets_Inn_Sup,SIGN=-1)={START=0.0;};

    Spline_template_ABS_OFFSETS IC_R5_Ext_Sup ( NAME=IC_R5_Ext_Inf_pos,NUM_ELEM=20,POINTS=.IC_R5_Ext_Sup_pos,OFFSETS=.OffSetCal.Offsets_Ext_Inf,SIGN=1)={};
    Spline_template_ABS_OFFSETS IC_R5_Int_Sup ( NAME=IC_R5_Int_Inf_pos,NUM_ELEM=20,POINTS=.IC_R5_Int_Sup_pos,OFFSETS=.OffSetCal.Offsets_Int_Inf,SIGN=1)={};
    Spline_template_ABS_OFFSETS IC_R5_Inn_Sup ( NAME=IC_R5_Inn_Inf_pos,NUM_ELEM=20,POINTS=.IC_R5_Inn_Sup_pos,OFFSETS=.OffSetCal.Offsets_Inn_Inf,SIGN=1)={START=0.0;};
#endif

    AnyFloat IntercostalisInternusR4R5_elem_sternum_pos = {0.1203218, 0.2979283, 0.09307529};

    #if CC_ALIGNMENT  == MID | CC_ALIGNMENT == CV
    #if CC_ALIGNMENT == MID
    AnyFloat CC_AlignmentNode =  {0.014915938631226745, 0.33125344586277639, 0.13655020824081565};
    #endif
    #if CC_ALIGNMENT == CV
    AnyFloat CC_AlignmentNode = CV_pos;
    #endif
    #else
    // #if CC_ALIGNMENT == TANGENT
    AnyFloat CC_AlignmentNode ={0.09240451, 0.3076584, 0.1225437}; // 0.5*(IC_R5_Ext_Inf.Fun(0.8)+IC_R5_Ext_Sup.Fun(0.9));
    #endif

  };

  AnyFolder Left = {
    AnyFloat IC_AntIns_pos = .Right.IC_AntIns_pos * ..MirrorTransform;
    AnyFloat IliocostalisThoracisC7R7Via5Node_pos = .Right.IliocostalisThoracisC7R7Via5Node_pos * ..MirrorTransform;
    AnyFloat IliocostalisThoracisR1R7Via4Node_pos = .Right.IliocostalisThoracisR1R7Via4Node_pos * ..MirrorTransform;
    AnyFloat IliocostalisThoracisR2R8Via3Node_pos = .Right.IliocostalisThoracisR2R8Via3Node_pos * ..MirrorTransform;
    AnyFloat IliocostalisThoracisR3R9Via2Node_pos = .Right.IliocostalisThoracisR3R9Via2Node_pos * ..MirrorTransform;
    AnyFloat IliocostalisThoracisR4R10Via1Node_pos = .Right.IliocostalisThoracisR4R10Via1Node_pos * ..MirrorTransform;
    AnyFloat IliocostalisCervicisR5C6Node_pos    = .Right.IliocostalisCervicisR5C6Node_pos * ..MirrorTransform;
    AnyFloat IliocostalisCervicisR6C4Via5Node_pos= .Right.IliocostalisCervicisR6C4Via5Node_pos * ..MirrorTransform;
    AnyFloat R5IliocostalisThoracisR5R11Node_pos = .Right.R5IliocostalisThoracisR5R11Node_pos * ..MirrorTransform;
    AnyFloat CT_pos = .Right.CT_pos * ..MirrorTransform;
    AnyFloat CC_pos = .Right.CC_pos * ..MirrorTransform;
    AnyFloat CV_pos = .Right.CV_pos * ..MirrorTransform;
    AnyFloat CS_pos = .Right.CS_pos * ..MirrorTransform;
    AnyFloat CTsup_pos = .Right.CTsup_pos * ..MirrorTransform;
    AnyFloat CTinf_pos = .Right.CTinf_pos * ..MirrorTransform;
    AnyFloat R5R6IC_pos = .Right.R5R6IC_pos * ..MirrorTransform;
    AnyFloat TransversusThoracisR5StNodeOrg_pos = .Right.TransversusThoracisR5StNodeOrg_pos * ..MirrorTransform;
    AnyFloat TransversusThoracisR3R5NodeIns_pos = .Right.TransversusThoracisR3R5NodeIns_pos * ..MirrorTransform;
    AnyFloat TransversusThoracisR5R7NodeOrg_pos = .Right.TransversusThoracisR5R7NodeOrg_pos * ..MirrorTransform;
    AnyFloat LevatorCostarumT4R5Ins_pos = .Right.LevatorCostarumT4R5Ins_pos * ..MirrorTransform;
    AnyFloat SubcostalisR2R5Ins_pos = .Right.SubcostalisR2R5Ins_pos * ..MirrorTransform;
    AnyFloat SubcostalisR3R5Ins_pos = .Right.SubcostalisR3R5Ins_pos * ..MirrorTransform;
    AnyFloat SubcostalisR5R7Org_pos = .Right.SubcostalisR5R7Org_pos * ..MirrorTransform;
    AnyFloat SubcostalisR5R8Org_pos = .Right.SubcostalisR5R8Org_pos * ..MirrorTransform;
    AnyFloat MidNode_pos = .Right.MidNode_pos * ..MirrorTransform;
    AnyFloat ICSpringSupNode_pos = .Right.ICSpringSupNode_pos * ..MirrorTransform;
    AnyFloat ICSpringInfNode_pos = .Right.ICSpringInfNode_pos * ..MirrorTransform;
    AnyFloat O_SerratusAnterior_pos = .Right.O_SerratusAnterior_pos * ..MirrorTransform;
    AnyFloat O_serratus_posterior_superior_pos = .Right.O_serratus_posterior_superior_pos * ..MirrorTransform;
    AnyMatrix SuperiorCostoTransverse_points = .Right.SuperiorCostoTransverse_points * ..MirrorTransform;
    AnyMatrix Radiate_inferior_points = .Right.Radiate_inferior_points * ..MirrorTransform;
    AnyMatrix Radiate_superior_points = .Right.Radiate_superior_points * ..MirrorTransform;
    AnyMatrix LateralCostoTransverse_points = .Right.LateralCostoTransverse_points * ..MirrorTransform;
    AnyMatrix CostoTransverse_points = .Right.CostoTransverse_points * ..MirrorTransform;
  #if IC_TYPE != OLD
  //  #if IC_TYPE== MULTI_OFFSET
      AnyMatrix  IC_Inf_pos =.Right.IC_Inf_pos* ..MirrorTransform;
      AnyMatrix  IC_Sup_pos =.Right.IC_Sup_pos* ..MirrorTransform;


 AnyFloat Inn_Sup_Start_ABS_pos =.Right.Inn_Sup_Start_ABS_pos* ..MirrorTransform;
AnyFloat Inn_Inf_Start_ABS_pos = .Right.Inn_Inf_Start_ABS_pos* ..MirrorTransform;
AnyFloat Inn_Sup_End_ABS_pos = .Right.Inn_Sup_End_ABS_pos* ..MirrorTransform;
AnyFloat Inn_Inf_End_ABS_pos = .Right.Inn_Inf_End_ABS_pos* ..MirrorTransform;
AnyFloat Ext_Sup_Start_ABS_pos = .Right.Ext_Sup_Start_ABS_pos* ..MirrorTransform;
AnyFloat Ext_Inf_Start_ABS_pos = .Right.Ext_Inf_Start_ABS_pos* ..MirrorTransform;
AnyFloat Ext_Sup_End_ABS_pos = .Right.Ext_Sup_End_ABS_pos* ..MirrorTransform;
AnyFloat Ext_Inf_End_ABS_pos = .Right.Ext_Inf_End_ABS_pos* ..MirrorTransform;
AnyFloat Int_Sup_Start_ABS_pos = .Right.Int_Sup_Start_ABS_pos* ..MirrorTransform;
AnyFloat Int_Inf_Start_ABS_pos = .Right.Int_Inf_Start_ABS_pos* ..MirrorTransform;
AnyFloat Int_Sup_End_ABS_pos = .Right.Int_Sup_End_ABS_pos* ..MirrorTransform;
AnyFloat Int_Inf_End_ABS_pos = .Right.Int_Inf_End_ABS_pos* ..MirrorTransform;


  #endif

     #if IC_TYPE == OLD
      AnyMatrix  IC_R5_Ext_Inf_pos =.Right.IC_R5_Ext_Inf_pos* ..MirrorTransform;
    AnyMatrix  IC_R5_Ext_Sup_pos =.Right.IC_R5_Ext_Sup_pos* ..MirrorTransform;
    AnyMatrix  IC_R5_Int_Inf_pos =.Right.IC_R5_Int_Inf_pos* ..MirrorTransform;
    AnyMatrix  IC_R5_Int_Sup_pos =.Right.IC_R5_Int_Sup_pos* ..MirrorTransform;


    AnyFolder IC_R5_Ext_Inf = {AnyMatrix Points= ..Right.IC_R5_Ext_Inf.Points* ...MirrorTransform;};
    AnyFolder IC_R5_Int_Inf = {AnyMatrix Points= ..Right.IC_R5_Int_Inf.Points* ...MirrorTransform;};
    AnyFolder IC_R5_Inn_Inf = {AnyMatrix Points= ..Right.IC_R5_Inn_Inf.Points* ...MirrorTransform;};
    AnyFolder IC_R5_Ext_Sup = {AnyMatrix Points= ..Right.IC_R5_Ext_Sup.Points* ...MirrorTransform;};
    AnyFolder IC_R5_Int_Sup = {AnyMatrix Points= ..Right.IC_R5_Int_Sup.Points* ...MirrorTransform;};
    AnyFolder IC_R5_Inn_Sup = {AnyMatrix Points= ..Right.IC_R5_Inn_Sup.Points* ...MirrorTransform;};

    AnyFolder IC_R5_Int_Inf0 = {AnyMatrix Points= ..Right.IC_R5_Int_Inf0.Points* ...MirrorTransform;};
    AnyFolder IC_R5_Int_Sup0 = {AnyMatrix Points= ..Right.IC_R5_Int_Sup0.Points* ...MirrorTransform;};

    #endif
    AnyFloat IntercostalisInternusR4R5_elem_sternum_pos = .Right.IntercostalisInternusR4R5_elem_sternum_pos* ..MirrorTransform;
    AnyFloat CC_AlignmentNode =.Right.CC_AlignmentNode* ..MirrorTransform;
  };
};

AnyFolder R6 = {
  AnyFolder Right = {
    AnyFloat IliocostalisCervicisR6C4Node_pos       = {-0.040, 0.345, 0.0405};
    AnyFloat IliocostalisThoracisC7R7Via6Node_pos     = {-0.044912878, 0.34070983, 0.042300000};
    AnyFloat IliocostalisThoracisR1R7Via5Node_pos     = {-0.045912878, 0.34070983, 0.045300000};
    AnyFloat IliocostalisThoracisR2R8Via4Node_pos     = {-0.047912878, 0.33970983, 0.048300000};
    AnyFloat IliocostalisThoracisR3R9Via3Node_pos     = {-0.049912878, 0.33870983, 0.051300000};
    AnyFloat IliocostalisThoracisR4R10Via2Node_pos    = {-0.050912878, 0.33670983, 0.054300000};
    AnyFloat IliocostalisThoracisR5R11Via1Node_pos    = {-0.050912878, 0.33470983, 0.056300000};
    AnyFloat R6IliocostalisThoracisR6R12Node_pos        = {-0.050912878, 0.33370983, 0.058300000};
    AnyFloat CT_pos         = ..T6.Right.CT_pos;
    AnyFloat CC_pos       = { 0.133921720, 0.25731787, 0.10078811};
    AnyFloat CV_pos         = ..T6.Right.CV_pos;
    AnyFloat CS_pos         = { 0.131500000, 0.26929976, 0.01900000};
    AnyFloat CTsup_pos       = ..T6.Right.CTsup_pos;
    AnyFloat CTinf_pos       = ..T6.Right.CTinf_pos;
    AnyFloat R6R7IC_pos = {-0.00272, 0.28832, 0.14021};
    AnyFloat TransversusThoracisR6StNodeOrg_pos              =  { 0.133921720, 0.25731787, 0.100788110};
    AnyFloat TransversusThoracisR4R6NodeIns_pos             =  { 0.127901420, 0.26817596, 0.024111757};
    AnyFloat LevatorCostarumT5R6Ins_pos               =  {-0.044912878, 0.34170983, 0.046300000};
    AnyFloat SubcostalisR3R6Ins_pos                 =  {-0.037912878, 0.34370983, 0.042300000};
    AnyFloat SubcostalisR4R6Ins_pos                 =  {-0.038912878, 0.34370983, 0.046300000};
    AnyFloat SubcostalisR6R8Org_pos                 =  {-0.044912878, 0.33070983, 0.059300000};
    AnyFloat SubcostalisR6R9Org_pos                 =  {-0.044912878, 0.32870983, 0.063300000};
    AnyFloat MidNode_pos = {0.04450442, 0.2908675, 0.1516745};
    AnyFloat ICSpringSupNode_pos = ..R5.Right.ICSpringInfNode_pos;
    AnyFloat ICSpringInfNode_pos = (MidNode_pos+..R7.Right.MidNode_pos)/2;
    AnyFloat O_SerratusAnterior_pos = {0.10639, 0.26435, 0.10885};
    AnyMatrix SuperiorCostoTransverse_points = {
      {-0.032703105, 0.34512341, 0.030125234}, // 0
      {-0.035213571, 0.346944, 0.033549815}, // 1
      {-0.036669824, 0.3467629, 0.035926182} // 2
    };
    AnyMatrix LateralCostoTransverse_points = {
      {-0.038757458, 0.33986187, 0.036135156}, // 2
      {-0.036935885, 0.34024897, 0.032350913}, // 1
      {-0.034527585, 0.34009758, 0.028719287} // 0
    };
    AnyMatrix CostoTransverse_points = {
      {-0.032993041, 0.33982742, 0.026954291}, // 1
      {-0.029739484, 0.33595321, 0.024815679} // 0
    };
    AnyMatrix Radiate_inferior_points = {
      {-0.028717976, 0.33873406, 0.026258986}, // 2
      {-0.029512521, 0.33415601, 0.02675779}, // 0
      {-0.028442496, 0.33554927, 0.025641249} // 1
    };
    AnyMatrix Radiate_superior_points = {
      {-0.02975609, 0.33922422, 0.025777241}, // 3
      {-0.03080955, 0.34218773, 0.027536506} // 4
    };
    AnyMatrix IC_R6_Int_pos  ={
      {-0.045423581999999997, 0.33331779, 0.064657546999999996},
      {-0.039164703000000002, 0.32102861999999999, 0.10265014},
      {0.00052186892999999995, 0.30554675999999997, 0.13594738000000001},
      {0.041944738000000002, 0.29200023000000003, 0.14733642},
      {0.084283099, 0.27228445000000001, 0.14101196999999999},
      {0.11987154, 0.26317719000000001, 0.11818545}
    };

  #if IC_TYPE != OLD
  //  #if IC_TYPE== MULTI_OFFSET
     AnyMatrix  IC_Inf_pos ={
{-0.02968708, 0.3349614, 0.02460817},
//       {-0.031589795, 0.33384836, 0.030034412}, // 0
      {-0.048411813, 0.32631537, 0.069957964}, // 1
      {-0.03814118, 0.31150469, 0.11296613}, // 2
      {-0.0068138628, 0.30099306, 0.13766955}, // 3
      {0.033979803, 0.28673413, 0.15196063}, // 4
      {0.068167157, 0.27215028, 0.14950722}, // 6
      {0.098840714, 0.26119563, 0.13768478}, // 8
      {0.1417844, 0.245885, 0.09268636},
//      {0.12770846, 0.25090611, 0.10671747} // 10
    };
    AnyMatrix  IC_Sup_pos ={

      {-0.03209368, 0.3464125, 0.02820294},
      //{-0.033030294, 0.3458778, 0.030844256}, // 0
      {-0.044829492, 0.34095767, 0.058503166}, // 1
      {-0.045667954, 0.33113346, 0.088176668}, // 2
      {0.00268402, 0.31214657, 0.13941641}, // 3
      {0.049370352, 0.29331887, 0.15029973}, // 5
      {0.080965891, 0.28055176, 0.14236085}, // 8
      {0.11122731, 0.27415124, 0.12807119}, // 9
//      {0.13199489, 0.26771417, 0.10735448} // 10
      {0.1444846, 0.2640711, 0.09622953}
    };


AnyFloat Inn_Sup_Start_ABS_pos = {-0.042098229135181006, 0.33530850254026073, 0.074837853147631028};
AnyFloat Inn_Inf_Start_ABS_pos = {-0.042453854543333808, 0.32195651273064319, 0.080595426309605186};
AnyFloat Inn_Sup_End_ABS_pos = {0.14448459999990021, 0.2640711000000302, 0.096229530000095528};
AnyFloat Inn_Inf_End_ABS_pos = {0.14178439999987116, 0.2458850000000459, 0.092686360000134999};
AnyFloat Ext_Sup_Start_ABS_pos = {-0.032093680000038212, 0.34641249999998364, 0.028202940000090902};
AnyFloat Ext_Inf_Start_ABS_pos = {-0.029687080000056165, 0.3349613999999741, 0.02460817000013605};
AnyFloat Ext_Sup_End_ABS_pos = {0.14448459999990021, 0.2640711000000302, 0.096229530000095528};
AnyFloat Ext_Inf_End_ABS_pos = {0.14178439999987116, 0.2458850000000459, 0.092686360000134999};
AnyFloat Int_Sup_Start_ABS_pos = {-0.042098229135181006, 0.33530850254026073, 0.074837853147631028};
AnyFloat Int_Inf_Start_ABS_pos = {-0.042298531020941429, 0.32452363876853862, 0.071357904413579004};
AnyFloat Int_Sup_End_ABS_pos = {0.14448459999990021, 0.2640711000000302, 0.096229530000095528};
AnyFloat Int_Inf_End_ABS_pos = {0.14178439999987116, 0.2458850000000459, 0.092686360000134999};

       #endif
 #if IC_TYPE == OLD
   AnyMatrix  IC_R6_Ext_Inf_pos ={
      {-0.031589795, 0.33384836, 0.030034412}, // 0
      {-0.048411813, 0.32631537, 0.069957964}, // 1
      {-0.03814118, 0.31150469, 0.11296613}, // 2
      {-0.0068138628, 0.30099306, 0.13766955}, // 3
      {0.033979803, 0.28673413, 0.15196063}, // 4
      {0.068167157, 0.27215028, 0.14950722}, // 6
      {0.098840714, 0.26119563, 0.13768478}, // 8
      {0.12770846, 0.25090611, 0.10671747} // 10
    };
    AnyMatrix  IC_R6_Ext_Sup_pos ={
      {-0.033030294, 0.3458778, 0.030844256}, // 0
      {-0.044829492, 0.34095767, 0.058503166}, // 1
      {-0.045667954, 0.33113346, 0.088176668}, // 2
      {0.00268402, 0.31214657, 0.13941641}, // 3
      {0.049370352, 0.29331887, 0.15029973}, // 5
      {0.080965891, 0.28055176, 0.14236085}, // 8
      {0.11122731, 0.27415124, 0.12807119}, // 9
      {0.13199489, 0.26771417, 0.10735448} // 10
    };


    AnyMatrix  IC_R6_Int_Inf_pos = IC_R6_Ext_Inf_pos;
    AnyMatrix  IC_R6_Int_Sup_pos = IC_R6_Ext_Sup_pos;
   AnyMatrix  IC_R6_Inn_Inf_pos = IC_R6_Ext_Inf_pos;
    AnyMatrix  IC_R6_Inn_Sup_pos = IC_R6_Ext_Sup_pos;


    Spline_template IC_R6_Int_Inf0 ( NAME=IC_R6_Int_Inf_pos,NUM_ELEM=20,POINTS=.IC_R6_Int_Inf_pos,START =0,END =0)={};
    Spline_template IC_R6_Int_Sup0 ( NAME=IC_R6_Int_Inf_pos,NUM_ELEM=20,POINTS=.IC_R6_Int_Sup_pos,START =0,END =0)={};

    AnyFolder &Sup_spline = ..R5.Right.IC_R5_Int_Inf0;
    AnyFolder &Inf_spline = IC_R6_Int_Sup0;

    AnyFloat Desired_Ext_angle =40;
    AnyFloat Desired_Int_angle =-40;
       AnyFloat Desired_Inn_angle =0;


    #include "../AngleCorrection.any"

    Spline_template_ABS_OFFSETS IC_R6_Ext_Inf ( NAME=IC_R6_Ext_Inf_pos,NUM_ELEM=20,POINTS=.IC_R6_Ext_Inf_pos,OFFSETS=...R7.Right.OffSetCal.Offsets_Ext_Sup,SIGN=-1)={};
    Spline_template_ABS_OFFSETS IC_R6_Int_Inf ( NAME=IC_R6_Int_Inf_pos,NUM_ELEM=20,POINTS=.IC_R6_Int_Inf_pos,OFFSETS=...R7.Right.OffSetCal.Offsets_Int_Sup,SIGN=-1)={};
    Spline_template_ABS_OFFSETS IC_R6_Inn_Inf ( NAME=IC_R6_Inn_Inf_pos,NUM_ELEM=20,POINTS=.IC_R6_Inn_Inf_pos,OFFSETS=...R7.Right.OffSetCal.Offsets_Inn_Sup,SIGN=-1)={START=0.0;};

    Spline_template_ABS_OFFSETS IC_R6_Ext_Sup ( NAME=IC_R6_Ext_Inf_pos,NUM_ELEM=20,POINTS=.IC_R6_Ext_Sup_pos,OFFSETS=.OffSetCal.Offsets_Ext_Inf,SIGN=1)={};
    Spline_template_ABS_OFFSETS IC_R6_Int_Sup ( NAME=IC_R6_Int_Inf_pos,NUM_ELEM=20,POINTS=.IC_R6_Int_Sup_pos,OFFSETS=.OffSetCal.Offsets_Int_Inf,SIGN=1)={};
    Spline_template_ABS_OFFSETS IC_R6_Inn_Sup ( NAME=IC_R6_Inn_Inf_pos,NUM_ELEM=20,POINTS=.IC_R6_Inn_Sup_pos,OFFSETS=.OffSetCal.Offsets_Inn_Inf,SIGN=1)={START=0.0;};
#endif
    AnyFloat IntercostalisInternusR5R6_elem_sternum_pos = {0.13233218, 0.2659283, 0.10307529};

    #if CC_ALIGNMENT  == MID | CC_ALIGNMENT == CV
    #if CC_ALIGNMENT == MID
    AnyFloat CC_AlignmentNode ={0.015122002944588792, 0.30012571568366364, 0.14229980437189493};
    #endif
    #if CC_ALIGNMENT == CV
    AnyFloat CC_AlignmentNode = CV_pos;
    #endif
    #else
    // #if CC_ALIGNMENT == TANGENT
    AnyFloat CC_AlignmentNode ={0.09809511, 0.2699674, 0.1335098}; // 0.5*(IC_R6_Ext_Inf.Fun(0.8)+IC_R6_Ext_Sup.Fun(0.9));
    #endif

};

  AnyFolder Left = {
    AnyFloat IliocostalisCervicisR6C4Node_pos   = .Right.IliocostalisCervicisR6C4Node_pos * ..MirrorTransform;
    AnyFloat IliocostalisThoracisC7R7Via6Node_pos = .Right.IliocostalisThoracisC7R7Via6Node_pos * ..MirrorTransform;
    AnyFloat IliocostalisThoracisR1R7Via5Node_pos = .Right.IliocostalisThoracisR1R7Via5Node_pos * ..MirrorTransform;
    AnyFloat IliocostalisThoracisR2R8Via4Node_pos = .Right.IliocostalisThoracisR2R8Via4Node_pos * ..MirrorTransform;
    AnyFloat IliocostalisThoracisR3R9Via3Node_pos = .Right.IliocostalisThoracisR3R9Via3Node_pos * ..MirrorTransform;
    AnyFloat IliocostalisThoracisR4R10Via2Node_pos = .Right.IliocostalisThoracisR4R10Via2Node_pos * ..MirrorTransform;
    AnyFloat IliocostalisThoracisR5R11Via1Node_pos = .Right.IliocostalisThoracisR5R11Via1Node_pos * ..MirrorTransform;
    AnyFloat R6IliocostalisThoracisR6R12Node_pos = .Right.R6IliocostalisThoracisR6R12Node_pos * ..MirrorTransform;
    AnyFloat CT_pos = .Right.CT_pos * ..MirrorTransform;
    AnyFloat CC_pos = .Right.CC_pos * ..MirrorTransform;
    AnyFloat CV_pos = .Right.CV_pos * ..MirrorTransform;
    AnyFloat CS_pos = .Right.CS_pos * ..MirrorTransform;
    AnyFloat CTsup_pos = .Right.CTsup_pos * ..MirrorTransform;
    AnyFloat CTinf_pos = .Right.CTinf_pos * ..MirrorTransform;
    AnyFloat R6R7IC_pos = .Right.R6R7IC_pos * ..MirrorTransform;
    AnyFloat TransversusThoracisR6StNodeOrg_pos = .Right.TransversusThoracisR6StNodeOrg_pos * ..MirrorTransform;
    AnyFloat TransversusThoracisR4R6NodeIns_pos = .Right.TransversusThoracisR4R6NodeIns_pos * ..MirrorTransform;
    AnyFloat LevatorCostarumT5R6Ins_pos = .Right.LevatorCostarumT5R6Ins_pos * ..MirrorTransform;
    AnyFloat SubcostalisR3R6Ins_pos = .Right.SubcostalisR3R6Ins_pos * ..MirrorTransform;
    AnyFloat SubcostalisR4R6Ins_pos = .Right.SubcostalisR4R6Ins_pos * ..MirrorTransform;
    AnyFloat SubcostalisR6R8Org_pos = .Right.SubcostalisR6R8Org_pos * ..MirrorTransform;
    AnyFloat SubcostalisR6R9Org_pos = .Right.SubcostalisR6R9Org_pos * ..MirrorTransform;
    AnyFloat MidNode_pos = .Right.MidNode_pos * ..MirrorTransform;
    AnyFloat ICSpringSupNode_pos = .Right.ICSpringSupNode_pos * ..MirrorTransform;
    AnyFloat ICSpringInfNode_pos = .Right.ICSpringInfNode_pos * ..MirrorTransform;
    AnyFloat O_SerratusAnterior_pos = .Right.O_SerratusAnterior_pos * ..MirrorTransform;
    AnyMatrix SuperiorCostoTransverse_points = .Right.SuperiorCostoTransverse_points * ..MirrorTransform;
    AnyMatrix Radiate_inferior_points = .Right.Radiate_inferior_points * ..MirrorTransform;
    AnyMatrix Radiate_superior_points = .Right.Radiate_superior_points * ..MirrorTransform;
    AnyMatrix LateralCostoTransverse_points = .Right.LateralCostoTransverse_points * ..MirrorTransform;
    AnyMatrix CostoTransverse_points = .Right.CostoTransverse_points * ..MirrorTransform;
  #if IC_TYPE != OLD
  //  #if IC_TYPE== MULTI_OFFSET
    AnyMatrix  IC_Inf_pos =.Right.IC_Inf_pos* ..MirrorTransform;
    AnyMatrix  IC_Sup_pos =.Right.IC_Sup_pos* ..MirrorTransform;


 AnyFloat Inn_Sup_Start_ABS_pos =.Right.Inn_Sup_Start_ABS_pos* ..MirrorTransform;
AnyFloat Inn_Inf_Start_ABS_pos = .Right.Inn_Inf_Start_ABS_pos* ..MirrorTransform;
AnyFloat Inn_Sup_End_ABS_pos = .Right.Inn_Sup_End_ABS_pos* ..MirrorTransform;
AnyFloat Inn_Inf_End_ABS_pos = .Right.Inn_Inf_End_ABS_pos* ..MirrorTransform;
AnyFloat Ext_Sup_Start_ABS_pos = .Right.Ext_Sup_Start_ABS_pos* ..MirrorTransform;
AnyFloat Ext_Inf_Start_ABS_pos = .Right.Ext_Inf_Start_ABS_pos* ..MirrorTransform;
AnyFloat Ext_Sup_End_ABS_pos = .Right.Ext_Sup_End_ABS_pos* ..MirrorTransform;
AnyFloat Ext_Inf_End_ABS_pos = .Right.Ext_Inf_End_ABS_pos* ..MirrorTransform;
AnyFloat Int_Sup_Start_ABS_pos = .Right.Int_Sup_Start_ABS_pos* ..MirrorTransform;
AnyFloat Int_Inf_Start_ABS_pos = .Right.Int_Inf_Start_ABS_pos* ..MirrorTransform;
AnyFloat Int_Sup_End_ABS_pos = .Right.Int_Sup_End_ABS_pos* ..MirrorTransform;
AnyFloat Int_Inf_End_ABS_pos = .Right.Int_Inf_End_ABS_pos* ..MirrorTransform;


  #endif
    #if IC_TYPE == OLD
   AnyMatrix  IC_R6_Ext_Inf_pos =.Right.IC_R6_Ext_Inf_pos* ..MirrorTransform;
    AnyMatrix  IC_R6_Ext_Sup_pos =.Right.IC_R6_Ext_Sup_pos* ..MirrorTransform;
    AnyMatrix  IC_R6_Int_Inf_pos =.Right.IC_R6_Int_Inf_pos* ..MirrorTransform;
    AnyMatrix  IC_R6_Int_Sup_pos =.Right.IC_R6_Int_Sup_pos* ..MirrorTransform;


    AnyFolder IC_R6_Ext_Inf = {AnyMatrix Points= ..Right.IC_R6_Ext_Inf.Points* ...MirrorTransform;};
    AnyFolder IC_R6_Int_Inf = {AnyMatrix Points= ..Right.IC_R6_Int_Inf.Points* ...MirrorTransform;};
    AnyFolder IC_R6_Inn_Inf = {AnyMatrix Points= ..Right.IC_R6_Inn_Inf.Points* ...MirrorTransform;};
    AnyFolder IC_R6_Ext_Sup = {AnyMatrix Points= ..Right.IC_R6_Ext_Sup.Points* ...MirrorTransform;};
    AnyFolder IC_R6_Int_Sup = {AnyMatrix Points= ..Right.IC_R6_Int_Sup.Points* ...MirrorTransform;};
    AnyFolder IC_R6_Inn_Sup = {AnyMatrix Points= ..Right.IC_R6_Inn_Sup.Points* ...MirrorTransform;};

    AnyFolder IC_R6_Int_Inf0 = {AnyMatrix Points= ..Right.IC_R6_Int_Inf0.Points* ...MirrorTransform;};
    AnyFolder IC_R6_Int_Sup0 = {AnyMatrix Points= ..Right.IC_R6_Int_Sup0.Points* ...MirrorTransform;};
#endif

    AnyFloat IntercostalisInternusR5R6_elem_sternum_pos = .Right.IntercostalisInternusR5R6_elem_sternum_pos* ..MirrorTransform;
    AnyFloat CC_AlignmentNode =.Right.CC_AlignmentNode* ..MirrorTransform;

  };
};

AnyFolder R7 = {
  AnyFolder Right = {
    AnyFloat IliocostalisThoracisC7R7Node_posIns      = {-0.044786778, 0.32191796, 0.041000000};
    AnyFloat IliocostalisThoracisR1R7Node_posIns      = {-0.046786778, 0.32191796, 0.044000000};
    AnyFloat IliocostalisThoracisR2R8Via5Node_pos     = {-0.049786778, 0.31791796, 0.046000000};
    AnyFloat IliocostalisThoracisR3R9Via4Node_pos     = {-0.050786778, 0.31791796, 0.049000000};
    AnyFloat IliocostalisThoracisR4R10Via3Node_pos    = {-0.051786778, 0.31691796, 0.052000000};
    AnyFloat IliocostalisThoracisR5R11Via2Node_pos    = {-0.051786778, 0.31691796, 0.054000000};
    AnyFloat IliocostalisThoracisR6R12Via1Node_pos    = {-0.051786778, 0.31691796, 0.056000000};
    AnyFloat CT_pos         = ..T7.Right.CT_pos;
    AnyFloat CC_pos       = { 0.144580320, 0.21814601, 0.10757296};
    AnyFloat CV_pos         = ..T7.Right.CV_pos;
    AnyFloat CS_pos         = { 0.134500000, 0.25749976, 0.01600000};
    AnyFloat CTsup_pos       = ..T7.Right.CTsup_pos;
    AnyFloat CTinf_pos       = ..T7.Right.CTinf_pos;
    AnyFloat R7R8IC_pos = { 0.00029, 0.25891, 0.14176};
    AnyFloat TransversusThoracisR5R7NodeIns_pos             =  { 0.13513002,  0.24704034, 0.02172331};
    AnyFloat TransversusThoracisR7StNodeOrg_pos              =  { 0.14458032,  0.21814601, 0.10757296};
    AnyFloat LevatorCostarumT6R7Ins_pos               =  {-0.048786778, 0.31991796, 0.04600000};
    AnyFloat LevatorCostarumT5R7Ins_pos               =  {-0.048786778, 0.31991796, 0.05100000};
    AnyFloat SubcostalisR4R7Ins_pos                 =  {-0.040786778, 0.32191796, 0.04200000};
    AnyFloat SubcostalisR5R7Ins_pos                 =  {-0.040786778, 0.32191796, 0.04600000};
    AnyFloat SubcostalisR7R9Org_pos                 =  {-0.046786778, 0.30891796, 0.06000000};
    AnyFloat SubcostalisR7R10Org_pos                =  {-0.046786778, 0.30691796, 0.06600000};
    AnyFloat MidNode_pos = {0.04889677, 0.2601691, 0.1505875};
    AnyFloat ICSpringSupNode_pos = ..R6.Right.ICSpringInfNode_pos;
    AnyFloat ICSpringInfNode_pos = (MidNode_pos+..R8.Right.MidNode_pos)/2;
    AnyFloat O_SerratusAnterior_pos = {0.13873, 0.22495, 0.13081};
    AnyMatrix SuperiorCostoTransverse_points = {
      {-0.034390043, 0.3233178, 0.027023714}, // 0
      {-0.036612768, 0.32334161, 0.030415481}, // 1
      {-0.038262933, 0.32362714, 0.033525597} // 2
    };
    AnyMatrix LateralCostoTransverse_points = {
      {-0.039268631, 0.31920564, 0.031718098}, // 2
      {-0.036745176, 0.3185266, 0.028508257}, // 1
      {-0.033605475, 0.31729943, 0.025292918} // 0
    };
    AnyMatrix CostoTransverse_points = {
      {-0.033131011, 0.31495517, 0.02412118}, // 1
      {-0.028093796, 0.31624198, 0.024214419} // 0
    };
    AnyMatrix Radiate_inferior_points = {
      {-0.031675339, 0.31240094, 0.025244411}, // 1
      {-0.030764477, 0.31124321, 0.02625078}, // 2
      {-0.02931118, 0.31215212, 0.025893873}, // 3
      {-0.02793516, 0.31386012, 0.026266422} // 4
    };
    AnyMatrix Radiate_superior_points = {
      {-0.027923599, 0.31409112, 0.024606179}, // 5
      {-0.027294206, 0.31674665, 0.02504441}, // 6
      {-0.028270824, 0.31914389, 0.025126699}, // 7
      {-0.031597212, 0.32151508, 0.025005843} // 8
    };


  #if IC_TYPE != OLD
  //  #if IC_TYPE== MULTI_OFFSET
        AnyMatrix  IC_Inf_pos ={
    {-0.02822696, 0.3129195, 0.0223671},
      // {-0.030348914, 0.31174678, 0.028029602}, // 0
      {-0.050071456, 0.30367818, 0.072315857}, // 1
      {-0.036327552, 0.28388301, 0.11541394}, // 2
      {0.0099399826, 0.27177086, 0.14496645}, // 3
      {0.05070119, 0.25398746, 0.15123771}, // 4
      {0.081918187, 0.24008992, 0.14788789}, // 5
      {0.1137831, 0.22667354, 0.13470465}, // 6
      {0.1531065, 0.2073925, 0.1006775},
//      {0.13969825, 0.2138688, 0.11162079} // 7
    };
    AnyMatrix  IC_Sup_pos ={
    {-0.03164003, 0.3225529, 0.02265004},
//      {-0.033566415, 0.32204276, 0.028372107}, // 0
      {-0.046637196, 0.32045627, 0.061402567}, // 1
      {-0.045753188, 0.30898502, 0.092630513}, // 2
      {-0.0071975593, 0.29039869, 0.13722858}, // 3
      {0.040083021, 0.2713773, 0.15138501}, // 4
      {0.071572646, 0.25809637, 0.15090537}, // 5
      {0.099562839, 0.24599227, 0.14413819}, // 6
//      {0.140843, 0.22748873, 0.11465728} // 7
{0.154909, 0.2211973, 0.1050144}
    };


AnyFloat Inn_Sup_Start_ABS_pos = {-0.043396007928409731, 0.31351492251317931, 0.079221021186916429};
AnyFloat Inn_Inf_Start_ABS_pos = {-0.042052095907363529, 0.30220618935217664, 0.068541954337308961};
AnyFloat Inn_Sup_End_ABS_pos = {0.15490899999983393, 0.22119730000007437, 0.10501440000011739};
AnyFloat Inn_Inf_End_ABS_pos = {0.15310649999988202, 0.20739250000005791, 0.10067750000010209};
AnyFloat Ext_Sup_Start_ABS_pos = {-0.031640030000044991, 0.3225528999999937, 0.022650040000116257};
AnyFloat Ext_Inf_Start_ABS_pos = {-0.028226960000065544, 0.31291949999997232, 0.02236710000014985};
AnyFloat Ext_Sup_End_ABS_pos = {0.15490899999983393, 0.22119730000007437, 0.10501440000011739};
AnyFloat Ext_Inf_End_ABS_pos = {0.15310649999988202, 0.20739250000005791, 0.10067750000010209};
AnyFloat Int_Sup_Start_ABS_pos = {-0.043916113487189212, 0.31617180308125381, 0.070083839978324181};
AnyFloat Int_Inf_Start_ABS_pos = {-0.042052095907363529, 0.30220618935217664, 0.068541954337308961};
AnyFloat Int_Sup_End_ABS_pos = {0.15490899999983393, 0.22119730000007437, 0.10501440000011739};
AnyFloat Int_Inf_End_ABS_pos = {0.15310649999988202, 0.20739250000005791, 0.10067750000010209};

    #endif

 #if IC_TYPE == OLD

   AnyMatrix  IC_R7_Ext_Inf_pos ={
      {-0.030348914, 0.31174678, 0.028029602}, // 0
      {-0.050071456, 0.30367818, 0.072315857}, // 1
      {-0.036327552, 0.28388301, 0.11541394}, // 2
      {0.0099399826, 0.27177086, 0.14496645}, // 3
      {0.05070119, 0.25398746, 0.15123771}, // 4
      {0.081918187, 0.24008992, 0.14788789}, // 5
      {0.1137831, 0.22667354, 0.13470465}, // 6
      {0.13969825, 0.2138688, 0.11162079} // 7
    };
    AnyMatrix  IC_R7_Ext_Sup_pos ={
      {-0.033566415, 0.32204276, 0.028372107}, // 0
      {-0.046637196, 0.32045627, 0.061402567}, // 1
      {-0.045753188, 0.30898502, 0.092630513}, // 2
      {-0.0071975593, 0.29039869, 0.13722858}, // 3
      {0.040083021, 0.2713773, 0.15138501}, // 4
      {0.071572646, 0.25809637, 0.15090537}, // 5
      {0.099562839, 0.24599227, 0.14413819}, // 6
      {0.140843, 0.22748873, 0.11465728} // 7
    };

    AnyMatrix  IC_R7_Int_Inf_pos = IC_R7_Ext_Inf_pos;
    AnyMatrix  IC_R7_Int_Sup_pos = IC_R7_Ext_Sup_pos;
    AnyMatrix  IC_R7_Inn_Inf_pos = IC_R7_Ext_Inf_pos;
    AnyMatrix  IC_R7_Inn_Sup_pos = IC_R7_Ext_Sup_pos;

    Spline_template IC_R7_Int_Inf0 ( NAME=IC_R7_Int_Inf_pos,NUM_ELEM=20,POINTS=.IC_R7_Int_Inf_pos,START =0,END =0)={};
    Spline_template IC_R7_Int_Sup0 ( NAME=IC_R7_Int_Inf_pos,NUM_ELEM=20,POINTS=.IC_R7_Int_Sup_pos,START =0,END =0)={};

    AnyFolder &Sup_spline = ..R6.Right.IC_R6_Int_Inf0;
    AnyFolder &Inf_spline = IC_R7_Int_Sup0;

    AnyFloat Desired_Ext_angle = 47;
    AnyFloat Desired_Int_angle =-40;
    AnyFloat Desired_Inn_angle =  0;

    #include "../AngleCorrection.any"

    Spline_template_ABS_OFFSETS IC_R7_Ext_Inf ( NAME=IC_R7_Ext_Inf_pos,NUM_ELEM=20,POINTS=.IC_R7_Ext_Inf_pos,OFFSETS=...R8.Right.OffSetCal.Offsets_Ext_Sup,SIGN=-1)={};
    Spline_template_ABS_OFFSETS IC_R7_Int_Inf ( NAME=IC_R7_Int_Inf_pos,NUM_ELEM=20,POINTS=.IC_R7_Int_Inf_pos,OFFSETS=...R8.Right.OffSetCal.Offsets_Int_Sup,SIGN=-1)={};
    Spline_template_ABS_OFFSETS IC_R7_Inn_Inf ( NAME=IC_R7_Inn_Inf_pos,NUM_ELEM=20,POINTS=.IC_R7_Inn_Inf_pos,OFFSETS=...R8.Right.OffSetCal.Offsets_Inn_Sup,SIGN=-1)={START=0.0;};

    Spline_template_ABS_OFFSETS IC_R7_Ext_Sup ( NAME=IC_R7_Ext_Inf_pos,NUM_ELEM=20,POINTS=.IC_R7_Ext_Sup_pos,OFFSETS=.OffSetCal.Offsets_Ext_Inf,SIGN=1)={};
    Spline_template_ABS_OFFSETS IC_R7_Int_Sup ( NAME=IC_R7_Int_Inf_pos,NUM_ELEM=20,POINTS=.IC_R7_Int_Sup_pos,OFFSETS=.OffSetCal.Offsets_Int_Inf,SIGN=1)={};
    Spline_template_ABS_OFFSETS IC_R7_Inn_Sup ( NAME=IC_R7_Inn_Inf_pos,NUM_ELEM=20,POINTS=.IC_R7_Inn_Sup_pos,OFFSETS=.OffSetCal.Offsets_Inn_Inf,SIGN=1)={START=0.0;};

    #endif

    AnyFloat IntercostalisInternusR6R7_elem_sternum_pos = {0.1375336, 0.2249356, 0.113531};

    #if CC_ALIGNMENT  == MID | CC_ALIGNMENT == CV
    #if CC_ALIGNMENT == MID
    AnyFloat CC_AlignmentNode = {0.016258526340123782, 0.27460513376354445, 0.14356602925884782};
    #endif
    #if CC_ALIGNMENT == CV
    AnyFloat CC_AlignmentNode = CV_pos;
    #endif
    #else
    // #if CC_ALIGNMENT == TANGENT
    AnyFloat CC_AlignmentNode = {0.1049088, 0.2368456, 0.13656}; //0.5*(IC_R7_Ext_Inf.Fun(0.8)+IC_R7_Ext_Sup.Fun(0.9));
    #endif

};

  AnyFolder Left = {
    AnyFloat IliocostalisThoracisC7R7Node_posIns = .Right.IliocostalisThoracisC7R7Node_posIns * ..MirrorTransform;
    AnyFloat IliocostalisThoracisR1R7Node_posIns = .Right.IliocostalisThoracisR1R7Node_posIns * ..MirrorTransform;
    AnyFloat IliocostalisThoracisR2R8Via5Node_pos = .Right.IliocostalisThoracisR2R8Via5Node_pos * ..MirrorTransform;
    AnyFloat IliocostalisThoracisR3R9Via4Node_pos = .Right.IliocostalisThoracisR3R9Via4Node_pos * ..MirrorTransform;
    AnyFloat IliocostalisThoracisR4R10Via3Node_pos = .Right.IliocostalisThoracisR4R10Via3Node_pos * ..MirrorTransform;
    AnyFloat IliocostalisThoracisR5R11Via2Node_pos = .Right.IliocostalisThoracisR5R11Via2Node_pos * ..MirrorTransform;
    AnyFloat IliocostalisThoracisR6R12Via1Node_pos = .Right.IliocostalisThoracisR6R12Via1Node_pos * ..MirrorTransform;
    AnyFloat CT_pos = .Right.CT_pos * ..MirrorTransform;
    AnyFloat CC_pos = .Right.CC_pos * ..MirrorTransform;
    AnyFloat CV_pos = .Right.CV_pos * ..MirrorTransform;
    AnyFloat CS_pos = .Right.CS_pos * ..MirrorTransform;
    AnyFloat CTsup_pos = .Right.CTsup_pos * ..MirrorTransform;
    AnyFloat CTinf_pos = .Right.CTinf_pos * ..MirrorTransform;
    AnyFloat R7R8IC_pos = .Right.R7R8IC_pos * ..MirrorTransform;
    AnyFloat TransversusThoracisR5R7NodeIns_pos = .Right.TransversusThoracisR5R7NodeIns_pos * ..MirrorTransform;
    AnyFloat TransversusThoracisR7StNodeOrg_pos = .Right.TransversusThoracisR7StNodeOrg_pos * ..MirrorTransform;
    AnyFloat LevatorCostarumT6R7Ins_pos = .Right.LevatorCostarumT6R7Ins_pos * ..MirrorTransform;
    AnyFloat LevatorCostarumT5R7Ins_pos = .Right.LevatorCostarumT5R7Ins_pos * ..MirrorTransform;
    AnyFloat SubcostalisR4R7Ins_pos = .Right.SubcostalisR4R7Ins_pos * ..MirrorTransform;
    AnyFloat SubcostalisR5R7Ins_pos = .Right.SubcostalisR5R7Ins_pos * ..MirrorTransform;
    AnyFloat SubcostalisR7R9Org_pos = .Right.SubcostalisR7R9Org_pos * ..MirrorTransform;
    AnyFloat SubcostalisR7R10Org_pos = .Right.SubcostalisR7R10Org_pos * ..MirrorTransform;
    AnyFloat MidNode_pos = .Right.MidNode_pos * ..MirrorTransform;
    AnyFloat ICSpringSupNode_pos = .Right.ICSpringSupNode_pos * ..MirrorTransform;
    AnyFloat ICSpringInfNode_pos = .Right.ICSpringInfNode_pos * ..MirrorTransform;
    AnyFloat O_SerratusAnterior_pos = .Right.O_SerratusAnterior_pos * ..MirrorTransform;
    AnyMatrix SuperiorCostoTransverse_points = .Right.SuperiorCostoTransverse_points * ..MirrorTransform;
    AnyMatrix Radiate_inferior_points = .Right.Radiate_inferior_points * ..MirrorTransform;
    AnyMatrix Radiate_superior_points = .Right.Radiate_superior_points * ..MirrorTransform;
    AnyMatrix LateralCostoTransverse_points = .Right.LateralCostoTransverse_points * ..MirrorTransform;
    AnyMatrix CostoTransverse_points = .Right.CostoTransverse_points * ..MirrorTransform;
  #if IC_TYPE != OLD
  //  #if IC_TYPE== MULTI_OFFSET
    AnyMatrix  IC_Inf_pos =.Right.IC_Inf_pos* ..MirrorTransform;
    AnyMatrix  IC_Sup_pos =.Right.IC_Sup_pos* ..MirrorTransform;


 AnyFloat Inn_Sup_Start_ABS_pos =.Right.Inn_Sup_Start_ABS_pos* ..MirrorTransform;
AnyFloat Inn_Inf_Start_ABS_pos = .Right.Inn_Inf_Start_ABS_pos* ..MirrorTransform;
AnyFloat Inn_Sup_End_ABS_pos = .Right.Inn_Sup_End_ABS_pos* ..MirrorTransform;
AnyFloat Inn_Inf_End_ABS_pos = .Right.Inn_Inf_End_ABS_pos* ..MirrorTransform;
AnyFloat Ext_Sup_Start_ABS_pos = .Right.Ext_Sup_Start_ABS_pos* ..MirrorTransform;
AnyFloat Ext_Inf_Start_ABS_pos = .Right.Ext_Inf_Start_ABS_pos* ..MirrorTransform;
AnyFloat Ext_Sup_End_ABS_pos = .Right.Ext_Sup_End_ABS_pos* ..MirrorTransform;
AnyFloat Ext_Inf_End_ABS_pos = .Right.Ext_Inf_End_ABS_pos* ..MirrorTransform;
AnyFloat Int_Sup_Start_ABS_pos = .Right.Int_Sup_Start_ABS_pos* ..MirrorTransform;
AnyFloat Int_Inf_Start_ABS_pos = .Right.Int_Inf_Start_ABS_pos* ..MirrorTransform;
AnyFloat Int_Sup_End_ABS_pos = .Right.Int_Sup_End_ABS_pos* ..MirrorTransform;
AnyFloat Int_Inf_End_ABS_pos = .Right.Int_Inf_End_ABS_pos* ..MirrorTransform;


  #endif
   #if IC_TYPE == OLD
      AnyMatrix  IC_R7_Ext_Inf_pos =.Right.IC_R7_Ext_Inf_pos* ..MirrorTransform;
    AnyMatrix  IC_R7_Ext_Sup_pos =.Right.IC_R7_Ext_Sup_pos* ..MirrorTransform;
    AnyMatrix  IC_R7_Int_Inf_pos =.Right.IC_R7_Int_Inf_pos* ..MirrorTransform;
    AnyMatrix  IC_R7_Int_Sup_pos =.Right.IC_R7_Int_Sup_pos* ..MirrorTransform;


    AnyFolder IC_R7_Ext_Inf = {AnyMatrix Points= ..Right.IC_R7_Ext_Inf.Points* ...MirrorTransform;};
    AnyFolder IC_R7_Int_Inf = {AnyMatrix Points= ..Right.IC_R7_Int_Inf.Points* ...MirrorTransform;};
    AnyFolder IC_R7_Inn_Inf = {AnyMatrix Points= ..Right.IC_R7_Inn_Inf.Points* ...MirrorTransform;};
    AnyFolder IC_R7_Ext_Sup = {AnyMatrix Points= ..Right.IC_R7_Ext_Sup.Points* ...MirrorTransform;};
    AnyFolder IC_R7_Int_Sup = {AnyMatrix Points= ..Right.IC_R7_Int_Sup.Points* ...MirrorTransform;};
    AnyFolder IC_R7_Inn_Sup = {AnyMatrix Points= ..Right.IC_R7_Inn_Sup.Points* ...MirrorTransform;};

    AnyFolder IC_R7_Int_Inf0 = {AnyMatrix Points= ..Right.IC_R7_Int_Inf0.Points* ...MirrorTransform;};
    AnyFolder IC_R7_Int_Sup0 = {AnyMatrix Points= ..Right.IC_R7_Int_Sup0.Points* ...MirrorTransform;};
#endif
    AnyFloat IntercostalisInternusR6R7_elem_sternum_pos = .Right.IntercostalisInternusR6R7_elem_sternum_pos* ..MirrorTransform;
    AnyFloat CC_AlignmentNode =.Right.CC_AlignmentNode* ..MirrorTransform;
  };
};

AnyFolder R8 = {
  AnyFolder Right = {
    AnyFloat IliocostalisThoracisR2R8Node_posIns      = {-0.050680909, 0.29010249, 0.041200000};
    AnyFloat IliocostalisThoracisR3R9Via5Node_pos     = {-0.052680909, 0.28710249, 0.044200000};
    AnyFloat IliocostalisThoracisR4R10Via4Node_pos    = {-0.053680909, 0.28710249, 0.047200000};
    AnyFloat IliocostalisThoracisR5R11Via3Node_pos    = {-0.053680909, 0.28310249, 0.048700000};
    AnyFloat IliocostalisThoracisR6R12Via2Node_pos    = {-0.053680909, 0.28210249, 0.050700000};
    AnyFloat CT_pos         = ..T8.Right.CT_pos;
    AnyFloat CC_pos       = { 0.147215690, 0.18408399, 0.12073676};
    AnyFloat CV_pos         = ..T8.Right.CV_pos;
    AnyFloat CS_pos         = { 0.136500000, 0.25049976, 0.01400000};
    AnyFloat CTsup_pos       = ..T8.Right.CTsup_pos;
    AnyFloat CTinf_pos       = ..T8.Right.CTinf_pos;
    AnyFloat R8R9IC_pos = { 0.00340, 0.22125, 0.13591};
    AnyFloat TransversusThoracisR8StNodeOrg_pos              =  { 0.147215690, 0.18408399, 0.12073676};
    AnyFloat LevatorCostarumT7R8Ins_pos               =  {-0.052680909, 0.28610249, 0.04720000};
    AnyFloat LevatorCostarumT6R8Ins_pos               =  {-0.052680909, 0.28610249, 0.05220000};
    AnyFloat SubcostalisR5R8Ins_pos                 =  {-0.044680909, 0.28910249, 0.03820000};
    AnyFloat SubcostalisR6R8Ins_pos                 =  {-0.044680909, 0.28810249, 0.04220000};
    AnyFloat SubcostalisR8R10Org_pos                =  {-0.044680909, 0.27510249, 0.05720000};
    AnyFloat MidNode_pos = {0.04826739, 0.2289116, 0.1499104};
    AnyFloat ICSpringSupNode_pos = ..R7.Right.ICSpringInfNode_pos;
    AnyFloat ICSpringInfNode_pos = (MidNode_pos+..R9.Right.MidNode_pos)/2;
    AnyFloat SubcostalisR8R11Ins_pos                = {-0.046680909, 0.27010249, 0.08720000};
    AnyFloat O_SerratusAnterior_pos = {0.13873, 0.19515, 0.13081};
    AnyMatrix SuperiorCostoTransverse_points = {
      {-0.033352036, 0.290876, 0.027735772}, // 0
      {-0.039163433, 0.2916829, 0.029743893}, // 1
      {-0.042641945, 0.29209411, 0.03308161} // 2
    };
    AnyMatrix LateralCostoTransverse_points = {
      {-0.045257539, 0.28864747, 0.034023624}, // 2
      {-0.042377528, 0.2894088, 0.03048587}, // 1
      {-0.038415749, 0.2893402, 0.027777804} // 0
    };
    AnyMatrix CostoTransverse_points = {
      {-0.036953595, 0.28727248, 0.027566502}, // 1
      {-0.03131786, 0.28781372, 0.025493797} // 0
    };
    AnyMatrix Radiate_inferior_points = {
      {-0.030442005, 0.28766546, 0.025764791}, // 0
      {-0.032924969, 0.28527695, 0.026582373}, // 1
      {-0.031011447, 0.28585127, 0.025873203} // 2
    };
    AnyMatrix Radiate_superior_points = {
      {-0.030644652, 0.28958926, 0.025810726}, // 4
      {-0.033150047, 0.29049459, 0.026623128}, // 5
      {-0.035611328, 0.29095259, 0.027615584} // 6
    };


  #if IC_TYPE != OLD
  //  #if IC_TYPE== MULTI_OFFSET

      AnyMatrix  IC_Inf_pos ={
        {-0.0326632, 0.2857196, 0.02366326},
      {-0.048857272, 0.2719349, 0.067602269}, // 1
      {-0.042281345, 0.25550187, 0.1064503}, // 2
      {-0.023898594, 0.25053328, 0.12742199}, // 3
      {0.02072108, 0.23560907, 0.14830689}, // 4
      {0.056784756, 0.22152638, 0.15254387}, // 5
      {0.10220641, 0.20156375, 0.14771299}, // 6
      {0.157222, 0.1715264, 0.1149346},
    };
    AnyMatrix  IC_Sup_pos ={
   {-0.03841176, 0.2941378, 0.02212411},
      {-0.047161233, 0.27422389, 0.095651247}, // 2
      {0.0071168668, 0.25607753, 0.14268421}, // 3
      {0.047093518, 0.23986554, 0.15056385}, // 8
      {0.079521075, 0.22481705, 0.15202495}, // 11
      {0.10222902, 0.21537136, 0.14804123}, // 12
      {0.12522091, 0.20407444, 0.13932721}, // 13
      {0.1592176, 0.1810237, 0.1174901}
    };


AnyFloat Inn_Sup_Start_ABS_pos = {-0.03874576615249984, 0.28073658843795934, 0.069717263323909984};
AnyFloat Inn_Inf_Start_ABS_pos = {-0.044312305432046131, 0.27034114190897074, 0.069595096323634711};
AnyFloat Inn_Sup_End_ABS_pos = {0.15921759999989799, 0.18102370000006918, 0.11749010000006552};
AnyFloat Inn_Inf_End_ABS_pos = {0.15722199999983494, 0.17152640000009012, 0.11493460000009834};
AnyFloat Ext_Sup_Start_ABS_pos = {-0.038411760000026253, 0.29413779999994027, 0.022124110000220583};
AnyFloat Ext_Inf_Start_ABS_pos = {-0.032663200000048603, 0.28571959999995866, 0.023663260000131817};
AnyFloat Ext_Sup_End_ABS_pos = {0.15921759999989799, 0.18102370000006918, 0.11749010000006552};
AnyFloat Ext_Inf_End_ABS_pos = {0.15722199999983494, 0.17152640000009012, 0.11493460000009834};
AnyFloat Int_Sup_Start_ABS_pos = {-0.039686752970352235, 0.28340460892895519, 0.060600348086926263};
AnyFloat Int_Inf_Start_ABS_pos = {-0.043079924426614173, 0.27359830093992937, 0.060415133570193166};
AnyFloat Int_Sup_End_ABS_pos = {0.15921759999989799, 0.18102370000006918, 0.11749010000006552};
AnyFloat Int_Inf_End_ABS_pos = {0.15722199999983494, 0.17152640000009012, 0.11493460000009834};


#endif

 #if IC_TYPE == OLD
  AnyMatrix  IC_R8_Ext_Inf_pos ={
      {-0.035257544, 0.28302452, 0.031965673}, // 0
      {-0.048857272, 0.2719349, 0.067602269}, // 1
      {-0.042281345, 0.25550187, 0.1064503}, // 2
      {-0.023898594, 0.25053328, 0.12742199}, // 3
      {0.02072108, 0.23560907, 0.14830689}, // 4
      {0.056784756, 0.22152638, 0.15254387}, // 5
      {0.10220641, 0.20156375, 0.14771299}, // 6
      {0.14284201, 0.17926747, 0.12299604} // 7
    };
    AnyMatrix  IC_R8_Ext_Sup_pos ={
      {-0.038987163, 0.29173627, 0.03083303}, // 0
      {-0.047161233, 0.27422389, 0.095651247}, // 2
      {0.0071168668, 0.25607753, 0.14268421}, // 3
      {0.047093518, 0.23986554, 0.15056385}, // 8
      {0.079521075, 0.22481705, 0.15202495}, // 11
      {0.10222902, 0.21537136, 0.14804123}, // 12
      {0.12522091, 0.20407444, 0.13932721}, // 13
      {0.14571902, 0.18985881, 0.12570614} // 14
    };


    AnyMatrix  IC_R8_Int_Inf_pos = IC_R8_Ext_Inf_pos;
    AnyMatrix  IC_R8_Int_Sup_pos = IC_R8_Ext_Sup_pos;
    AnyMatrix  IC_R8_Inn_Inf_pos = IC_R8_Ext_Inf_pos;
    AnyMatrix  IC_R8_Inn_Sup_pos = IC_R8_Ext_Sup_pos;


    Spline_template IC_R8_Int_Inf0 ( NAME=IC_R8_Int_Inf_pos,NUM_ELEM=20,POINTS=.IC_R8_Int_Inf_pos,START =0.0,END =0.0)={};
    Spline_template IC_R8_Int_Sup0 ( NAME=IC_R8_Int_Inf_pos,NUM_ELEM=20,POINTS=.IC_R8_Int_Sup_pos,START =0.0,END =0.0)={};

    AnyFolder &Sup_spline = ..R7.Right.IC_R7_Int_Inf0;
    AnyFolder &Inf_spline = IC_R8_Int_Sup0;

    AnyFloat Desired_Ext_angle =47;
    AnyFloat Desired_Int_angle =-40;
      AnyFloat Desired_Inn_angle =0;


    #include "../AngleCorrection.any"

    Spline_template_ABS_OFFSETS IC_R8_Ext_Inf ( NAME=IC_R8_Ext_Inf_pos,NUM_ELEM=20,POINTS=.IC_R8_Ext_Inf_pos,OFFSETS=...R9.Right.OffSetCal.Offsets_Ext_Sup,SIGN=-1)={};
    Spline_template_ABS_OFFSETS IC_R8_Int_Inf ( NAME=IC_R8_Int_Inf_pos,NUM_ELEM=20,POINTS=.IC_R8_Int_Inf_pos,OFFSETS=...R9.Right.OffSetCal.Offsets_Int_Sup,SIGN=-1)={};
    Spline_template_ABS_OFFSETS IC_R8_Inn_Inf ( NAME=IC_R8_Inn_Inf_pos,NUM_ELEM=20,POINTS=.IC_R8_Inn_Inf_pos,OFFSETS=...R9.Right.OffSetCal.Offsets_Inn_Sup,SIGN=-1)={START=0.0;};

    Spline_template_ABS_OFFSETS IC_R8_Ext_Sup ( NAME=IC_R8_Ext_Inf_pos,NUM_ELEM=20,POINTS=.IC_R8_Ext_Sup_pos,OFFSETS=.OffSetCal.Offsets_Ext_Inf,SIGN=1)={};
    Spline_template_ABS_OFFSETS IC_R8_Int_Sup ( NAME=IC_R8_Int_Inf_pos,NUM_ELEM=20,POINTS=.IC_R8_Int_Sup_pos,OFFSETS=.OffSetCal.Offsets_Int_Inf,SIGN=1)={};
    Spline_template_ABS_OFFSETS IC_R8_Inn_Sup ( NAME=IC_R8_Inn_Inf_pos,NUM_ELEM=20,POINTS=.IC_R8_Inn_Sup_pos,OFFSETS=.OffSetCal.Offsets_Inn_Inf,SIGN=1)={START=0.0;};
#endif
    AnyFloat IntercostalisInternusR7R8_elem_sternum_pos = {0.14049, 0.1895552, 0.1244138};

    #if CC_ALIGNMENT  == MID | CC_ALIGNMENT == CV
    #if CC_ALIGNMENT == MID
    AnyFloat CC_AlignmentNode ={0.018157400473777018, 0.24369655989678457, 0.1437306541017894};
    #endif
    #if CC_ALIGNMENT == CV
    AnyFloat CC_AlignmentNode = CV_pos;
    #endif
    #else
    // #if CC_ALIGNMENT == TANGENT
    AnyFloat CC_AlignmentNode ={0.1084589, 0.2045198, 0.1424703}; // 0.5*(IC_R8_Ext_Inf.Fun(0.8)+IC_R8_Ext_Sup.Fun(0.9));
    #endif

};

  AnyFolder Left = {
    AnyFloat IliocostalisThoracisR2R8Node_posIns = .Right.IliocostalisThoracisR2R8Node_posIns * ..MirrorTransform;
    AnyFloat IliocostalisThoracisR3R9Via5Node_pos = .Right.IliocostalisThoracisR3R9Via5Node_pos * ..MirrorTransform;
    AnyFloat IliocostalisThoracisR4R10Via4Node_pos = .Right.IliocostalisThoracisR4R10Via4Node_pos * ..MirrorTransform;
    AnyFloat IliocostalisThoracisR5R11Via3Node_pos = .Right.IliocostalisThoracisR5R11Via3Node_pos * ..MirrorTransform;
    AnyFloat IliocostalisThoracisR6R12Via2Node_pos = .Right.IliocostalisThoracisR6R12Via2Node_pos * ..MirrorTransform;
    AnyFloat CT_pos = .Right.CT_pos * ..MirrorTransform;
    AnyFloat CC_pos = .Right.CC_pos * ..MirrorTransform;
    AnyFloat CV_pos = .Right.CV_pos * ..MirrorTransform;
    AnyFloat CS_pos = .Right.CS_pos * ..MirrorTransform;
    AnyFloat CTsup_pos = .Right.CTsup_pos * ..MirrorTransform;
    AnyFloat CTinf_pos = .Right.CTinf_pos * ..MirrorTransform;
    AnyFloat R8R9IC_pos = .Right.R8R9IC_pos * ..MirrorTransform;
    AnyFloat TransversusThoracisR8StNodeOrg_pos = .Right.TransversusThoracisR8StNodeOrg_pos * ..MirrorTransform;
    AnyFloat LevatorCostarumT7R8Ins_pos = .Right.LevatorCostarumT7R8Ins_pos * ..MirrorTransform;
    AnyFloat LevatorCostarumT6R8Ins_pos = .Right.LevatorCostarumT6R8Ins_pos * ..MirrorTransform;
    AnyFloat SubcostalisR5R8Ins_pos = .Right.SubcostalisR5R8Ins_pos * ..MirrorTransform;
    AnyFloat SubcostalisR6R8Ins_pos = .Right.SubcostalisR6R8Ins_pos * ..MirrorTransform;
    AnyFloat SubcostalisR8R10Org_pos = .Right.SubcostalisR8R10Org_pos * ..MirrorTransform;
    AnyFloat MidNode_pos = .Right.MidNode_pos * ..MirrorTransform;
    AnyFloat ICSpringSupNode_pos = .Right.ICSpringSupNode_pos * ..MirrorTransform;
    AnyFloat ICSpringInfNode_pos = .Right.ICSpringInfNode_pos * ..MirrorTransform;
    AnyFloat SubcostalisR8R11Ins_pos = .Right.SubcostalisR8R11Ins_pos * ..MirrorTransform;
    AnyFloat O_SerratusAnterior_pos = .Right.O_SerratusAnterior_pos * ..MirrorTransform;
    AnyMatrix SuperiorCostoTransverse_points = .Right.SuperiorCostoTransverse_points * ..MirrorTransform;
    AnyMatrix Radiate_inferior_points = .Right.Radiate_inferior_points * ..MirrorTransform;
    AnyMatrix Radiate_superior_points = .Right.Radiate_superior_points * ..MirrorTransform;
    AnyMatrix LateralCostoTransverse_points = .Right.LateralCostoTransverse_points * ..MirrorTransform;
    AnyMatrix CostoTransverse_points = .Right.CostoTransverse_points * ..MirrorTransform;

  #if IC_TYPE != OLD
  //  #if IC_TYPE== MULTI_OFFSET
    AnyMatrix  IC_Inf_pos =.Right.IC_Inf_pos* ..MirrorTransform;
    AnyMatrix  IC_Sup_pos =.Right.IC_Sup_pos* ..MirrorTransform;


 AnyFloat Inn_Sup_Start_ABS_pos =.Right.Inn_Sup_Start_ABS_pos* ..MirrorTransform;
AnyFloat Inn_Inf_Start_ABS_pos = .Right.Inn_Inf_Start_ABS_pos* ..MirrorTransform;
AnyFloat Inn_Sup_End_ABS_pos = .Right.Inn_Sup_End_ABS_pos* ..MirrorTransform;
AnyFloat Inn_Inf_End_ABS_pos = .Right.Inn_Inf_End_ABS_pos* ..MirrorTransform;
AnyFloat Ext_Sup_Start_ABS_pos = .Right.Ext_Sup_Start_ABS_pos* ..MirrorTransform;
AnyFloat Ext_Inf_Start_ABS_pos = .Right.Ext_Inf_Start_ABS_pos* ..MirrorTransform;
AnyFloat Ext_Sup_End_ABS_pos = .Right.Ext_Sup_End_ABS_pos* ..MirrorTransform;
AnyFloat Ext_Inf_End_ABS_pos = .Right.Ext_Inf_End_ABS_pos* ..MirrorTransform;
AnyFloat Int_Sup_Start_ABS_pos = .Right.Int_Sup_Start_ABS_pos* ..MirrorTransform;
AnyFloat Int_Inf_Start_ABS_pos = .Right.Int_Inf_Start_ABS_pos* ..MirrorTransform;
AnyFloat Int_Sup_End_ABS_pos = .Right.Int_Sup_End_ABS_pos* ..MirrorTransform;
AnyFloat Int_Inf_End_ABS_pos = .Right.Int_Inf_End_ABS_pos* ..MirrorTransform;


      #endif
     #if IC_TYPE == OLD
    AnyMatrix  IC_R8_Ext_Inf_pos =.Right.IC_R8_Ext_Inf_pos* ..MirrorTransform;
    AnyMatrix  IC_R8_Ext_Sup_pos =.Right.IC_R8_Ext_Sup_pos* ..MirrorTransform;
    AnyMatrix  IC_R8_Int_Inf_pos =.Right.IC_R8_Int_Inf_pos* ..MirrorTransform;
    AnyMatrix  IC_R8_Int_Sup_pos =.Right.IC_R8_Int_Sup_pos* ..MirrorTransform;


    AnyFolder IC_R8_Ext_Inf = {AnyMatrix Points= ..Right.IC_R8_Ext_Inf.Points* ...MirrorTransform;};
    AnyFolder IC_R8_Int_Inf = {AnyMatrix Points= ..Right.IC_R8_Int_Inf.Points* ...MirrorTransform;};
    AnyFolder IC_R8_Inn_Inf = {AnyMatrix Points= ..Right.IC_R8_Inn_Inf.Points* ...MirrorTransform;};
    AnyFolder IC_R8_Ext_Sup = {AnyMatrix Points= ..Right.IC_R8_Ext_Sup.Points* ...MirrorTransform;};
    AnyFolder IC_R8_Int_Sup = {AnyMatrix Points= ..Right.IC_R8_Int_Sup.Points* ...MirrorTransform;};
    AnyFolder IC_R8_Inn_Sup = {AnyMatrix Points= ..Right.IC_R8_Inn_Sup.Points* ...MirrorTransform;};

    AnyFolder IC_R8_Int_Inf0 = {AnyMatrix Points= ..Right.IC_R8_Int_Inf0.Points* ...MirrorTransform;};
    AnyFolder IC_R85Int_Sup0 = {AnyMatrix Points= ..Right.IC_R8_Int_Sup0.Points* ...MirrorTransform;};
#endif

    AnyFloat IntercostalisInternusR7R8_elem_sternum_pos = .Right.IntercostalisInternusR7R8_elem_sternum_pos* ..MirrorTransform;
    AnyFloat CC_AlignmentNode =.Right.CC_AlignmentNode* ..MirrorTransform;
  };
};

AnyFolder R9 = {
  AnyFolder Right = {
    AnyFloat IliocostalisThoracisR3R9Node_posIns      = {-0.049423229, 0.25994745, 0.040000000};
    AnyFloat IliocostalisThoracisR4R10Via5Node_pos    = {-0.051423229, 0.25994745, 0.043000000};
    AnyFloat IliocostalisThoracisR5R11Via4Node_pos    = {-0.051423229, 0.25594745, 0.044000000};
    AnyFloat IliocostalisThoracisR6R12Via3Node_pos    = {-0.052423229, 0.25394745, 0.046000000};
    AnyFloat CT_pos         = ..T9.Right.CT_pos;
    AnyFloat CC_pos       = { 0.139388370, 0.14565845, 0.12146134};
    AnyFloat CV_pos         = ..T9.Right.CV_pos;
    AnyFloat CS_pos         = { 0.137500000, 0.24349976, 0.01200000};
    AnyFloat CTsup_pos       = ..T9.Right.CTsup_pos;
    AnyFloat CTinf_pos       = ..T9.Right.CTinf_pos;
    AnyFloat R9R10IC_pos ={-0.00549, 0.18675, 0.11931};
    AnyFloat TransversusThoracisR9StNodeOrg_pos              =  { 0.139388370, 0.14565845, 0.12146134};
    AnyFloat LevatorCostarumT8R9Ins_pos               =  {-0.051423229, 0.25294745, 0.04800000};
    AnyFloat LevatorCostarumT7R9Ins_pos               =  {-0.051423229, 0.25294745, 0.05300000};
    AnyFloat SubcostalisR6R9Ins_pos                 =  {-0.043423229, 0.25794745, 0.03400000};
    AnyFloat SubcostalisR7R9Ins_pos                 =  {-0.043423229, 0.25594745, 0.03800000};
    AnyFloat MidNode_pos = {0.04648257, 0.1923898, 0.1414613};
    AnyFloat MidPosNode_pos = {0.00152967, 0.2097988, 0.1247421};
    AnyFloat ICSpringSupNode_pos = ..R8.Right.ICSpringInfNode_pos;
    AnyFloat ICSpringInfNode_pos = (MidNode_pos+..R10.Right.MidNode_pos)/2;
    AnyFloat SubcostalisR9R11Ins_pos               = {-0.046680909, 0.23710249, 0.0800000};
    AnyFloat O_serratus_posterior_inferior_pos = {-0.044, 0.225 , 0.079};
    AnyMatrix SuperiorCostoTransverse_points = {
      {-0.034536839, 0.26453197, 0.022422679}, // 0
      {-0.038583703, 0.26499638, 0.024158016}, // 1
      {-0.041420311, 0.26478577, 0.027312303} // 2
    };
    AnyMatrix LateralCostoTransverse_points = {
      {-0.042127959, 0.25850332, 0.027851913}, // 0
      {-0.044089809, 0.25709471, 0.030736214}, // 1
      {-0.045194548, 0.25355747, 0.036338273} // 2
    };
    AnyMatrix CostoTransverse_points = {
      {-0.035496492, 0.25800699, 0.02273106}, // 1
      {-0.025086705, 0.26016816, 0.018238284} // 0
    };
    AnyMatrix Radiate_inferior_points = {
      {-0.029381372, 0.2561129, 0.019731756}, // 0
      {-0.027035244, 0.25701606, 0.01850594}, // 1
      {-0.025164889, 0.25826967, 0.01805892}, // 2
      {-0.024274915, 0.25958857, 0.018589877} // 3
    };
    AnyMatrix Radiate_superior_points = {
      {-0.025003787, 0.26131669, 0.018871663}, // 4
      {-0.027288148, 0.26208267, 0.019101886}, // 5
      {-0.030879579, 0.26355305, 0.020677725}, // 6
      {-0.033305362, 0.26430508, 0.021630401} // 7
    };


  #if IC_TYPE != OLD
  //  #if IC_TYPE== MULTI_OFFSET
      AnyMatrix  IC_Inf_pos ={
      {-0.027637368, 0.25705072, 0.019905658}, // 0
      {-0.042845365, 0.25021258, 0.039795395}, // 1
      {-0.04628136, 0.22916949, 0.070349924}, // 2
      {-0.028743416, 0.21158491, 0.10439438}, // 3
      {0.012379516, 0.1961662, 0.13122791}, // 4
      {0.051232547, 0.1801015, 0.14173786}, // 5
      {0.088866003, 0.16399755, 0.13747801}, // 6

      {0.1490234, 0.135545, 0.1183906}
    };
    AnyMatrix  IC_Sup_pos ={
{-0.03687902, 0.2678752, 0.0199621},
        {-0.048693482, 0.25513583, 0.052074697}, // 1
      {-0.045105256, 0.23489694, 0.087411724}, // 2
      {-0.009259074, 0.21870579, 0.12482595}, // 3
      {0.021713303, 0.20757416, 0.1385719}, // 4
      {0.055532683, 0.19313414, 0.14520749}, // 5
      {0.091723442, 0.17489254, 0.14167748}, // 6
      {0.1488858, 0.1446712, 0.1265465}
    };


AnyFloat Inn_Sup_Start_ABS_pos = {-0.045320732208561067, 0.24799178057710253, 0.064182594397429529};
AnyFloat Inn_Inf_Start_ABS_pos = {-0.04244124037909737, 0.23132504524028877, 0.068674591425838982};
AnyFloat Inn_Sup_End_ABS_pos = {0.14888579999982851, 0.14467120000009068, 0.12654650000004541};
AnyFloat Inn_Inf_End_ABS_pos = {0.14902339999981951, 0.13554500000008535, 0.11839060000005727};
AnyFloat Ext_Sup_Start_ABS_pos = {-0.036879020000035442, 0.26787519999996173, 0.01996210000009634};
AnyFloat Ext_Inf_Start_ABS_pos = {-0.027637368000045636, 0.25705071999997947, 0.019905658000059671};
AnyFloat Ext_Sup_End_ABS_pos = {0.14888579999982851, 0.14467120000009068, 0.12654650000004541};
AnyFloat Ext_Inf_End_ABS_pos = {0.14902339999981951, 0.13554500000008535, 0.11839060000005727};
AnyFloat Int_Sup_Start_ABS_pos = {-0.045329156319342284, 0.25229936525944574, 0.055505600764231819};
AnyFloat Int_Inf_Start_ABS_pos = {-0.042658857491180875, 0.24160199956502015, 0.052070313571085228};
AnyFloat Int_Sup_End_ABS_pos = {0.14888579999982851, 0.14467120000009068, 0.12654650000004541};
AnyFloat Int_Inf_End_ABS_pos = {0.14902339999981951, 0.13554500000008535, 0.11839060000005727};


    #endif

     #if IC_TYPE == OLD

     AnyMatrix  IC_R9_Ext_Inf_pos ={
      {-0.027637368, 0.25705072, 0.019905658}, // 0
      {-0.042845365, 0.25021258, 0.039795395}, // 1
      {-0.04628136, 0.22916949, 0.070349924}, // 2
      {-0.028743416, 0.21158491, 0.10439438}, // 3
      {0.012379516, 0.1961662, 0.13122791}, // 4
      {0.051232547, 0.1801015, 0.14173786}, // 5
      {0.088866003, 0.16399755, 0.13747801}, // 6
      {0.13369334, 0.14275749, 0.1230762} // 7
    };
    AnyMatrix  IC_R9_Ext_Sup_pos ={
      {-0.03906152, 0.26463112, 0.027602302}, // 0
      {-0.048693482, 0.25513583, 0.052074697}, // 1
      {-0.045105256, 0.23489694, 0.087411724}, // 2
      {-0.009259074, 0.21870579, 0.12482595}, // 3
      {0.021713303, 0.20757416, 0.1385719}, // 4
      {0.055532683, 0.19313414, 0.14520749}, // 5
      {0.091723442, 0.17489254, 0.14167748}, // 6
      {0.13407348, 0.15248039, 0.13032182} // 7
    };


    AnyMatrix  IC_R9_Int_Inf_pos = IC_R9_Ext_Inf_pos;
    AnyMatrix  IC_R9_Int_Sup_pos = IC_R9_Ext_Sup_pos;
    AnyMatrix  IC_R9_Inn_Inf_pos = IC_R9_Ext_Inf_pos;
    AnyMatrix  IC_R9_Inn_Sup_pos = IC_R9_Ext_Sup_pos;

    Spline_template IC_R9_Int_Inf0 ( NAME=IC_R9_Int_Inf_pos,NUM_ELEM=20,POINTS=.IC_R9_Int_Inf_pos,START =0.0,END =0.0)={};
    Spline_template IC_R9_Int_Sup0 ( NAME=IC_R9_Int_Inf_pos,NUM_ELEM=20,POINTS=.IC_R9_Int_Sup_pos,START =0.0,END =0.0)={};

    AnyFolder &Sup_spline = ..R8.Right.IC_R8_Int_Inf0;
    AnyFolder &Inf_spline = IC_R9_Int_Sup0;

    AnyFloat Desired_Ext_angle =50;
    AnyFloat Desired_Int_angle =-40;
     AnyFloat Desired_Inn_angle =0;


    #include "../AngleCorrection.any"

    Spline_template_ABS_OFFSETS IC_R9_Ext_Inf ( NAME=IC_R9_Ext_Inf_pos,NUM_ELEM=20,POINTS=.IC_R9_Ext_Inf_pos,OFFSETS=...R10.Right.OffSetCal.Offsets_Ext_Sup,SIGN=-1)={};
    Spline_template_ABS_OFFSETS IC_R9_Int_Inf ( NAME=IC_R9_Int_Inf_pos,NUM_ELEM=20,POINTS=.IC_R9_Int_Inf_pos,OFFSETS=...R10.Right.OffSetCal.Offsets_Int_Sup,SIGN=-1)={};
    Spline_template_ABS_OFFSETS IC_R9_Inn_Inf ( NAME=IC_R9_Inn_Inf_pos,NUM_ELEM=20,POINTS=.IC_R9_Inn_Inf_pos,OFFSETS=...R10.Right.OffSetCal.Offsets_Inn_Sup,SIGN=-1)={START=0.0;};

    Spline_template_ABS_OFFSETS IC_R9_Ext_Sup ( NAME=IC_R9_Ext_Inf_pos,NUM_ELEM=20,POINTS=.IC_R9_Ext_Sup_pos,OFFSETS=.OffSetCal.Offsets_Ext_Inf,SIGN=1)={};
    Spline_template_ABS_OFFSETS IC_R9_Int_Sup ( NAME=IC_R9_Int_Inf_pos,NUM_ELEM=20,POINTS=.IC_R9_Int_Sup_pos,OFFSETS=.OffSetCal.Offsets_Int_Inf,SIGN=1)={};
    Spline_template_ABS_OFFSETS IC_R9_Inn_Sup ( NAME=IC_R9_Inn_Inf_pos,NUM_ELEM=20,POINTS=.IC_R9_Inn_Sup_pos,OFFSETS=.OffSetCal.Offsets_Inn_Inf,SIGN=1)={START=0.0;};
#endif

    AnyFloat IntercostalisInternusR8R9_elem_sternum_pos = {0.1311498, 0.1479617, 0.1238891};

    #if CC_ALIGNMENT  == MID | CC_ALIGNMENT == CV
    #if CC_ALIGNMENT == MID
    AnyFloat CC_AlignmentNode ={0.011876306763856485, 0.20355795521581943, 0.13103921212911135};
    #endif
    #if CC_ALIGNMENT == CV
    AnyFloat CC_AlignmentNode = CV_pos;
    #endif
    #else
    // #if CC_ALIGNMENT == TANGENT
    AnyFloat CC_AlignmentNode ={0.09582209, 0.1660261, 0.1366588}; // 0.5*(IC_R9_Ext_Inf.Fun(0.8)+IC_R9_Ext_Sup.Fun(0.9));
    #endif

};

  AnyFolder Left = {
    AnyFloat IliocostalisThoracisR3R9Node_posIns = .Right.IliocostalisThoracisR3R9Node_posIns * ..MirrorTransform;
    AnyFloat IliocostalisThoracisR4R10Via5Node_pos = .Right.IliocostalisThoracisR4R10Via5Node_pos * ..MirrorTransform;
    AnyFloat IliocostalisThoracisR5R11Via4Node_pos = .Right.IliocostalisThoracisR5R11Via4Node_pos * ..MirrorTransform;
    AnyFloat IliocostalisThoracisR6R12Via3Node_pos = .Right.IliocostalisThoracisR6R12Via3Node_pos * ..MirrorTransform;
    AnyFloat CT_pos = .Right.CT_pos * ..MirrorTransform;
    AnyFloat CC_pos = .Right.CC_pos * ..MirrorTransform;
    AnyFloat CV_pos = .Right.CV_pos * ..MirrorTransform;
    AnyFloat CS_pos = .Right.CS_pos * ..MirrorTransform;
    AnyFloat CTsup_pos = .Right.CTsup_pos * ..MirrorTransform;
    AnyFloat CTinf_pos = .Right.CTinf_pos * ..MirrorTransform;
    AnyFloat R9R10IC_pos = .Right.R9R10IC_pos * ..MirrorTransform;
    AnyFloat TransversusThoracisR9StNodeOrg_pos = .Right.TransversusThoracisR9StNodeOrg_pos * ..MirrorTransform;
    AnyFloat LevatorCostarumT8R9Ins_pos = .Right.LevatorCostarumT8R9Ins_pos * ..MirrorTransform;
    AnyFloat LevatorCostarumT7R9Ins_pos = .Right.LevatorCostarumT7R9Ins_pos * ..MirrorTransform;
    AnyFloat SubcostalisR6R9Ins_pos = .Right.SubcostalisR6R9Ins_pos * ..MirrorTransform;
    AnyFloat SubcostalisR7R9Ins_pos = .Right.SubcostalisR7R9Ins_pos * ..MirrorTransform;
    AnyFloat MidNode_pos = .Right.MidNode_pos * ..MirrorTransform;
    AnyFloat MidPosNode_pos = .Right.MidPosNode_pos * ..MirrorTransform;
    AnyFloat ICSpringSupNode_pos = .Right.ICSpringSupNode_pos * ..MirrorTransform;
    AnyFloat ICSpringInfNode_pos = .Right.ICSpringInfNode_pos * ..MirrorTransform;
    AnyFloat SubcostalisR9R11Ins_pos = .Right.SubcostalisR9R11Ins_pos * ..MirrorTransform;
    AnyFloat O_serratus_posterior_inferior_pos = .Right.O_serratus_posterior_inferior_pos * ..MirrorTransform;
    AnyMatrix SuperiorCostoTransverse_points = .Right.SuperiorCostoTransverse_points * ..MirrorTransform;
    AnyMatrix Radiate_inferior_points = .Right.Radiate_inferior_points * ..MirrorTransform;
    AnyMatrix Radiate_superior_points = .Right.Radiate_superior_points * ..MirrorTransform;
    AnyMatrix LateralCostoTransverse_points = .Right.LateralCostoTransverse_points * ..MirrorTransform;
    AnyMatrix CostoTransverse_points = .Right.CostoTransverse_points * ..MirrorTransform;
  #if IC_TYPE != OLD
  //  #if IC_TYPE== MULTI_OFFSET
    AnyMatrix  IC_Inf_pos =.Right.IC_Inf_pos* ..MirrorTransform;
    AnyMatrix  IC_Sup_pos =.Right.IC_Sup_pos* ..MirrorTransform;


       AnyFloat Inn_Sup_Start_ABS_pos =.Right.Inn_Sup_Start_ABS_pos* ..MirrorTransform;
AnyFloat Inn_Inf_Start_ABS_pos = .Right.Inn_Inf_Start_ABS_pos* ..MirrorTransform;
AnyFloat Inn_Sup_End_ABS_pos = .Right.Inn_Sup_End_ABS_pos* ..MirrorTransform;
AnyFloat Inn_Inf_End_ABS_pos = .Right.Inn_Inf_End_ABS_pos* ..MirrorTransform;
AnyFloat Ext_Sup_Start_ABS_pos = .Right.Ext_Sup_Start_ABS_pos* ..MirrorTransform;
AnyFloat Ext_Inf_Start_ABS_pos = .Right.Ext_Inf_Start_ABS_pos* ..MirrorTransform;
AnyFloat Ext_Sup_End_ABS_pos = .Right.Ext_Sup_End_ABS_pos* ..MirrorTransform;
AnyFloat Ext_Inf_End_ABS_pos = .Right.Ext_Inf_End_ABS_pos* ..MirrorTransform;
AnyFloat Int_Sup_Start_ABS_pos = .Right.Int_Sup_Start_ABS_pos* ..MirrorTransform;
AnyFloat Int_Inf_Start_ABS_pos = .Right.Int_Inf_Start_ABS_pos* ..MirrorTransform;
AnyFloat Int_Sup_End_ABS_pos = .Right.Int_Sup_End_ABS_pos* ..MirrorTransform;
AnyFloat Int_Inf_End_ABS_pos = .Right.Int_Inf_End_ABS_pos* ..MirrorTransform;


   #endif
     #if IC_TYPE == OLD
 AnyMatrix  IC_R9_Ext_Inf_pos =.Right.IC_R9_Ext_Inf_pos* ..MirrorTransform;
    AnyMatrix  IC_R9_Ext_Sup_pos =.Right.IC_R9_Ext_Sup_pos* ..MirrorTransform;
    AnyMatrix  IC_R9_Int_Inf_pos =.Right.IC_R9_Int_Inf_pos* ..MirrorTransform;
    AnyMatrix  IC_R9_Int_Sup_pos =.Right.IC_R9_Int_Sup_pos* ..MirrorTransform;


    AnyFolder IC_R9_Ext_Inf = {AnyMatrix Points= ..Right.IC_R9_Ext_Inf.Points* ...MirrorTransform;};
    AnyFolder IC_R9_Int_Inf = {AnyMatrix Points= ..Right.IC_R9_Int_Inf.Points* ...MirrorTransform;};
    AnyFolder IC_R9_Inn_Inf = {AnyMatrix Points= ..Right.IC_R9_Inn_Inf.Points* ...MirrorTransform;};
    AnyFolder IC_R9_Ext_Sup = {AnyMatrix Points= ..Right.IC_R9_Ext_Sup.Points* ...MirrorTransform;};
    AnyFolder IC_R9_Int_Sup = {AnyMatrix Points= ..Right.IC_R9_Int_Sup.Points* ...MirrorTransform;};
    AnyFolder IC_R9_Inn_Sup = {AnyMatrix Points= ..Right.IC_R9_Inn_Sup.Points* ...MirrorTransform;};

    AnyFolder IC_R9_Int_Inf0 = {AnyMatrix Points= ..Right.IC_R9_Int_Inf0.Points* ...MirrorTransform;};
    AnyFolder IC_R9_Int_Sup0 = {AnyMatrix Points= ..Right.IC_R9_Int_Sup0.Points* ...MirrorTransform;};
    #endif

    AnyFloat IntercostalisInternusR8R9_elem_sternum_pos = .Right.IntercostalisInternusR8R9_elem_sternum_pos* ..MirrorTransform;
    AnyFloat CC_AlignmentNode =.Right.CC_AlignmentNode* ..MirrorTransform;
  };
};

AnyFolder R10 = {
  AnyFolder Right = {
    AnyFloat OEC10a_CINode_pos       = {0.086559363-0.03,0.12617856+0.01, 0.12822376+0.0075}+{-0.005,0.007,-0.003}; // oec7
    AnyFloat IliocostalisThoracisR4R10Node_posIns     = {-0.04930874, 0.22891201, 0.039300000};
    AnyFloat IliocostalisThoracisR5R11Via5Node_pos    = {-0.05230874, 0.22691201, 0.041300000};
    AnyFloat IliocostalisThoracisR6R12Via4Node_pos    = {-0.05230874, 0.22591201, 0.043300000};
    AnyFloat CT_pos         = ..T10.Right.CT_pos;
    AnyFloat CC_pos       = { 0.126802860, 0.11873311, 0.12013349};
    AnyFloat CV_pos         = ..T10.Right.CV_pos;
    AnyFloat CS_pos         = { 0.138000000, 0.23749976, 0.01000000};
    AnyFloat CTsup_pos       = ..T10.Right.CTsup_pos;
    AnyFloat CTinf_pos       = ..T10.Right.CTinf_pos;
    AnyFloat TransversusThoracisR10StNodeOrg_pos             =  { 0.12680286, 0.11873311, 0.12013349};
    AnyFloat LevatorCostarumT9R10Ins_pos              =  {-0.04930874, 0.22791201, 0.04230000};
    AnyFloat LevatorCostarumT8R10Ins_pos              =  {-0.04930874, 0.22791201, 0.04730000};
    AnyFloat SubcostalisR7R10Ins_pos                =  {-0.03930874, 0.23291201, 0.03130000};
    AnyFloat SubcostalisR8R10Ins_pos                =  {-0.03930874, 0.23091201, 0.03430000};
    AnyFloat MidNode_pos = {0.04374706, 0.1499479, 0.1312835};
    AnyFloat MidPosNode_pos = {0.003989775, 0.1695822, 0.1175201};
    AnyFloat MidAntNode_pos = {0.08586516, 0.1292659, 0.1269468};
    AnyFloat ICSpringSupNode_pos = ..R9.Right.ICSpringInfNode_pos;
    AnyFloat ICSpringInfPosteriorNode_pos = {-0.02810578, 0.1806238, 0.0866274};
    AnyFloat ICSpringInfNode_pos = {0.04210578, 0.1356238, 0.1266274};
    AnyFloat O_serratus_posterior_inferior_pos = {-0.044, 0.2 , 0.076};
    AnyFloat DiaphragmR10_1Node_pos = {0.04374706, 0.1499479, 0.1272835};
    AnyFloat DiaphragmR10_2Node_pos = {0.0714, 0.1395, 0.128451};
    AnyFloat DiaphragmR10_3Node_pos = {0.098866, 0.1288, 0.123451};

    AnyMatrix SuperiorCostoTransverse_points = {
      {-0.02943288, 0.2375714, 0.022466073}, // 0
      {-0.03552315, 0.23799509, 0.026590496}, // 1
      {-0.039854001, 0.23689032, 0.030318161} // 2
    };
    AnyMatrix LateralCostoTransverse_points = {
      {-0.043335289, 0.22991095, 0.029308656}, // 3
      {-0.046653844, 0.22646193, 0.035960812}, // 4
      {-0.047026858, 0.22454292, 0.039598968} // 5
    };
    AnyMatrix CostoTransverse_points = {
      {-0.035711855, 0.23411153, 0.023204705}, // 1
      {-0.025880311, 0.23424341, 0.020017371} // 0
    };
    AnyMatrix Radiate_inferior_points = {
      {-0.031814232, 0.2294032, 0.023571549}, // 0
      {-0.030537361, 0.22861859, 0.02517453}, // 1
      {-0.028498363, 0.22931775, 0.025246101}, // 2
      {-0.026699765, 0.23063484, 0.02402042}, // 3
      {-0.025510928, 0.23230895, 0.022838417}, // 4
      {-0.024859324, 0.23463193, 0.021204192} // 5
    };
    AnyMatrix Radiate_superior_points = {
      {-0.025481293, 0.2362434, 0.020629926}, // 6
      {-0.027311305, 0.23746094, 0.021012565}, // 7
      {-0.029777599, 0.23766683, 0.021963572}, // 8
      {-0.032366522, 0.23785071, 0.022843881} // 9
    };


  #if IC_TYPE != OLD
  //  #if IC_TYPE== MULTI_OFFSET

      AnyMatrix  IC_Inf_pos ={
     {-0.02564023, 0.2307179, 0.01972587},
      {-0.043690316, 0.21459551, 0.0497308}, // 1
      {-0.042769466, 0.19437814, 0.078844465}, // 2
      {-0.018358208, 0.17506717, 0.10601946}, // 3
         {0.017274659, 0.15740031, 0.12310033}, // 4
         {  0.0317915, 0.1504487, 0.1258527},
      {0.047608793, 0.14279477, 0.12991665}, // 5
      {0.080364801, 0.12798364, 0.126522}, // 6
    };
    AnyMatrix  IC_Sup_pos ={
{-0.03251936, 0.2411551, 0.01831332},
      //  {-0.034888178, 0.23762357, 0.02543062}, // 0
      {-0.047251526, 0.22196983, 0.057611357}, // 1
      {-0.044488464, 0.20553547, 0.085886881}, // 3
      {-0.0091837971, 0.18399757, 0.11828784}, // 4
      {0.023178615, 0.16819961, 0.13028775}, // 5
      {0.068750769, 0.14483362, 0.13454451}, // 6
      {0.09664578, 0.13246739, 0.12996297}, // 7
//      {0.12713598, 0.12178311, 0.12354144} // 8
      {0.1424491, 0.1162359, 0.120428}
    };


AnyFloat Inn_Sup_Start_ABS_pos = {-0.043777319598084487, 0.21455737033067052, 0.06989040974850079};
AnyFloat Inn_Inf_Start_ABS_pos = {-0.041312581705695128, 0.2072172806755021, 0.059904874391558227};
AnyFloat Inn_Sup_End_ABS_pos = {0.14244909999986258, 0.1162359000000487, 0.1204280000000286};
AnyFloat Inn_Inf_End_ABS_pos = {0.080364800999901731, 0.12798364000004445, 0.12652200000001015};
AnyFloat Ext_Sup_Start_ABS_pos = {-0.032519360000044212, 0.24115509999994247, 0.018313320000117896};
AnyFloat Ext_Inf_Start_ABS_pos = {-0.025640230000054155, 0.23071789999995163, 0.019725870000090018};
AnyFloat Ext_Sup_End_ABS_pos = {0.14244909999986258, 0.1162359000000487, 0.1204280000000286};
AnyFloat Ext_Inf_End_ABS_pos = {0.080364800999901731, 0.12798364000004445, 0.12652200000001015};
AnyFloat Int_Sup_Start_ABS_pos = {-0.04094392795916476, 0.22821043507477384, 0.04431667091796359};
AnyFloat Int_Inf_Start_ABS_pos = {-0.037597862429797839, 0.2172117490217659, 0.043759127220998222};
AnyFloat Int_Sup_End_ABS_pos = {0.14244909999986258, 0.1162359000000487, 0.1204280000000286};
AnyFloat Int_Inf_End_ABS_pos = {0.080364800999901731, 0.12798364000004445, 0.12652200000001015};


    #endif

 #if IC_TYPE == OLD
      AnyMatrix  IC_R10_Ext_Inf_pos ={
      {-0.026773008, 0.22952883, 0.021868877}, // 0
      {-0.043690316, 0.21459551, 0.0497308}, // 1
      {-0.042769466, 0.19437814, 0.078844465}, // 2
      {-0.018358208, 0.17506717, 0.10601946}, // 3
      {0.017274659, 0.15740031, 0.12310033}, // 4
      {0.047608793, 0.14279477, 0.12991665}, // 5
      {0.080364801, 0.12798364, 0.126522}, // 6
      {0.12165797, 0.11625829, 0.11877961} // 7
    };
    AnyMatrix  IC_R10_Ext_Sup_pos ={
      {-0.034888178, 0.23762357, 0.02543062}, // 0
      {-0.047251526, 0.22196983, 0.057611357}, // 1
      {-0.044488464, 0.20553547, 0.085886881}, // 3
      {-0.0091837971, 0.18399757, 0.11828784}, // 4
      {0.023178615, 0.16819961, 0.13028775}, // 5
      {0.068750769, 0.14483362, 0.13454451}, // 6
      {0.09664578, 0.13246739, 0.12996297}, // 7
      {0.12713598, 0.12178311, 0.12354144} // 8
    };


    AnyMatrix  IC_R10_Int_Inf_pos = IC_R10_Ext_Inf_pos;
    AnyMatrix  IC_R10_Int_Sup_pos = IC_R10_Ext_Sup_pos;
    AnyMatrix  IC_R10_Inn_Inf_pos = IC_R10_Ext_Inf_pos;
    AnyMatrix  IC_R10_Inn_Sup_pos = IC_R10_Ext_Sup_pos;

    Spline_template_ABS IC_R10_Int_Inf0 ( NAME=IC_R10_Int_Inf_pos,NUM_ELEM=20,POINTS=.IC_R10_Int_Inf_pos,START =0.0,END =0.06)={};
    Spline_template_ABS IC_R10_Int_Sup0 ( NAME=IC_R10_Int_Inf_pos,NUM_ELEM=20,POINTS=.IC_R10_Int_Sup_pos,START =0.0,END =0.0)={};

    AnyFolder &Sup_spline = ..R9.Right.IC_R9_Int_Inf0;
    AnyFolder &Inf_spline = IC_R10_Int_Sup0;

    AnyFloat Desired_Ext_angle =55;
    AnyFloat Desired_Int_angle =-40;
    AnyFloat Desired_Inn_angle =0;


    #include "../AngleCorrection.any"

    Spline_template_ABS_OFFSETS IC_R10_Ext_Inf ( NAME=IC_R10_Ext_Inf_pos,NUM_ELEM=20,POINTS=.IC_R10_Ext_Inf_pos,OFFSETS=...R11.Right.OffSetCal.Offsets_Ext_Sup,SIGN=-1)={};
    Spline_template_ABS_OFFSETS IC_R10_Int_Inf ( NAME=IC_R10_Int_Inf_pos,NUM_ELEM=20,POINTS=.IC_R10_Int_Inf_pos,OFFSETS=...R11.Right.OffSetCal.Offsets_Int_Sup,SIGN=-1)={};
    Spline_template_ABS_OFFSETS IC_R10_Inn_Inf ( NAME=IC_R10_Inn_Inf_pos,NUM_ELEM=20,POINTS=.IC_R10_Inn_Inf_pos,OFFSETS=...R11.Right.OffSetCal.Offsets_Inn_Sup,SIGN=-1)={START=0.0;};

    Spline_template_ABS_OFFSETS IC_R10_Ext_Sup ( NAME=IC_R10_Ext_Inf_pos,NUM_ELEM=20,POINTS=.IC_R10_Ext_Sup_pos,OFFSETS=.OffSetCal.Offsets_Ext_Inf,SIGN=1)={};
    Spline_template_ABS_OFFSETS IC_R10_Int_Sup ( NAME=IC_R10_Int_Inf_pos,NUM_ELEM=20,POINTS=.IC_R10_Int_Sup_pos,OFFSETS=.OffSetCal.Offsets_Int_Inf,SIGN=1)={};
    Spline_template_ABS_OFFSETS IC_R10_Inn_Sup ( NAME=IC_R10_Inn_Inf_pos,NUM_ELEM=20,POINTS=.IC_R10_Inn_Sup_pos,OFFSETS=.OffSetCal.Offsets_Inn_Inf,SIGN=1)={START=0.0;};
  #endif


    AnyFloat IntercostalisInternusR9R10_elem_sternum_pos = {0.12165797, 0.12525829, 0.11877961};

    #if CC_ALIGNMENT  == MID | CC_ALIGNMENT == CV
    #if CC_ALIGNMENT == MID
    AnyFloat CC_AlignmentNode = {-0.0049627968452012616, 0.17591157634388693, 0.1137453230373896};
    #endif
    #if CC_ALIGNMENT == CV
    AnyFloat CC_AlignmentNode = CV_pos;
    #endif
    #else
    // #if CC_ALIGNMENT == TANGENT
    AnyFloat CC_AlignmentNode = {0.08638348, 0.1319243, 0.1277726};// 0.5*(IC_R10_Ext_Inf.Fun(0.8)+IC_R10_Ext_Sup.Fun(0.9));
    #endif

};

  AnyFolder Left = {
    AnyFloat OEC10a_CINode_pos = .Right.OEC10a_CINode_pos * ..MirrorTransform;
    AnyFloat IliocostalisThoracisR4R10Node_posIns = .Right.IliocostalisThoracisR4R10Node_posIns * ..MirrorTransform;
    AnyFloat IliocostalisThoracisR5R11Via5Node_pos = .Right.IliocostalisThoracisR5R11Via5Node_pos * ..MirrorTransform;
    AnyFloat IliocostalisThoracisR6R12Via4Node_pos = .Right.IliocostalisThoracisR6R12Via4Node_pos * ..MirrorTransform;
    AnyFloat CT_pos = .Right.CT_pos * ..MirrorTransform;
    AnyFloat CC_pos = .Right.CC_pos * ..MirrorTransform;
    AnyFloat CV_pos = .Right.CV_pos * ..MirrorTransform;
    AnyFloat CS_pos = .Right.CS_pos * ..MirrorTransform;
    AnyFloat CTsup_pos = .Right.CTsup_pos * ..MirrorTransform;
    AnyFloat CTinf_pos = .Right.CTinf_pos * ..MirrorTransform;
    AnyFloat TransversusThoracisR10StNodeOrg_pos = .Right.TransversusThoracisR10StNodeOrg_pos * ..MirrorTransform;
    AnyFloat LevatorCostarumT9R10Ins_pos = .Right.LevatorCostarumT9R10Ins_pos * ..MirrorTransform;
    AnyFloat LevatorCostarumT8R10Ins_pos = .Right.LevatorCostarumT8R10Ins_pos * ..MirrorTransform;
    AnyFloat SubcostalisR7R10Ins_pos = .Right.SubcostalisR7R10Ins_pos * ..MirrorTransform;
    AnyFloat SubcostalisR8R10Ins_pos = .Right.SubcostalisR8R10Ins_pos * ..MirrorTransform;
    AnyFloat MidNode_pos = .Right.MidNode_pos * ..MirrorTransform;
    AnyFloat MidPosNode_pos = .Right.MidPosNode_pos * ..MirrorTransform;
    AnyFloat MidAntNode_pos = .Right.MidAntNode_pos * ..MirrorTransform;
    AnyFloat ICSpringSupNode_pos = .Right.ICSpringSupNode_pos * ..MirrorTransform;
    AnyFloat ICSpringInfNode_pos = .Right.ICSpringInfNode_pos * ..MirrorTransform;
    AnyFloat ICSpringInfPosteriorNode_pos = .Right.ICSpringInfPosteriorNode_pos * ..MirrorTransform;
    AnyFloat O_serratus_posterior_inferior_pos = .Right.O_serratus_posterior_inferior_pos * ..MirrorTransform;
    AnyMatrix SuperiorCostoTransverse_points = .Right.SuperiorCostoTransverse_points * ..MirrorTransform;
    AnyMatrix Radiate_inferior_points = .Right.Radiate_inferior_points * ..MirrorTransform;
    AnyMatrix Radiate_superior_points = .Right.Radiate_superior_points * ..MirrorTransform;
    AnyMatrix LateralCostoTransverse_points = .Right.LateralCostoTransverse_points * ..MirrorTransform;
    AnyMatrix CostoTransverse_points = .Right.CostoTransverse_points * ..MirrorTransform;
    AnyFloat DiaphragmR10_1Node_pos = .Right.DiaphragmR10_1Node_pos * ..MirrorTransform;
    AnyFloat DiaphragmR10_2Node_pos = .Right.DiaphragmR10_2Node_pos * ..MirrorTransform;
    AnyFloat DiaphragmR10_3Node_pos = .Right.DiaphragmR10_3Node_pos * ..MirrorTransform;

  #if IC_TYPE != OLD
  //  #if IC_TYPE== MULTI_OFFSET
   AnyMatrix  IC_Inf_pos =.Right.IC_Inf_pos* ..MirrorTransform;
    AnyMatrix  IC_Sup_pos =.Right.IC_Sup_pos* ..MirrorTransform;


       AnyFloat Inn_Sup_Start_ABS_pos =.Right.Inn_Sup_Start_ABS_pos* ..MirrorTransform;
AnyFloat Inn_Inf_Start_ABS_pos = .Right.Inn_Inf_Start_ABS_pos* ..MirrorTransform;
AnyFloat Inn_Sup_End_ABS_pos = .Right.Inn_Sup_End_ABS_pos* ..MirrorTransform;
AnyFloat Inn_Inf_End_ABS_pos = .Right.Inn_Inf_End_ABS_pos* ..MirrorTransform;
AnyFloat Ext_Sup_Start_ABS_pos = .Right.Ext_Sup_Start_ABS_pos* ..MirrorTransform;
AnyFloat Ext_Inf_Start_ABS_pos = .Right.Ext_Inf_Start_ABS_pos* ..MirrorTransform;
AnyFloat Ext_Sup_End_ABS_pos = .Right.Ext_Sup_End_ABS_pos* ..MirrorTransform;
AnyFloat Ext_Inf_End_ABS_pos = .Right.Ext_Inf_End_ABS_pos* ..MirrorTransform;
AnyFloat Int_Sup_Start_ABS_pos = .Right.Int_Sup_Start_ABS_pos* ..MirrorTransform;
AnyFloat Int_Inf_Start_ABS_pos = .Right.Int_Inf_Start_ABS_pos* ..MirrorTransform;
AnyFloat Int_Sup_End_ABS_pos = .Right.Int_Sup_End_ABS_pos* ..MirrorTransform;
AnyFloat Int_Inf_End_ABS_pos = .Right.Int_Inf_End_ABS_pos* ..MirrorTransform;


   #endif


    #if IC_TYPE== OLD
  AnyMatrix IC_R10_Ext_Inf_pos =.Right.IC_R10_Ext_Inf_pos* ..MirrorTransform;
    AnyMatrix IC_R10_Ext_Sup_pos =.Right.IC_R10_Ext_Sup_pos* ..MirrorTransform;
    AnyMatrix IC_R10_Int_Inf_pos =.Right.IC_R10_Int_Inf_pos* ..MirrorTransform;
    AnyMatrix IC_R10_Int_Sup_pos =.Right.IC_R10_Int_Sup_pos* ..MirrorTransform;


    AnyFolder IC_R10_Ext_Inf = {AnyMatrix Points= ..Right.IC_R10_Ext_Inf.Points* ...MirrorTransform;};
    AnyFolder IC_R10_Int_Inf = {AnyMatrix Points= ..Right.IC_R10_Int_Inf.Points* ...MirrorTransform;};
    AnyFolder IC_R10_Inn_Inf = {AnyMatrix Points= ..Right.IC_R10_Inn_Inf.Points* ...MirrorTransform;};
    AnyFolder IC_R10_Ext_Sup = {AnyMatrix Points= ..Right.IC_R10_Ext_Sup.Points* ...MirrorTransform;};
    AnyFolder IC_R10_Int_Sup = {AnyMatrix Points= ..Right.IC_R10_Int_Sup.Points* ...MirrorTransform;};
    AnyFolder IC_R10_Inn_Sup = {AnyMatrix Points= ..Right.IC_R10_Inn_Sup.Points* ...MirrorTransform;};

    AnyFolder IC_R10_Int_Inf0 = {AnyMatrix Points= ..Right.IC_R10_Int_Inf0.Points* ...MirrorTransform;};
    AnyFolder IC_R10_Int_Sup0 = {AnyMatrix Points= ..Right.IC_R10_Int_Sup0.Points* ...MirrorTransform;};
#endif
    AnyFloat IntercostalisInternusR9R10_elem_sternum_pos = .Right.IntercostalisInternusR9R10_elem_sternum_pos* ..MirrorTransform;
    AnyFloat CC_AlignmentNode =.Right.CC_AlignmentNode* ..MirrorTransform;
  };
};

AnyFolder R11 = {
  AnyFolder Right = {

    AnyFloat LevatorCostarumT10R11Ins_pos              =  {-0.03315777, 0.1986668, 0.04071812};
    AnyFloat LevatorCostarumT9R11Ins_pos              =  {-0.03315777, 0.1966668, 0.04631812};
    AnyFloat MidAntNode_pos = {0.0404645, 0.1212998, 0.1219713};
    AnyFloat ICSpringSupNode_pos = ..R10.Right.ICSpringInfNode_pos;
    AnyFloat ICSpringSupPosteriorNode_pos = ..R10.Right.ICSpringInfPosteriorNode_pos;
    AnyFloat ICSpringInfPosteriorNode_pos = {-0.01218296, 0.1611459, 0.0708769};
    AnyFloat ICSpringInfNode_pos = {0.02218296, 0.1241459, 0.1008769};
    AnyFloat CCSpringAntNode_pos = {0.10190143, 0.201, 0.019298};
    AnyFloat O_serratus_posterior_inferior_pos = {-0.03, 0.17 , 0.073};
    AnyFloat CV_pos          = ..T11.Right.CV_pos;
    AnyFloat CT_pos          = ..T11.Right.CT_pos;
    AnyFloat CC_pos          = { 0.126802860, 0.11873311, 0.12013349};
    AnyFloat DiaphragmR11_1Node_pos = {0.02698863, 0.1425924, 0.1152835}+{-0.004,-0.005,0.006};
    AnyFloat DiaphragmR11_2Node_pos = {0.000339945, 0.1458347, 0.108451};
    AnyFloat DiaphragmR11_3Node_pos = {-0.01075013, 0.1445178, 0.09308592}+{0,0.01,0};

    AnyFloat CTsup_pos       = ..T11.Right.CTsup_pos;
    AnyFloat CTinf_pos       = ..T11.Right.CTinf_pos;
    AnyMatrix SuperiorCostoTransverse_points = {
      {-0.020575976, 0.20707807, 0.025736783}, // 0
      {-0.027804246, 0.20373361, 0.033388853} // 1
    };
    AnyMatrix LateralCostoTransverse_points = {
      {-0.019185619, 0.2040977, 0.021723248}, // 0
      {-0.024371315, 0.20272423, 0.027221346}, // 1
      {-0.027616499, 0.20044094, 0.03185552} // 2
    };
    AnyMatrix CostoTransverse_points = {
      {-0.011250415, 0.20099074, 0.018135661}, // 3
      {-0.015299117, 0.20441805, 0.020202113} // 4
    };
    AnyMatrix Radiate_inferior_points = {
      {-0.018663041, 0.19760926, 0.0255481}, // 0
      {-0.014980001, 0.1987465, 0.024460055}, // 1
      {-0.011012722, 0.20073979, 0.022359995}, // 2
      {-0.010015106, 0.20271325, 0.021336881} // 3
    };
    AnyMatrix Radiate_superior_points = {
      {-0.010889146, 0.2049907, 0.022275575}, // 4
      {-0.014886405, 0.20797266, 0.022869939}, // 5
      {-0.016767284, 0.20639312, 0.021891223} // 0
    };

  #if IC_TYPE != OLD
  //  #if IC_TYPE== MULTI_OFFSET
        AnyMatrix  IC_Inf_pos ={
{-0.009340768, 0.2014329, 0.01627341},
{-0.01835166, 0.1961498, 0.02661777},
{-0.02736256, 0.1908666, 0.03696213},
{-0.02902885, 0.1843285, 0.04786896},
{-0.03069514, 0.1777904, 0.0587758},
{-0.02857225, 0.1707939, 0.07131641},
{-0.02644936, 0.1637975, 0.08385702},
//{-0.02456119, 0.1626608, 0.0846932},
{-0.009588262, 0.1488649, 0.1010264},
{0.01        , 0.14, 0.11},

    };
    AnyMatrix  IC_Sup_pos ={
{-0.01367379, 0.2129352, 0.01424247},
{-0.02367752, 0.1977421, 0.04364509},
{-0.03368126, 0.182549, 0.07304772},
{-0.02490615, 0.169762, 0.09448253},
{-0.01082211, 0.1591172, 0.1064123},
{0.001037385, 0.1513038, 0.1137209},
{0.01515053, 0.1420689, 0.119206},
{0.02989199, 0.134885, 0.1212576},
{0.06, 0.11,     0.11}}
;


AnyFloat Inn_Sup_Start_ABS_pos = {-0.026186493182490438, 0.1903768515804789, 0.057422699373981};
AnyFloat Inn_Inf_Start_ABS_pos = {-0.025978557220799708, 0.18984444889368118, 0.03833877517718573};
AnyFloat Inn_Sup_End_ABS_pos = {0.059999999999909667, 0.11000000000007465, 0.11000000000003378};
AnyFloat Inn_Inf_End_ABS_pos = {0.009999999999941226, 0.14000000000002663, 0.10999999999997308};
AnyFloat Ext_Sup_Start_ABS_pos = {-0.013673790000060028, 0.21293519999990884, 0.014242470000176416};
AnyFloat Ext_Inf_Start_ABS_pos = {-0.0093407680000540793, 0.20143289999996827, 0.016273410000062067};
AnyFloat Ext_Sup_End_ABS_pos = {0.059999999999909667, 0.11000000000007465, 0.11000000000003378};
AnyFloat Ext_Inf_End_ABS_pos = {0.009999999999941226, 0.14000000000002663, 0.10999999999997308};
AnyFloat Int_Sup_Start_ABS_pos = {-0.021858598633328088, 0.19944768093094822, 0.040206575312411418};
AnyFloat Int_Inf_Start_ABS_pos = {-0.025978557220799708, 0.18984444889368118, 0.03833877517718573};
AnyFloat Int_Sup_End_ABS_pos = {0.059999999999909667, 0.11000000000007465, 0.11000000000003378};
AnyFloat Int_Inf_End_ABS_pos = {0.009999999999941226, 0.14000000000002663, 0.10999999999997308};

#endif

// #if IC_TYPE == OLD
    AnyMatrix  IC_R11_Ext_Inf_pos ={
      {-0.012309248, 0.19947575, 0.02003324}, // 0
      {-0.027362563, 0.19086663, 0.036962133}, // 1
      {-0.030695144, 0.17779036, 0.058775797}, // 2
      {-0.026449358, 0.16379751, 0.083857022}, // 3
      {-0.0095882621, 0.14886487, 0.10102644}, // 4
      {0.010354771, 0.1358659, 0.11133171}, // 5
      {0.02605091, 0.12521254, 0.11487944}, // 6
      {0.043570738, 0.11554158, 0.11528793} // 7
    };
    AnyMatrix  IC_R11_Ext_Sup_pos ={
      {-0.016843578, 0.20792089, 0.023920743}, // 0
      {-0.033681255, 0.18254904, 0.07304772}, // 2
      {-0.024906145, 0.16976203, 0.094482534}, // 4
      {-0.010822107, 0.15911722, 0.10641228}, // 5
      {0.0010373854, 0.15130377, 0.11372089}, // 6
      {0.015150533, 0.14206892, 0.11920596}, // 7
      {0.029891986, 0.13488503, 0.12125755}, // 8
      {0.051358987, 0.12167513, 0.11975158} // 9
    };


    AnyMatrix  IC_R11_Int_Inf_pos = IC_R11_Ext_Inf_pos;
    AnyMatrix  IC_R11_Inn_Inf_pos = IC_R11_Ext_Inf_pos;

    AnyMatrix  IC_R11_Int_Sup_pos = IC_R11_Ext_Sup_pos;
    AnyMatrix  IC_R11_Inn_Sup_pos = IC_R11_Ext_Sup_pos;

    Spline_template_ABS IC_R11_Int_Inf0 ( NAME=IC_R11_Int_Inf_pos,NUM_ELEM=20,POINTS=.IC_R11_Int_Inf_pos,START =0.0,END = 0.0)={};
    Spline_template_ABS IC_R11_Int_Sup0 ( NAME=IC_R11_Int_Inf_pos,NUM_ELEM=20,POINTS=.IC_R11_Int_Sup_pos,START =0.0,END =0.0)={};


    #if IC_TYPE == OLD
    AnyFolder &Sup_spline = ..R10.Right.IC_R10_Int_Inf0;
    AnyFolder &Inf_spline = IC_R11_Int_Sup0;

    AnyFloat Desired_Ext_angle =40;
    AnyFloat Desired_Int_angle =-40;
 AnyFloat Desired_Inn_angle =0;

    #include "../AngleCorrection.any"

    Spline_template_ABS_OFFSETS IC_R11_Ext_Inf ( NAME=IC_R11_Ext_Inf_pos,NUM_ELEM=20,POINTS=.IC_R11_Ext_Inf_pos,OFFSETS=...R12.Right.OffSetCal.Offsets_Ext_Sup,SIGN=-1)={};
    Spline_template_ABS_OFFSETS IC_R11_Int_Inf ( NAME=IC_R11_Int_Inf_pos,NUM_ELEM=20,POINTS=.IC_R11_Int_Inf_pos,OFFSETS=...R12.Right.OffSetCal.Offsets_Int_Sup,SIGN=-1)={};
    Spline_template_ABS_OFFSETS IC_R11_Inn_Inf ( NAME=IC_R11_Inn_Inf_pos,NUM_ELEM=20,POINTS=.IC_R11_Inn_Inf_pos,OFFSETS=...R12.Right.OffSetCal.Offsets_Inn_Sup,SIGN=-1)={START=0.0;};

    Spline_template_ABS_OFFSETS IC_R11_Ext_Sup ( NAME=IC_R11_Ext_Inf_pos,NUM_ELEM=20,POINTS=.IC_R11_Ext_Sup_pos,OFFSETS=.OffSetCal.Offsets_Ext_Inf,SIGN=1)={};
    Spline_template_ABS_OFFSETS IC_R11_Int_Sup ( NAME=IC_R11_Int_Inf_pos,NUM_ELEM=20,POINTS=.IC_R11_Int_Sup_pos,OFFSETS=.OffSetCal.Offsets_Int_Inf,SIGN=1)={};
    Spline_template_ABS_OFFSETS IC_R11_Inn_Sup ( NAME=IC_R11_Inn_Inf_pos,NUM_ELEM=20,POINTS=.IC_R11_Inn_Sup_pos,OFFSETS=.OffSetCal.Offsets_Inn_Inf,SIGN=1)={START=0.0;};
#endif

    #if CC_ALIGNMENT  == MID | CC_ALIGNMENT == CV
    #if CC_ALIGNMENT == MID
    AnyFloat CC_AlignmentNode =  {-0.023899575283741703, 0.16861054297471639, 0.084305675768566804};
    #endif
    #if CC_ALIGNMENT == CV
    AnyFloat CC_AlignmentNode = CV_pos;
    #endif
    #else
    // #if CC_ALIGNMENT == TANGENT
    AnyFloat CC_AlignmentNode = {0.02514449, 0.1320337, 0.1160614}; //0.5*(IC_R11_Ext_Inf.Fun(0.8)+IC_R11_Ext_Sup.Fun(0.9));
    #endif

    AnyFloat CCTangetNodeR11R10 = ..Thorax.Right.OEC11_CINode_pos+{0.0,0.03,0.01};
};

  AnyFolder Left = {
    AnyFloat LevatorCostarumT10R11Ins_pos = .Right.LevatorCostarumT10R11Ins_pos * ..MirrorTransform;
    AnyFloat LevatorCostarumT9R11Ins_pos = .Right.LevatorCostarumT9R11Ins_pos * ..MirrorTransform;
    AnyFloat MidAntNode_pos = .Right.MidAntNode_pos * ..MirrorTransform;
    AnyFloat ICSpringSupNode_pos = .Right.ICSpringSupNode_pos * ..MirrorTransform;
    AnyFloat ICSpringSupPosteriorNode_pos = .Right.ICSpringSupPosteriorNode_pos * ..MirrorTransform;
    AnyFloat ICSpringInfPosteriorNode_pos = .Right.ICSpringInfPosteriorNode_pos * ..MirrorTransform;
    AnyFloat ICSpringInfNode_pos = .Right.ICSpringInfNode_pos * ..MirrorTransform;
    AnyFloat CCSpringAntNode_pos = .Right.CCSpringAntNode_pos * ..MirrorTransform;
    AnyFloat O_serratus_posterior_inferior_pos = .Right.O_serratus_posterior_inferior_pos * ..MirrorTransform;
    AnyFloat CV_pos          = .Right.CV_pos * ..MirrorTransform;
    AnyFloat CT_pos          = .Right.CT_pos * ..MirrorTransform;
    AnyFloat CC_pos          = .Right.CC_pos * ..MirrorTransform;
    AnyFloat DiaphragmR11_1Node_pos = .Right.DiaphragmR11_1Node_pos * ..MirrorTransform;
    AnyFloat DiaphragmR11_2Node_pos = .Right.DiaphragmR11_2Node_pos * ..MirrorTransform;
    AnyFloat DiaphragmR11_3Node_pos = .Right.DiaphragmR11_3Node_pos * ..MirrorTransform;

  #if IC_TYPE != OLD
  //  #if IC_TYPE== MULTI_OFFSET
    AnyMatrix  IC_Inf_pos =.Right.IC_Inf_pos* ..MirrorTransform;
   AnyMatrix  IC_Sup_pos =.Right.IC_Sup_pos* ..MirrorTransform;


       AnyFloat Inn_Sup_Start_ABS_pos =.Right.Inn_Sup_Start_ABS_pos* ..MirrorTransform;
AnyFloat Inn_Inf_Start_ABS_pos = .Right.Inn_Inf_Start_ABS_pos* ..MirrorTransform;
AnyFloat Inn_Sup_End_ABS_pos = .Right.Inn_Sup_End_ABS_pos* ..MirrorTransform;
AnyFloat Inn_Inf_End_ABS_pos = .Right.Inn_Inf_End_ABS_pos* ..MirrorTransform;
AnyFloat Ext_Sup_Start_ABS_pos = .Right.Ext_Sup_Start_ABS_pos* ..MirrorTransform;
AnyFloat Ext_Inf_Start_ABS_pos = .Right.Ext_Inf_Start_ABS_pos* ..MirrorTransform;
AnyFloat Ext_Sup_End_ABS_pos = .Right.Ext_Sup_End_ABS_pos* ..MirrorTransform;
AnyFloat Ext_Inf_End_ABS_pos = .Right.Ext_Inf_End_ABS_pos* ..MirrorTransform;
AnyFloat Int_Sup_Start_ABS_pos = .Right.Int_Sup_Start_ABS_pos* ..MirrorTransform;
AnyFloat Int_Inf_Start_ABS_pos = .Right.Int_Inf_Start_ABS_pos* ..MirrorTransform;
AnyFloat Int_Sup_End_ABS_pos = .Right.Int_Sup_End_ABS_pos* ..MirrorTransform;
AnyFloat Int_Inf_End_ABS_pos = .Right.Int_Inf_End_ABS_pos* ..MirrorTransform;


 #endif

     #if IC_TYPE == OLD
    AnyMatrix  IC_R11_Ext_Inf_pos =.Right.IC_R11_Ext_Inf_pos* ..MirrorTransform;
    AnyMatrix  IC_R11_Ext_Sup_pos =.Right.IC_R11_Ext_Sup_pos* ..MirrorTransform;
    AnyMatrix  IC_R11_Int_Inf_pos =.Right.IC_R11_Int_Inf_pos* ..MirrorTransform;
    AnyMatrix  IC_R11_Int_Sup_pos =.Right.IC_R11_Int_Sup_pos* ..MirrorTransform;


    AnyFolder IC_R11_Ext_Inf = {AnyMatrix Points= ..Right.IC_R11_Ext_Inf.Points* ...MirrorTransform;};
    AnyFolder IC_R11_Int_Inf = {AnyMatrix Points= ..Right.IC_R11_Int_Inf.Points* ...MirrorTransform;};
    AnyFolder IC_R11_Inn_Inf = {AnyMatrix Points= ..Right.IC_R11_Inn_Inf.Points* ...MirrorTransform;};
    AnyFolder IC_R11_Ext_Sup = {AnyMatrix Points= ..Right.IC_R11_Ext_Sup.Points* ...MirrorTransform;};
    AnyFolder IC_R11_Int_Sup = {AnyMatrix Points= ..Right.IC_R11_Int_Sup.Points* ...MirrorTransform;};
    AnyFolder IC_R11_Inn_Sup = {AnyMatrix Points= ..Right.IC_R11_Inn_Sup.Points* ...MirrorTransform;};

    AnyFolder IC_R11_Int_Inf0 = {AnyMatrix Points= ..Right.IC_R11_Int_Inf0.Points* ...MirrorTransform;};

    AnyFolder IC_R11_Int_Sup0 = {AnyMatrix Points= ..Right.IC_R11_Int_Sup0.Points* ...MirrorTransform;};
#endif

    AnyFloat CTsup_pos = .Right.CTsup_pos * ..MirrorTransform;
    AnyFloat CTinf_pos = .Right.CTinf_pos * ..MirrorTransform;
    AnyMatrix SuperiorCostoTransverse_points = .Right.SuperiorCostoTransverse_points * ..MirrorTransform;
    AnyMatrix Radiate_inferior_points = .Right.Radiate_inferior_points * ..MirrorTransform;
    AnyMatrix Radiate_superior_points = .Right.Radiate_superior_points * ..MirrorTransform;
    AnyMatrix LateralCostoTransverse_points = .Right.LateralCostoTransverse_points * ..MirrorTransform;
    AnyMatrix CostoTransverse_points = .Right.CostoTransverse_points * ..MirrorTransform;
    AnyFloat CC_AlignmentNode =.Right.CC_AlignmentNode* ..MirrorTransform;
    AnyFloat CCTangetNodeR11R10 =.Right.CCTangetNodeR11R10* ..MirrorTransform;
  };
};
AnyFolder R12 = {
  AnyMatrix Transformation = {{0.8681915, -0.3913221, -0.3051402},
                              {0.378985, 0.9198378, -0.1013347},
                              {0.320334, -0.02766561, 0.9469006}};

  AnyVar IliocostalisLumborumR12Z     = (Right.IliocostalisLumborumR12Node_pos[2]    -.Pelvis.Right.IliocostalisLumborumR12Node_pos[2])    /(Right.IliocostalisLumborumR12Node_pos[1]    -.Pelvis.Right.IliocostalisLumborumR12Node_pos[1]);
  AnyVar LongissimusThoracisR12S3Z = (Right.LongissimusThoracisR12S3Node_pos[2]-.Sacrum.Right.LongissimusThoracisR12S3Node_pos[2])/(Right.LongissimusThoracisR12S3Node_pos[1]-.Sacrum.Right.LongissimusThoracisR12S3Node_pos[1]);

  AnyFolder Right = {
    AnyFloat LevatorCostarumT11R12Ins_pos = (.Transformation*({-0.00677717, 0.173936, 0.03750032}-CV_pos)')'+CV_pos;
    AnyFloat LevatorCostarumT10R12Ins_pos = (.Transformation*({-0.00677717, 0.170936, 0.04350032}-CV_pos)')'+CV_pos;
    AnyFloat ICSpringSupNode_pos = ..R11.Right.ICSpringInfNode_pos;
    AnyFloat ICSpringSupPosteriorNode_pos = ..R11.Right.ICSpringInfPosteriorNode_pos;
    AnyFloat ICSpringInfNodeL3_pos = {0.01190143, 0.0769919, 0.0397825};
    AnyFloat ICSpringInfNodeL2_pos = {0.01090143, 0.1069919, 0.0397825};
    AnyFloat ICSpringInfNodeL1_pos = {0.00090143, 0.1369919, 0.0397825};
    AnyFloat CCSpringAntNode_pos = (.Transformation*({0.10190143, 0.1269919, 0.0197825}-CV_pos)')'+CV_pos;
    AnyFloat O_serratus_posterior_inferior_pos = (.Transformation*({0.0, 0.14 , 0.07}-CV_pos)')'+CV_pos;
    AnyFloat CV_pos          = ..T12.Right.CV_pos;
    AnyFloat CT_pos          = ..T12.Right.CT_pos;
    AnyFloat CC_pos          = (.Transformation*({ 0.126802860, 0.11873311, 0.12013349}-CV_pos)')'+CV_pos;//{ 0.0102860, 0.125273311, 0.078013349};
    AnyFloat CTsup_pos       = ..T12.Right.CTsup_pos;
    AnyFloat CTinf_pos       = ..T12.Right.CTinf_pos;
    AnyFloat DiaphragmR12_1Node_pos = (.Transformation*({-0.0105, 0.155, 0.057}-CV_pos)')'+CV_pos;
    AnyFloat DiaphragmR12_2Node_pos = (.Transformation*({-0.0035, 0.1681201, 0.03790267}-CV_pos)')'+CV_pos;
    AnyFloat IliocostalisThoracisR6R12Node_pos = (.Transformation*({-0.01, 0.17, 0.033}-CV_pos)')'+CV_pos;
//    AnyFloat IliocostalisLumborumR5Via6Node_pos    = (.Transformation*({..T12.LSNode_pos[0]+0.005, ..T12.LSNode_pos[1],(..Thorax.Right.IliocostalisLumborumR5Node_pos[2] - ..Thorax.IliocostalisLumborumR5Z*(..Thorax.Right.IliocostalisLumborumR5Node_pos[1] - ..T12.LSNode_pos[1]))}-..R12.Right.CV_pos)')'+..R12.Right.CV_pos;
//    AnyFloat IliocostalisLumborumR6Via5Node_pos    = (.Transformation*({..T12.LSNode_pos[0]+0.005,..T12.LSNode_pos[1],(..Thorax.Right.IliocostalisLumborumR6Node_pos[2] - ..Thorax.IliocostalisLumborumR6Z*(..Thorax.Right.IliocostalisLumborumR6Node_pos[1] - ..T12.LSNode_pos[1]))}-..R12.Right.CV_pos)')'+..R12.Right.CV_pos;
//    AnyFloat IliocostalisLumborumR7Via4Node_pos      = (.Transformation*({..T12.LSNode_pos[0]+0.005,..T12.LSNode_pos[1],(..Thorax.Right.IliocostalisLumborumR7Node_pos[2] - ..Thorax.IliocostalisLumborumR7Z*(..Thorax.Right.IliocostalisLumborumR7Node_pos[1] - ..T12.LSNode_pos[1]))}-..R12.Right.CV_pos)')'+..R12.Right.CV_pos;
//    AnyFloat IliocostalisLumborumR8Via3Node_pos      = (.Transformation*({..T12.LSNode_pos[0]+0.005,..T12.LSNode_pos[1],(..Thorax.Right.IliocostalisLumborumR8Node_pos[2] - ..Thorax.IliocostalisLumborumR8Z*(..Thorax.Right.IliocostalisLumborumR8Node_pos[1] - ..T12.LSNode_pos[1]))}-..R12.Right.CV_pos)')'+..R12.Right.CV_pos;
//    AnyFloat IliocostalisLumborumR9Via2Node_pos      = (.Transformation*({..T12.LSNode_pos[0]+0.005,..T12.LSNode_pos[1],(..Thorax.Right.IliocostalisLumborumR9Node_pos[2] - ..Thorax.IliocostalisLumborumR9Z*(..Thorax.Right.IliocostalisLumborumR9Node_pos[1] - ..T12.LSNode_pos[1]))}-..R12.Right.CV_pos)')'+..R12.Right.CV_pos;
//    AnyFloat IliocostalisLumborumR10Via1Node_pos     = (.Transformation*({..T12.LSNode_pos[0]+0.005,..T12.LSNode_pos[1],(..Thorax.Right.IliocostalisLumborumR10Node_pos[2] - ..Thorax.IliocostalisLumborumR10Z*(..Thorax.Right.IliocostalisLumborumR10Node_pos[1] - ..T12.LSNode_pos[1]))}-..R12.Right.CV_pos)')'+..R12.Right.CV_pos;
//    AnyFloat LongissimusThoracisT8S3Via4Node_pos      = (.Transformation*({-0.023,0.159,(..Thorax.Right.LongissimusThoracisT8S3Node_pos[2] - ..Thorax.LongissimusThoracisT8S3Z*(..Thorax.Right.LongissimusThoracisT8S3Node_pos[1] - 0.159))}-..R12.Right.CV_pos)')'+..R12.Right.CV_pos;
//    AnyFloat LongissimusThoracisT9S4Via3Node_pos      = (.Transformation*({-0.023,0.152,(..Thorax.Right.LongissimusThoracisT9S4Node_pos[2] - ..Thorax.LongissimusThoracisT9S4Z*(..Thorax.Right.LongissimusThoracisT9S4Node_pos[1] - 0.152))}-..R12.Right.CV_pos)')'+..R12.Right.CV_pos;
//    AnyFloat LongissimusThoracisT10S3Via2Node_pos = (.Transformation*({-0.023,0.147,(..Thorax.Right.LongissimusThoracisT10S3Node_pos[2] - ..Thorax.LongissimusThoracisT10S3Z*(..Thorax.Right.LongissimusThoracisT10S3Node_pos[1] - 0.147))}-..R12.Right.CV_pos)')'+..R12.Right.CV_pos;
//    AnyFloat LongissimusThoracisT11S3Via1Node_pos = (.Transformation*({-0.023,0.149,(..Thorax.Right.LongissimusThoracisT11S3Node_pos[2] - ..Thorax.LongissimusThoracisT11S3Z*(..Thorax.Right.LongissimusThoracisT11S3Node_pos[1] - 0.149))}-..R12.Right.CV_pos)')'+..R12.Right.CV_pos;

    AnyFloat IliocostalisLumborumR5Via6Node_pos    = ({..T12.LSNode_pos[0]+0.005, ..T12.LSNode_pos[1],(..Thorax.Right.IliocostalisLumborumR5Node_pos[2] - ..Thorax.IliocostalisLumborumR5Z*(..Thorax.Right.IliocostalisLumborumR5Node_pos[1] - ..T12.LSNode_pos[1]))}-..R12.Right.CV_pos)+..R12.Right.CV_pos;
    AnyFloat IliocostalisLumborumR6Via5Node_pos    = ({..T12.LSNode_pos[0]+0.005,..T12.LSNode_pos[1],(..Thorax.Right.IliocostalisLumborumR6Node_pos[2] - ..Thorax.IliocostalisLumborumR6Z*(..Thorax.Right.IliocostalisLumborumR6Node_pos[1] - ..T12.LSNode_pos[1]))}-..R12.Right.CV_pos)+..R12.Right.CV_pos;
    AnyFloat IliocostalisLumborumR7Via4Node_pos      = ({..T12.LSNode_pos[0]+0.005,..T12.LSNode_pos[1],(..Thorax.Right.IliocostalisLumborumR7Node_pos[2] - ..Thorax.IliocostalisLumborumR7Z*(..Thorax.Right.IliocostalisLumborumR7Node_pos[1] - ..T12.LSNode_pos[1]))}-..R12.Right.CV_pos)+..R12.Right.CV_pos;
    AnyFloat IliocostalisLumborumR8Via3Node_pos      = ({..T12.LSNode_pos[0]+0.005,..T12.LSNode_pos[1],(..Thorax.Right.IliocostalisLumborumR8Node_pos[2] - ..Thorax.IliocostalisLumborumR8Z*(..Thorax.Right.IliocostalisLumborumR8Node_pos[1] - ..T12.LSNode_pos[1]))}-..R12.Right.CV_pos)+..R12.Right.CV_pos;
    AnyFloat IliocostalisLumborumR9Via2Node_pos      = ({..T12.LSNode_pos[0]+0.005,..T12.LSNode_pos[1],(..Thorax.Right.IliocostalisLumborumR9Node_pos[2] - ..Thorax.IliocostalisLumborumR9Z*(..Thorax.Right.IliocostalisLumborumR9Node_pos[1] - ..T12.LSNode_pos[1]))}-..R12.Right.CV_pos)+..R12.Right.CV_pos;
    AnyFloat IliocostalisLumborumR10Via1Node_pos     = ({..T12.LSNode_pos[0]+0.005,..T12.LSNode_pos[1],(..Thorax.Right.IliocostalisLumborumR10Node_pos[2] - ..Thorax.IliocostalisLumborumR10Z*(..Thorax.Right.IliocostalisLumborumR10Node_pos[1] - ..T12.LSNode_pos[1]))}-..R12.Right.CV_pos)+..R12.Right.CV_pos;
    AnyFloat LongissimusThoracisR8S3Via4Node_pos      = ({-0.023,0.159,(..Thorax.Right.LongissimusThoracisR8S3Node_pos[2] - ..Thorax.LongissimusThoracisR8S3Z*(..Thorax.Right.LongissimusThoracisR8S3Node_pos[1] - 0.159))}-..R12.Right.CV_pos)+..R12.Right.CV_pos;
    AnyFloat LongissimusThoracisR9S4Via3Node_pos      = ({-0.023,0.152,(..Thorax.Right.LongissimusThoracisR9S4Node_pos[2] - ..Thorax.LongissimusThoracisR9S4Z*(..Thorax.Right.LongissimusThoracisR9S4Node_pos[1] - 0.152))}-..R12.Right.CV_pos)+..R12.Right.CV_pos;
    AnyFloat LongissimusThoracisR10S3Via2Node_pos = ({-0.023,0.147,(..Thorax.Right.LongissimusThoracisR10S3Node_pos[2] - ..Thorax.LongissimusThoracisR10S3Z*(..Thorax.Right.LongissimusThoracisR10S3Node_pos[1] - 0.147))}-..R12.Right.CV_pos)+..R12.Right.CV_pos;
    AnyFloat LongissimusThoracisR11S3Via1Node_pos = ({-0.023,0.149,(..Thorax.Right.LongissimusThoracisR11S3Node_pos[2] - ..Thorax.LongissimusThoracisR11S3Z*(..Thorax.Right.LongissimusThoracisR11S3Node_pos[1] - 0.149))}-..R12.Right.CV_pos)+..R12.Right.CV_pos;
    AnyFloat QuadratusLumborumR12LateralNode1_pos                               = (.Transformation*({0.000, 0.135, 0.070}-..R12.Right.CV_pos)')'+..R12.Right.CV_pos;
    AnyFloat QuadratusLumborumR12LateralNode2_pos                               = (.Transformation*({0.000, 0.135, 0.070}*0.8+{-0.010, 0.147, 0.057}*0.2-..R12.Right.CV_pos)')'+..R12.Right.CV_pos;
    AnyFloat QuadratusLumborumR12LateralNode3_pos                               = (.Transformation*({0.000, 0.135, 0.070}*0.6+{-0.010, 0.147, 0.057}*0.4-..R12.Right.CV_pos)')'+..R12.Right.CV_pos;
    AnyFloat QuadratusLumborumR12LateralNode4_pos                               = (.Transformation*({0.000, 0.135, 0.070}*0.4+{-0.010, 0.147, 0.057}*0.6-..R12.Right.CV_pos)')'+..R12.Right.CV_pos;
    AnyFloat QuadratusLumborumR12LateralNode5_pos                               = (.Transformation*({0.000, 0.135, 0.070}*0.2+{-0.010, 0.147, 0.057}*0.8-..R12.Right.CV_pos)')'+..R12.Right.CV_pos;
    AnyFloat QuadratusLumborumR12InterMedianNode1_pos                       = (.Transformation*({-0.010, 0.147, 0.057}-..R12.Right.CV_pos)')'+..R12.Right.CV_pos;
    AnyFloat QuadratusLumborumR12InterMedianNode2_pos                       = (.Transformation*({-0.010, 0.147, 0.057}*0.8+{-0.011, 0.161, 0.040}*0.2-..R12.Right.CV_pos)')'+..R12.Right.CV_pos;
    AnyFloat QuadratusLumborumR12InterMedianNode3_pos                       = (.Transformation*({-0.010, 0.147, 0.057}*0.6+{-0.011, 0.161, 0.040}*0.4-..R12.Right.CV_pos)')'+..R12.Right.CV_pos;
    AnyFloat QuadratusLumborumR12InterMedianNode4_pos                       = (.Transformation*({-0.010, 0.147, 0.057}*0.4+{-0.011, 0.161, 0.040}*0.6-..R12.Right.CV_pos)')'+..R12.Right.CV_pos;
    AnyFloat QuadratusLumborumR12InterMedianNode5_pos                       = (.Transformation*({-0.010, 0.147, 0.057}*0.2+{-0.011, 0.161, 0.040}*0.8-..R12.Right.CV_pos)')'+..R12.Right.CV_pos;
    AnyFloat QuadratusLumborumR12MedianNode1_pos                            = (.Transformation*({-0.011, 0.161, 0.040}-..R12.Right.CV_pos)')'+..R12.Right.CV_pos;
    AnyFloat QuadratusLumborumR12MedianNode2_pos                            = (.Transformation*({-0.011, 0.161, 0.040}*0.8+{-0.003, 0.168, 0.0248837}*0.2-..R12.Right.CV_pos)')'+..R12.Right.CV_pos;
    AnyFloat QuadratusLumborumR12MedianNode3_pos                            = (.Transformation*({-0.011, 0.161, 0.040}*0.5+{-0.003, 0.168, 0.0248837}*0.5-..R12.Right.CV_pos)')'+..R12.Right.CV_pos;
    AnyFloat QuadratusLumborumR12MedianNode4_pos                            = (.Transformation*({-0.011, 0.161, 0.040}*0.2+{-0.003, 0.168, 0.0248837}*0.8-..R12.Right.CV_pos)')'+..R12.Right.CV_pos;
    AnyFloat OEC12_CINode_pos                               = (.Transformation*({0.0067108595,0.13162032, 0.079510987}-..R12.Right.CV_pos)')'+..R12.Right.CV_pos;
    AnyFloat OEC12_CINode1_pos                              = (.Transformation*({0.0067108595,0.13162032, 0.079510987}+{-0.025, 0.005,-0.025}-..R12.Right.CV_pos)')'+..R12.Right.CV_pos;
    AnyFloat OICI_C12Node_pos                               = (.Transformation*({0.003000000, 0.1300000, 0.07500000}-..R12.Right.CV_pos)')'+..R12.Right.CV_pos;
    AnyVec3 IliocostalisLumborumR12Node_pos = (.Transformation*({-0.009,0.146,0.060}-..R12.Right.CV_pos)')'+..R12.Right.CV_pos;
    AnyVec3 LongissimusThoracisR12S3Node_pos = (.Transformation*({-0.011,0.161,0.040}-..R12.Right.CV_pos)')'+..R12.Right.CV_pos;
    AnyMatrix SuperiorCostoTransverse_points = {
      (.Transformation*({-0.0038645905, 0.17758462, 0.026944304}-CV_pos)')'+CV_pos, // 0
      (.Transformation*({-0.0043386049, 0.17673242, 0.029387204}-CV_pos)')'+CV_pos, // 1
      (.Transformation*({-0.0049144635, 0.17547072, 0.03283827}-CV_pos)')'+CV_pos, // 2
      (.Transformation*({-0.0061056493, 0.17373438, 0.035863459}-CV_pos)')'+CV_pos // 3
    };
    AnyMatrix LateralCostoTransverse_points = {
      (.Transformation*({-0.010036269, 0.16782701, 0.038204376}-CV_pos)')'+CV_pos, // 1
      (.Transformation*({-0.0079724649, 0.1730943, 0.02822897}-CV_pos)')'+CV_pos // 0
    };
    AnyMatrix CostoTransverse_points = {
      (.Transformation*({0.0018104595, 0.17603476, 0.022706181}-CV_pos)')'+CV_pos, // 0
      (.Transformation*({-0.0068334793, 0.17463355, 0.024532054}-CV_pos)')'+CV_pos // 1
    };
    AnyMatrix Radiate_inferior_points = {
      (.Transformation*({-0.0052424623, 0.16773513, 0.026864665}-CV_pos)')'+CV_pos, // 0
      (.Transformation*({-0.00180492, 0.16888203, 0.024836155}-CV_pos)')'+CV_pos, // 1
      (.Transformation*({0.0013199488, 0.17207596, 0.022924546}-CV_pos)')'+CV_pos, // 2
      (.Transformation*({0.0029025681, 0.17462981, 0.024049576}-CV_pos)')'+CV_pos, // 3
      (.Transformation*({0.0041024382, 0.17783524, 0.024992568}-CV_pos)')'+CV_pos // 4
    };
    AnyMatrix Radiate_superior_points = {
      (.Transformation*({0.0038920855, 0.17928496, 0.025049772}-CV_pos)')'+CV_pos, // 5
      (.Transformation*({0.0019226783, 0.18049046, 0.025651772}-CV_pos)')'+CV_pos, // 6
      (.Transformation*({-0.00090228149, 0.17919517, 0.025216321}-CV_pos)')'+CV_pos, // 7
      (.Transformation*({-0.0041844966, 0.17697012, 0.025177699}-CV_pos)')'+CV_pos, // 8
      (.Transformation*({-0.0067500914, 0.17469528, 0.024711041}-CV_pos)')'+CV_pos // 9
    };


  #if IC_TYPE != OLD
  //  #if IC_TYPE== MULTI_OFFSET

      AnyMatrix  IC_Inf_pos =

{
{0.0004312068, 0.1699061, 0.02074083},
 {-0.00365685, 0.1614302, 0.03066687},
{-0.006148741, 0.1554157, 0.03799504},
{-0.007583468, 0.1490879, 0.04655599},
{-0.005171212, 0.1413228, 0.05618771},
{-0.002763046, 0.1375114, 0.06235525},
{0.000334824, 0.1340902, 0.06809193},
{0.009764387, 0.1277438, 0.08110839}
};

    AnyMatrix  IC_Sup_pos =
    {
      {-0.001564168, 0.1787799, 0.02759063},
      {-0.008717611, 0.1671047, 0.03915383},
{-0.01015755, 0.1597201, 0.04618926},
{-0.009487386, 0.1540111, 0.0529456},
{-0.008622567, 0.1496767, 0.05839034},
{-0.006305094, 0.145669, 0.06544111},
{-0.002081328, 0.1402417, 0.07241808},
{0.015, 0.132917, 0.084}
};


AnyFloat Inn_Sup_Start_ABS_pos = {-0.0097913893952293485, 0.15847329925938194, 0.047827347097937678};
AnyFloat Inn_Inf_Start_ABS_pos = {-0.0051678142008662756, 0.15752998970952486, 0.035494094648601551};
AnyFloat Inn_Sup_End_ABS_pos = {0.014999999999948751, 0.13291700000002199, 0.083999999999965255};
AnyFloat Inn_Inf_End_ABS_pos = {0.0097643869999717078, 0.12774380000001903, 0.08110838999996095};
AnyFloat Ext_Sup_Start_ABS_pos = {-0.0015641680000214658, 0.17877989999996499, 0.027590630000034692};
AnyFloat Ext_Inf_Start_ABS_pos = {0.00043120679998773546, 0.16990609999997458, 0.020740830000029777};
AnyFloat Ext_Sup_End_ABS_pos = {0.014999999999948751, 0.13291700000002199, 0.083999999999965255};
AnyFloat Ext_Inf_End_ABS_pos = {0.0097643869999717078, 0.12774380000001903, 0.08110838999996095};
AnyFloat Int_Sup_Start_ABS_pos = {-0.0097913893952293485, 0.15847329925938194, 0.047827347097937678};
AnyFloat Int_Inf_Start_ABS_pos = {-0.0068572768391510922, 0.15150210211313866, 0.043267728451626596};
AnyFloat Int_Sup_End_ABS_pos = {0.014999999999948751, 0.13291700000002199, 0.083999999999965255};
AnyFloat Int_Inf_End_ABS_pos = {0.0097643869999717078, 0.12774380000001903, 0.08110838999996095};

    #endif


    AnyMatrix  IC_R12_Ext_Inf_pos = {
      (.Transformation*({-0.0034778432, 0.16977066, 0.023621839}-CV_pos)')'+CV_pos, // 0
      (.Transformation*({-0.0064972569, 0.16433163, 0.033294402}-CV_pos)')'+CV_pos, // 1
      (.Transformation*({-0.0085926382, 0.15957166, 0.041603304}-CV_pos)')'+CV_pos, // 2
      (.Transformation*({-0.0094940318, 0.15407571, 0.050788693}-CV_pos)')'+CV_pos, // 3
      (.Transformation*({-0.0072572138, 0.14572266, 0.059959766}-CV_pos)')'+CV_pos, // 5
      (.Transformation*({-0.0046352674, 0.14110376, 0.06545122}-CV_pos)')'+CV_pos, // 6
      (.Transformation*({-0.0014046698, 0.1365858, 0.070284687}-CV_pos)')'+CV_pos, // 7
      (.Transformation*({0.0060608666, 0.12919788, 0.077819176}-CV_pos)')'+CV_pos // 8
    };
    AnyMatrix  IC_R12_Ext_Sup_pos = {
      (.Transformation*({0.00090943591, 0.17955671, 0.027984828}-CV_pos)')'+CV_pos, // 0
      (.Transformation*({-0.0060217497, 0.17129685, 0.042299926}-CV_pos)')'+CV_pos, // 1
      (.Transformation*({-0.0078168763, 0.164873, 0.050149482}-CV_pos)')'+CV_pos, // 2
      (.Transformation*({-0.0072343764, 0.15917251, 0.056921091}-CV_pos)')'+CV_pos, // 3
      (.Transformation*({-0.006382084, 0.15469651, 0.062252056}-CV_pos)')'+CV_pos, // 4
      (.Transformation*({-0.0036303194, 0.14990816, 0.068627395}-CV_pos)')'+CV_pos, // 5
      (.Transformation*({0.00021479384, 0.14307, 0.074495032}-CV_pos)')'+CV_pos, // 6
      (.Transformation*({0.0079242224, 0.13261779, 0.080732614}-CV_pos)')'+CV_pos // 7
    };


    AnyMatrix  IC_R12_Int_Inf_pos = IC_R12_Ext_Inf_pos;
    AnyMatrix  IC_R12_Int_Sup_pos = IC_R12_Ext_Sup_pos;
    AnyMatrix  IC_R12_Inn_Inf_pos = IC_R12_Ext_Inf_pos;
    AnyMatrix  IC_R12_Inn_Sup_pos = IC_R12_Ext_Sup_pos;

    Spline_template IC_R12_Int_Sup0 ( NAME=IC_R12_Int_Inf_pos,NUM_ELEM=20,POINTS=.IC_R12_Int_Sup_pos,START =0.0,END =0.0)={};
    Spline_template IC_R12_Int_Inf0 ( NAME=IC_R12_Int_Inf_pos,NUM_ELEM=20,POINTS=.IC_R12_Int_Inf_pos,START =0.0,END =0.0)={};

    #if IC_TYPE == OLD


    AnyFolder &Sup_spline = ..R11.Right.IC_R11_Int_Inf0;
    AnyFolder &Inf_spline = IC_R12_Int_Sup0;

    AnyFloat Desired_Ext_angle = 50;
    AnyFloat Desired_Int_angle = -40;
    AnyFloat Desired_Inn_angle = 0;

    #include "../AngleCorrection.any"

    Spline_template_ABS_OFFSETS IC_R12_Ext_Inf ( NAME=IC_R12_Ext_Inf_pos,NUM_ELEM=20,POINTS=.IC_R12_Ext_Inf_pos,OFFSETS=.OffSetCal.Offsets_Zero,SIGN=-1)={};   //note offsets are zero here there are no ribs below
    Spline_template_ABS_OFFSETS IC_R12_Int_Inf ( NAME=IC_R12_Int_Inf_pos,NUM_ELEM=20,POINTS=.IC_R12_Int_Inf_pos,OFFSETS=.OffSetCal.Offsets_Zero,SIGN=-1)={};
    Spline_template_ABS_OFFSETS IC_R12_Inn_Inf ( NAME=IC_R12_Inn_Inf_pos,NUM_ELEM=20,POINTS=.IC_R12_Inn_Inf_pos,OFFSETS=.OffSetCal.Offsets_Zero,SIGN=-1)={};

    Spline_template_ABS_OFFSETS IC_R12_Ext_Sup ( NAME=IC_R12_Ext_Inf_pos,NUM_ELEM=20,POINTS=.IC_R12_Ext_Sup_pos,OFFSETS=.OffSetCal.Offsets_Zero,SIGN=1)={};
    Spline_template_ABS_OFFSETS IC_R12_Int_Sup ( NAME=IC_R12_Int_Inf_pos,NUM_ELEM=20,POINTS=.IC_R12_Int_Sup_pos,OFFSETS=.OffSetCal.Offsets_Zero,SIGN=1)={}; //note offsets are zero here there are no ribs below
    Spline_template_ABS_OFFSETS IC_R12_Inn_Sup ( NAME=IC_R12_Inn_Inf_pos,NUM_ELEM=20,POINTS=.IC_R12_Inn_Sup_pos,OFFSETS=.OffSetCal.Offsets_Zero,SIGN=1)={}; //note offsets are zero here there are no ribs below

    #endif


    #if CC_ALIGNMENT  == MID | CC_ALIGNMENT == CV
    #if CC_ALIGNMENT == MID
    AnyFloat CC_AlignmentNode =   {-0.0076137060544698093, 0.14839154746114239, 0.053750792678694689};
    #endif
    #if CC_ALIGNMENT == CV
    AnyFloat CC_AlignmentNode = CV_pos;
    #endif
    #else
    // #if CC_ALIGNMENT == TANGENT
    AnyFloat CC_AlignmentNode ={0.001001966, 0.1358947, 0.07161119}; // 0.5*(IC_R12_Ext_Inf.Fun(0.8)+IC_R12_Ext_Sup.Fun(0.9));
    #endif

   AnyFloat CCTangetNodeR12R11 = ..R12.Right.OEC12_CINode_pos+{0.0,0.01,0.03};
  };

  AnyFolder Left = {
    AnyFloat IliocostalisThoracisR6R12Node_pos = .Right.IliocostalisThoracisR6R12Node_pos * ..MirrorTransform;
    AnyFloat LevatorCostarumT11R12Ins_pos = .Right.LevatorCostarumT11R12Ins_pos * ..MirrorTransform;
    AnyFloat LevatorCostarumT10R12Ins_pos = .Right.LevatorCostarumT10R12Ins_pos * ..MirrorTransform;
    AnyFloat ICSpringSupNode_pos = .Right.ICSpringSupNode_pos * ..MirrorTransform;
    AnyFloat ICSpringSupPosteriorNode_pos = .Right.ICSpringSupPosteriorNode_pos * ..MirrorTransform;
    AnyFloat ICSpringInfNodeL3_pos = .Right.ICSpringInfNodeL3_pos * ..MirrorTransform;
    AnyFloat ICSpringInfNodeL2_pos = .Right.ICSpringInfNodeL2_pos * ..MirrorTransform;
    AnyFloat ICSpringInfNodeL1_pos = .Right.ICSpringInfNodeL1_pos * ..MirrorTransform;
    AnyFloat CCSpringAntNode_pos = .Right.CCSpringAntNode_pos * ..MirrorTransform;
    AnyFloat O_serratus_posterior_inferior_pos = .Right.O_serratus_posterior_inferior_pos * ..MirrorTransform;
    AnyFloat CV_pos          = .Right.CV_pos * ..MirrorTransform;
    AnyFloat CT_pos          = .Right.CT_pos * ..MirrorTransform;
    AnyFloat CC_pos          = .Right.CC_pos * ..MirrorTransform;
    AnyFloat CTsup_pos = .Right.CTsup_pos * ..MirrorTransform;
    AnyFloat CTinf_pos = .Right.CTinf_pos * ..MirrorTransform;
    AnyMatrix SuperiorCostoTransverse_points = .Right.SuperiorCostoTransverse_points * ..MirrorTransform;
    AnyMatrix Radiate_inferior_points = .Right.Radiate_inferior_points * ..MirrorTransform;
    AnyMatrix Radiate_superior_points = .Right.Radiate_superior_points * ..MirrorTransform;
    AnyMatrix LateralCostoTransverse_points = .Right.LateralCostoTransverse_points * ..MirrorTransform;
    AnyMatrix CostoTransverse_points = .Right.CostoTransverse_points * ..MirrorTransform;
    AnyFloat DiaphragmR12_1Node_pos = .Right.DiaphragmR12_1Node_pos * ..MirrorTransform;
    AnyFloat DiaphragmR12_2Node_pos = .Right.DiaphragmR12_2Node_pos * ..MirrorTransform;
    AnyFloat IliocostalisLumborumR5Via6Node_pos    = .Right.IliocostalisLumborumR5Via6Node_pos * ..MirrorTransform;
    AnyFloat IliocostalisLumborumR6Via5Node_pos    = .Right.IliocostalisLumborumR6Via5Node_pos * ..MirrorTransform;
    AnyFloat IliocostalisLumborumR7Via4Node_pos      = .Right.IliocostalisLumborumR7Via4Node_pos * ..MirrorTransform;
    AnyFloat IliocostalisLumborumR8Via3Node_pos      = .Right.IliocostalisLumborumR8Via3Node_pos * ..MirrorTransform;
    AnyFloat IliocostalisLumborumR9Via2Node_pos      = .Right.IliocostalisLumborumR9Via2Node_pos * ..MirrorTransform;
    AnyFloat IliocostalisLumborumR10Via1Node_pos     = .Right.IliocostalisLumborumR10Via1Node_pos * ..MirrorTransform;
    AnyFloat LongissimusThoracisR8S3Via4Node_pos      = .Right.LongissimusThoracisR8S3Via4Node_pos * ..MirrorTransform;
    AnyFloat LongissimusThoracisR9S4Via3Node_pos      = .Right.LongissimusThoracisR9S4Via3Node_pos * ..MirrorTransform;
    AnyFloat LongissimusThoracisR10S3Via2Node_pos = .Right.LongissimusThoracisR10S3Via2Node_pos * ..MirrorTransform;
    AnyFloat LongissimusThoracisR11S3Via1Node_pos = .Right.LongissimusThoracisR11S3Via1Node_pos * ..MirrorTransform;
    AnyFloat QuadratusLumborumR12LateralNode1_pos               = .Right.QuadratusLumborumR12LateralNode1_pos * ..MirrorTransform;
    AnyFloat QuadratusLumborumR12LateralNode2_pos               = .Right.QuadratusLumborumR12LateralNode2_pos * ..MirrorTransform;
    AnyFloat QuadratusLumborumR12LateralNode3_pos               = .Right.QuadratusLumborumR12LateralNode3_pos * ..MirrorTransform;
    AnyFloat QuadratusLumborumR12LateralNode4_pos               = .Right.QuadratusLumborumR12LateralNode4_pos * ..MirrorTransform;
    AnyFloat QuadratusLumborumR12LateralNode5_pos               = .Right.QuadratusLumborumR12LateralNode5_pos * ..MirrorTransform;
    AnyFloat QuadratusLumborumR12InterMedianNode1_pos           = .Right.QuadratusLumborumR12InterMedianNode1_pos * ..MirrorTransform;
    AnyFloat QuadratusLumborumR12InterMedianNode2_pos           = .Right.QuadratusLumborumR12InterMedianNode2_pos * ..MirrorTransform;
    AnyFloat QuadratusLumborumR12InterMedianNode3_pos           = .Right.QuadratusLumborumR12InterMedianNode3_pos * ..MirrorTransform;
    AnyFloat QuadratusLumborumR12InterMedianNode4_pos           = .Right.QuadratusLumborumR12InterMedianNode4_pos * ..MirrorTransform;
    AnyFloat QuadratusLumborumR12InterMedianNode5_pos           = .Right.QuadratusLumborumR12InterMedianNode5_pos * ..MirrorTransform;
    AnyFloat QuadratusLumborumR12MedianNode1_pos                = .Right.QuadratusLumborumR12MedianNode1_pos * ..MirrorTransform;
    AnyFloat QuadratusLumborumR12MedianNode2_pos                = .Right.QuadratusLumborumR12MedianNode2_pos * ..MirrorTransform;
    AnyFloat QuadratusLumborumR12MedianNode3_pos                = .Right.QuadratusLumborumR12MedianNode3_pos * ..MirrorTransform;
    AnyFloat QuadratusLumborumR12MedianNode4_pos                = .Right.QuadratusLumborumR12MedianNode4_pos * ..MirrorTransform;
    AnyFloat OEC12_CINode_pos                               = .Right.OEC12_CINode_pos * ..MirrorTransform;
    AnyFloat OEC12_CINode1_pos                              = .Right.OEC12_CINode1_pos * ..MirrorTransform;
    AnyFloat OICI_C12Node_pos                               = .Right.OICI_C12Node_pos * ..MirrorTransform;
    AnyVec3 IliocostalisLumborumR12Node_pos = .Right.IliocostalisLumborumR12Node_pos * ..MirrorTransform;
    AnyVec3 LongissimusThoracisR12S3Node_pos = .Right.LongissimusThoracisR12S3Node_pos * ..MirrorTransform;

    #if IC_TYPE != OLD
    //  #if IC_TYPE== MULTI_OFFSET
      AnyMatrix  IC_Inf_pos =.Right.IC_Inf_pos* ..MirrorTransform;
    AnyMatrix  IC_Sup_pos =.Right.IC_Sup_pos* ..MirrorTransform;


   AnyFloat Inn_Sup_Start_ABS_pos =.Right.Inn_Sup_Start_ABS_pos* ..MirrorTransform;
AnyFloat Inn_Inf_Start_ABS_pos = .Right.Inn_Inf_Start_ABS_pos* ..MirrorTransform;
AnyFloat Inn_Sup_End_ABS_pos = .Right.Inn_Sup_End_ABS_pos* ..MirrorTransform;
AnyFloat Inn_Inf_End_ABS_pos = .Right.Inn_Inf_End_ABS_pos* ..MirrorTransform;
AnyFloat Ext_Sup_Start_ABS_pos = .Right.Ext_Sup_Start_ABS_pos* ..MirrorTransform;
AnyFloat Ext_Inf_Start_ABS_pos = .Right.Ext_Inf_Start_ABS_pos* ..MirrorTransform;
AnyFloat Ext_Sup_End_ABS_pos = .Right.Ext_Sup_End_ABS_pos* ..MirrorTransform;
AnyFloat Ext_Inf_End_ABS_pos = .Right.Ext_Inf_End_ABS_pos* ..MirrorTransform;
AnyFloat Int_Sup_Start_ABS_pos = .Right.Int_Sup_Start_ABS_pos* ..MirrorTransform;
AnyFloat Int_Inf_Start_ABS_pos = .Right.Int_Inf_Start_ABS_pos* ..MirrorTransform;
AnyFloat Int_Sup_End_ABS_pos = .Right.Int_Sup_End_ABS_pos* ..MirrorTransform;
AnyFloat Int_Inf_End_ABS_pos = .Right.Int_Inf_End_ABS_pos* ..MirrorTransform;


 #endif
  #if IC_TYPE== OLD

    AnyMatrix  IC_R12_Ext_Inf_pos =.Right.IC_R12_Ext_Inf_pos* ..MirrorTransform;
    AnyMatrix  IC_R12_Ext_Sup_pos =.Right.IC_R12_Ext_Sup_pos* ..MirrorTransform;
    AnyMatrix  IC_R12_Int_Inf_pos =.Right.IC_R12_Int_Inf_pos* ..MirrorTransform;
    AnyMatrix  IC_R12_Int_Sup_pos =.Right.IC_R12_Int_Sup_pos* ..MirrorTransform;


    AnyFolder IC_R12_Ext_Inf = {AnyMatrix Points= ..Right.IC_R12_Ext_Inf.Points* ...MirrorTransform;};
    AnyFolder IC_R12_Int_Inf = {AnyMatrix Points= ..Right.IC_R12_Int_Inf.Points* ...MirrorTransform;};
    AnyFolder IC_R12_Inn_Inf = {AnyMatrix Points= ..Right.IC_R12_Inn_Inf.Points* ...MirrorTransform;};
    AnyFolder IC_R12_Ext_Sup = {AnyMatrix Points= ..Right.IC_R12_Ext_Sup.Points* ...MirrorTransform;};
    AnyFolder IC_R12_Int_Sup = {AnyMatrix Points= ..Right.IC_R12_Int_Sup.Points* ...MirrorTransform;};
    AnyFolder IC_R12_Inn_Sup = {AnyMatrix Points= ..Right.IC_R12_Inn_Sup.Points* ...MirrorTransform;};

    AnyFolder IC_R12_Int_Sup0 = {AnyMatrix Points= ..Right.IC_R12_Int_Sup0.Points* ...MirrorTransform;};

    #endif

    AnyFloat CC_AlignmentNode =.Right.CC_AlignmentNode* ..MirrorTransform;
    AnyFloat CCTangetNodeR12R11 =.Right.CCTangetNodeR12R11* ..MirrorTransform;
  };
};

AnyFolder Thorax = {

  AnyVar BodyMass = 75;  ///< This is a body mass that the trunk dataset is based on

  AnyVar UBHeight =  0.50; //Upperbody height
  AnyVar Height = vnorm( .C1.C1C0JntNode_pos - .L5.L5SacrumJntNode_pos);///< Height computed from the L5SacrumJnt to C1 node
  AnyVar Width = 0.3881839;///< Shoulder width
  AnyVar Depth = 0.1870;///< Horizontal distance between (midpoint of LongissimusThoracisT8S3Via3NodeL and LongissimusThoracisT8S3Via3NodeR) and (midpoint of RACP_CO6ViaNodeR and RACP_CO6ViaNodeL)

  AnyFloat sCoM_pos = {0.060,0.303,0};

  AnyFloat ForceVectorNode_pos                             = {-0.01700000, 0.5270000, 0.0000000};
  AnyFloat PressureNode_pos                                = {0.1000000, 0.1500000, 0.0000000};

  #if BM_TRUNK_CAVITY_MODEL == _CAVITY_MODEL_VOLUME_
      AnyFloat BuckleNodeTopCenter_pos =0.5*(Right.BuckleNode_pos+Left.BuckleNode_pos);
  #else
      AnyFloat BuckleNodeTopCenter_pos                         = {0.1500000, 0.1500000, 0.0000000};
  #endif

  AnyFloat SPL1T5Node_pos                                  = {-0.06970000, 0.3403000, 0.0000000};
  AnyFloat SPL1T4Node_pos                                  = {-0.06250000, 0.3602000, 0};
  AnyFloat SpinalisL1T3Node_pos                                  = {-0.05440000, 0.3882000, 0};
  AnyFloat SpinalisT11T6Via1Node_pos                            = {-0.048+0.01,0.19,0};
  AnyFloat SpinalisT12T5Via2Node_pos                            = {-0.049+0.01,0.188,0};
  AnyFloat SpinalisT12T4Via2Node_pos                            = {-0.050+0.01,0.187,0};
  AnyFloat SpinalisL1T3Via3Node_pos                             = {-0.051+0.01,0.186,0};
  AnyFloat SpinalisL1T2Via3Node_pos                             = {-0.052+0.01,0.185,0};
  AnyFloat SpinalisL2T1Via4Node_pos                             = {-0.053+0.01,0.184,0};

  AnyVar IliocostalisLumborumR5Z    = (Right.IliocostalisLumborumR5Node_pos[2]   -.Pelvis.Right.IliocostalisLumborumR5Node_pos[2])   /(Right.IliocostalisLumborumR5Node_pos[1]   -.Pelvis.Right.IliocostalisLumborumR5Node_pos[1]);
  AnyVar IliocostalisLumborumR6Z    = (Right.IliocostalisLumborumR6Node_pos[2]   -.Pelvis.Right.IliocostalisLumborumR6Node_pos[2])   /(Right.IliocostalisLumborumR6Node_pos[1]   -.Pelvis.Right.IliocostalisLumborumR6Node_pos[1]);
  AnyVar IliocostalisLumborumR7Z      = (Right.IliocostalisLumborumR7Node_pos[2]     -.Pelvis.Right.IliocostalisLumborumR7Node_pos[2])     /(Right.IliocostalisLumborumR7Node_pos[1]     -.Pelvis.Right.IliocostalisLumborumR7Node_pos[1]);
  AnyVar IliocostalisLumborumR8Z      = (Right.IliocostalisLumborumR8Node_pos[2]     -.Pelvis.Right.IliocostalisLumborumR8Node_pos[2])     /(Right.IliocostalisLumborumR8Node_pos[1]     -.Pelvis.Right.IliocostalisLumborumR8Node_pos[1]);
  AnyVar IliocostalisLumborumR9Z      = (Right.IliocostalisLumborumR9Node_pos[2]     -.Pelvis.Right.IliocostalisLumborumR9Node_pos[2])     /(Right.IliocostalisLumborumR9Node_pos[1]     -.Pelvis.Right.IliocostalisLumborumR9Node_pos[1]);
  AnyVar IliocostalisLumborumR10Z     = (Right.IliocostalisLumborumR10Node_pos[2]    -.Pelvis.Right.IliocostalisLumborumR10Node_pos[2])    /(Right.IliocostalisLumborumR10Node_pos[1]    -.Pelvis.Right.IliocostalisLumborumR10Node_pos[1]);
  AnyVar IliocostalisLumborumR11Z     = (Right.IliocostalisLumborumR11Node_pos[2]    -.Pelvis.Right.IliocostalisLumborumR11Node_pos[2])    /(Right.IliocostalisLumborumR11Node_pos[1]    -.Pelvis.Right.IliocostalisLumborumR11Node_pos[1]);
  AnyVar LongissimusThoracisT1L1Z      = (Right.LongissimusThoracisT1L1Node_pos[2]     -.L1.Right.LongissimusThoracisT1L1Node_pos[2])         /(Right.LongissimusThoracisT1L1Node_pos[1]     -.L1.Right.LongissimusThoracisT1L1Node_pos[1]);
  AnyVar LongissimusThoracisT2L2Z      = (Right.LongissimusThoracisT2L2Node_pos[2]     -.L2.Right.LongissimusThoracisT2L2Node_pos[2])         /(Right.LongissimusThoracisT2L2Node_pos[1]     -.L2.Right.LongissimusThoracisT2L2Node_pos[1]);
  AnyVar LongissimusThoracisT3L3Z      = (Right.LongissimusThoracisT3L3Node_pos[2]     -.L3.Right.LongissimusThoracisT3L3Node_pos[2])         /(Right.LongissimusThoracisT3L3Node_pos[1]     -.L3.Right.LongissimusThoracisT3L3Node_pos[1]);
  AnyVar LongissimusThoracisT4L4Z      = (Right.LongissimusThoracisT4L4Node_pos[2]     -.L4.Right.LongissimusThoracisT4L4Node_pos[2])         /(Right.LongissimusThoracisT4L4Node_pos[1]     -.L4.Right.LongissimusThoracisT4L4Node_pos[1]);
  AnyVar LongissimusThoracisT5L5Z      = (Right.LongissimusThoracisT5L5Node_pos[2]     -.L5.Right.LongissimusThoracisT5L5Node_pos[2])         /(Right.LongissimusThoracisT5L5Node_pos[1]     -.L5.Right.LongissimusThoracisT5L5Node_pos[1]);
  AnyVar LongissimusThoracisT6S1Z      = (Right.LongissimusThoracisT6S1Node_pos[2]     -.Sacrum.Right.LongissimusThoracisT6S1Node_pos[2])     /(Right.LongissimusThoracisT6S1Node_pos[1]     -.Sacrum.Right.LongissimusThoracisT6S1Node_pos[1]);
  AnyVar LongissimusThoracisT7S2Z      = (Right.LongissimusThoracisT7S2Node_pos[2]     -.Sacrum.Right.LongissimusThoracisT7S2Node_pos[2])     /(Right.LongissimusThoracisT7S2Node_pos[1]     -.Sacrum.Right.LongissimusThoracisT7S2Node_pos[1]);
  AnyVar LongissimusThoracisT8S3Z      = (Right.LongissimusThoracisT8S3Node_pos[2]     -.Sacrum.Right.LongissimusThoracisT8S3Node_pos[2])     /(Right.LongissimusThoracisT8S3Node_pos[1]     -.Sacrum.Right.LongissimusThoracisT8S3Node_pos[1]);
  AnyVar LongissimusThoracisT9S4Z      = (Right.LongissimusThoracisT9S4Node_pos[2]     -.Sacrum.Right.LongissimusThoracisT9S4Node_pos[2])     /(Right.LongissimusThoracisT9S4Node_pos[1]     -.Sacrum.Right.LongissimusThoracisT9S4Node_pos[1]);
  AnyVar LongissimusThoracisT10S3Z = (Right.LongissimusThoracisT10S3Node_pos[2]-.Sacrum.Right.LongissimusThoracisT10S3Node_pos[2])/(Right.LongissimusThoracisT10S3Node_pos[1]-.Sacrum.Right.LongissimusThoracisT10S3Node_pos[1]);
  AnyVar LongissimusThoracisT11S3Z = (Right.LongissimusThoracisT11S3Node_pos[2]-.Sacrum.Right.LongissimusThoracisT11S3Node_pos[2])/(Right.LongissimusThoracisT11S3Node_pos[1]-.Sacrum.Right.LongissimusThoracisT11S3Node_pos[1]);
  AnyVar LongissimusThoracisT12S3Z = (Right.LongissimusThoracisT12S3Node_pos[2]-.Sacrum.Right.LongissimusThoracisT12S3Node_pos[2])/(Right.LongissimusThoracisT12S3Node_pos[1]-.Sacrum.Right.LongissimusThoracisT12S3Node_pos[1]);
  AnyVar LongissimusThoracisR3L3Z      = (Right.LongissimusThoracisR3L3Node_pos[2]     -.L3.Right.LongissimusThoracisR3L3Node_pos[2])         /(Right.LongissimusThoracisR3L3Node_pos[1]     -.L3.Right.LongissimusThoracisR3L3Node_pos[1]);
  AnyVar LongissimusThoracisR4L4Z      = (Right.LongissimusThoracisR4L4Node_pos[2]     -.L4.Right.LongissimusThoracisR4L4Node_pos[2])         /(Right.LongissimusThoracisR4L4Node_pos[1]     -.L4.Right.LongissimusThoracisR4L4Node_pos[1]);
  AnyVar LongissimusThoracisR5L5Z      = (Right.LongissimusThoracisR5L5Node_pos[2]     -.L5.Right.LongissimusThoracisR5L5Node_pos[2])         /(Right.LongissimusThoracisR5L5Node_pos[1]     -.L5.Right.LongissimusThoracisR5L5Node_pos[1]);
  AnyVar LongissimusThoracisR6S1Z      = (Right.LongissimusThoracisR6S1Node_pos[2]     -.Sacrum.Right.LongissimusThoracisR6S1Node_pos[2])     /(Right.LongissimusThoracisR6S1Node_pos[1]     -.Sacrum.Right.LongissimusThoracisR6S1Node_pos[1]);
  AnyVar LongissimusThoracisR7S2Z      = (Right.LongissimusThoracisR7S2Node_pos[2]     -.Sacrum.Right.LongissimusThoracisR7S2Node_pos[2])     /(Right.LongissimusThoracisR7S2Node_pos[1]     -.Sacrum.Right.LongissimusThoracisR7S2Node_pos[1]);
  AnyVar LongissimusThoracisR8S3Z      = (Right.LongissimusThoracisR8S3Node_pos[2]     -.Sacrum.Right.LongissimusThoracisR8S3Node_pos[2])     /(Right.LongissimusThoracisR8S3Node_pos[1]     -.Sacrum.Right.LongissimusThoracisR8S3Node_pos[1]);
  AnyVar LongissimusThoracisR9S4Z      = (Right.LongissimusThoracisR9S4Node_pos[2]     -.Sacrum.Right.LongissimusThoracisR9S4Node_pos[2])     /(Right.LongissimusThoracisR9S4Node_pos[1]     -.Sacrum.Right.LongissimusThoracisR9S4Node_pos[1]);
  AnyVar LongissimusThoracisR10S3Z = (Right.LongissimusThoracisR10S3Node_pos[2]-.Sacrum.Right.LongissimusThoracisR10S3Node_pos[2])/(Right.LongissimusThoracisR10S3Node_pos[1]-.Sacrum.Right.LongissimusThoracisR10S3Node_pos[1]);
  AnyVar LongissimusThoracisR11S3Z = (Right.LongissimusThoracisR11S3Node_pos[2]-.Sacrum.Right.LongissimusThoracisR11S3Node_pos[2])/(Right.LongissimusThoracisR11S3Node_pos[1]-.Sacrum.Right.LongissimusThoracisR11S3Node_pos[1]);
  AnyVar PsoasMajorT12Z = (Right.PsoasMajorT12Node_pos[2]-.Pelvis.Right.IliopubicEminenceViaNode_pos[2])/(Right.PsoasMajorT12Node_pos[1]-.Pelvis.Right.IliopubicEminenceViaNode_pos[1]);

  AnyFolder Right = {

  #if BM_ARM_THORAX_SCAPULA_CONTACT != _MULTIPLE_POINT_CONTACT_


   AnyFloat ts_InNeutralConf_pos = {-0.18808603778944455, 0.44138918579438902, 0.075361828963470295};
   AnyFloat aa_InNeutralConf_pos  = {-0.14942039190832326, 0.50439157194485085, 0.19422825692756718};
 AnyFloat ai_InNeutralConf_pos  = {-0.17222362881371742, 0.33497837474473391, 0.11096288348775879};
   AnyFloat acj_InNeutralConf_pos = {-0.12180237802829139, 0.51074743047717597, 0.16250303148093811};
  AnyFloat scj_InNeutralConf_pos  = {-0.06838000000000001, 0.47619162999999998, 0.0207};
    AnyFloat O_DeltoideusAnterior1_Clavicula_InNeutralConf_pos = {-0.097815950407862395, 0.52244897030769311, 0.16273382490535182};
 AnyFloat I_TrapeziusClavicular3_Clavicula_InNeutralConf_pos = {-0.12220455309911955, 0.50934928843979876, 0.1371919462601158};


    #endif

  #if BM_ARM_THORAX_SCAPULA_CONTACT == _MULTIPLE_POINT_CONTACT_

  AnyFloat ts_InNeutralConf_pos=  {-0.18808604112708122, 0.44138913310265426, 0.075361873455395176};
AnyFloat aa_InNeutralConf_pos = {-0.14942037949963966, 0.50439157315507144, 0.19422826772793036};
AnyFloat ai_InNeutralConf_pos  = {-0.17222358007457839, 0.33497833981561032, 0.11096295786837107};
AnyFloat acj_InNeutralConf_pos  = {-0.1218023785818152, 0.51074743164297698, 0.16250303098831292};
AnyFloat scj_InNeutralConf_pos = {-0.06838000000000001, 0.47619162999999998, 0.0207};
 AnyFloat O_DeltoideusAnterior1_Clavicula_InNeutralConf_pos = {-0.097815952967785197, 0.52244897562119297, 0.16273382264432598};
 AnyFloat I_TrapeziusClavicular3_Clavicula_InNeutralConf_pos =  {-0.12220455437528882, 0.50934928768607191, 0.13719194588500475};


  #endif


    AnyFloat LumpedHyoidT1C0Node_pos                        = {0.06000000, 0.4200000, 0.01800000};
    AnyFloat ScalenusAnteriorT1C4Node_pos                   = {0.04000000, 0.4320000, 0.04500000};
    AnyFloat ScalenusMediusT1C3Node_pos                     = {0.03200000, 0.4420000, 0.05300000};
    AnyFloat ScalenusPosteriorT1C5Node_pos                  = {0.02200000, 0.4170000, 0.09800000};
    AnyFloat SpleniusCapitisT1Node_pos                    = {-0.039, 0.438, 0.0};
    AnyFloat SpleniusCapitisT2Node_pos                    = {-0.045, 0.415, 0.0};
    AnyFloat SpleniusCapitisT3Node_pos                    = {-0.053, 0.390, 0.0};
    AnyFloat SpleniusCervicisT3Node_pos                       = {-0.055, 0.392, 0.0};
    AnyFloat SpleniusCervicisT4Node_pos                       = {-0.063, 0.359, 0.0};
    AnyFloat SpleniusCervicisT5Node_pos                       = {-0.063, 0.340, 0.0};
    AnyFloat SpleniusCervicisT6Node_pos                       = {-0.067, 0.309, 0.0};
    AnyFloat SemispinalisCapitisT1C0Node_pos                = {-0.02100000, 0.4740000, 0.035};
    AnyFloat SemispinalisCapitisT2C0Node_pos                = {-0.02400000, 0.4510000, 0.031};
    AnyFloat SemispinalisCapitisT3C0Node_pos                = {-0.03400000, 0.4270000, 0.033};
    AnyFloat SemispinalisCapitisT4C0Node_pos                = {-0.04300000, 0.4030000, 0.033};
    AnyFloat SemispinalisCapitisT5C0Node_pos                = {-0.04803573, 0.3752539, 0.031};
    AnyFloat SemispinalisCapitisT6C0Node_pos                = {-0.05491288, 0.3467098, 0.031};
    AnyFloat SemispinalisCervicisT1C2Node_pos               = {-0.02100000, 0.4740000, 0.03500000};
    AnyFloat SemispinalisCervicisT2C3Node_pos               = {-0.02400000, 0.4510000, 0.03100000};
    AnyFloat SemispinalisCervicisT3C4Node_pos               = {-0.03400000, 0.4270000, 0.03300000};
    AnyFloat SemispinalisCervicisT4C5Node_pos               = {-0.04300000, 0.4030000, 0.03300000};
    AnyFloat SemispinalisCervicisT5C6Node_pos               = {-0.04700000, 0.3770000, 0.03300000};
    AnyFloat SemispinalisCervicisT6C7Node_pos               = {-0.05400000, 0.3480000, 0.03300000};
    AnyFloat LongissimusCapitisT1Node_pos                 = {-0.02100000, 0.4740000, 0.035};
    AnyFloat LongissimusCapitisT2Node_pos                 = {-0.02400000, 0.4510000, 0.031};
    AnyFloat LongissimusCapitisT3Node_pos                 = {-0.03400000, 0.4270000, 0.033};
    AnyFloat LongissimusCapitisT4Node_pos                 = {-0.04300000, 0.4030000, 0.033};
    AnyFloat LongissimusCapitisT5Node_pos                 = {-0.04803573, 0.3752539, 0.031};
    AnyFloat LongissimusCervicisT1Node_pos                 = {-0.02100000, 0.4740000, 0.035};
    AnyFloat LongissimusCervicisT2Node_pos                 = {-0.02400000, 0.4510000, 0.031};
    AnyFloat LongissimusCervicisT3Node_pos                 = {-0.03400000, 0.4270000, 0.033};
    AnyFloat LongissimusCervicisT4Node_pos                 = {-0.04300000, 0.4030000, 0.033};
    AnyFloat LongissimusCervicisT5Node_pos                 = {-0.04803573, 0.3752539, 0.031};
    AnyFloat MultifidusCervicisT1C4Node_pos                 = {-0.02100000, 0.4740000, 0.03500000};
    AnyFloat MultifidusCervicisT1C5Node_pos                 = {-0.02100000, 0.4740000, 0.03500000};
    AnyFloat MultifidusCervicisT2C5Node_pos                 = {-0.02400000, 0.4510000, 0.03100000};
    AnyFloat MultifidusCervicisT2C6Node_pos                 = {-0.02400000, 0.4510000, 0.03100000};
    AnyFloat MultifidusCervicisT3C6Node_pos                 = {-0.03400000, 0.4270000, 0.03300000};
    AnyFloat MultifidusCervicisT3C7Node_pos                 = {-0.03400000, 0.4270000, 0.03300000};
    AnyFloat MultifidusCervicisT4C7Node_pos                 = {-0.04300000, 0.4030000, 0.03300000};
    AnyFloat RotatoresBrevisT1C7OrgNode_pos                = {-0.02100000, 0.4740000, 0.037};
    AnyFloat RotatoresBrevisT2T1OrgNode_pos                = {-0.02400000, 0.4500000, 0.031};
    AnyFloat RotatoresBrevisT3T2OrgNode_pos                = {-0.03400000, 0.4260000, 0.033};
    AnyFloat RotatoresBrevisT4T3OrgNode_pos                = {-0.04300000, 0.4020000, 0.033};
    AnyFloat RotatoresBrevisT5T4OrgNode_pos                = {-0.04803573, 0.3752539, 0.031};
    AnyFloat RotatoresBrevisT6T5OrgNode_pos                = {-0.05491288, 0.3467098, 0.031};
    AnyFloat RotatoresBrevisT7T6OrgNode_pos                = {-0.05756861, 0.3173038, 0.03094617};
    AnyFloat RotatoresBrevisT8T7OrgNode_pos                = {-0.05639632, 0.286548, 0.03218402};
    AnyFloat RotatoresBrevisT9T8OrgNode_pos                = {-0.04994128, 0.2636942, 0.02682002};
    AnyFloat RotatoresBrevisT10T9OrgNode_pos               = {-0.04231547, 0.2315499, 0.01673386};
    AnyFloat RotatoresBrevisT11T10OrgNode_pos              = {-0.03303161, 0.1985722, 0.01863804};
    AnyFloat RotatoresBrevisT12T11OrgNode_pos              = {-0.02265314, 0.1685629, 0.02100183};
    AnyFloat RotatoresLongusT2C7OrgNode_pos                = RotatoresBrevisT2T1OrgNode_pos;
    AnyFloat RotatoresLongusT3T1OrgNode_pos                = RotatoresBrevisT3T2OrgNode_pos;
    AnyFloat RotatoresLongusT4T2OrgNode_pos                = RotatoresBrevisT4T3OrgNode_pos;
    AnyFloat RotatoresLongusT5T3OrgNode_pos                = RotatoresBrevisT5T4OrgNode_pos;
    AnyFloat RotatoresLongusT6T4OrgNode_pos                = RotatoresBrevisT6T5OrgNode_pos;
    AnyFloat RotatoresLongusT7T5OrgNode_pos                = RotatoresBrevisT7T6OrgNode_pos;
    AnyFloat RotatoresLongusT8T6OrgNode_pos                = RotatoresBrevisT8T7OrgNode_pos;
    AnyFloat RotatoresLongusT9T7OrgNode_pos                = RotatoresBrevisT9T8OrgNode_pos;
    AnyFloat RotatoresLongusT10T8OrgNode_pos               = RotatoresBrevisT10T9OrgNode_pos;
    AnyFloat RotatoresLongusT11T9OrgNode_pos               = RotatoresBrevisT11T10OrgNode_pos;
    AnyFloat RotatoresLongusT12T10OrgNode_pos              = RotatoresBrevisT12T11OrgNode_pos;
    AnyFloat RotatoresBrevisT2T1InsNode_pos                = {-0.02089556, 0.4522774, 0.005};
    AnyFloat RotatoresBrevisT3T2InsNode_pos                = {-0.02844162, 0.4295423, 0.005};
    AnyFloat RotatoresBrevisT4T3InsNode_pos                = {-0.03842634, 0.4047527, 0.005};
    AnyFloat RotatoresBrevisT5T4InsNode_pos                = {-0.04498693, 0.3802518, 0.006};
    AnyFloat RotatoresBrevisT6T5InsNode_pos                = {-0.05005001, 0.3534949, 0.005};
    AnyFloat RotatoresBrevisT7T6InsNode_pos                = {-0.05517616, 0.3265487, 0.006};
    AnyFloat RotatoresBrevisT8T7InsNode_pos                = {-0.05311308, 0.2945710, 0.005};
    AnyFloat RotatoresBrevisT9T8InsNode_pos                = {-0.04813016, 0.2698341, 0.005};
    AnyFloat RotatoresBrevisT10T9InsNode_pos               = {-0.04503554, 0.2451402, 0.006};
    AnyFloat RotatoresBrevisT11T10InsNode_pos              = {-0.03492705, 0.2118186, 0.007};
    AnyFloat RotatoresBrevisT12T11InsNode_pos              = {-0.02625239, 0.1804052, 0.008};
    AnyFloat RotatoresLongusT3T1InsNode_pos                = RotatoresBrevisT2T1InsNode_pos;
    AnyFloat RotatoresLongusT4T2InsNode_pos                = RotatoresBrevisT3T2InsNode_pos;
    AnyFloat RotatoresLongusT5T3InsNode_pos                = RotatoresBrevisT4T3InsNode_pos;
    AnyFloat RotatoresLongusT6T4InsNode_pos                = RotatoresBrevisT5T4InsNode_pos;
    AnyFloat RotatoresLongusT7T5InsNode_pos                = RotatoresBrevisT6T5InsNode_pos;
    AnyFloat RotatoresLongusT8T6InsNode_pos                = RotatoresBrevisT7T6InsNode_pos;
    AnyFloat RotatoresLongusT9T7InsNode_pos                = RotatoresBrevisT8T7InsNode_pos;
    AnyFloat RotatoresLongusT10T8InsNode_pos               = RotatoresBrevisT9T8InsNode_pos;
    AnyFloat RotatoresLongusT11T9InsNode_pos               = RotatoresBrevisT10T9InsNode_pos;
    AnyFloat RotatoresLongusT12T10InsNode_pos              = RotatoresBrevisT11T10InsNode_pos;

    #if BM_TRUNK_CAVITY_MODEL == _CAVITY_MODEL_VOLUME_
      AnyFloat BuckleNode_pos                             = {0.1500000, 0.1800000, 0.1200000} +{0.0,0.05,0};
    #else
      AnyFloat BuckleNode_pos                             = {0.1500000, 0.1800000, 0.1200000};
    #endif
    AnyVec3 PsoasMajorT12Node_pos= {0.04, 0.163, 0.019};
    AnyFloat IliocostalisLumborumR5Via1Node_pos    = {-0.050,0.336,(IliocostalisLumborumR5Node_pos[2] - .IliocostalisLumborumR5Z*(IliocostalisLumborumR5Node_pos[1] - 0.336))};
    AnyFloat IliocostalisLumborumR5Via2Node_pos    = {-0.052,0.317,(IliocostalisLumborumR5Node_pos[2] - .IliocostalisLumborumR5Z*(IliocostalisLumborumR5Node_pos[1] - 0.317))};
    AnyFloat IliocostalisLumborumR5Via3Node_pos    = {-0.053,0.283,(IliocostalisLumborumR5Node_pos[2] - .IliocostalisLumborumR5Z*(IliocostalisLumborumR5Node_pos[1] - 0.283))};
    AnyFloat IliocostalisLumborumR5Via4Node_pos    = {-0.053,0.252,(IliocostalisLumborumR5Node_pos[2] - .IliocostalisLumborumR5Z*(IliocostalisLumborumR5Node_pos[1] - 0.252))};
    AnyFloat IliocostalisLumborumR5Via5Node_pos    = {-0.051,0.223,(IliocostalisLumborumR5Node_pos[2] - .IliocostalisLumborumR5Z*(IliocostalisLumborumR5Node_pos[1] - 0.223))};
    AnyFloat IliocostalisLumborumR6Via1Node_pos    = {-0.052,0.315,(IliocostalisLumborumR6Node_pos[2] - .IliocostalisLumborumR6Z*(IliocostalisLumborumR6Node_pos[1] - 0.315))};
    AnyFloat IliocostalisLumborumR6Via2Node_pos    = {-0.054,0.283,(IliocostalisLumborumR6Node_pos[2] - .IliocostalisLumborumR6Z*(IliocostalisLumborumR6Node_pos[1] - 0.283))};
    AnyFloat IliocostalisLumborumR6Via3Node_pos    = {-0.053,0.250,(IliocostalisLumborumR6Node_pos[2] - .IliocostalisLumborumR6Z*(IliocostalisLumborumR6Node_pos[1] - 0.250))};
    AnyFloat IliocostalisLumborumR6Via4Node_pos    = {-0.051,0.222,(IliocostalisLumborumR6Node_pos[2] - .IliocostalisLumborumR6Z*(IliocostalisLumborumR6Node_pos[1] - 0.222))};
    AnyFloat IliocostalisLumborumR7Via1Node_pos      = {-0.054,0.282,(IliocostalisLumborumR7Node_pos[2] - .IliocostalisLumborumR7Z*(IliocostalisLumborumR7Node_pos[1] - 0.282))};
    AnyFloat IliocostalisLumborumR7Via2Node_pos      = {-0.053,0.249,(IliocostalisLumborumR7Node_pos[2] - .IliocostalisLumborumR7Z*(IliocostalisLumborumR7Node_pos[1] - 0.249))};
    AnyFloat IliocostalisLumborumR7Via3Node_pos      = {-0.051,0.220,(IliocostalisLumborumR7Node_pos[2] - .IliocostalisLumborumR7Z*(IliocostalisLumborumR7Node_pos[1] - 0.220))};
    AnyFloat IliocostalisLumborumR8Via1Node_pos      = {-0.053,0.245,(IliocostalisLumborumR8Node_pos[2] - .IliocostalisLumborumR8Z*(IliocostalisLumborumR8Node_pos[1] - 0.245))};
    AnyFloat IliocostalisLumborumR8Via2Node_pos      = {-0.051,0.218,(IliocostalisLumborumR8Node_pos[2] - .IliocostalisLumborumR8Z*(IliocostalisLumborumR8Node_pos[1] - 0.218))};
    AnyFloat IliocostalisLumborumR9Via1Node_pos      = {-0.050,0.216,(IliocostalisLumborumR9Node_pos[2] - .IliocostalisLumborumR9Z*(IliocostalisLumborumR9Node_pos[1] - 0.216))};
    AnyFloat LongissimusThoracisT1L1Via1Node_pos      = {-0.022,0.442,(LongissimusThoracisT1L1Node_pos[2] - .LongissimusThoracisT1L1Z*(LongissimusThoracisT1L1Node_pos[1] - 0.442))};
    AnyFloat LongissimusThoracisT1L1Via2Node_pos      = {-0.032,0.420,(LongissimusThoracisT1L1Node_pos[2] - .LongissimusThoracisT1L1Z*(LongissimusThoracisT1L1Node_pos[1] - 0.420))};
    AnyFloat LongissimusThoracisT1L1Via3Node_pos      = {-0.045,0.402,(LongissimusThoracisT1L1Node_pos[2] - .LongissimusThoracisT1L1Z*(LongissimusThoracisT1L1Node_pos[1] - 0.402))};
    AnyFloat LongissimusThoracisT1L1Via4Node_pos      = {-0.050,0.376,(LongissimusThoracisT1L1Node_pos[2] - .LongissimusThoracisT1L1Z*(LongissimusThoracisT1L1Node_pos[1] - 0.376))};
    AnyFloat LongissimusThoracisT1L1Via5Node_pos      = {-0.057,0.347,(LongissimusThoracisT1L1Node_pos[2] - .LongissimusThoracisT1L1Z*(LongissimusThoracisT1L1Node_pos[1] - 0.347))};
    AnyFloat LongissimusThoracisT1L1Via6Node_pos      = {-0.054,0.317,(LongissimusThoracisT1L1Node_pos[2] - .LongissimusThoracisT1L1Z*(LongissimusThoracisT1L1Node_pos[1] - 0.317))};
    AnyFloat LongissimusThoracisT1L1Via7Node_pos      = {-0.051,0.288,(LongissimusThoracisT1L1Node_pos[2] - .LongissimusThoracisT1L1Z*(LongissimusThoracisT1L1Node_pos[1] - 0.288))};
    AnyFloat LongissimusThoracisT1L1Via8Node_pos      = {-0.045,0.263,(LongissimusThoracisT1L1Node_pos[2] - .LongissimusThoracisT1L1Z*(LongissimusThoracisT1L1Node_pos[1] - 0.263))};
    AnyFloat LongissimusThoracisT1L1Via9Node_pos      = {-0.035,0.223,(LongissimusThoracisT1L1Node_pos[2] - .LongissimusThoracisT1L1Z*(LongissimusThoracisT1L1Node_pos[1] - 0.223))};
    AnyFloat LongissimusThoracisT1L1Via10Node_pos     = {-0.028,0.186,(LongissimusThoracisT1L1Node_pos[2] - .LongissimusThoracisT1L1Z*(LongissimusThoracisT1L1Node_pos[1] - 0.186))};
    AnyFloat LongissimusThoracisT1L1Via11Node_pos     = {-0.020,0.158,(LongissimusThoracisT1L1Node_pos[2] - .LongissimusThoracisT1L1Z*(LongissimusThoracisT1L1Node_pos[1] - 0.158))};
    AnyFloat LongissimusThoracisT2L2Via1Node_pos      = {-0.035,0.421,(LongissimusThoracisT2L2Node_pos[2] - .LongissimusThoracisT2L2Z*(LongissimusThoracisT2L2Node_pos[1] - 0.421))};
    AnyFloat LongissimusThoracisT2L2Via2Node_pos      = {-0.044,0.393,(LongissimusThoracisT2L2Node_pos[2] - .LongissimusThoracisT2L2Z*(LongissimusThoracisT2L2Node_pos[1] - 0.393))};
    AnyFloat LongissimusThoracisT2L2Via3Node_pos      = {-0.050,0.376,(LongissimusThoracisT2L2Node_pos[2] - .LongissimusThoracisT2L2Z*(LongissimusThoracisT2L2Node_pos[1] - 0.376))};
    AnyFloat LongissimusThoracisT2L2Via4Node_pos      = {-0.058,0.345,(LongissimusThoracisT2L2Node_pos[2] - .LongissimusThoracisT2L2Z*(LongissimusThoracisT2L2Node_pos[1] - 0.345))};
    AnyFloat LongissimusThoracisT2L2Via5Node_pos      = {-0.057,0.318,(LongissimusThoracisT2L2Node_pos[2] - .LongissimusThoracisT2L2Z*(LongissimusThoracisT2L2Node_pos[1] - 0.318))};
    AnyFloat LongissimusThoracisT2L2Via6Node_pos      = {-0.053,0.288,(LongissimusThoracisT2L2Node_pos[2] - .LongissimusThoracisT2L2Z*(LongissimusThoracisT2L2Node_pos[1] - 0.288))};
    AnyFloat LongissimusThoracisT2L2Via7Node_pos      = {-0.047,0.264,(LongissimusThoracisT2L2Node_pos[2] - .LongissimusThoracisT2L2Z*(LongissimusThoracisT2L2Node_pos[1] - 0.264))};
    AnyFloat LongissimusThoracisT2L2Via8Node_pos      = {-0.042,0.228,(LongissimusThoracisT2L2Node_pos[2] - .LongissimusThoracisT2L2Z*(LongissimusThoracisT2L2Node_pos[1] - 0.228))};
    AnyFloat LongissimusThoracisT2L2Via9Node_pos      = {-0.026,0.190,(LongissimusThoracisT2L2Node_pos[2] - .LongissimusThoracisT2L2Z*(LongissimusThoracisT2L2Node_pos[1] - 0.190))};
    AnyFloat LongissimusThoracisT2L2Via10Node_pos     = {-0.017,0.155,(LongissimusThoracisT2L2Node_pos[2] - .LongissimusThoracisT2L2Z*(LongissimusThoracisT2L2Node_pos[1] - 0.155))};
    AnyFloat LongissimusThoracisT3L3Via1Node_pos      = {-0.041,0.394,(LongissimusThoracisT3L3Node_pos[2] - .LongissimusThoracisT3L3Z*(LongissimusThoracisT3L3Node_pos[1] - 0.394))};
    AnyFloat LongissimusThoracisT3L3Via2Node_pos      = {-0.049,0.372,(LongissimusThoracisT3L3Node_pos[2] - .LongissimusThoracisT3L3Z*(LongissimusThoracisT3L3Node_pos[1] - 0.372))};
    AnyFloat LongissimusThoracisT3L3Via3Node_pos      = {-0.057,0.346,(LongissimusThoracisT3L3Node_pos[2] - .LongissimusThoracisT3L3Z*(LongissimusThoracisT3L3Node_pos[1] - 0.346))};
    AnyFloat LongissimusThoracisT3L3Via4Node_pos      = {-0.057,0.318,(LongissimusThoracisT3L3Node_pos[2] - .LongissimusThoracisT3L3Z*(LongissimusThoracisT3L3Node_pos[1] - 0.318))};
    AnyFloat LongissimusThoracisT3L3Via5Node_pos      = {-0.056,0.289,(LongissimusThoracisT3L3Node_pos[2] - .LongissimusThoracisT3L3Z*(LongissimusThoracisT3L3Node_pos[1] - 0.289))};
    AnyFloat LongissimusThoracisT3L3Via6Node_pos      = {-0.050,0.263,(LongissimusThoracisT3L3Node_pos[2] - .LongissimusThoracisT3L3Z*(LongissimusThoracisT3L3Node_pos[1] - 0.263))};
    AnyFloat LongissimusThoracisT3L3Via7Node_pos      = {-0.042,0.233,(LongissimusThoracisT3L3Node_pos[2] - .LongissimusThoracisT3L3Z*(LongissimusThoracisT3L3Node_pos[1] - 0.233))};
    AnyFloat LongissimusThoracisT3L3Via8Node_pos      = {-0.027,0.189,(LongissimusThoracisT3L3Node_pos[2] - .LongissimusThoracisT3L3Z*(LongissimusThoracisT3L3Node_pos[1] - 0.189))};
    AnyFloat LongissimusThoracisT3L3Via9Node_pos      = {-0.016,0.150,(LongissimusThoracisT3L3Node_pos[2] - .LongissimusThoracisT3L3Z*(LongissimusThoracisT3L3Node_pos[1] - 0.150))};
    AnyFloat LongissimusThoracisT4L4Via1Node_pos      = {-0.045,0.366,(LongissimusThoracisT4L4Node_pos[2] - .LongissimusThoracisT4L4Z*(LongissimusThoracisT4L4Node_pos[1] - 0.366))};
    AnyFloat LongissimusThoracisT4L4Via2Node_pos      = {-0.051,0.347,(LongissimusThoracisT4L4Node_pos[2] - .LongissimusThoracisT4L4Z*(LongissimusThoracisT4L4Node_pos[1] - 0.347))};
    AnyFloat LongissimusThoracisT4L4Via3Node_pos      = {-0.057,0.318,(LongissimusThoracisT4L4Node_pos[2] - .LongissimusThoracisT4L4Z*(LongissimusThoracisT4L4Node_pos[1] - 0.318))};
    AnyFloat LongissimusThoracisT4L4Via4Node_pos      = {-0.058,0.289,(LongissimusThoracisT4L4Node_pos[2] - .LongissimusThoracisT4L4Z*(LongissimusThoracisT4L4Node_pos[1] - 0.289))};
    AnyFloat LongissimusThoracisT4L4Via5Node_pos      = {-0.053,0.267,(LongissimusThoracisT4L4Node_pos[2] - .LongissimusThoracisT4L4Z*(LongissimusThoracisT4L4Node_pos[1] - 0.267))};
    AnyFloat LongissimusThoracisT4L4Via6Node_pos      = {-0.044,0.234,(LongissimusThoracisT4L4Node_pos[2] - .LongissimusThoracisT4L4Z*(LongissimusThoracisT4L4Node_pos[1] - 0.234))};
    AnyFloat LongissimusThoracisT4L4Via7Node_pos      = {-0.033,0.197,(LongissimusThoracisT4L4Node_pos[2] - .LongissimusThoracisT4L4Z*(LongissimusThoracisT4L4Node_pos[1] - 0.197))};
    AnyFloat LongissimusThoracisT4L4Via8Node_pos      = {-0.017,0.156,(LongissimusThoracisT4L4Node_pos[2] - .LongissimusThoracisT4L4Z*(LongissimusThoracisT4L4Node_pos[1] - 0.156))};
    AnyFloat LongissimusThoracisT5L5Via1Node_pos      = {-0.047,0.343,(LongissimusThoracisT5L5Node_pos[2] - .LongissimusThoracisT5L5Z*(LongissimusThoracisT5L5Node_pos[1] - 0.343))};
    AnyFloat LongissimusThoracisT5L5Via2Node_pos      = {-0.054,0.317,(LongissimusThoracisT5L5Node_pos[2] - .LongissimusThoracisT5L5Z*(LongissimusThoracisT5L5Node_pos[1] - 0.317))};
    AnyFloat LongissimusThoracisT5L5Via3Node_pos      = {-0.057,0.289,(LongissimusThoracisT5L5Node_pos[2] - .LongissimusThoracisT5L5Z*(LongissimusThoracisT5L5Node_pos[1] - 0.289))};
    AnyFloat LongissimusThoracisT5L5Via4Node_pos      = {-0.049,0.261,(LongissimusThoracisT5L5Node_pos[2] - .LongissimusThoracisT5L5Z*(LongissimusThoracisT5L5Node_pos[1] - 0.261))};
    AnyFloat LongissimusThoracisT5L5Via5Node_pos      = {-0.042,0.234,(LongissimusThoracisT5L5Node_pos[2] - .LongissimusThoracisT5L5Z*(LongissimusThoracisT5L5Node_pos[1] - 0.234))};
    AnyFloat LongissimusThoracisT5L5Via6Node_pos      = {-0.032,0.196,(LongissimusThoracisT5L5Node_pos[2] - .LongissimusThoracisT5L5Z*(LongissimusThoracisT5L5Node_pos[1] - 0.196))};
    AnyFloat LongissimusThoracisT5L5Via7Node_pos      = {-0.022,0.156,(LongissimusThoracisT5L5Node_pos[2] - .LongissimusThoracisT5L5Z*(LongissimusThoracisT5L5Node_pos[1] - 0.156))};
    AnyFloat LongissimusThoracisT6S1Via1Node_pos      = {-0.047,0.312,(LongissimusThoracisT6S1Node_pos[2] - .LongissimusThoracisT6S1Z*(LongissimusThoracisT6S1Node_pos[1] - 0.312))};
    AnyFloat LongissimusThoracisT6S1Via2Node_pos      = {-0.052,0.288,(LongissimusThoracisT6S1Node_pos[2] - .LongissimusThoracisT6S1Z*(LongissimusThoracisT6S1Node_pos[1] - 0.288))};
    AnyFloat LongissimusThoracisT6S1Via3Node_pos      = {-0.048,0.260,(LongissimusThoracisT6S1Node_pos[2] - .LongissimusThoracisT6S1Z*(LongissimusThoracisT6S1Node_pos[1] - 0.260))};
    AnyFloat LongissimusThoracisT6S1Via4Node_pos      = {-0.046,0.234,(LongissimusThoracisT6S1Node_pos[2] - .LongissimusThoracisT6S1Z*(LongissimusThoracisT6S1Node_pos[1] - 0.234))};
    AnyFloat LongissimusThoracisT6S1Via5Node_pos      = {-0.031,0.196,(LongissimusThoracisT6S1Node_pos[2] - .LongissimusThoracisT6S1Z*(LongissimusThoracisT6S1Node_pos[1] - 0.196))};
    AnyFloat LongissimusThoracisT6S1Via6Node_pos      = {-0.022,0.158,(LongissimusThoracisT6S1Node_pos[2] - .LongissimusThoracisT6S1Z*(LongissimusThoracisT6S1Node_pos[1] - 0.158))};
    AnyFloat LongissimusThoracisT7S2Via1Node_pos      = {-0.052,0.288,(LongissimusThoracisT7S2Node_pos[2] - .LongissimusThoracisT7S2Z*(LongissimusThoracisT7S2Node_pos[1] - 0.288))};
    AnyFloat LongissimusThoracisT7S2Via2Node_pos      = {-0.049,0.260,(LongissimusThoracisT7S2Node_pos[2] - .LongissimusThoracisT7S2Z*(LongissimusThoracisT7S2Node_pos[1] - 0.260))};
    AnyFloat LongissimusThoracisT7S2Via3Node_pos      = {-0.048,0.233,(LongissimusThoracisT7S2Node_pos[2] - .LongissimusThoracisT7S2Z*(LongissimusThoracisT7S2Node_pos[1] - 0.233))};
    AnyFloat LongissimusThoracisT7S2Via4Node_pos      = {-0.033,0.202,(LongissimusThoracisT7S2Node_pos[2] - .LongissimusThoracisT7S2Z*(LongissimusThoracisT7S2Node_pos[1] - 0.202))};
    AnyFloat LongissimusThoracisT7S2Via5Node_pos      = {-0.021,0.165,(LongissimusThoracisT7S2Node_pos[2] - .LongissimusThoracisT7S2Z*(LongissimusThoracisT7S2Node_pos[1] - 0.165))};
    AnyFloat LongissimusThoracisT8S3Via1Node_pos      = {-0.050,0.256,(LongissimusThoracisT8S3Node_pos[2] - .LongissimusThoracisT8S3Z*(LongissimusThoracisT8S3Node_pos[1] - 0.256))};
    AnyFloat LongissimusThoracisT8S3Via2Node_pos      = {-0.048,0.229,(LongissimusThoracisT8S3Node_pos[2] - .LongissimusThoracisT8S3Z*(LongissimusThoracisT8S3Node_pos[1] - 0.229))};
    AnyFloat LongissimusThoracisT8S3Via3Node_pos      = {-0.034,0.201,(LongissimusThoracisT8S3Node_pos[2] - .LongissimusThoracisT8S3Z*(LongissimusThoracisT8S3Node_pos[1] - 0.201))};
    AnyFloat LongissimusThoracisT8S3Via4Node_pos      = {-0.023,0.159,(LongissimusThoracisT8S3Node_pos[2] - .LongissimusThoracisT8S3Z*(LongissimusThoracisT8S3Node_pos[1] - 0.159))};
    AnyFloat LongissimusThoracisT9S4Via1Node_pos      = {-0.051,0.228,(LongissimusThoracisT9S4Node_pos[2] - .LongissimusThoracisT9S4Z*(LongissimusThoracisT9S4Node_pos[1] - 0.228))};
    AnyFloat LongissimusThoracisT9S4Via2Node_pos      = {-0.037,0.200,(LongissimusThoracisT9S4Node_pos[2] - .LongissimusThoracisT9S4Z*(LongissimusThoracisT9S4Node_pos[1] - 0.200))};
    AnyFloat LongissimusThoracisT9S4Via3Node_pos      = {-0.023,0.152,(LongissimusThoracisT9S4Node_pos[2] - .LongissimusThoracisT9S4Z*(LongissimusThoracisT9S4Node_pos[1] - 0.152))};
    AnyFloat LongissimusThoracisT10S3Via1Node_pos = {-0.037,0.197,(LongissimusThoracisT10S3Node_pos[2] - .LongissimusThoracisT10S3Z*(LongissimusThoracisT10S3Node_pos[1] - 0.197))};
    AnyFloat LongissimusThoracisT10S3Via2Node_pos = {-0.023,0.147,(LongissimusThoracisT10S3Node_pos[2] - .LongissimusThoracisT10S3Z*(LongissimusThoracisT10S3Node_pos[1] - 0.147))};
    AnyFloat LongissimusThoracisT11S3Via1Node_pos = {-0.023,0.149,(LongissimusThoracisT11S3Node_pos[2] - .LongissimusThoracisT11S3Z*(LongissimusThoracisT11S3Node_pos[1] - 0.149))};

    AnyFloat RACP_CO7Node_1_pos                            = {0.1450000, 0.2360000, 0.010000};
    AnyFloat RACP_CO6Node_2_pos                            = {0.14021569, 0.23908326,   0.005};
    AnyFloat RACP_CO5Node_2_pos                            = {0.1350000, 0.290000, 0.0400000};
    AnyFloat RACP_Via_2_pos                                = {0.1550000, 0.200000, 0.0400000};
    AnyFloat OEC6_RSNode_pos                                = {0.12831205,0.25798428, 0.11569053}+{-0.015,0.007,0.017};  // OEC1
    AnyFloat OEC7_RSNode_pos                                = {0.13488244,0.22149785, 0.12089419}+{-0.022,0.011,0.018};  // OEC2
    AnyFloat OEC8_RSNode_pos                                = {0.14111029,0.18604259, 0.12809466}+{-0.025,0.015,0.015};  // OEC3
    AnyFloat OEC9_RSNode_pos                                = {0.13291441,0.14830206, 0.12934342}+{-0.03,0.016,0.014};   // OEC4
    AnyFloat OEC9_RSNode_1_pos                              = {0.13291441,0.14830206, 0.12934342}+{-0.06,0.025,0.005}+{0,0,0.005};    // OEC5
    AnyFloat LongissimusThoracisR3L3Via1Node_pos      = {-0.041,0.394,(LongissimusThoracisR3L3Node_pos[2] - .LongissimusThoracisR3L3Z*(LongissimusThoracisR3L3Node_pos[1] - 0.394))};
    AnyFloat LongissimusThoracisR3L3Via2Node_pos      = {-0.049,0.372,(LongissimusThoracisR3L3Node_pos[2] - .LongissimusThoracisR3L3Z*(LongissimusThoracisR3L3Node_pos[1] - 0.372))};
    AnyFloat LongissimusThoracisR3L3Via3Node_pos      = {-0.057,0.346,(LongissimusThoracisR3L3Node_pos[2] - .LongissimusThoracisR3L3Z*(LongissimusThoracisR3L3Node_pos[1] - 0.346))};
    AnyFloat LongissimusThoracisR3L3Via4Node_pos      = {-0.057,0.318,(LongissimusThoracisR3L3Node_pos[2] - .LongissimusThoracisR3L3Z*(LongissimusThoracisR3L3Node_pos[1] - 0.318))};
    AnyFloat LongissimusThoracisR3L3Via5Node_pos      = {-0.056,0.289,(LongissimusThoracisR3L3Node_pos[2] - .LongissimusThoracisR3L3Z*(LongissimusThoracisR3L3Node_pos[1] - 0.289))};
    AnyFloat LongissimusThoracisR3L3Via6Node_pos      = {-0.050,0.263,(LongissimusThoracisR3L3Node_pos[2] - .LongissimusThoracisR3L3Z*(LongissimusThoracisR3L3Node_pos[1] - 0.263))};
    AnyFloat LongissimusThoracisR3L3Via7Node_pos      = {-0.042,0.233,(LongissimusThoracisR3L3Node_pos[2] - .LongissimusThoracisR3L3Z*(LongissimusThoracisR3L3Node_pos[1] - 0.233))};
    AnyFloat LongissimusThoracisR3L3Via8Node_pos      = {-0.027,0.189,(LongissimusThoracisR3L3Node_pos[2] - .LongissimusThoracisR3L3Z*(LongissimusThoracisR3L3Node_pos[1] - 0.189))};
    AnyFloat LongissimusThoracisR3L3Via9Node_pos      = {-0.016,0.150,(LongissimusThoracisR3L3Node_pos[2] - .LongissimusThoracisR3L3Z*(LongissimusThoracisR3L3Node_pos[1] - 0.150))};
    AnyFloat LongissimusThoracisR4L4Via1Node_pos      = {-0.045,0.366,(LongissimusThoracisR4L4Node_pos[2] - .LongissimusThoracisR4L4Z*(LongissimusThoracisR4L4Node_pos[1] - 0.366))};
    AnyFloat LongissimusThoracisR4L4Via2Node_pos      = {-0.051,0.347,(LongissimusThoracisR4L4Node_pos[2] - .LongissimusThoracisR4L4Z*(LongissimusThoracisR4L4Node_pos[1] - 0.347))};
    AnyFloat LongissimusThoracisR4L4Via3Node_pos      = {-0.057,0.318,(LongissimusThoracisR4L4Node_pos[2] - .LongissimusThoracisR4L4Z*(LongissimusThoracisR4L4Node_pos[1] - 0.318))};
    AnyFloat LongissimusThoracisR4L4Via4Node_pos      = {-0.058,0.289,(LongissimusThoracisR4L4Node_pos[2] - .LongissimusThoracisR4L4Z*(LongissimusThoracisR4L4Node_pos[1] - 0.289))};
    AnyFloat LongissimusThoracisR4L4Via5Node_pos      = {-0.053,0.267,(LongissimusThoracisR4L4Node_pos[2] - .LongissimusThoracisR4L4Z*(LongissimusThoracisR4L4Node_pos[1] - 0.267))};
    AnyFloat LongissimusThoracisR4L4Via6Node_pos      = {-0.044,0.234,(LongissimusThoracisR4L4Node_pos[2] - .LongissimusThoracisR4L4Z*(LongissimusThoracisR4L4Node_pos[1] - 0.234))};
    AnyFloat LongissimusThoracisR4L4Via7Node_pos      = {-0.033,0.197,(LongissimusThoracisR4L4Node_pos[2] - .LongissimusThoracisR4L4Z*(LongissimusThoracisR4L4Node_pos[1] - 0.197))};
    AnyFloat LongissimusThoracisR4L4Via8Node_pos      = {-0.017,0.156,(LongissimusThoracisR4L4Node_pos[2] - .LongissimusThoracisR4L4Z*(LongissimusThoracisR4L4Node_pos[1] - 0.156))};
    AnyFloat LongissimusThoracisR5L5Via1Node_pos      = {-0.047,0.343,(LongissimusThoracisR5L5Node_pos[2] - .LongissimusThoracisR5L5Z*(LongissimusThoracisR5L5Node_pos[1] - 0.343))};
    AnyFloat LongissimusThoracisR5L5Via2Node_pos      = {-0.054,0.317,(LongissimusThoracisR5L5Node_pos[2] - .LongissimusThoracisR5L5Z*(LongissimusThoracisR5L5Node_pos[1] - 0.317))};
    AnyFloat LongissimusThoracisR5L5Via3Node_pos      = {-0.057,0.289,(LongissimusThoracisR5L5Node_pos[2] - .LongissimusThoracisR5L5Z*(LongissimusThoracisR5L5Node_pos[1] - 0.289))};
    AnyFloat LongissimusThoracisR5L5Via4Node_pos      = {-0.049,0.261,(LongissimusThoracisR5L5Node_pos[2] - .LongissimusThoracisR5L5Z*(LongissimusThoracisR5L5Node_pos[1] - 0.261))};
    AnyFloat LongissimusThoracisR5L5Via5Node_pos      = {-0.042,0.234,(LongissimusThoracisR5L5Node_pos[2] - .LongissimusThoracisR5L5Z*(LongissimusThoracisR5L5Node_pos[1] - 0.234))};
    AnyFloat LongissimusThoracisR5L5Via6Node_pos      = {-0.032,0.196,(LongissimusThoracisR5L5Node_pos[2] - .LongissimusThoracisR5L5Z*(LongissimusThoracisR5L5Node_pos[1] - 0.196))};
    AnyFloat LongissimusThoracisR5L5Via7Node_pos      = {-0.022,0.156,(LongissimusThoracisR5L5Node_pos[2] - .LongissimusThoracisR5L5Z*(LongissimusThoracisR5L5Node_pos[1] - 0.156))};
    AnyFloat LongissimusThoracisR6S1Via1Node_pos      = {-0.047,0.312,(LongissimusThoracisR6S1Node_pos[2] - .LongissimusThoracisR6S1Z*(LongissimusThoracisR6S1Node_pos[1] - 0.312))};
    AnyFloat LongissimusThoracisR6S1Via2Node_pos      = {-0.052,0.288,(LongissimusThoracisR6S1Node_pos[2] - .LongissimusThoracisR6S1Z*(LongissimusThoracisR6S1Node_pos[1] - 0.288))};
    AnyFloat LongissimusThoracisR6S1Via3Node_pos      = {-0.048,0.260,(LongissimusThoracisR6S1Node_pos[2] - .LongissimusThoracisR6S1Z*(LongissimusThoracisR6S1Node_pos[1] - 0.260))};
    AnyFloat LongissimusThoracisR6S1Via4Node_pos      = {-0.046,0.234,(LongissimusThoracisR6S1Node_pos[2] - .LongissimusThoracisR6S1Z*(LongissimusThoracisR6S1Node_pos[1] - 0.234))};
    AnyFloat LongissimusThoracisR6S1Via5Node_pos      = {-0.031,0.196,(LongissimusThoracisR6S1Node_pos[2] - .LongissimusThoracisR6S1Z*(LongissimusThoracisR6S1Node_pos[1] - 0.196))};
    AnyFloat LongissimusThoracisR6S1Via6Node_pos      = {-0.022,0.158,(LongissimusThoracisR6S1Node_pos[2] - .LongissimusThoracisR6S1Z*(LongissimusThoracisR6S1Node_pos[1] - 0.158))};
    AnyFloat LongissimusThoracisR7S2Via1Node_pos      = {-0.052,0.288,(LongissimusThoracisR7S2Node_pos[2] - .LongissimusThoracisR7S2Z*(LongissimusThoracisR7S2Node_pos[1] - 0.288))};
    AnyFloat LongissimusThoracisR7S2Via2Node_pos      = {-0.049,0.260,(LongissimusThoracisR7S2Node_pos[2] - .LongissimusThoracisR7S2Z*(LongissimusThoracisR7S2Node_pos[1] - 0.260))};
    AnyFloat LongissimusThoracisR7S2Via3Node_pos      = {-0.048,0.233,(LongissimusThoracisR7S2Node_pos[2] - .LongissimusThoracisR7S2Z*(LongissimusThoracisR7S2Node_pos[1] - 0.233))};
    AnyFloat LongissimusThoracisR7S2Via4Node_pos      = {-0.033,0.202,(LongissimusThoracisR7S2Node_pos[2] - .LongissimusThoracisR7S2Z*(LongissimusThoracisR7S2Node_pos[1] - 0.202))};
    AnyFloat LongissimusThoracisR7S2Via5Node_pos      = {-0.021,0.165,(LongissimusThoracisR7S2Node_pos[2] - .LongissimusThoracisR7S2Z*(LongissimusThoracisR7S2Node_pos[1] - 0.165))};
    AnyFloat LongissimusThoracisR8S3Via1Node_pos      = {-0.050,0.256,(LongissimusThoracisR8S3Node_pos[2] - .LongissimusThoracisR8S3Z*(LongissimusThoracisR8S3Node_pos[1] - 0.256))};
    AnyFloat LongissimusThoracisR8S3Via2Node_pos      = {-0.048,0.229,(LongissimusThoracisR8S3Node_pos[2] - .LongissimusThoracisR8S3Z*(LongissimusThoracisR8S3Node_pos[1] - 0.229))};
    AnyFloat LongissimusThoracisR8S3Via3Node_pos      = {-0.034,0.201,(LongissimusThoracisR8S3Node_pos[2] - .LongissimusThoracisR8S3Z*(LongissimusThoracisR8S3Node_pos[1] - 0.201))};
    AnyFloat LongissimusThoracisR9S4Via1Node_pos      = {-0.051,0.228,(LongissimusThoracisR9S4Node_pos[2] - .LongissimusThoracisR9S4Z*(LongissimusThoracisR9S4Node_pos[1] - 0.228))};
    AnyFloat LongissimusThoracisR9S4Via2Node_pos      = {-0.037,0.200,(LongissimusThoracisR9S4Node_pos[2] - .LongissimusThoracisR9S4Z*(LongissimusThoracisR9S4Node_pos[1] - 0.200))};
    AnyFloat LongissimusThoracisR10S3Via1Node_pos = {-0.037,0.197,(LongissimusThoracisR10S3Node_pos[2] - .LongissimusThoracisR10S3Z*(LongissimusThoracisR10S3Node_pos[1] - 0.197))};


    AnyFloat OEC10_RSNode_pos                              = {0.11703116-0.03,0.120634+0.005, 0.12460914}+{0.005,0.0,0.003}; //   OEC6

    AnyFloat OEC6_1_RSNode_pos                              = {0.11703116,0.120634, 0.12460914}+{-0.05-0.03,0.01+0.01,0.005};
    AnyFloat OEC6_2_RSNode_pos                              = {0.11703116,0.120634, 0.12460914}+{-0.02-0.03,0.005+0.02,0.005}+{-0.01,0,0.005};  // OEC9


    AnyFloat OEC10a_RSNode_pos                               = {0.086559363,0.12617856, 0.12822376};
    AnyFloat OEC11_CINode_pos                               = {0.050685782,0.11664285, 0.11891787};

    AnyFloat OEC11_CINode1_pos                              = {0.050685782,0.11664285, 0.11891787}+{-0.025,0.01,-0.005};

    AnyFloat OICI_C10aNode_pos                              = {0.086559363,0.12617856, 0.12822376};
    AnyFloat OICI_C10Node_pos                              = {0.12267275,0.11959027, 0.12383152};
    AnyFloat OICI_C11Node_pos                               = {0.039111104,0.12144548, 0.11866689};
    AnyFloat MultifidusThoracisL1T8Node_pos                                 = {-0.05600000, 0.2530000, 0.005000000};
    AnyFloat MultifidusThoracisL1T9Node_pos                                 = {-0.05100000, 0.2320000, 0.005000000};
    AnyFloat MultifidusThoracisL1T10Node_pos                                = {-0.03700000, 0.2100000, 0.007000000};
    AnyFloat MultifidusThoracisL2T9Node_pos                                 = {-0.05100000, 0.2320000, 0.005000000};
    AnyFloat MultifidusThoracisL2T10Node_pos                                = {-0.04300000, 0.2050000, 0.006000000};
    AnyFloat MultifidusThoracisL2T11Node_pos                                = {-0.02700000, 0.1790000, 0.005000000};
    AnyFloat MultifidusThoracisL3T10Node_pos                                = {-0.04300000, 0.2050000, 0.006000000};
    AnyFloat MultifidusThoracisL3T11Node_pos                                = {-0.02900000, 0.1750000, 0.005000000};
    AnyFloat MultifidusThoracisL3T12Node_pos                                = {-0.02000000, 0.1470000, 0.005000000};
    AnyFloat MultifidusThoracisL4T11Node_pos                                = {-0.02900000, 0.1750000, 0.005000000};
    AnyFloat MultifidusThoracisL4T12Node_pos                                = {-0.02400000, 0.1400000, 0.005000000};
    AnyFloat MultifidusThoracisL5T12Node_pos                                = {-0.02400000, 0.1400000, 0.005000000};
    AnyFloat MultifidusThoracisT10T5Node_pos                              = {-0.033,0.228,0.020};
    AnyFloat MultifidusThoracisT10T6Node_pos                              = {-0.033,0.228,0.020};
    AnyFloat MultifidusThoracisT10T7Node_pos                              = {-0.033,0.228,0.020};
    AnyFloat SET10T6Node_pos                              = {-0.036,0.240,0.019};
    AnyFloat SET10T7Node_pos                              = {-0.031,0.240,0.016};
    AnyFloat SET10T8Node_pos                              = {-0.027,0.240,0.013};
    AnyFloat SET12T10Node_pos                             = {-0.040,0.205,0.005};

    // Define static AnyVecs for the the coordinates of the upper attachment points of the ES
    // The lower attachment points are defined in Pelvis.any
    AnyVec3 IliocostalisLumborumR5Node_pos = {-0.049,0.357,0.060};
    AnyVec3 IliocostalisLumborumR6Node_pos = {-0.050,0.332,0.060};
    AnyVec3 IliocostalisLumborumR7Node_pos = {-0.052,0.310,0.060};
    AnyVec3 IliocostalisLumborumR8Node_pos = {-0.054,0.276,0.060};
    AnyVec3 IliocostalisLumborumR9Node_pos = {-0.053,0.238,0.060};
    AnyVec3 IliocostalisLumborumR10Node_pos = {-0.050,0.207,0.060};
    AnyVec3 IliocostalisLumborumR11Node_pos = {-0.035,0.177,0.060};
    AnyVec3 LongissimusThoracisT1L1Node_pos = {-0.020361496, 0.47329912, 0.038155064}; // {-0.024,0.465,0.040};
    AnyVec3 LongissimusThoracisT2L2Node_pos = {-0.023673162, 0.44898021, 0.030318942}; // {-0.022,0.442,0.040};
    AnyVec3 LongissimusThoracisT3L3Node_pos = {-0.033709228, 0.42523941, 0.031860273}; // {-0.035,0.418,0.040};
    AnyVec3 LongissimusThoracisT4L4Node_pos = {-0.042271763, 0.40120554, 0.032801799}; // {-0.041,0.390,0.040};
    AnyVec3 LongissimusThoracisT5L5Node_pos = {-0.046911139, 0.37484255, 0.031336591}; // {-0.044,0.360,0.040};
    AnyVec3 LongissimusThoracisT6S1Node_pos = {-0.053890612, 0.34597340, 0.031391677}; // {-0.041,0.335,0.040};
    AnyVec3 LongissimusThoracisT7S2Node_pos = {-0.053924993, 0.31684911, 0.031394143}; // {-0.047,0.314,0.040};
    AnyVec3 LongissimusThoracisT8S3Node_pos = {-0.054483119, 0.28686920, 0.032063246}; // {-0.050,0.280,0.040};
    AnyVec3 LongissimusThoracisT9S4Node_pos = {-0.046982307, 0.26527235, 0.027650831}; // {-0.050,0.251,0.040};
    AnyVec3 LongissimusThoracisT10S3Node_pos = {-0.028109744, 0.22602122, 0.023520947}; // {-0.050,0.222,0.040};
    AnyVec3 LongissimusThoracisT11S3Node_pos = {-0.018959165, 0.19488615, 0.023669586}; // {-0.033,0.189,0.040};
    AnyVec3 LongissimusThoracisT12S3Node_pos = {-0.007872542, 0.16348323, 0.023528198};

    AnyVec3 LongissimusThoracisR3L3Node_pos = {-0.035,0.418,0.040};
    AnyVec3 LongissimusThoracisR4L4Node_pos = {-0.041,0.390,0.040};
    AnyVec3 LongissimusThoracisR5L5Node_pos = {-0.044,0.360,0.040};
    AnyVec3 LongissimusThoracisR6S1Node_pos = {-0.041,0.335,0.040};
    AnyVec3 LongissimusThoracisR7S2Node_pos = {-0.047,0.314,0.040};
    AnyVec3 LongissimusThoracisR8S3Node_pos = {-0.050,0.280,0.040};
    AnyVec3 LongissimusThoracisR9S4Node_pos = {-0.050,0.251,0.040};
    AnyVec3 LongissimusThoracisR10S3Node_pos = {-0.050,0.222,0.040};
    AnyVec3 LongissimusThoracisR11S3Node_pos = {-0.033,0.189,0.040};
  };
  AnyFolder Left = {

    AnyFloat ts_InNeutralConf_pos  = .Right.ts_InNeutralConf_pos * ..MirrorTransform;
    AnyFloat aa_InNeutralConf_pos  = .Right.aa_InNeutralConf_pos * ..MirrorTransform;
    AnyFloat ai_InNeutralConf_pos  = .Right.ai_InNeutralConf_pos * ..MirrorTransform;
    AnyFloat acj_InNeutralConf_pos  =.Right.acj_InNeutralConf_pos * ..MirrorTransform;
    AnyFloat scj_InNeutralConf_pos = .Right.scj_InNeutralConf_pos * ..MirrorTransform;
    AnyFloat O_DeltoideusAnterior1_Clavicula_InNeutralConf_pos = .Right.O_DeltoideusAnterior1_Clavicula_InNeutralConf_pos * ..MirrorTransform;
    AnyFloat I_TrapeziusClavicular3_Clavicula_InNeutralConf_pos =.Right.I_TrapeziusClavicular3_Clavicula_InNeutralConf_pos * ..MirrorTransform;


    AnyFloat LumpedHyoidT1C0Node_pos         = .Right.LumpedHyoidT1C0Node_pos * ..MirrorTransform;
    AnyFloat ScalenusAnteriorT1C4Node_pos    = .Right.ScalenusAnteriorT1C4Node_pos * ..MirrorTransform;
    AnyFloat ScalenusMediusT1C3Node_pos      = .Right.ScalenusMediusT1C3Node_pos * ..MirrorTransform;
    AnyFloat ScalenusPosteriorT1C5Node_pos   = .Right.ScalenusPosteriorT1C5Node_pos * ..MirrorTransform;
    AnyFloat SpleniusCapitisT1Node_pos    = .Right.SpleniusCapitisT1Node_pos * ..MirrorTransform;
    AnyFloat SpleniusCapitisT2Node_pos    = .Right.SpleniusCapitisT2Node_pos * ..MirrorTransform;
    AnyFloat SpleniusCapitisT3Node_pos    = .Right.SpleniusCapitisT3Node_pos * ..MirrorTransform;
    AnyFloat SpleniusCervicisT3Node_pos       = .Right.SpleniusCervicisT3Node_pos * ..MirrorTransform;
    AnyFloat SpleniusCervicisT4Node_pos       = .Right.SpleniusCervicisT4Node_pos * ..MirrorTransform;
    AnyFloat SpleniusCervicisT5Node_pos       = .Right.SpleniusCervicisT5Node_pos * ..MirrorTransform;
    AnyFloat SpleniusCervicisT6Node_pos       = .Right.SpleniusCervicisT6Node_pos * ..MirrorTransform;
    AnyFloat SemispinalisCapitisT6C0Node_pos  = .Right.SemispinalisCapitisT6C0Node_pos * ..MirrorTransform;
    AnyFloat SemispinalisCapitisT5C0Node_pos  = .Right.SemispinalisCapitisT5C0Node_pos * ..MirrorTransform;
    AnyFloat SemispinalisCapitisT4C0Node_pos  = .Right.SemispinalisCapitisT4C0Node_pos * ..MirrorTransform;
    AnyFloat SemispinalisCapitisT3C0Node_pos  = .Right.SemispinalisCapitisT3C0Node_pos * ..MirrorTransform;
    AnyFloat SemispinalisCapitisT2C0Node_pos  = .Right.SemispinalisCapitisT2C0Node_pos * ..MirrorTransform;
    AnyFloat SemispinalisCapitisT1C0Node_pos  = .Right.SemispinalisCapitisT1C0Node_pos * ..MirrorTransform;
    AnyFloat SemispinalisCervicisT1C2Node_pos = .Right.SemispinalisCervicisT1C2Node_pos * ..MirrorTransform;
    AnyFloat SemispinalisCervicisT2C3Node_pos = .Right.SemispinalisCervicisT2C3Node_pos * ..MirrorTransform;
    AnyFloat SemispinalisCervicisT3C4Node_pos = .Right.SemispinalisCervicisT3C4Node_pos * ..MirrorTransform;
    AnyFloat SemispinalisCervicisT4C5Node_pos = .Right.SemispinalisCervicisT4C5Node_pos * ..MirrorTransform;
    AnyFloat SemispinalisCervicisT5C6Node_pos = .Right.SemispinalisCervicisT5C6Node_pos * ..MirrorTransform;
    AnyFloat SemispinalisCervicisT6C7Node_pos = .Right.SemispinalisCervicisT6C7Node_pos * ..MirrorTransform;
    AnyFloat LongissimusCapitisT1Node_pos   = .Right.LongissimusCapitisT1Node_pos * ..MirrorTransform;
    AnyFloat LongissimusCapitisT2Node_pos   = .Right.LongissimusCapitisT2Node_pos * ..MirrorTransform;
    AnyFloat LongissimusCapitisT3Node_pos   = .Right.LongissimusCapitisT3Node_pos * ..MirrorTransform;
    AnyFloat LongissimusCapitisT4Node_pos   = .Right.LongissimusCapitisT4Node_pos * ..MirrorTransform;
    AnyFloat LongissimusCapitisT5Node_pos   = .Right.LongissimusCapitisT5Node_pos * ..MirrorTransform;
    AnyFloat LongissimusCervicisT1Node_pos    = .Right.LongissimusCervicisT1Node_pos * ..MirrorTransform;
    AnyFloat LongissimusCervicisT2Node_pos    = .Right.LongissimusCervicisT2Node_pos * ..MirrorTransform;
    AnyFloat LongissimusCervicisT3Node_pos    = .Right.LongissimusCervicisT3Node_pos * ..MirrorTransform;
    AnyFloat LongissimusCervicisT4Node_pos    = .Right.LongissimusCervicisT4Node_pos * ..MirrorTransform;
    AnyFloat LongissimusCervicisT5Node_pos    = .Right.LongissimusCervicisT5Node_pos * ..MirrorTransform;
    AnyFloat MultifidusCervicisT1C4Node_pos   = .Right.MultifidusCervicisT1C4Node_pos * ..MirrorTransform;
    AnyFloat MultifidusCervicisT1C5Node_pos   = .Right.MultifidusCervicisT1C5Node_pos * ..MirrorTransform;
    AnyFloat MultifidusCervicisT2C5Node_pos   = .Right.MultifidusCervicisT2C5Node_pos * ..MirrorTransform;
    AnyFloat MultifidusCervicisT2C6Node_pos   = .Right.MultifidusCervicisT2C6Node_pos * ..MirrorTransform;
    AnyFloat MultifidusCervicisT3C6Node_pos   = .Right.MultifidusCervicisT3C6Node_pos * ..MirrorTransform;
    AnyFloat MultifidusCervicisT3C7Node_pos   = .Right.MultifidusCervicisT3C7Node_pos * ..MirrorTransform;
    AnyFloat MultifidusCervicisT4C7Node_pos   = .Right.MultifidusCervicisT4C7Node_pos * ..MirrorTransform;
    AnyFloat RotatoresBrevisT1C7OrgNode_pos   = .Right.RotatoresBrevisT1C7OrgNode_pos * ..MirrorTransform;
    AnyFloat RotatoresBrevisT2T1OrgNode_pos   = .Right.RotatoresBrevisT2T1OrgNode_pos * ..MirrorTransform;
    AnyFloat RotatoresBrevisT3T2OrgNode_pos   = .Right.RotatoresBrevisT3T2OrgNode_pos * ..MirrorTransform;
    AnyFloat RotatoresBrevisT4T3OrgNode_pos   = .Right.RotatoresBrevisT4T3OrgNode_pos * ..MirrorTransform;
    AnyFloat RotatoresBrevisT5T4OrgNode_pos   = .Right.RotatoresBrevisT5T4OrgNode_pos * ..MirrorTransform;
    AnyFloat RotatoresBrevisT6T5OrgNode_pos   = .Right.RotatoresBrevisT6T5OrgNode_pos * ..MirrorTransform;
    AnyFloat RotatoresBrevisT7T6OrgNode_pos   = .Right.RotatoresBrevisT7T6OrgNode_pos * ..MirrorTransform;
    AnyFloat RotatoresBrevisT8T7OrgNode_pos   = .Right.RotatoresBrevisT8T7OrgNode_pos * ..MirrorTransform;
    AnyFloat RotatoresBrevisT9T8OrgNode_pos   = .Right.RotatoresBrevisT9T8OrgNode_pos * ..MirrorTransform;
    AnyFloat RotatoresBrevisT10T9OrgNode_pos   = .Right.RotatoresBrevisT10T9OrgNode_pos * ..MirrorTransform;
    AnyFloat RotatoresBrevisT11T10OrgNode_pos   = .Right.RotatoresBrevisT11T10OrgNode_pos * ..MirrorTransform;
    AnyFloat RotatoresBrevisT12T11OrgNode_pos   = .Right.RotatoresBrevisT12T11OrgNode_pos * ..MirrorTransform;
    AnyFloat RotatoresLongusT2C7OrgNode_pos   = .Right.RotatoresLongusT2C7OrgNode_pos * ..MirrorTransform;
    AnyFloat RotatoresLongusT3T1OrgNode_pos   = .Right.RotatoresLongusT3T1OrgNode_pos * ..MirrorTransform;
    AnyFloat RotatoresLongusT4T2OrgNode_pos   = .Right.RotatoresLongusT4T2OrgNode_pos * ..MirrorTransform;
    AnyFloat RotatoresLongusT5T3OrgNode_pos   = .Right.RotatoresLongusT5T3OrgNode_pos * ..MirrorTransform;
    AnyFloat RotatoresLongusT6T4OrgNode_pos   = .Right.RotatoresLongusT6T4OrgNode_pos * ..MirrorTransform;
    AnyFloat RotatoresLongusT7T5OrgNode_pos   = .Right.RotatoresLongusT7T5OrgNode_pos * ..MirrorTransform;
    AnyFloat RotatoresLongusT8T6OrgNode_pos   = .Right.RotatoresLongusT8T6OrgNode_pos * ..MirrorTransform;
    AnyFloat RotatoresLongusT9T7OrgNode_pos   = .Right.RotatoresLongusT9T7OrgNode_pos * ..MirrorTransform;
    AnyFloat RotatoresLongusT10T8OrgNode_pos   = .Right.RotatoresLongusT10T8OrgNode_pos * ..MirrorTransform;
    AnyFloat RotatoresLongusT11T9OrgNode_pos   = .Right.RotatoresLongusT11T9OrgNode_pos * ..MirrorTransform;
    AnyFloat RotatoresLongusT12T10OrgNode_pos   = .Right.RotatoresLongusT12T10OrgNode_pos * ..MirrorTransform;
    AnyFloat RotatoresBrevisT2T1InsNode_pos   = .Right.RotatoresBrevisT2T1InsNode_pos * ..MirrorTransform;
    AnyFloat RotatoresBrevisT3T2InsNode_pos   = .Right.RotatoresBrevisT3T2InsNode_pos * ..MirrorTransform;
    AnyFloat RotatoresBrevisT4T3InsNode_pos   = .Right.RotatoresBrevisT4T3InsNode_pos * ..MirrorTransform;
    AnyFloat RotatoresBrevisT5T4InsNode_pos   = .Right.RotatoresBrevisT5T4InsNode_pos * ..MirrorTransform;
    AnyFloat RotatoresBrevisT6T5InsNode_pos   = .Right.RotatoresBrevisT6T5InsNode_pos * ..MirrorTransform;
    AnyFloat RotatoresBrevisT7T6InsNode_pos   = .Right.RotatoresBrevisT7T6InsNode_pos * ..MirrorTransform;
    AnyFloat RotatoresBrevisT8T7InsNode_pos   = .Right.RotatoresBrevisT8T7InsNode_pos * ..MirrorTransform;
    AnyFloat RotatoresBrevisT9T8InsNode_pos   = .Right.RotatoresBrevisT9T8InsNode_pos * ..MirrorTransform;
    AnyFloat RotatoresBrevisT10T9InsNode_pos   = .Right.RotatoresBrevisT10T9InsNode_pos * ..MirrorTransform;
    AnyFloat RotatoresBrevisT11T10InsNode_pos   = .Right.RotatoresBrevisT11T10InsNode_pos * ..MirrorTransform;
    AnyFloat RotatoresBrevisT12T11InsNode_pos   = .Right.RotatoresBrevisT12T11InsNode_pos * ..MirrorTransform;
    AnyFloat RotatoresLongusT3T1InsNode_pos   = .Right.RotatoresLongusT3T1InsNode_pos * ..MirrorTransform;
    AnyFloat RotatoresLongusT4T2InsNode_pos   = .Right.RotatoresLongusT4T2InsNode_pos * ..MirrorTransform;
    AnyFloat RotatoresLongusT5T3InsNode_pos   = .Right.RotatoresLongusT5T3InsNode_pos * ..MirrorTransform;
    AnyFloat RotatoresLongusT6T4InsNode_pos   = .Right.RotatoresLongusT6T4InsNode_pos * ..MirrorTransform;
    AnyFloat RotatoresLongusT7T5InsNode_pos   = .Right.RotatoresLongusT7T5InsNode_pos * ..MirrorTransform;
    AnyFloat RotatoresLongusT8T6InsNode_pos   = .Right.RotatoresLongusT8T6InsNode_pos * ..MirrorTransform;
    AnyFloat RotatoresLongusT9T7InsNode_pos   = .Right.RotatoresLongusT9T7InsNode_pos * ..MirrorTransform;
    AnyFloat RotatoresLongusT10T8InsNode_pos   = .Right.RotatoresLongusT10T8InsNode_pos * ..MirrorTransform;
    AnyFloat RotatoresLongusT11T9InsNode_pos   = .Right.RotatoresLongusT11T9InsNode_pos * ..MirrorTransform;
    AnyFloat RotatoresLongusT12T10InsNode_pos   = .Right.RotatoresLongusT12T10InsNode_pos * ..MirrorTransform;


    AnyFloat BuckleNode_pos = .Right.BuckleNode_pos * ..MirrorTransform;
    AnyFloat PsoasMajorT12Node_pos = .Right.PsoasMajorT12Node_pos * ..MirrorTransform;
    AnyFloat IliocostalisLumborumR5Node_pos        = .Right.IliocostalisLumborumR5Node_pos         * ..MirrorTransform;
    AnyFloat IliocostalisLumborumR6Node_pos        = .Right.IliocostalisLumborumR6Node_pos         * ..MirrorTransform;
    AnyFloat IliocostalisLumborumR7Node_pos          = .Right.IliocostalisLumborumR7Node_pos           * ..MirrorTransform;
    AnyFloat IliocostalisLumborumR8Node_pos          = .Right.IliocostalisLumborumR8Node_pos           * ..MirrorTransform;
    AnyFloat IliocostalisLumborumR9Node_pos          = .Right.IliocostalisLumborumR9Node_pos           * ..MirrorTransform;
    AnyFloat IliocostalisLumborumR10Node_pos         = .Right.IliocostalisLumborumR10Node_pos          * ..MirrorTransform;
    AnyFloat IliocostalisLumborumR11Node_pos         = .Right.IliocostalisLumborumR11Node_pos          * ..MirrorTransform;
    AnyFloat LongissimusThoracisT1L1Node_pos          = .Right.LongissimusThoracisT1L1Node_pos           * ..MirrorTransform;
    AnyFloat LongissimusThoracisT2L2Node_pos          = .Right.LongissimusThoracisT2L2Node_pos           * ..MirrorTransform;
    AnyFloat LongissimusThoracisT3L3Node_pos          = .Right.LongissimusThoracisT3L3Node_pos           * ..MirrorTransform;
    AnyFloat LongissimusThoracisT4L4Node_pos          = .Right.LongissimusThoracisT4L4Node_pos           * ..MirrorTransform;
    AnyFloat LongissimusThoracisT5L5Node_pos          = .Right.LongissimusThoracisT5L5Node_pos           * ..MirrorTransform;
    AnyFloat LongissimusThoracisT6S1Node_pos          = .Right.LongissimusThoracisT6S1Node_pos           * ..MirrorTransform;
    AnyFloat LongissimusThoracisT7S2Node_pos          = .Right.LongissimusThoracisT7S2Node_pos           * ..MirrorTransform;
    AnyFloat LongissimusThoracisT8S3Node_pos          = .Right.LongissimusThoracisT8S3Node_pos           * ..MirrorTransform;
    AnyFloat LongissimusThoracisT9S4Node_pos          = .Right.LongissimusThoracisT9S4Node_pos           * ..MirrorTransform;
    AnyFloat LongissimusThoracisT10S3Node_pos     = .Right.LongissimusThoracisT10S3Node_pos      * ..MirrorTransform;
    AnyFloat LongissimusThoracisT11S3Node_pos     = .Right.LongissimusThoracisT11S3Node_pos      * ..MirrorTransform;
    AnyFloat LongissimusThoracisT12S3Node_pos     = .Right.LongissimusThoracisT12S3Node_pos      * ..MirrorTransform;
    AnyFloat LongissimusThoracisR3L3Node_pos          = .Right.LongissimusThoracisR3L3Node_pos           * ..MirrorTransform;
    AnyFloat LongissimusThoracisR4L4Node_pos          = .Right.LongissimusThoracisR4L4Node_pos           * ..MirrorTransform;
    AnyFloat LongissimusThoracisR5L5Node_pos          = .Right.LongissimusThoracisR5L5Node_pos           * ..MirrorTransform;
    AnyFloat LongissimusThoracisR6S1Node_pos          = .Right.LongissimusThoracisR6S1Node_pos           * ..MirrorTransform;
    AnyFloat LongissimusThoracisR7S2Node_pos          = .Right.LongissimusThoracisR7S2Node_pos           * ..MirrorTransform;
    AnyFloat LongissimusThoracisR8S3Node_pos          = .Right.LongissimusThoracisR8S3Node_pos           * ..MirrorTransform;
    AnyFloat LongissimusThoracisR9S4Node_pos          = .Right.LongissimusThoracisR9S4Node_pos           * ..MirrorTransform;
    AnyFloat LongissimusThoracisR10S3Node_pos     = .Right.LongissimusThoracisR10S3Node_pos      * ..MirrorTransform;
    AnyFloat LongissimusThoracisR11S3Node_pos     = .Right.LongissimusThoracisR11S3Node_pos      * ..MirrorTransform;
    AnyFloat IliocostalisLumborumR5Via1Node_pos    = .Right.IliocostalisLumborumR5Via1Node_pos     * ..MirrorTransform;
    AnyFloat IliocostalisLumborumR5Via2Node_pos    = .Right.IliocostalisLumborumR5Via2Node_pos     * ..MirrorTransform;
    AnyFloat IliocostalisLumborumR5Via3Node_pos    = .Right.IliocostalisLumborumR5Via3Node_pos     * ..MirrorTransform;
    AnyFloat IliocostalisLumborumR5Via4Node_pos    = .Right.IliocostalisLumborumR5Via4Node_pos     * ..MirrorTransform;
    AnyFloat IliocostalisLumborumR5Via5Node_pos    = .Right.IliocostalisLumborumR5Via5Node_pos     * ..MirrorTransform;
    AnyFloat IliocostalisLumborumR6Via1Node_pos    = .Right.IliocostalisLumborumR6Via1Node_pos     * ..MirrorTransform;
    AnyFloat IliocostalisLumborumR6Via2Node_pos    = .Right.IliocostalisLumborumR6Via2Node_pos     * ..MirrorTransform;
    AnyFloat IliocostalisLumborumR6Via3Node_pos    = .Right.IliocostalisLumborumR6Via3Node_pos     * ..MirrorTransform;
    AnyFloat IliocostalisLumborumR6Via4Node_pos    = .Right.IliocostalisLumborumR6Via4Node_pos     * ..MirrorTransform;
    AnyFloat IliocostalisLumborumR7Via1Node_pos      = .Right.IliocostalisLumborumR7Via1Node_pos       * ..MirrorTransform;
    AnyFloat IliocostalisLumborumR7Via2Node_pos      = .Right.IliocostalisLumborumR7Via2Node_pos       * ..MirrorTransform;
    AnyFloat IliocostalisLumborumR7Via3Node_pos      = .Right.IliocostalisLumborumR7Via3Node_pos       * ..MirrorTransform;
    AnyFloat IliocostalisLumborumR8Via1Node_pos      = .Right.IliocostalisLumborumR8Via1Node_pos       * ..MirrorTransform;
    AnyFloat IliocostalisLumborumR8Via2Node_pos      = .Right.IliocostalisLumborumR8Via2Node_pos       * ..MirrorTransform;
    AnyFloat IliocostalisLumborumR9Via1Node_pos      = .Right.IliocostalisLumborumR9Via1Node_pos       * ..MirrorTransform;
    AnyFloat LongissimusThoracisT1L1Via1Node_pos      = .Right.LongissimusThoracisT1L1Via1Node_pos       * ..MirrorTransform;
    AnyFloat LongissimusThoracisT1L1Via2Node_pos      = .Right.LongissimusThoracisT1L1Via2Node_pos       * ..MirrorTransform;
    AnyFloat LongissimusThoracisT1L1Via3Node_pos      = .Right.LongissimusThoracisT1L1Via3Node_pos       * ..MirrorTransform;
    AnyFloat LongissimusThoracisT1L1Via4Node_pos      = .Right.LongissimusThoracisT1L1Via4Node_pos       * ..MirrorTransform;
    AnyFloat LongissimusThoracisT1L1Via5Node_pos      = .Right.LongissimusThoracisT1L1Via5Node_pos       * ..MirrorTransform;
    AnyFloat LongissimusThoracisT1L1Via6Node_pos      = .Right.LongissimusThoracisT1L1Via6Node_pos       * ..MirrorTransform;
    AnyFloat LongissimusThoracisT1L1Via7Node_pos      = .Right.LongissimusThoracisT1L1Via7Node_pos       * ..MirrorTransform;
    AnyFloat LongissimusThoracisT1L1Via8Node_pos      = .Right.LongissimusThoracisT1L1Via8Node_pos       * ..MirrorTransform;
    AnyFloat LongissimusThoracisT1L1Via9Node_pos      = .Right.LongissimusThoracisT1L1Via9Node_pos       * ..MirrorTransform;
    AnyFloat LongissimusThoracisT1L1Via10Node_pos     = .Right.LongissimusThoracisT1L1Via10Node_pos      * ..MirrorTransform;
    AnyFloat LongissimusThoracisT1L1Via11Node_pos     = .Right.LongissimusThoracisT1L1Via11Node_pos      * ..MirrorTransform;
    AnyFloat LongissimusThoracisT2L2Via1Node_pos      = .Right.LongissimusThoracisT2L2Via1Node_pos       * ..MirrorTransform;
    AnyFloat LongissimusThoracisT2L2Via2Node_pos      = .Right.LongissimusThoracisT2L2Via2Node_pos       * ..MirrorTransform;
    AnyFloat LongissimusThoracisT2L2Via3Node_pos      = .Right.LongissimusThoracisT2L2Via3Node_pos       * ..MirrorTransform;
    AnyFloat LongissimusThoracisT2L2Via4Node_pos      = .Right.LongissimusThoracisT2L2Via4Node_pos       * ..MirrorTransform;
    AnyFloat LongissimusThoracisT2L2Via5Node_pos      = .Right.LongissimusThoracisT2L2Via5Node_pos       * ..MirrorTransform;
    AnyFloat LongissimusThoracisT2L2Via6Node_pos      = .Right.LongissimusThoracisT2L2Via6Node_pos       * ..MirrorTransform;
    AnyFloat LongissimusThoracisT2L2Via7Node_pos      = .Right.LongissimusThoracisT2L2Via7Node_pos       * ..MirrorTransform;
    AnyFloat LongissimusThoracisT2L2Via8Node_pos      = .Right.LongissimusThoracisT2L2Via8Node_pos       * ..MirrorTransform;
    AnyFloat LongissimusThoracisT2L2Via9Node_pos      = .Right.LongissimusThoracisT2L2Via9Node_pos       * ..MirrorTransform;
    AnyFloat LongissimusThoracisT2L2Via10Node_pos     = .Right.LongissimusThoracisT2L2Via10Node_pos      * ..MirrorTransform;
    AnyFloat LongissimusThoracisT3L3Via1Node_pos      = .Right.LongissimusThoracisT3L3Via1Node_pos       * ..MirrorTransform;
    AnyFloat LongissimusThoracisT3L3Via2Node_pos      = .Right.LongissimusThoracisT3L3Via2Node_pos       * ..MirrorTransform;
    AnyFloat LongissimusThoracisT3L3Via3Node_pos      = .Right.LongissimusThoracisT3L3Via3Node_pos       * ..MirrorTransform;
    AnyFloat LongissimusThoracisT3L3Via4Node_pos      = .Right.LongissimusThoracisT3L3Via4Node_pos       * ..MirrorTransform;
    AnyFloat LongissimusThoracisT3L3Via5Node_pos      = .Right.LongissimusThoracisT3L3Via5Node_pos       * ..MirrorTransform;
    AnyFloat LongissimusThoracisT3L3Via6Node_pos      = .Right.LongissimusThoracisT3L3Via6Node_pos       * ..MirrorTransform;
    AnyFloat LongissimusThoracisT3L3Via7Node_pos      = .Right.LongissimusThoracisT3L3Via7Node_pos       * ..MirrorTransform;
    AnyFloat LongissimusThoracisT3L3Via8Node_pos      = .Right.LongissimusThoracisT3L3Via8Node_pos       * ..MirrorTransform;
    AnyFloat LongissimusThoracisT3L3Via9Node_pos      = .Right.LongissimusThoracisT3L3Via9Node_pos       * ..MirrorTransform;
    AnyFloat LongissimusThoracisT4L4Via1Node_pos      = .Right.LongissimusThoracisT4L4Via1Node_pos       * ..MirrorTransform;
    AnyFloat LongissimusThoracisT4L4Via2Node_pos      = .Right.LongissimusThoracisT4L4Via2Node_pos       * ..MirrorTransform;
    AnyFloat LongissimusThoracisT4L4Via3Node_pos      = .Right.LongissimusThoracisT4L4Via3Node_pos       * ..MirrorTransform;
    AnyFloat LongissimusThoracisT4L4Via4Node_pos      = .Right.LongissimusThoracisT4L4Via4Node_pos       * ..MirrorTransform;
    AnyFloat LongissimusThoracisT4L4Via5Node_pos      = .Right.LongissimusThoracisT4L4Via5Node_pos       * ..MirrorTransform;
    AnyFloat LongissimusThoracisT4L4Via6Node_pos      = .Right.LongissimusThoracisT4L4Via6Node_pos       * ..MirrorTransform;
    AnyFloat LongissimusThoracisT4L4Via7Node_pos      = .Right.LongissimusThoracisT4L4Via7Node_pos       * ..MirrorTransform;
    AnyFloat LongissimusThoracisT4L4Via8Node_pos      = .Right.LongissimusThoracisT4L4Via8Node_pos       * ..MirrorTransform;
    AnyFloat LongissimusThoracisT5L5Via1Node_pos      = .Right.LongissimusThoracisT5L5Via1Node_pos       * ..MirrorTransform;
    AnyFloat LongissimusThoracisT5L5Via2Node_pos      = .Right.LongissimusThoracisT5L5Via2Node_pos       * ..MirrorTransform;
    AnyFloat LongissimusThoracisT5L5Via3Node_pos      = .Right.LongissimusThoracisT5L5Via3Node_pos       * ..MirrorTransform;
    AnyFloat LongissimusThoracisT5L5Via4Node_pos      = .Right.LongissimusThoracisT5L5Via4Node_pos       * ..MirrorTransform;
    AnyFloat LongissimusThoracisT5L5Via5Node_pos      = .Right.LongissimusThoracisT5L5Via5Node_pos       * ..MirrorTransform;
    AnyFloat LongissimusThoracisT5L5Via6Node_pos      = .Right.LongissimusThoracisT5L5Via6Node_pos       * ..MirrorTransform;
    AnyFloat LongissimusThoracisT5L5Via7Node_pos      = .Right.LongissimusThoracisT5L5Via7Node_pos       * ..MirrorTransform;
    AnyFloat LongissimusThoracisT6S1Via1Node_pos      = .Right.LongissimusThoracisT6S1Via1Node_pos       * ..MirrorTransform;
    AnyFloat LongissimusThoracisT6S1Via2Node_pos      = .Right.LongissimusThoracisT6S1Via2Node_pos       * ..MirrorTransform;
    AnyFloat LongissimusThoracisT6S1Via3Node_pos      = .Right.LongissimusThoracisT6S1Via3Node_pos       * ..MirrorTransform;
    AnyFloat LongissimusThoracisT6S1Via4Node_pos      = .Right.LongissimusThoracisT6S1Via4Node_pos       * ..MirrorTransform;
    AnyFloat LongissimusThoracisT6S1Via5Node_pos      = .Right.LongissimusThoracisT6S1Via5Node_pos       * ..MirrorTransform;
    AnyFloat LongissimusThoracisT6S1Via6Node_pos      = .Right.LongissimusThoracisT6S1Via6Node_pos       * ..MirrorTransform;
    AnyFloat LongissimusThoracisT7S2Via1Node_pos      = .Right.LongissimusThoracisT7S2Via1Node_pos       * ..MirrorTransform;
    AnyFloat LongissimusThoracisT7S2Via2Node_pos      = .Right.LongissimusThoracisT7S2Via2Node_pos       * ..MirrorTransform;
    AnyFloat LongissimusThoracisT7S2Via3Node_pos      = .Right.LongissimusThoracisT7S2Via3Node_pos       * ..MirrorTransform;
    AnyFloat LongissimusThoracisT7S2Via4Node_pos      = .Right.LongissimusThoracisT7S2Via4Node_pos       * ..MirrorTransform;
    AnyFloat LongissimusThoracisT7S2Via5Node_pos      = .Right.LongissimusThoracisT7S2Via5Node_pos       * ..MirrorTransform;
    AnyFloat LongissimusThoracisT8S3Via1Node_pos      = .Right.LongissimusThoracisT8S3Via1Node_pos       * ..MirrorTransform;
    AnyFloat LongissimusThoracisT8S3Via2Node_pos      = .Right.LongissimusThoracisT8S3Via2Node_pos       * ..MirrorTransform;
    AnyFloat LongissimusThoracisT8S3Via3Node_pos      = .Right.LongissimusThoracisT8S3Via3Node_pos       * ..MirrorTransform;
    AnyFloat LongissimusThoracisT8S3Via4Node_pos      = .Right.LongissimusThoracisT8S3Via4Node_pos  * ..MirrorTransform;
    AnyFloat LongissimusThoracisT9S4Via1Node_pos      = .Right.LongissimusThoracisT9S4Via1Node_pos       * ..MirrorTransform;
    AnyFloat LongissimusThoracisT9S4Via2Node_pos      = .Right.LongissimusThoracisT9S4Via2Node_pos       * ..MirrorTransform;
    AnyFloat LongissimusThoracisT9S4Via3Node_pos      = .Right.LongissimusThoracisT9S4Via3Node_pos  * ..MirrorTransform;
    AnyFloat LongissimusThoracisT10S3Via1Node_pos = .Right.LongissimusThoracisT10S3Via1Node_pos  * ..MirrorTransform;
    AnyFloat LongissimusThoracisT10S3Via2Node_pos = .Right.LongissimusThoracisT10S3Via2Node_pos  * ..MirrorTransform;
    AnyFloat LongissimusThoracisT11S3Via1Node_pos = .Right.LongissimusThoracisT11S3Via1Node_pos  * ..MirrorTransform;

    AnyFloat LongissimusThoracisR3L3Via1Node_pos      = .Right.LongissimusThoracisR3L3Via1Node_pos       * ..MirrorTransform;
    AnyFloat LongissimusThoracisR3L3Via2Node_pos      = .Right.LongissimusThoracisR3L3Via2Node_pos       * ..MirrorTransform;
    AnyFloat LongissimusThoracisR3L3Via3Node_pos      = .Right.LongissimusThoracisR3L3Via3Node_pos       * ..MirrorTransform;
    AnyFloat LongissimusThoracisR3L3Via4Node_pos      = .Right.LongissimusThoracisR3L3Via4Node_pos       * ..MirrorTransform;
    AnyFloat LongissimusThoracisR3L3Via5Node_pos      = .Right.LongissimusThoracisR3L3Via5Node_pos       * ..MirrorTransform;
    AnyFloat LongissimusThoracisR3L3Via6Node_pos      = .Right.LongissimusThoracisR3L3Via6Node_pos       * ..MirrorTransform;
    AnyFloat LongissimusThoracisR3L3Via7Node_pos      = .Right.LongissimusThoracisR3L3Via7Node_pos       * ..MirrorTransform;
    AnyFloat LongissimusThoracisR3L3Via8Node_pos      = .Right.LongissimusThoracisR3L3Via8Node_pos       * ..MirrorTransform;
    AnyFloat LongissimusThoracisR3L3Via9Node_pos      = .Right.LongissimusThoracisR3L3Via9Node_pos       * ..MirrorTransform;
    AnyFloat LongissimusThoracisR4L4Via1Node_pos      = .Right.LongissimusThoracisR4L4Via1Node_pos       * ..MirrorTransform;
    AnyFloat LongissimusThoracisR4L4Via2Node_pos      = .Right.LongissimusThoracisR4L4Via2Node_pos       * ..MirrorTransform;
    AnyFloat LongissimusThoracisR4L4Via3Node_pos      = .Right.LongissimusThoracisR4L4Via3Node_pos       * ..MirrorTransform;
    AnyFloat LongissimusThoracisR4L4Via4Node_pos      = .Right.LongissimusThoracisR4L4Via4Node_pos       * ..MirrorTransform;
    AnyFloat LongissimusThoracisR4L4Via5Node_pos      = .Right.LongissimusThoracisR4L4Via5Node_pos       * ..MirrorTransform;
    AnyFloat LongissimusThoracisR4L4Via6Node_pos      = .Right.LongissimusThoracisR4L4Via6Node_pos       * ..MirrorTransform;
    AnyFloat LongissimusThoracisR4L4Via7Node_pos      = .Right.LongissimusThoracisR4L4Via7Node_pos       * ..MirrorTransform;
    AnyFloat LongissimusThoracisR4L4Via8Node_pos      = .Right.LongissimusThoracisR4L4Via8Node_pos       * ..MirrorTransform;
    AnyFloat LongissimusThoracisR5L5Via1Node_pos      = .Right.LongissimusThoracisR5L5Via1Node_pos       * ..MirrorTransform;
    AnyFloat LongissimusThoracisR5L5Via2Node_pos      = .Right.LongissimusThoracisR5L5Via2Node_pos       * ..MirrorTransform;
    AnyFloat LongissimusThoracisR5L5Via3Node_pos      = .Right.LongissimusThoracisR5L5Via3Node_pos       * ..MirrorTransform;
    AnyFloat LongissimusThoracisR5L5Via4Node_pos      = .Right.LongissimusThoracisR5L5Via4Node_pos       * ..MirrorTransform;
    AnyFloat LongissimusThoracisR5L5Via5Node_pos      = .Right.LongissimusThoracisR5L5Via5Node_pos       * ..MirrorTransform;
    AnyFloat LongissimusThoracisR5L5Via6Node_pos      = .Right.LongissimusThoracisR5L5Via6Node_pos       * ..MirrorTransform;
    AnyFloat LongissimusThoracisR5L5Via7Node_pos      = .Right.LongissimusThoracisR5L5Via7Node_pos       * ..MirrorTransform;
    AnyFloat LongissimusThoracisR6S1Via1Node_pos      = .Right.LongissimusThoracisR6S1Via1Node_pos       * ..MirrorTransform;
    AnyFloat LongissimusThoracisR6S1Via2Node_pos      = .Right.LongissimusThoracisR6S1Via2Node_pos       * ..MirrorTransform;
    AnyFloat LongissimusThoracisR6S1Via3Node_pos      = .Right.LongissimusThoracisR6S1Via3Node_pos       * ..MirrorTransform;
    AnyFloat LongissimusThoracisR6S1Via4Node_pos      = .Right.LongissimusThoracisR6S1Via4Node_pos       * ..MirrorTransform;
    AnyFloat LongissimusThoracisR6S1Via5Node_pos      = .Right.LongissimusThoracisR6S1Via5Node_pos       * ..MirrorTransform;
    AnyFloat LongissimusThoracisR6S1Via6Node_pos      = .Right.LongissimusThoracisR6S1Via6Node_pos       * ..MirrorTransform;
    AnyFloat LongissimusThoracisR7S2Via1Node_pos      = .Right.LongissimusThoracisR7S2Via1Node_pos       * ..MirrorTransform;
    AnyFloat LongissimusThoracisR7S2Via2Node_pos      = .Right.LongissimusThoracisR7S2Via2Node_pos       * ..MirrorTransform;
    AnyFloat LongissimusThoracisR7S2Via3Node_pos      = .Right.LongissimusThoracisR7S2Via3Node_pos       * ..MirrorTransform;
    AnyFloat LongissimusThoracisR7S2Via4Node_pos      = .Right.LongissimusThoracisR7S2Via4Node_pos       * ..MirrorTransform;
    AnyFloat LongissimusThoracisR7S2Via5Node_pos      = .Right.LongissimusThoracisR7S2Via5Node_pos       * ..MirrorTransform;
    AnyFloat LongissimusThoracisR8S3Via1Node_pos      = .Right.LongissimusThoracisR8S3Via1Node_pos       * ..MirrorTransform;
    AnyFloat LongissimusThoracisR8S3Via2Node_pos      = .Right.LongissimusThoracisR8S3Via2Node_pos       * ..MirrorTransform;
    AnyFloat LongissimusThoracisR8S3Via3Node_pos      = .Right.LongissimusThoracisR8S3Via3Node_pos       * ..MirrorTransform;
    AnyFloat LongissimusThoracisR9S4Via1Node_pos      = .Right.LongissimusThoracisR9S4Via1Node_pos       * ..MirrorTransform;
    AnyFloat LongissimusThoracisR9S4Via2Node_pos      = .Right.LongissimusThoracisR9S4Via2Node_pos       * ..MirrorTransform;
    AnyFloat LongissimusThoracisR10S3Via1Node_pos = .Right.LongissimusThoracisR10S3Via1Node_pos  * ..MirrorTransform;
    AnyFloat RACP_CO7Node_1_pos  = .Right.RACP_CO7Node_1_pos * ..MirrorTransform;
    AnyFloat RACP_CO6Node_2_pos  = .Right.RACP_CO6Node_2_pos * ..MirrorTransform;
    AnyFloat RACP_CO5Node_2_pos = .Right.RACP_CO5Node_2_pos * ..MirrorTransform;
    AnyFloat RACP_Via_2_pos     = .Right.RACP_Via_2_pos * ..MirrorTransform;
    AnyFloat OEC6_RSNode_pos          = .Right.OEC6_RSNode_pos * ..MirrorTransform;
    AnyFloat OEC6_1_RSNode_pos         = .Right.OEC6_1_RSNode_pos * ..MirrorTransform;
    AnyFloat OEC6_2_RSNode_pos         = .Right.OEC6_2_RSNode_pos * ..MirrorTransform;

    AnyFloat OEC7_RSNode_pos        = .Right.OEC7_RSNode_pos * ..MirrorTransform;
    AnyFloat OEC8_RSNode_pos        = .Right.OEC8_RSNode_pos * ..MirrorTransform;
    AnyFloat OEC9_RSNode_pos        = .Right.OEC9_RSNode_pos * ..MirrorTransform;
    AnyFloat OEC9_RSNode_1_pos        = .Right.OEC9_RSNode_1_pos * ..MirrorTransform;

    AnyFloat OEC10_RSNode_pos    = .Right.OEC10_RSNode_pos * ..MirrorTransform;
    AnyFloat OEC10a_RSNode_pos        = .Right.OEC10a_RSNode_pos * ..MirrorTransform;
    AnyFloat OEC11_CINode_pos        = .Right.OEC11_CINode_pos * ..MirrorTransform;
    AnyFloat OEC11_CINode1_pos        = .Right.OEC11_CINode1_pos * ..MirrorTransform;

    AnyFloat OICI_C10aNode_pos        = .Right.OICI_C10aNode_pos * ..MirrorTransform;
    AnyFloat OICI_C10Node_pos       = .Right.OICI_C10Node_pos * ..MirrorTransform;
    AnyFloat OICI_C11Node_pos         = .Right.OICI_C11Node_pos * ..MirrorTransform;
    AnyFloat MultifidusThoracisL1T8Node_pos           = .Right.MultifidusThoracisL1T8Node_pos * ..MirrorTransform;
    AnyFloat MultifidusThoracisL1T9Node_pos           = .Right.MultifidusThoracisL1T9Node_pos * ..MirrorTransform;
    AnyFloat MultifidusThoracisL1T10Node_pos          = .Right.MultifidusThoracisL1T10Node_pos * ..MirrorTransform;
    AnyFloat MultifidusThoracisL2T9Node_pos           = .Right.MultifidusThoracisL2T9Node_pos * ..MirrorTransform;
    AnyFloat MultifidusThoracisL2T10Node_pos          = .Right.MultifidusThoracisL2T10Node_pos * ..MirrorTransform;
    AnyFloat MultifidusThoracisL2T11Node_pos          = .Right.MultifidusThoracisL2T11Node_pos * ..MirrorTransform;
    AnyFloat MultifidusThoracisL3T10Node_pos          = .Right.MultifidusThoracisL3T10Node_pos * ..MirrorTransform;
    AnyFloat MultifidusThoracisL3T11Node_pos          = .Right.MultifidusThoracisL3T11Node_pos * ..MirrorTransform;
    AnyFloat MultifidusThoracisL3T12Node_pos          = .Right.MultifidusThoracisL3T12Node_pos * ..MirrorTransform;
    AnyFloat MultifidusThoracisL4T11Node_pos          = .Right.MultifidusThoracisL4T11Node_pos * ..MirrorTransform;
    AnyFloat MultifidusThoracisL4T12Node_pos          = .Right.MultifidusThoracisL4T12Node_pos * ..MirrorTransform;
    AnyFloat MultifidusThoracisT10T5Node_pos          = .Right.MultifidusThoracisT10T5Node_pos * ..MirrorTransform;
    AnyFloat MultifidusThoracisT10T6Node_pos          = .Right.MultifidusThoracisT10T6Node_pos * ..MirrorTransform;
    AnyFloat MultifidusThoracisT10T7Node_pos          = .Right.MultifidusThoracisT10T7Node_pos * ..MirrorTransform;
    AnyFloat MultifidusThoracisL5T12Node_pos          = .Right.MultifidusThoracisL5T12Node_pos * ..MirrorTransform;
    AnyFloat SET10T6Node_pos          = .Right.SET10T6Node_pos * ..MirrorTransform;
    AnyFloat SET10T7Node_pos          = .Right.SET10T7Node_pos * ..MirrorTransform;
    AnyFloat SET10T8Node_pos          = .Right.SET10T8Node_pos * ..MirrorTransform;
    AnyFloat SET12T10Node_pos          = .Right.SET12T10Node_pos * ..MirrorTransform;
  };
};
