/*
  This dataset is based on the AMMR 2.2 trunk muscle parameters. The parameters
  were collected from hardcoded values in the old model and added here to
  create a single file containing all trunk model muscle parameters. All hard
  coded values for PCSA in the old model was converted to corresponding muscle
  volumes. Hence the dataset produces the same strength.

  The trunk muscle parameter from AMMR 2.2  was based on a number of sources:

*/

// This logic ensures that TotalTendonLength and OptimalFiberLength are not
// created as DesignVars when they are also calibrated.
#if BM_CALIBRATION_TYPE == _CALIBRATION_TYPE_1PAR_
 #define _TENDON_LENGTH_DESIGNVAR(x) (x)
 #define _FIBER_LENGTH_DESIGNVAR(x) DesignVar(x)
#endif
#if BM_CALIBRATION_TYPE == _CALIBRATION_TYPE_2PAR_
 #define _TENDON_LENGTH_DESIGNVAR(x) (x)
 #define _FIBER_LENGTH_DESIGNVAR(x) (x)
#endif
#if BM_CALIBRATION_TYPE == _CALIBRATION_TYPE_CUSTOM_
 #define _TENDON_LENGTH_DESIGNVAR(x) DesignVar(x)
 #define _FIBER_LENGTH_DESIGNVAR(x) DesignVar(x)
#endif


AnyFolder Muscles =
{
  AnyVar VolumeUnitFactor ??= 1e-6; ///< Unit conversion factor for volume (1e-6 > volume in cm^3)
  AnyFolder Spinalis =
  {
    #if BM_TRUNK_MUSCLES
    AnyVar Volume ??= DesignVar(40.62); ///< Total volume of the muscle group (ml)
    AnyFolder SPL1T2 =
    {
      AnyString Muscle = "SPL1T2"; ///< Descriptive name for the muscle, e.g. for plotting
      AnyIntVar MuscleElemAmount = 1; ///< The total amount of elements for this muscle
      AnyFloat Pennationangle ??= DesignVar(0); ///< Pennation angle of the muscle fibers (degres)
      AnyFloat VolumeScaleFactor ??= DesignVar(1.0); ///< Factor for scaling the muscle volume
      AnyFloat MuscleVolume ??= .Volume*0.20214; ///< Volume of the muscle (ml) (the fraction of the group volume is based on the strength of the previous model)
      AnyFloat MuscleVolumeSIScaled ??= ..VolumeUnitFactor*VolumeScaleFactor*MuscleVolume; ///< Scaled Volume of the muscle in SI base unit (m^3)
      AnyFloat OptimalFiberlength ??= _FIBER_LENGTH_DESIGNVAR(0.32846); ///< Optimal working length of the muscle fiber (m)
      AnyFloat TotalTendonLength ??= _TENDON_LENGTH_DESIGNVAR(0.01);///< The total tendon length (m)
      AnyFloat K1 ??= DesignVar(10); ///< K1 constant in the muscle model.  Factor for determining shortening speed at optimum length
      AnyFloat K2 ??= DesignVar(1); ///< K2 constant in the muscle model.  Factor for determining shortening speed at optimum length
      AnyFloat Epsilon0 ??= DesignVar(0.053); ///< Epsilon bar in the muscle model. Represents tendon strain at F0
      AnyFloat Fcfast ??= DesignVar(0.4); ///< Factor for determining shortening speed at optimum length
    };
    #endif

    #if BM_TRUNK_MUSCLES
    AnyFolder SPL1T3 =
    {
      AnyString Muscle = "SPL1T3"; ///< Descriptive name for the muscle, e.g. for plotting
      AnyIntVar MuscleElemAmount = 1; ///< The total amount of elements for this muscle
      AnyFloat Pennationangle ??= DesignVar(0); ///< Pennation angle of the muscle fibers (degres)
      AnyFloat VolumeScaleFactor ??= DesignVar(1.0); ///< Factor for scaling the muscle volume
      AnyFloat MuscleVolume ??= .Volume*0.17916; ///< Volume of the muscle (ml) (the fraction of the group volume is based on the strength of the previous model)
      AnyFloat MuscleVolumeSIScaled ??= ..VolumeUnitFactor*VolumeScaleFactor*MuscleVolume; ///< Scaled Volume of the muscle in SI base unit (m^3)
      AnyFloat OptimalFiberlength ??= _FIBER_LENGTH_DESIGNVAR(0.29113); ///< Optimal working length of the muscle fiber (m)
      AnyFloat TotalTendonLength ??= _TENDON_LENGTH_DESIGNVAR(0.01);///< The total tendon length (m)
      AnyFloat K1 ??= DesignVar(10); ///< K1 constant in the muscle model.  Factor for determining shortening speed at optimum length
      AnyFloat K2 ??= DesignVar(1); ///< K2 constant in the muscle model.  Factor for determining shortening speed at optimum length
      AnyFloat Epsilon0 ??= DesignVar(0.053); ///< Epsilon bar in the muscle model. Represents tendon strain at F0
      AnyFloat Fcfast ??= DesignVar(0.4); ///< Factor for determining shortening speed at optimum length
    };
    #endif

    #if BM_TRUNK_MUSCLES
    AnyFolder SPL2T1 =
    {
      AnyString Muscle = "SPL2T1"; ///< Descriptive name for the muscle, e.g. for plotting
      AnyIntVar MuscleElemAmount = 1; ///< The total amount of elements for this muscle
      AnyFloat Pennationangle ??= DesignVar(0); ///< Pennation angle of the muscle fibers (degres)
      AnyFloat VolumeScaleFactor ??= DesignVar(1.0); ///< Factor for scaling the muscle volume
      AnyFloat MuscleVolume ??= .Volume*0.23775; ///< Volume of the muscle (ml) (the fraction of the group volume is based on the strength of the previous model)
      AnyFloat MuscleVolumeSIScaled ??= ..VolumeUnitFactor*VolumeScaleFactor*MuscleVolume; ///< Scaled Volume of the muscle in SI base unit (m^3)
      AnyFloat OptimalFiberlength ??= _FIBER_LENGTH_DESIGNVAR(0.38633); ///< Optimal working length of the muscle fiber (m)
      AnyFloat TotalTendonLength ??= _TENDON_LENGTH_DESIGNVAR(0.01);///< The total tendon length (m)
      AnyFloat K1 ??= DesignVar(10); ///< K1 constant in the muscle model.  Factor for determining shortening speed at optimum length
      AnyFloat K2 ??= DesignVar(1); ///< K2 constant in the muscle model.  Factor for determining shortening speed at optimum length
      AnyFloat Epsilon0 ??= DesignVar(0.053); ///< Epsilon bar in the muscle model. Represents tendon strain at F0
      AnyFloat Fcfast ??= DesignVar(0.4); ///< Factor for determining shortening speed at optimum length
    };
    #endif

    #if BM_TRUNK_MUSCLES
    AnyFolder SPT11T6 =
    {
      AnyString Muscle = "SPT11T6"; ///< Descriptive name for the muscle, e.g. for plotting
      AnyIntVar MuscleElemAmount = 1; ///< The total amount of elements for this muscle
      AnyFloat Pennationangle ??= DesignVar(0); ///< Pennation angle of the muscle fibers (degres)
      AnyFloat VolumeScaleFactor ??= DesignVar(1.0); ///< Factor for scaling the muscle volume
      AnyFloat MuscleVolume ??= .Volume*0.092684; ///< Volume of the muscle (ml) (the fraction of the group volume is based on the strength of the previous model)
      AnyFloat MuscleVolumeSIScaled ??= ..VolumeUnitFactor*VolumeScaleFactor*MuscleVolume; ///< Scaled Volume of the muscle in SI base unit (m^3)
      AnyFloat OptimalFiberlength ??= _FIBER_LENGTH_DESIGNVAR(0.1506); ///< Optimal working length of the muscle fiber (m)
      AnyFloat TotalTendonLength ??= _TENDON_LENGTH_DESIGNVAR(0.01);///< The total tendon length (m)
      AnyFloat K1 ??= DesignVar(10); ///< K1 constant in the muscle model.  Factor for determining shortening speed at optimum length
      AnyFloat K2 ??= DesignVar(1); ///< K2 constant in the muscle model.  Factor for determining shortening speed at optimum length
      AnyFloat Epsilon0 ??= DesignVar(0.053); ///< Epsilon bar in the muscle model. Represents tendon strain at F0
      AnyFloat Fcfast ??= DesignVar(0.4); ///< Factor for determining shortening speed at optimum length
    };
    #endif

    #if BM_TRUNK_MUSCLES
    AnyFolder SPT12T4 =
    {
      AnyString Muscle = "SPT12T4"; ///< Descriptive name for the muscle, e.g. for plotting
      AnyIntVar MuscleElemAmount = 1; ///< The total amount of elements for this muscle
      AnyFloat Pennationangle ??= DesignVar(0); ///< Pennation angle of the muscle fibers (degres)
      AnyFloat VolumeScaleFactor ??= DesignVar(1.0); ///< Factor for scaling the muscle volume
      AnyFloat MuscleVolume ??= .Volume*0.1518; ///< Volume of the muscle (ml) (the fraction of the group volume is based on the strength of the previous model)
      AnyFloat MuscleVolumeSIScaled ??= ..VolumeUnitFactor*VolumeScaleFactor*MuscleVolume; ///< Scaled Volume of the muscle in SI base unit (m^3)
      AnyFloat OptimalFiberlength ??= _FIBER_LENGTH_DESIGNVAR(0.24666); ///< Optimal working length of the muscle fiber (m)
      AnyFloat TotalTendonLength ??= _TENDON_LENGTH_DESIGNVAR(0.01);///< The total tendon length (m)
      AnyFloat K1 ??= DesignVar(10); ///< K1 constant in the muscle model.  Factor for determining shortening speed at optimum length
      AnyFloat K2 ??= DesignVar(1); ///< K2 constant in the muscle model.  Factor for determining shortening speed at optimum length
      AnyFloat Epsilon0 ??= DesignVar(0.053); ///< Epsilon bar in the muscle model. Represents tendon strain at F0
      AnyFloat Fcfast ??= DesignVar(0.4); ///< Factor for determining shortening speed at optimum length
    };
    #endif

    #if BM_TRUNK_MUSCLES
    AnyFolder SPT12T5 =
    {
      AnyString Muscle = "SPT12T5"; ///< Descriptive name for the muscle, e.g. for plotting
      AnyIntVar MuscleElemAmount = 1; ///< The total amount of elements for this muscle
      AnyFloat Pennationangle ??= DesignVar(0); ///< Pennation angle of the muscle fibers (degres)
      AnyFloat VolumeScaleFactor ??= DesignVar(1.0); ///< Factor for scaling the muscle volume
      AnyFloat MuscleVolume ??= .Volume*0.13646; ///< Volume of the muscle (ml) (the fraction of the group volume is based on the strength of the previous model)
      AnyFloat MuscleVolumeSIScaled ??= ..VolumeUnitFactor*VolumeScaleFactor*MuscleVolume; ///< Scaled Volume of the muscle in SI base unit (m^3)
      AnyFloat OptimalFiberlength ??= _FIBER_LENGTH_DESIGNVAR(0.22174); ///< Optimal working length of the muscle fiber (m)
      AnyFloat TotalTendonLength ??= _TENDON_LENGTH_DESIGNVAR(0.01);///< The total tendon length (m)
      AnyFloat K1 ??= DesignVar(10); ///< K1 constant in the muscle model.  Factor for determining shortening speed at optimum length
      AnyFloat K2 ??= DesignVar(1); ///< K2 constant in the muscle model.  Factor for determining shortening speed at optimum length
      AnyFloat Epsilon0 ??= DesignVar(0.053); ///< Epsilon bar in the muscle model. Represents tendon strain at F0
      AnyFloat Fcfast ??= DesignVar(0.4); ///< Factor for determining shortening speed at optimum length
    };
    #endif
  }; // Spinalis group
  AnyFolder TransversusSingle =
  {
    #if BM_TRUNK_MUSCLES & BM_TRUNK_CAVITY_MODEL == _CAVITY_MODEL_BUCKLE_
    AnyVar Volume ??= DesignVar(49.40); ///< Total volume of the muscle group (ml)
    AnyFolder Transversus_1 =
    {
      AnyString Muscle = "Transversus_1"; ///< Descriptive name for the muscle, e.g. for plotting
      AnyIntVar MuscleElemAmount = 1; ///< The total amount of elements for this muscle
      AnyFloat Pennationangle ??= DesignVar(0); ///< Pennation angle of the muscle fibers (degres)
      AnyFloat VolumeScaleFactor ??= DesignVar(1.0); ///< Factor for scaling the muscle volume
      AnyFloat MuscleVolume ??= .Volume*0.2; ///< Volume of the muscle (ml) (the fraction of the group volume is based on the strength of the previous model)
      AnyFloat MuscleVolumeSIScaled ??= ..VolumeUnitFactor*VolumeScaleFactor*MuscleVolume; ///< Scaled Volume of the muscle in SI base unit (m^3)
      AnyFloat OptimalFiberlength ??= _FIBER_LENGTH_DESIGNVAR(0.095); ///< Optimal working length of the muscle fiber (m)
      AnyFloat TotalTendonLength ??= _TENDON_LENGTH_DESIGNVAR(0.01);///< The total tendon length (m)
      AnyFloat K1 ??= DesignVar(10); ///< K1 constant in the muscle model.  Factor for determining shortening speed at optimum length
      AnyFloat K2 ??= DesignVar(1); ///< K2 constant in the muscle model.  Factor for determining shortening speed at optimum length
      AnyFloat Epsilon0 ??= DesignVar(0.053); ///< Epsilon bar in the muscle model. Represents tendon strain at F0
      AnyFloat Fcfast ??= DesignVar(0.4); ///< Factor for determining shortening speed at optimum length
    };
    #endif

    #if BM_TRUNK_MUSCLES & BM_TRUNK_CAVITY_MODEL == _CAVITY_MODEL_BUCKLE_
    AnyFolder Transversus_2 =
    {
      AnyString Muscle = "Transversus_2"; ///< Descriptive name for the muscle, e.g. for plotting
      AnyIntVar MuscleElemAmount = 1; ///< The total amount of elements for this muscle
      AnyFloat Pennationangle ??= DesignVar(0); ///< Pennation angle of the muscle fibers (degres)
      AnyFloat VolumeScaleFactor ??= DesignVar(1.0); ///< Factor for scaling the muscle volume
      AnyFloat MuscleVolume ??= .Volume*0.2; ///< Volume of the muscle (ml) (the fraction of the group volume is based on the strength of the previous model)
      AnyFloat MuscleVolumeSIScaled ??= ..VolumeUnitFactor*VolumeScaleFactor*MuscleVolume; ///< Scaled Volume of the muscle in SI base unit (m^3)
      AnyFloat OptimalFiberlength ??= _FIBER_LENGTH_DESIGNVAR(0.095); ///< Optimal working length of the muscle fiber (m)
      AnyFloat TotalTendonLength ??= _TENDON_LENGTH_DESIGNVAR(0.01);///< The total tendon length (m)
      AnyFloat K1 ??= DesignVar(10); ///< K1 constant in the muscle model.  Factor for determining shortening speed at optimum length
      AnyFloat K2 ??= DesignVar(1); ///< K2 constant in the muscle model.  Factor for determining shortening speed at optimum length
      AnyFloat Epsilon0 ??= DesignVar(0.053); ///< Epsilon bar in the muscle model. Represents tendon strain at F0
      AnyFloat Fcfast ??= DesignVar(0.4); ///< Factor for determining shortening speed at optimum length
    };
    #endif

    #if BM_TRUNK_MUSCLES & BM_TRUNK_CAVITY_MODEL == _CAVITY_MODEL_BUCKLE_
    AnyFolder Transversus_3 =
    {
      AnyString Muscle = "Transversus_3"; ///< Descriptive name for the muscle, e.g. for plotting
      AnyIntVar MuscleElemAmount = 1; ///< The total amount of elements for this muscle
      AnyFloat Pennationangle ??= DesignVar(0); ///< Pennation angle of the muscle fibers (degres)
      AnyFloat VolumeScaleFactor ??= DesignVar(1.0); ///< Factor for scaling the muscle volume
      AnyFloat MuscleVolume ??= .Volume*0.2; ///< Volume of the muscle (ml) (the fraction of the group volume is based on the strength of the previous model)
      AnyFloat MuscleVolumeSIScaled ??= ..VolumeUnitFactor*VolumeScaleFactor*MuscleVolume; ///< Scaled Volume of the muscle in SI base unit (m^3)
      AnyFloat OptimalFiberlength ??= _FIBER_LENGTH_DESIGNVAR(0.095); ///< Optimal working length of the muscle fiber (m)
      AnyFloat TotalTendonLength ??= _TENDON_LENGTH_DESIGNVAR(0.01);///< The total tendon length (m)
      AnyFloat K1 ??= DesignVar(10); ///< K1 constant in the muscle model.  Factor for determining shortening speed at optimum length
      AnyFloat K2 ??= DesignVar(1); ///< K2 constant in the muscle model.  Factor for determining shortening speed at optimum length
      AnyFloat Epsilon0 ??= DesignVar(0.053); ///< Epsilon bar in the muscle model. Represents tendon strain at F0
      AnyFloat Fcfast ??= DesignVar(0.4); ///< Factor for determining shortening speed at optimum length
    };
    #endif

    #if BM_TRUNK_MUSCLES & BM_TRUNK_CAVITY_MODEL == _CAVITY_MODEL_BUCKLE_
    AnyFolder Transversus_4 =
    {
      AnyString Muscle = "Transversus_4"; ///< Descriptive name for the muscle, e.g. for plotting
      AnyIntVar MuscleElemAmount = 1; ///< The total amount of elements for this muscle
      AnyFloat Pennationangle ??= DesignVar(0); ///< Pennation angle of the muscle fibers (degres)
      AnyFloat VolumeScaleFactor ??= DesignVar(1.0); ///< Factor for scaling the muscle volume
      AnyFloat MuscleVolume ??= .Volume*0.2; ///< Volume of the muscle (ml) (the fraction of the group volume is based on the strength of the previous model)
      AnyFloat MuscleVolumeSIScaled ??= ..VolumeUnitFactor*VolumeScaleFactor*MuscleVolume; ///< Scaled Volume of the muscle in SI base unit (m^3)
      AnyFloat OptimalFiberlength ??= _FIBER_LENGTH_DESIGNVAR(0.095); ///< Optimal working length of the muscle fiber (m)
      AnyFloat TotalTendonLength ??= _TENDON_LENGTH_DESIGNVAR(0.01);///< The total tendon length (m)
      AnyFloat K1 ??= DesignVar(10); ///< K1 constant in the muscle model.  Factor for determining shortening speed at optimum length
      AnyFloat K2 ??= DesignVar(1); ///< K2 constant in the muscle model.  Factor for determining shortening speed at optimum length
      AnyFloat Epsilon0 ??= DesignVar(0.053); ///< Epsilon bar in the muscle model. Represents tendon strain at F0
      AnyFloat Fcfast ??= DesignVar(0.4); ///< Factor for determining shortening speed at optimum length
    };
    #endif

    #if BM_TRUNK_MUSCLES & BM_TRUNK_CAVITY_MODEL == _CAVITY_MODEL_BUCKLE_
    AnyFolder Transversus_5 =
    {
      AnyString Muscle = "Transversus_5"; ///< Descriptive name for the muscle, e.g. for plotting
      AnyIntVar MuscleElemAmount = 1; ///< The total amount of elements for this muscle
      AnyFloat Pennationangle ??= DesignVar(0); ///< Pennation angle of the muscle fibers (degres)
      AnyFloat VolumeScaleFactor ??= DesignVar(1.0); ///< Factor for scaling the muscle volume
      AnyFloat MuscleVolume ??= .Volume*0.2; ///< Volume of the muscle (ml) (the fraction of the group volume is based on the strength of the previous model)
      AnyFloat MuscleVolumeSIScaled ??= ..VolumeUnitFactor*VolumeScaleFactor*MuscleVolume; ///< Scaled Volume of the muscle in SI base unit (m^3)
      AnyFloat OptimalFiberlength ??= _FIBER_LENGTH_DESIGNVAR(0.095); ///< Optimal working length of the muscle fiber (m)
      AnyFloat TotalTendonLength ??= _TENDON_LENGTH_DESIGNVAR(0.01);///< The total tendon length (m)
      AnyFloat K1 ??= DesignVar(10); ///< K1 constant in the muscle model.  Factor for determining shortening speed at optimum length
      AnyFloat K2 ??= DesignVar(1); ///< K2 constant in the muscle model.  Factor for determining shortening speed at optimum length
      AnyFloat Epsilon0 ??= DesignVar(0.053); ///< Epsilon bar in the muscle model. Represents tendon strain at F0
      AnyFloat Fcfast ??= DesignVar(0.4); ///< Factor for determining shortening speed at optimum length
    };
    #endif
  }; // TransversusSingle group
  AnyFolder Diaphragm =
  {
    #if BM_TRUNK_MUSCLES & BM_TRUNK_CAVITY_MODEL == _CAVITY_MODEL_VOLUME_
    AnyVar Volume ??= DesignVar(61.73); ///< Total volume of the muscle group (ml)
    AnyFolder L1_Diaphragm1 =
    {
      AnyString Muscle = "L1_Diaphragm1"; ///< Descriptive name for the muscle, e.g. for plotting
      AnyIntVar MuscleElemAmount = 1; ///< The total amount of elements for this muscle
      AnyFloat Pennationangle ??= DesignVar(0); ///< Pennation angle of the muscle fibers (degres)
      AnyFloat VolumeScaleFactor ??= DesignVar(1.0); ///< Factor for scaling the muscle volume
      AnyFloat MuscleVolume ??= .Volume*0.045054; ///< Volume of the muscle (ml) (the fraction of the group volume is based on the strength of the previous model)
      AnyFloat MuscleVolumeSIScaled ??= ..VolumeUnitFactor*VolumeScaleFactor*MuscleVolume; ///< Scaled Volume of the muscle in SI base unit (m^3)
      AnyFloat OptimalFiberlength ??= _FIBER_LENGTH_DESIGNVAR(0.13243); ///< Optimal working length of the muscle fiber (m)
      AnyFloat TotalTendonLength ??= _TENDON_LENGTH_DESIGNVAR(0.01);///< The total tendon length (m)
      AnyFloat K1 ??= DesignVar(10); ///< K1 constant in the muscle model.  Factor for determining shortening speed at optimum length
      AnyFloat K2 ??= DesignVar(1); ///< K2 constant in the muscle model.  Factor for determining shortening speed at optimum length
      AnyFloat Epsilon0 ??= DesignVar(0.053); ///< Epsilon bar in the muscle model. Represents tendon strain at F0
      AnyFloat Fcfast ??= DesignVar(0.4); ///< Factor for determining shortening speed at optimum length
    };
    #endif

    #if BM_TRUNK_MUSCLES & BM_TRUNK_CAVITY_MODEL == _CAVITY_MODEL_VOLUME_
    AnyFolder L1_Diaphragm2 =
    {
      AnyString Muscle = "L1_Diaphragm2"; ///< Descriptive name for the muscle, e.g. for plotting
      AnyIntVar MuscleElemAmount = 1; ///< The total amount of elements for this muscle
      AnyFloat Pennationangle ??= DesignVar(0); ///< Pennation angle of the muscle fibers (degres)
      AnyFloat VolumeScaleFactor ??= DesignVar(1.0); ///< Factor for scaling the muscle volume
      AnyFloat MuscleVolume ??= .Volume*0.047301; ///< Volume of the muscle (ml) (the fraction of the group volume is based on the strength of the previous model)
      AnyFloat MuscleVolumeSIScaled ??= ..VolumeUnitFactor*VolumeScaleFactor*MuscleVolume; ///< Scaled Volume of the muscle in SI base unit (m^3)
      AnyFloat OptimalFiberlength ??= _FIBER_LENGTH_DESIGNVAR(0.13903); ///< Optimal working length of the muscle fiber (m)
      AnyFloat TotalTendonLength ??= _TENDON_LENGTH_DESIGNVAR(0.01);///< The total tendon length (m)
      AnyFloat K1 ??= DesignVar(10); ///< K1 constant in the muscle model.  Factor for determining shortening speed at optimum length
      AnyFloat K2 ??= DesignVar(1); ///< K2 constant in the muscle model.  Factor for determining shortening speed at optimum length
      AnyFloat Epsilon0 ??= DesignVar(0.053); ///< Epsilon bar in the muscle model. Represents tendon strain at F0
      AnyFloat Fcfast ??= DesignVar(0.4); ///< Factor for determining shortening speed at optimum length
    };
    #endif

    #if BM_TRUNK_MUSCLES & BM_TRUNK_CAVITY_MODEL == _CAVITY_MODEL_VOLUME_
    AnyFolder L2_Diaphragm1 =
    {
      AnyString Muscle = "L2_Diaphragm1"; ///< Descriptive name for the muscle, e.g. for plotting
      AnyIntVar MuscleElemAmount = 1; ///< The total amount of elements for this muscle
      AnyFloat Pennationangle ??= DesignVar(0); ///< Pennation angle of the muscle fibers (degres)
      AnyFloat VolumeScaleFactor ??= DesignVar(1.0); ///< Factor for scaling the muscle volume
      AnyFloat MuscleVolume ??= .Volume*0.055502; ///< Volume of the muscle (ml) (the fraction of the group volume is based on the strength of the previous model)
      AnyFloat MuscleVolumeSIScaled ??= ..VolumeUnitFactor*VolumeScaleFactor*MuscleVolume; ///< Scaled Volume of the muscle in SI base unit (m^3)
      AnyFloat OptimalFiberlength ??= _FIBER_LENGTH_DESIGNVAR(0.16314); ///< Optimal working length of the muscle fiber (m)
      AnyFloat TotalTendonLength ??= _TENDON_LENGTH_DESIGNVAR(0.01);///< The total tendon length (m)
      AnyFloat K1 ??= DesignVar(10); ///< K1 constant in the muscle model.  Factor for determining shortening speed at optimum length
      AnyFloat K2 ??= DesignVar(1); ///< K2 constant in the muscle model.  Factor for determining shortening speed at optimum length
      AnyFloat Epsilon0 ??= DesignVar(0.053); ///< Epsilon bar in the muscle model. Represents tendon strain at F0
      AnyFloat Fcfast ??= DesignVar(0.4); ///< Factor for determining shortening speed at optimum length
    };
    #endif

    #if BM_TRUNK_MUSCLES & BM_TRUNK_CAVITY_MODEL == _CAVITY_MODEL_VOLUME_
    AnyFolder L2_Diaphragm2 =
    {
      AnyString Muscle = "L2_Diaphragm2"; ///< Descriptive name for the muscle, e.g. for plotting
      AnyIntVar MuscleElemAmount = 1; ///< The total amount of elements for this muscle
      AnyFloat Pennationangle ??= DesignVar(0); ///< Pennation angle of the muscle fibers (degres)
      AnyFloat VolumeScaleFactor ??= DesignVar(1.0); ///< Factor for scaling the muscle volume
      AnyFloat MuscleVolume ??= .Volume*0.056476; ///< Volume of the muscle (ml) (the fraction of the group volume is based on the strength of the previous model)
      AnyFloat MuscleVolumeSIScaled ??= ..VolumeUnitFactor*VolumeScaleFactor*MuscleVolume; ///< Scaled Volume of the muscle in SI base unit (m^3)
      AnyFloat OptimalFiberlength ??= _FIBER_LENGTH_DESIGNVAR(0.166); ///< Optimal working length of the muscle fiber (m)
      AnyFloat TotalTendonLength ??= _TENDON_LENGTH_DESIGNVAR(0.01);///< The total tendon length (m)
      AnyFloat K1 ??= DesignVar(10); ///< K1 constant in the muscle model.  Factor for determining shortening speed at optimum length
      AnyFloat K2 ??= DesignVar(1); ///< K2 constant in the muscle model.  Factor for determining shortening speed at optimum length
      AnyFloat Epsilon0 ??= DesignVar(0.053); ///< Epsilon bar in the muscle model. Represents tendon strain at F0
      AnyFloat Fcfast ??= DesignVar(0.4); ///< Factor for determining shortening speed at optimum length
    };
    #endif

    #if BM_TRUNK_MUSCLES & BM_TRUNK_CAVITY_MODEL == _CAVITY_MODEL_VOLUME_
    AnyFolder L1TransverseProcess_Diaphragm =
    {
      AnyString Muscle = "L1TransverseProcess_Diaphragm"; ///< Descriptive name for the muscle, e.g. for plotting
      AnyIntVar MuscleElemAmount = 1; ///< The total amount of elements for this muscle
      AnyFloat Pennationangle ??= DesignVar(0); ///< Pennation angle of the muscle fibers (degres)
      AnyFloat VolumeScaleFactor ??= DesignVar(1.0); ///< Factor for scaling the muscle volume
      AnyFloat MuscleVolume ??= .Volume*0.051711; ///< Volume of the muscle (ml) (the fraction of the group volume is based on the strength of the previous model)
      AnyFloat MuscleVolumeSIScaled ??= ..VolumeUnitFactor*VolumeScaleFactor*MuscleVolume; ///< Scaled Volume of the muscle in SI base unit (m^3)
      AnyFloat OptimalFiberlength ??= _FIBER_LENGTH_DESIGNVAR(0.152); ///< Optimal working length of the muscle fiber (m)
      AnyFloat TotalTendonLength ??= _TENDON_LENGTH_DESIGNVAR(0.01);///< The total tendon length (m)
      AnyFloat K1 ??= DesignVar(10); ///< K1 constant in the muscle model.  Factor for determining shortening speed at optimum length
      AnyFloat K2 ??= DesignVar(1); ///< K2 constant in the muscle model.  Factor for determining shortening speed at optimum length
      AnyFloat Epsilon0 ??= DesignVar(0.053); ///< Epsilon bar in the muscle model. Represents tendon strain at F0
      AnyFloat Fcfast ??= DesignVar(0.4); ///< Factor for determining shortening speed at optimum length
    };
    #endif

    #if BM_TRUNK_MUSCLES & BM_TRUNK_CAVITY_MODEL == _CAVITY_MODEL_VOLUME_
    AnyFolder R12_Diaphragm1 =
    {
      AnyString Muscle = "R12_Diaphragm1"; ///< Descriptive name for the muscle, e.g. for plotting
      AnyIntVar MuscleElemAmount = 1; ///< The total amount of elements for this muscle
      AnyFloat Pennationangle ??= DesignVar(0); ///< Pennation angle of the muscle fibers (degres)
      AnyFloat VolumeScaleFactor ??= DesignVar(1.0); ///< Factor for scaling the muscle volume
      AnyFloat MuscleVolume ??= .Volume*0.050615; ///< Volume of the muscle (ml) (the fraction of the group volume is based on the strength of the previous model)
      AnyFloat MuscleVolumeSIScaled ??= ..VolumeUnitFactor*VolumeScaleFactor*MuscleVolume; ///< Scaled Volume of the muscle in SI base unit (m^3)
      AnyFloat OptimalFiberlength ??= _FIBER_LENGTH_DESIGNVAR(0.14877); ///< Optimal working length of the muscle fiber (m)
      AnyFloat TotalTendonLength ??= _TENDON_LENGTH_DESIGNVAR(0.01);///< The total tendon length (m)
      AnyFloat K1 ??= DesignVar(10); ///< K1 constant in the muscle model.  Factor for determining shortening speed at optimum length
      AnyFloat K2 ??= DesignVar(1); ///< K2 constant in the muscle model.  Factor for determining shortening speed at optimum length
      AnyFloat Epsilon0 ??= DesignVar(0.053); ///< Epsilon bar in the muscle model. Represents tendon strain at F0
      AnyFloat Fcfast ??= DesignVar(0.4); ///< Factor for determining shortening speed at optimum length
    };
    #endif

    #if BM_TRUNK_MUSCLES & BM_TRUNK_CAVITY_MODEL == _CAVITY_MODEL_VOLUME_
    AnyFolder R12_Diaphragm2 =
    {
      AnyString Muscle = "R12_Diaphragm2"; ///< Descriptive name for the muscle, e.g. for plotting
      AnyIntVar MuscleElemAmount = 1; ///< The total amount of elements for this muscle
      AnyFloat Pennationangle ??= DesignVar(0); ///< Pennation angle of the muscle fibers (degres)
      AnyFloat VolumeScaleFactor ??= DesignVar(1.0); ///< Factor for scaling the muscle volume
      AnyFloat MuscleVolume ??= .Volume*0.04386; ///< Volume of the muscle (ml) (the fraction of the group volume is based on the strength of the previous model)
      AnyFloat MuscleVolumeSIScaled ??= ..VolumeUnitFactor*VolumeScaleFactor*MuscleVolume; ///< Scaled Volume of the muscle in SI base unit (m^3)
      AnyFloat OptimalFiberlength ??= _FIBER_LENGTH_DESIGNVAR(0.12892); ///< Optimal working length of the muscle fiber (m)
      AnyFloat TotalTendonLength ??= _TENDON_LENGTH_DESIGNVAR(0.01);///< The total tendon length (m)
      AnyFloat K1 ??= DesignVar(10); ///< K1 constant in the muscle model.  Factor for determining shortening speed at optimum length
      AnyFloat K2 ??= DesignVar(1); ///< K2 constant in the muscle model.  Factor for determining shortening speed at optimum length
      AnyFloat Epsilon0 ??= DesignVar(0.053); ///< Epsilon bar in the muscle model. Represents tendon strain at F0
      AnyFloat Fcfast ??= DesignVar(0.4); ///< Factor for determining shortening speed at optimum length
    };
    #endif

    #if BM_TRUNK_MUSCLES & BM_TRUNK_CAVITY_MODEL == _CAVITY_MODEL_VOLUME_
    AnyFolder R11_Diaphragm1 =
    {
      AnyString Muscle = "R11_Diaphragm1"; ///< Descriptive name for the muscle, e.g. for plotting
      AnyIntVar MuscleElemAmount = 1; ///< The total amount of elements for this muscle
      AnyFloat Pennationangle ??= DesignVar(0); ///< Pennation angle of the muscle fibers (degres)
      AnyFloat VolumeScaleFactor ??= DesignVar(1.0); ///< Factor for scaling the muscle volume
      AnyFloat MuscleVolume ??= .Volume*0.057124; ///< Volume of the muscle (ml) (the fraction of the group volume is based on the strength of the previous model)
      AnyFloat MuscleVolumeSIScaled ??= ..VolumeUnitFactor*VolumeScaleFactor*MuscleVolume; ///< Scaled Volume of the muscle in SI base unit (m^3)
      AnyFloat OptimalFiberlength ??= _FIBER_LENGTH_DESIGNVAR(0.16791); ///< Optimal working length of the muscle fiber (m)
      AnyFloat TotalTendonLength ??= _TENDON_LENGTH_DESIGNVAR(0.01);///< The total tendon length (m)
      AnyFloat K1 ??= DesignVar(10); ///< K1 constant in the muscle model.  Factor for determining shortening speed at optimum length
      AnyFloat K2 ??= DesignVar(1); ///< K2 constant in the muscle model.  Factor for determining shortening speed at optimum length
      AnyFloat Epsilon0 ??= DesignVar(0.053); ///< Epsilon bar in the muscle model. Represents tendon strain at F0
      AnyFloat Fcfast ??= DesignVar(0.4); ///< Factor for determining shortening speed at optimum length
    };
    #endif

    #if BM_TRUNK_MUSCLES & BM_TRUNK_CAVITY_MODEL == _CAVITY_MODEL_VOLUME_
    AnyFolder R11_Diaphragm2 =
    {
      AnyString Muscle = "R11_Diaphragm2"; ///< Descriptive name for the muscle, e.g. for plotting
      AnyIntVar MuscleElemAmount = 1; ///< The total amount of elements for this muscle
      AnyFloat Pennationangle ??= DesignVar(0); ///< Pennation angle of the muscle fibers (degres)
      AnyFloat VolumeScaleFactor ??= DesignVar(1.0); ///< Factor for scaling the muscle volume
      AnyFloat MuscleVolume ??= .Volume*0.054013; ///< Volume of the muscle (ml) (the fraction of the group volume is based on the strength of the previous model)
      AnyFloat MuscleVolumeSIScaled ??= ..VolumeUnitFactor*VolumeScaleFactor*MuscleVolume; ///< Scaled Volume of the muscle in SI base unit (m^3)
      AnyFloat OptimalFiberlength ??= _FIBER_LENGTH_DESIGNVAR(0.15876); ///< Optimal working length of the muscle fiber (m)
      AnyFloat TotalTendonLength ??= _TENDON_LENGTH_DESIGNVAR(0.01);///< The total tendon length (m)
      AnyFloat K1 ??= DesignVar(10); ///< K1 constant in the muscle model.  Factor for determining shortening speed at optimum length
      AnyFloat K2 ??= DesignVar(1); ///< K2 constant in the muscle model.  Factor for determining shortening speed at optimum length
      AnyFloat Epsilon0 ??= DesignVar(0.053); ///< Epsilon bar in the muscle model. Represents tendon strain at F0
      AnyFloat Fcfast ??= DesignVar(0.4); ///< Factor for determining shortening speed at optimum length
    };
    #endif

    #if BM_TRUNK_MUSCLES & BM_TRUNK_CAVITY_MODEL == _CAVITY_MODEL_VOLUME_
    AnyFolder R11_Diaphragm3 =
    {
      AnyString Muscle = "R11_Diaphragm3"; ///< Descriptive name for the muscle, e.g. for plotting
      AnyIntVar MuscleElemAmount = 1; ///< The total amount of elements for this muscle
      AnyFloat Pennationangle ??= DesignVar(0); ///< Pennation angle of the muscle fibers (degres)
      AnyFloat VolumeScaleFactor ??= DesignVar(1.0); ///< Factor for scaling the muscle volume
      AnyFloat MuscleVolume ??= .Volume*0.051261; ///< Volume of the muscle (ml) (the fraction of the group volume is based on the strength of the previous model)
      AnyFloat MuscleVolumeSIScaled ??= ..VolumeUnitFactor*VolumeScaleFactor*MuscleVolume; ///< Scaled Volume of the muscle in SI base unit (m^3)
      AnyFloat OptimalFiberlength ??= _FIBER_LENGTH_DESIGNVAR(0.15067); ///< Optimal working length of the muscle fiber (m)
      AnyFloat TotalTendonLength ??= _TENDON_LENGTH_DESIGNVAR(0.01);///< The total tendon length (m)
      AnyFloat K1 ??= DesignVar(10); ///< K1 constant in the muscle model.  Factor for determining shortening speed at optimum length
      AnyFloat K2 ??= DesignVar(1); ///< K2 constant in the muscle model.  Factor for determining shortening speed at optimum length
      AnyFloat Epsilon0 ??= DesignVar(0.053); ///< Epsilon bar in the muscle model. Represents tendon strain at F0
      AnyFloat Fcfast ??= DesignVar(0.4); ///< Factor for determining shortening speed at optimum length
    };
    #endif

    #if BM_TRUNK_MUSCLES & BM_TRUNK_CAVITY_MODEL == _CAVITY_MODEL_VOLUME_
    AnyFolder R10_Diaphragm1 =
    {
      AnyString Muscle = "R10_Diaphragm1"; ///< Descriptive name for the muscle, e.g. for plotting
      AnyIntVar MuscleElemAmount = 1; ///< The total amount of elements for this muscle
      AnyFloat Pennationangle ??= DesignVar(0); ///< Pennation angle of the muscle fibers (degres)
      AnyFloat VolumeScaleFactor ??= DesignVar(1.0); ///< Factor for scaling the muscle volume
      AnyFloat MuscleVolume ??= .Volume*0.052269; ///< Volume of the muscle (ml) (the fraction of the group volume is based on the strength of the previous model)
      AnyFloat MuscleVolumeSIScaled ??= ..VolumeUnitFactor*VolumeScaleFactor*MuscleVolume; ///< Scaled Volume of the muscle in SI base unit (m^3)
      AnyFloat OptimalFiberlength ??= _FIBER_LENGTH_DESIGNVAR(0.15364); ///< Optimal working length of the muscle fiber (m)
      AnyFloat TotalTendonLength ??= _TENDON_LENGTH_DESIGNVAR(0.01);///< The total tendon length (m)
      AnyFloat K1 ??= DesignVar(10); ///< K1 constant in the muscle model.  Factor for determining shortening speed at optimum length
      AnyFloat K2 ??= DesignVar(1); ///< K2 constant in the muscle model.  Factor for determining shortening speed at optimum length
      AnyFloat Epsilon0 ??= DesignVar(0.053); ///< Epsilon bar in the muscle model. Represents tendon strain at F0
      AnyFloat Fcfast ??= DesignVar(0.4); ///< Factor for determining shortening speed at optimum length
    };
    #endif

    #if BM_TRUNK_MUSCLES & BM_TRUNK_CAVITY_MODEL == _CAVITY_MODEL_VOLUME_
    AnyFolder R10_Diaphragm2 =
    {
      AnyString Muscle = "R10_Diaphragm2"; ///< Descriptive name for the muscle, e.g. for plotting
      AnyIntVar MuscleElemAmount = 1; ///< The total amount of elements for this muscle
      AnyFloat Pennationangle ??= DesignVar(0); ///< Pennation angle of the muscle fibers (degres)
      AnyFloat VolumeScaleFactor ??= DesignVar(1.0); ///< Factor for scaling the muscle volume
      AnyFloat MuscleVolume ??= .Volume*0.057122; ///< Volume of the muscle (ml) (the fraction of the group volume is based on the strength of the previous model)
      AnyFloat MuscleVolumeSIScaled ??= ..VolumeUnitFactor*VolumeScaleFactor*MuscleVolume; ///< Scaled Volume of the muscle in SI base unit (m^3)
      AnyFloat OptimalFiberlength ??= _FIBER_LENGTH_DESIGNVAR(0.1679); ///< Optimal working length of the muscle fiber (m)
      AnyFloat TotalTendonLength ??= _TENDON_LENGTH_DESIGNVAR(0.01);///< The total tendon length (m)
      AnyFloat K1 ??= DesignVar(10); ///< K1 constant in the muscle model.  Factor for determining shortening speed at optimum length
      AnyFloat K2 ??= DesignVar(1); ///< K2 constant in the muscle model.  Factor for determining shortening speed at optimum length
      AnyFloat Epsilon0 ??= DesignVar(0.053); ///< Epsilon bar in the muscle model. Represents tendon strain at F0
      AnyFloat Fcfast ??= DesignVar(0.4); ///< Factor for determining shortening speed at optimum length
    };
    #endif

    #if BM_TRUNK_MUSCLES & BM_TRUNK_CAVITY_MODEL == _CAVITY_MODEL_VOLUME_
    AnyFolder R10_Diaphragm3 =
    {
      AnyString Muscle = "R10_Diaphragm3"; ///< Descriptive name for the muscle, e.g. for plotting
      AnyIntVar MuscleElemAmount = 1; ///< The total amount of elements for this muscle
      AnyFloat Pennationangle ??= DesignVar(0); ///< Pennation angle of the muscle fibers (degres)
      AnyFloat VolumeScaleFactor ??= DesignVar(1.0); ///< Factor for scaling the muscle volume
      AnyFloat MuscleVolume ??= .Volume*0.060079; ///< Volume of the muscle (ml) (the fraction of the group volume is based on the strength of the previous model)
      AnyFloat MuscleVolumeSIScaled ??= ..VolumeUnitFactor*VolumeScaleFactor*MuscleVolume; ///< Scaled Volume of the muscle in SI base unit (m^3)
      AnyFloat OptimalFiberlength ??= _FIBER_LENGTH_DESIGNVAR(0.17659); ///< Optimal working length of the muscle fiber (m)
      AnyFloat TotalTendonLength ??= _TENDON_LENGTH_DESIGNVAR(0.01);///< The total tendon length (m)
      AnyFloat K1 ??= DesignVar(10); ///< K1 constant in the muscle model.  Factor for determining shortening speed at optimum length
      AnyFloat K2 ??= DesignVar(1); ///< K2 constant in the muscle model.  Factor for determining shortening speed at optimum length
      AnyFloat Epsilon0 ??= DesignVar(0.053); ///< Epsilon bar in the muscle model. Represents tendon strain at F0
      AnyFloat Fcfast ??= DesignVar(0.4); ///< Factor for determining shortening speed at optimum length
    };
    #endif

    #if BM_TRUNK_MUSCLES & BM_TRUNK_CAVITY_MODEL == _CAVITY_MODEL_VOLUME_
    AnyFolder CC_DiaphragmNode1 =
    {
      AnyString Muscle = "CC_DiaphragmNode1"; ///< Descriptive name for the muscle, e.g. for plotting
      AnyIntVar MuscleElemAmount = 1; ///< The total amount of elements for this muscle
      AnyFloat Pennationangle ??= DesignVar(0); ///< Pennation angle of the muscle fibers (degres)
      AnyFloat VolumeScaleFactor ??= DesignVar(1.0); ///< Factor for scaling the muscle volume
      AnyFloat MuscleVolume ??= .Volume*0.021243; ///< Volume of the muscle (ml) (the fraction of the group volume is based on the strength of the previous model)
      AnyFloat MuscleVolumeSIScaled ??= ..VolumeUnitFactor*VolumeScaleFactor*MuscleVolume; ///< Scaled Volume of the muscle in SI base unit (m^3)
      AnyFloat OptimalFiberlength ??= _FIBER_LENGTH_DESIGNVAR(0.062441); ///< Optimal working length of the muscle fiber (m)
      AnyFloat TotalTendonLength ??= _TENDON_LENGTH_DESIGNVAR(0.01);///< The total tendon length (m)
      AnyFloat K1 ??= DesignVar(10); ///< K1 constant in the muscle model.  Factor for determining shortening speed at optimum length
      AnyFloat K2 ??= DesignVar(1); ///< K2 constant in the muscle model.  Factor for determining shortening speed at optimum length
      AnyFloat Epsilon0 ??= DesignVar(0.053); ///< Epsilon bar in the muscle model. Represents tendon strain at F0
      AnyFloat Fcfast ??= DesignVar(0.4); ///< Factor for determining shortening speed at optimum length
    };
    #endif

    #if BM_TRUNK_MUSCLES & BM_TRUNK_CAVITY_MODEL == _CAVITY_MODEL_VOLUME_
    AnyFolder CC_DiaphragmNode2 =
    {
      AnyString Muscle = "CC_DiaphragmNode2"; ///< Descriptive name for the muscle, e.g. for plotting
      AnyIntVar MuscleElemAmount = 1; ///< The total amount of elements for this muscle
      AnyFloat Pennationangle ??= DesignVar(0); ///< Pennation angle of the muscle fibers (degres)
      AnyFloat VolumeScaleFactor ??= DesignVar(1.0); ///< Factor for scaling the muscle volume
      AnyFloat MuscleVolume ??= .Volume*0.028278; ///< Volume of the muscle (ml) (the fraction of the group volume is based on the strength of the previous model)
      AnyFloat MuscleVolumeSIScaled ??= ..VolumeUnitFactor*VolumeScaleFactor*MuscleVolume; ///< Scaled Volume of the muscle in SI base unit (m^3)
      AnyFloat OptimalFiberlength ??= _FIBER_LENGTH_DESIGNVAR(0.083118); ///< Optimal working length of the muscle fiber (m)
      AnyFloat TotalTendonLength ??= _TENDON_LENGTH_DESIGNVAR(0.01);///< The total tendon length (m)
      AnyFloat K1 ??= DesignVar(10); ///< K1 constant in the muscle model.  Factor for determining shortening speed at optimum length
      AnyFloat K2 ??= DesignVar(1); ///< K2 constant in the muscle model.  Factor for determining shortening speed at optimum length
      AnyFloat Epsilon0 ??= DesignVar(0.053); ///< Epsilon bar in the muscle model. Represents tendon strain at F0
      AnyFloat Fcfast ??= DesignVar(0.4); ///< Factor for determining shortening speed at optimum length
    };
    #endif

    #if BM_TRUNK_MUSCLES & BM_TRUNK_CAVITY_MODEL == _CAVITY_MODEL_VOLUME_
    AnyFolder CC_DiaphragmNode3 =
    {
      AnyString Muscle = "CC_DiaphragmNode3"; ///< Descriptive name for the muscle, e.g. for plotting
      AnyIntVar MuscleElemAmount = 1; ///< The total amount of elements for this muscle
      AnyFloat Pennationangle ??= DesignVar(0); ///< Pennation angle of the muscle fibers (degres)
      AnyFloat VolumeScaleFactor ??= DesignVar(1.0); ///< Factor for scaling the muscle volume
      AnyFloat MuscleVolume ??= .Volume*0.033888; ///< Volume of the muscle (ml) (the fraction of the group volume is based on the strength of the previous model)
      AnyFloat MuscleVolumeSIScaled ??= ..VolumeUnitFactor*VolumeScaleFactor*MuscleVolume; ///< Scaled Volume of the muscle in SI base unit (m^3)
      AnyFloat OptimalFiberlength ??= _FIBER_LENGTH_DESIGNVAR(0.099607); ///< Optimal working length of the muscle fiber (m)
      AnyFloat TotalTendonLength ??= _TENDON_LENGTH_DESIGNVAR(0.01);///< The total tendon length (m)
      AnyFloat K1 ??= DesignVar(10); ///< K1 constant in the muscle model.  Factor for determining shortening speed at optimum length
      AnyFloat K2 ??= DesignVar(1); ///< K2 constant in the muscle model.  Factor for determining shortening speed at optimum length
      AnyFloat Epsilon0 ??= DesignVar(0.053); ///< Epsilon bar in the muscle model. Represents tendon strain at F0
      AnyFloat Fcfast ??= DesignVar(0.4); ///< Factor for determining shortening speed at optimum length
    };
    #endif

    #if BM_TRUNK_MUSCLES & BM_TRUNK_CAVITY_MODEL == _CAVITY_MODEL_VOLUME_
    AnyFolder CC_DiaphragmNode4 =
    {
      AnyString Muscle = "CC_DiaphragmNode4"; ///< Descriptive name for the muscle, e.g. for plotting
      AnyIntVar MuscleElemAmount = 1; ///< The total amount of elements for this muscle
      AnyFloat Pennationangle ??= DesignVar(0); ///< Pennation angle of the muscle fibers (degres)
      AnyFloat VolumeScaleFactor ??= DesignVar(1.0); ///< Factor for scaling the muscle volume
      AnyFloat MuscleVolume ??= .Volume*0.041144; ///< Volume of the muscle (ml) (the fraction of the group volume is based on the strength of the previous model)
      AnyFloat MuscleVolumeSIScaled ??= ..VolumeUnitFactor*VolumeScaleFactor*MuscleVolume; ///< Scaled Volume of the muscle in SI base unit (m^3)
      AnyFloat OptimalFiberlength ??= _FIBER_LENGTH_DESIGNVAR(0.12094); ///< Optimal working length of the muscle fiber (m)
      AnyFloat TotalTendonLength ??= _TENDON_LENGTH_DESIGNVAR(0.01);///< The total tendon length (m)
      AnyFloat K1 ??= DesignVar(10); ///< K1 constant in the muscle model.  Factor for determining shortening speed at optimum length
      AnyFloat K2 ??= DesignVar(1); ///< K2 constant in the muscle model.  Factor for determining shortening speed at optimum length
      AnyFloat Epsilon0 ??= DesignVar(0.053); ///< Epsilon bar in the muscle model. Represents tendon strain at F0
      AnyFloat Fcfast ??= DesignVar(0.4); ///< Factor for determining shortening speed at optimum length
    };
    #endif

    #if BM_TRUNK_MUSCLES & BM_TRUNK_CAVITY_MODEL == _CAVITY_MODEL_VOLUME_
    AnyFolder CC_DiaphragmNode5 =
    {
      AnyString Muscle = "CC_DiaphragmNode5"; ///< Descriptive name for the muscle, e.g. for plotting
      AnyIntVar MuscleElemAmount = 1; ///< The total amount of elements for this muscle
      AnyFloat Pennationangle ??= DesignVar(0); ///< Pennation angle of the muscle fibers (degres)
      AnyFloat VolumeScaleFactor ??= DesignVar(1.0); ///< Factor for scaling the muscle volume
      AnyFloat MuscleVolume ??= .Volume*0.0504; ///< Volume of the muscle (ml) (the fraction of the group volume is based on the strength of the previous model)
      AnyFloat MuscleVolumeSIScaled ??= ..VolumeUnitFactor*VolumeScaleFactor*MuscleVolume; ///< Scaled Volume of the muscle in SI base unit (m^3)
      AnyFloat OptimalFiberlength ??= _FIBER_LENGTH_DESIGNVAR(0.14814); ///< Optimal working length of the muscle fiber (m)
      AnyFloat TotalTendonLength ??= _TENDON_LENGTH_DESIGNVAR(0.01);///< The total tendon length (m)
      AnyFloat K1 ??= DesignVar(10); ///< K1 constant in the muscle model.  Factor for determining shortening speed at optimum length
      AnyFloat K2 ??= DesignVar(1); ///< K2 constant in the muscle model.  Factor for determining shortening speed at optimum length
      AnyFloat Epsilon0 ??= DesignVar(0.053); ///< Epsilon bar in the muscle model. Represents tendon strain at F0
      AnyFloat Fcfast ??= DesignVar(0.4); ///< Factor for determining shortening speed at optimum length
    };
    #endif

    #if BM_TRUNK_MUSCLES & BM_TRUNK_CAVITY_MODEL == _CAVITY_MODEL_VOLUME_
    AnyFolder CC_DiaphragmNode6 =
    {
      AnyString Muscle = "CC_DiaphragmNode6"; ///< Descriptive name for the muscle, e.g. for plotting
      AnyIntVar MuscleElemAmount = 1; ///< The total amount of elements for this muscle
      AnyFloat Pennationangle ??= DesignVar(0); ///< Pennation angle of the muscle fibers (degres)
      AnyFloat VolumeScaleFactor ??= DesignVar(1.0); ///< Factor for scaling the muscle volume
      AnyFloat MuscleVolume ??= .Volume*0.057493; ///< Volume of the muscle (ml) (the fraction of the group volume is based on the strength of the previous model)
      AnyFloat MuscleVolumeSIScaled ??= ..VolumeUnitFactor*VolumeScaleFactor*MuscleVolume; ///< Scaled Volume of the muscle in SI base unit (m^3)
      AnyFloat OptimalFiberlength ??= _FIBER_LENGTH_DESIGNVAR(0.16899); ///< Optimal working length of the muscle fiber (m)
      AnyFloat TotalTendonLength ??= _TENDON_LENGTH_DESIGNVAR(0.01);///< The total tendon length (m)
      AnyFloat K1 ??= DesignVar(10); ///< K1 constant in the muscle model.  Factor for determining shortening speed at optimum length
      AnyFloat K2 ??= DesignVar(1); ///< K2 constant in the muscle model.  Factor for determining shortening speed at optimum length
      AnyFloat Epsilon0 ??= DesignVar(0.053); ///< Epsilon bar in the muscle model. Represents tendon strain at F0
      AnyFloat Fcfast ??= DesignVar(0.4); ///< Factor for determining shortening speed at optimum length
    };
    #endif

    #if BM_TRUNK_MUSCLES & BM_TRUNK_CAVITY_MODEL == _CAVITY_MODEL_VOLUME_
    AnyFolder CC_DiaphragmNode7 =
    {
      AnyString Muscle = "CC_DiaphragmNode7"; ///< Descriptive name for the muscle, e.g. for plotting
      AnyIntVar MuscleElemAmount = 1; ///< The total amount of elements for this muscle
      AnyFloat Pennationangle ??= DesignVar(0); ///< Pennation angle of the muscle fibers (degres)
      AnyFloat VolumeScaleFactor ??= DesignVar(1.0); ///< Factor for scaling the muscle volume
      AnyFloat MuscleVolume ??= .Volume*0.065493; ///< Volume of the muscle (ml) (the fraction of the group volume is based on the strength of the previous model)
      AnyFloat MuscleVolumeSIScaled ??= ..VolumeUnitFactor*VolumeScaleFactor*MuscleVolume; ///< Scaled Volume of the muscle in SI base unit (m^3)
      AnyFloat OptimalFiberlength ??= _FIBER_LENGTH_DESIGNVAR(0.19251); ///< Optimal working length of the muscle fiber (m)
      AnyFloat TotalTendonLength ??= _TENDON_LENGTH_DESIGNVAR(0.01);///< The total tendon length (m)
      AnyFloat K1 ??= DesignVar(10); ///< K1 constant in the muscle model.  Factor for determining shortening speed at optimum length
      AnyFloat K2 ??= DesignVar(1); ///< K2 constant in the muscle model.  Factor for determining shortening speed at optimum length
      AnyFloat Epsilon0 ??= DesignVar(0.053); ///< Epsilon bar in the muscle model. Represents tendon strain at F0
      AnyFloat Fcfast ??= DesignVar(0.4); ///< Factor for determining shortening speed at optimum length
    };
    #endif

    #if BM_TRUNK_MUSCLES & BM_TRUNK_CAVITY_MODEL == _CAVITY_MODEL_VOLUME_
    AnyFolder Xiphoid_Diaphragm =
    {
      AnyString Muscle = "Xiphoid_Diaphragm"; ///< Descriptive name for the muscle, e.g. for plotting
      AnyIntVar MuscleElemAmount = 1; ///< The total amount of elements for this muscle
      AnyFloat Pennationangle ??= DesignVar(0); ///< Pennation angle of the muscle fibers (degres)
      AnyFloat VolumeScaleFactor ??= DesignVar(1.0); ///< Factor for scaling the muscle volume
      AnyFloat MuscleVolume ??= .Volume*0.019673; ///< Volume of the muscle (ml) (the fraction of the group volume is based on the strength of the previous model)
      AnyFloat MuscleVolumeSIScaled ??= ..VolumeUnitFactor*VolumeScaleFactor*MuscleVolume; ///< Scaled Volume of the muscle in SI base unit (m^3)
      AnyFloat OptimalFiberlength ??= _FIBER_LENGTH_DESIGNVAR(0.057826); ///< Optimal working length of the muscle fiber (m)
      AnyFloat TotalTendonLength ??= _TENDON_LENGTH_DESIGNVAR(0.01);///< The total tendon length (m)
      AnyFloat K1 ??= DesignVar(10); ///< K1 constant in the muscle model.  Factor for determining shortening speed at optimum length
      AnyFloat K2 ??= DesignVar(1); ///< K2 constant in the muscle model.  Factor for determining shortening speed at optimum length
      AnyFloat Epsilon0 ??= DesignVar(0.053); ///< Epsilon bar in the muscle model. Represents tendon strain at F0
      AnyFloat Fcfast ??= DesignVar(0.4); ///< Factor for determining shortening speed at optimum length
    };
    #endif
  }; // Diaphragm group
  AnyFolder Hyoid =
  {
    #if BM_TRUNK_MUSCLES
    AnyVar Volume ??= DesignVar(64.00); ///< Total volume of the muscle group (ml)
    AnyFolder LumpedHyoidStC0 =
    {
      AnyString Muscle = "LumpedHyoidStC0"; ///< Descriptive name for the muscle, e.g. for plotting
      AnyIntVar MuscleElemAmount = 1; ///< The total amount of elements for this muscle
      AnyFloat Pennationangle ??= DesignVar(0); ///< Pennation angle of the muscle fibers (degres)
      AnyFloat VolumeScaleFactor ??= DesignVar(1.0); ///< Factor for scaling the muscle volume
      AnyFloat MuscleVolume ??= .Volume*1; ///< Volume of the muscle (ml) (the fraction of the group volume is based on the strength of the previous model)
      AnyFloat MuscleVolumeSIScaled ??= ..VolumeUnitFactor*VolumeScaleFactor*MuscleVolume; ///< Scaled Volume of the muscle in SI base unit (m^3)
      AnyFloat OptimalFiberlength ??= _FIBER_LENGTH_DESIGNVAR(0.18155); ///< Optimal working length of the muscle fiber (m)
      AnyFloat TotalTendonLength ??= _TENDON_LENGTH_DESIGNVAR(0.01);///< The total tendon length (m)
      AnyFloat K1 ??= DesignVar(10); ///< K1 constant in the muscle model.  Factor for determining shortening speed at optimum length
      AnyFloat K2 ??= DesignVar(1); ///< K2 constant in the muscle model.  Factor for determining shortening speed at optimum length
      AnyFloat Epsilon0 ??= DesignVar(0.053); ///< Epsilon bar in the muscle model. Represents tendon strain at F0
      AnyFloat Fcfast ??= DesignVar(0.4); ///< Factor for determining shortening speed at optimum length
    };
    #endif
  }; // Hyoid group
  AnyFolder IliocostalisCervicis =
  {
    #if BM_TRUNK_MUSCLES
    AnyFolder ICptR3C4 =
    {
      AnyString Muscle = "ICptR3C4"; ///< Descriptive name for the muscle, e.g. for plotting
      AnyIntVar MuscleElemAmount = 1; ///< The total amount of elements for this muscle
      AnyFloat Pennationangle ??= DesignVar(0); ///< Pennation angle of the muscle fibers (degres)
      AnyFloat VolumeScaleFactor ??= DesignVar(1.0); ///< Factor for scaling the muscle volume
      AnyFloat MuscleVolume ??= .Volume*0.002692; ///< Volume of the muscle (ml) (the fraction of the group volume is based on the strength of the previous model)
      AnyFloat MuscleVolumeSIScaled ??= ..VolumeUnitFactor*VolumeScaleFactor*MuscleVolume; ///< Scaled Volume of the muscle in SI base unit (m^3)
      AnyFloat OptimalFiberlength ??= _FIBER_LENGTH_DESIGNVAR(0.12565); ///< Optimal working length of the muscle fiber (m)
      AnyFloat TotalTendonLength ??= _TENDON_LENGTH_DESIGNVAR(0.01);///< The total tendon length (m)
      AnyFloat K1 ??= DesignVar(10); ///< K1 constant in the muscle model.  Factor for determining shortening speed at optimum length
      AnyFloat K2 ??= DesignVar(1); ///< K2 constant in the muscle model.  Factor for determining shortening speed at optimum length
      AnyFloat Epsilon0 ??= DesignVar(0.053); ///< Epsilon bar in the muscle model. Represents tendon strain at F0
      AnyFloat Fcfast ??= DesignVar(0.4); ///< Factor for determining shortening speed at optimum length
    };
    #endif

    #if BM_TRUNK_MUSCLES
    AnyFolder ICptR4C5 =
    {
      AnyString Muscle = "ICptR4C5"; ///< Descriptive name for the muscle, e.g. for plotting
      AnyIntVar MuscleElemAmount = 1; ///< The total amount of elements for this muscle
      AnyFloat Pennationangle ??= DesignVar(0); ///< Pennation angle of the muscle fibers (degres)
      AnyFloat VolumeScaleFactor ??= DesignVar(1.0); ///< Factor for scaling the muscle volume
      AnyFloat MuscleVolume ??= .Volume*0.0029851; ///< Volume of the muscle (ml) (the fraction of the group volume is based on the strength of the previous model)
      AnyFloat MuscleVolumeSIScaled ??= ..VolumeUnitFactor*VolumeScaleFactor*MuscleVolume; ///< Scaled Volume of the muscle in SI base unit (m^3)
      AnyFloat OptimalFiberlength ??= _FIBER_LENGTH_DESIGNVAR(0.13932); ///< Optimal working length of the muscle fiber (m)
      AnyFloat TotalTendonLength ??= _TENDON_LENGTH_DESIGNVAR(0.01);///< The total tendon length (m)
      AnyFloat K1 ??= DesignVar(10); ///< K1 constant in the muscle model.  Factor for determining shortening speed at optimum length
      AnyFloat K2 ??= DesignVar(1); ///< K2 constant in the muscle model.  Factor for determining shortening speed at optimum length
      AnyFloat Epsilon0 ??= DesignVar(0.053); ///< Epsilon bar in the muscle model. Represents tendon strain at F0
      AnyFloat Fcfast ??= DesignVar(0.4); ///< Factor for determining shortening speed at optimum length
    };
    #endif

    #if BM_TRUNK_MUSCLES
    AnyFolder ICptR5C6 =
    {
      AnyString Muscle = "ICptR5C6"; ///< Descriptive name for the muscle, e.g. for plotting
      AnyIntVar MuscleElemAmount = 1; ///< The total amount of elements for this muscle
      AnyFloat Pennationangle ??= DesignVar(0); ///< Pennation angle of the muscle fibers (degres)
      AnyFloat VolumeScaleFactor ??= DesignVar(1.0); ///< Factor for scaling the muscle volume
      AnyFloat MuscleVolume ??= .Volume*0.0033952; ///< Volume of the muscle (ml) (the fraction of the group volume is based on the strength of the previous model)
      AnyFloat MuscleVolumeSIScaled ??= ..VolumeUnitFactor*VolumeScaleFactor*MuscleVolume; ///< Scaled Volume of the muscle in SI base unit (m^3)
      AnyFloat OptimalFiberlength ??= _FIBER_LENGTH_DESIGNVAR(0.15847); ///< Optimal working length of the muscle fiber (m)
      AnyFloat TotalTendonLength ??= _TENDON_LENGTH_DESIGNVAR(0.01);///< The total tendon length (m)
      AnyFloat K1 ??= DesignVar(10); ///< K1 constant in the muscle model.  Factor for determining shortening speed at optimum length
      AnyFloat K2 ??= DesignVar(1); ///< K2 constant in the muscle model.  Factor for determining shortening speed at optimum length
      AnyFloat Epsilon0 ??= DesignVar(0.053); ///< Epsilon bar in the muscle model. Represents tendon strain at F0
      AnyFloat Fcfast ??= DesignVar(0.4); ///< Factor for determining shortening speed at optimum length
    };
    #endif

    #if BM_TRUNK_MUSCLES
    AnyFolder ICptR6C4 =
    {
      AnyString Muscle = "ICptR6C4"; ///< Descriptive name for the muscle, e.g. for plotting
      AnyIntVar MuscleElemAmount = 1; ///< The total amount of elements for this muscle
      AnyFloat Pennationangle ??= DesignVar(0); ///< Pennation angle of the muscle fibers (degres)
      AnyFloat VolumeScaleFactor ??= DesignVar(1.0); ///< Factor for scaling the muscle volume
      AnyFloat MuscleVolume ??= .Volume*0.0043188; ///< Volume of the muscle (ml) (the fraction of the group volume is based on the strength of the previous model)
      AnyFloat MuscleVolumeSIScaled ??= ..VolumeUnitFactor*VolumeScaleFactor*MuscleVolume; ///< Scaled Volume of the muscle in SI base unit (m^3)
      AnyFloat OptimalFiberlength ??= _FIBER_LENGTH_DESIGNVAR(0.20157); ///< Optimal working length of the muscle fiber (m)
      AnyFloat TotalTendonLength ??= _TENDON_LENGTH_DESIGNVAR(0.01);///< The total tendon length (m)
      AnyFloat K1 ??= DesignVar(10); ///< K1 constant in the muscle model.  Factor for determining shortening speed at optimum length
      AnyFloat K2 ??= DesignVar(1); ///< K2 constant in the muscle model.  Factor for determining shortening speed at optimum length
      AnyFloat Epsilon0 ??= DesignVar(0.053); ///< Epsilon bar in the muscle model. Represents tendon strain at F0
      AnyFloat Fcfast ??= DesignVar(0.4); ///< Factor for determining shortening speed at optimum length
    };
    #endif
  }; // IliocostalisCervicis group
  AnyFolder IliocostalisLumborum =
  {
    #if BM_TRUNK_MUSCLES
    AnyVar Volume ??= DesignVar(1026.81); ///< Total volume of the muscle group (ml)
    AnyFolder ILplL1CI =
    {
      AnyString Muscle = "ILplL1CI"; ///< Descriptive name for the muscle, e.g. for plotting
      AnyIntVar MuscleElemAmount = 1; ///< The total amount of elements for this muscle
      AnyFloat Pennationangle ??= DesignVar(0); ///< Pennation angle of the muscle fibers (degres)
      AnyFloat VolumeScaleFactor ??= DesignVar(1.0); ///< Factor for scaling the muscle volume
      AnyFloat MuscleVolume ??= .Volume*0.0132; ///< Volume of the muscle (ml) (the fraction of the group volume is based on the strength of the previous model)
      AnyFloat MuscleVolumeSIScaled ??= ..VolumeUnitFactor*VolumeScaleFactor*MuscleVolume; ///< Scaled Volume of the muscle in SI base unit (m^3)
      AnyFloat OptimalFiberlength ??= _FIBER_LENGTH_DESIGNVAR(0.12549); ///< Optimal working length of the muscle fiber (m)
      AnyFloat TotalTendonLength ??= _TENDON_LENGTH_DESIGNVAR(0.01);///< The total tendon length (m)
      AnyFloat K1 ??= DesignVar(10); ///< K1 constant in the muscle model.  Factor for determining shortening speed at optimum length
      AnyFloat K2 ??= DesignVar(1); ///< K2 constant in the muscle model.  Factor for determining shortening speed at optimum length
      AnyFloat Epsilon0 ??= DesignVar(0.053); ///< Epsilon bar in the muscle model. Represents tendon strain at F0
      AnyFloat Fcfast ??= DesignVar(0.4); ///< Factor for determining shortening speed at optimum length
    };
    #endif

    #if BM_TRUNK_MUSCLES
    AnyFolder ILplL2CI =
    {
      AnyString Muscle = "ILplL2CI"; ///< Descriptive name for the muscle, e.g. for plotting
      AnyIntVar MuscleElemAmount = 1; ///< The total amount of elements for this muscle
      AnyFloat Pennationangle ??= DesignVar(0); ///< Pennation angle of the muscle fibers (degres)
      AnyFloat VolumeScaleFactor ??= DesignVar(1.0); ///< Factor for scaling the muscle volume
      AnyFloat MuscleVolume ??= .Volume*0.013418; ///< Volume of the muscle (ml) (the fraction of the group volume is based on the strength of the previous model)
      AnyFloat MuscleVolumeSIScaled ??= ..VolumeUnitFactor*VolumeScaleFactor*MuscleVolume; ///< Scaled Volume of the muscle in SI base unit (m^3)
      AnyFloat OptimalFiberlength ??= _FIBER_LENGTH_DESIGNVAR(0.089464); ///< Optimal working length of the muscle fiber (m)
      AnyFloat TotalTendonLength ??= _TENDON_LENGTH_DESIGNVAR(0.01);///< The total tendon length (m)
      AnyFloat K1 ??= DesignVar(10); ///< K1 constant in the muscle model.  Factor for determining shortening speed at optimum length
      AnyFloat K2 ??= DesignVar(1); ///< K2 constant in the muscle model.  Factor for determining shortening speed at optimum length
      AnyFloat Epsilon0 ??= DesignVar(0.053); ///< Epsilon bar in the muscle model. Represents tendon strain at F0
      AnyFloat Fcfast ??= DesignVar(0.4); ///< Factor for determining shortening speed at optimum length
    };
    #endif

    #if BM_TRUNK_MUSCLES
    AnyFolder ILplL3CI =
    {
      AnyString Muscle = "ILplL3CI"; ///< Descriptive name for the muscle, e.g. for plotting
      AnyIntVar MuscleElemAmount = 1; ///< The total amount of elements for this muscle
      AnyFloat Pennationangle ??= DesignVar(0); ///< Pennation angle of the muscle fibers (degres)
      AnyFloat VolumeScaleFactor ??= DesignVar(1.0); ///< Factor for scaling the muscle volume
      AnyFloat MuscleVolume ??= .Volume*0.010977; ///< Volume of the muscle (ml) (the fraction of the group volume is based on the strength of the previous model)
      AnyFloat MuscleVolumeSIScaled ??= ..VolumeUnitFactor*VolumeScaleFactor*MuscleVolume; ///< Scaled Volume of the muscle in SI base unit (m^3)
      AnyFloat OptimalFiberlength ??= _FIBER_LENGTH_DESIGNVAR(0.061929); ///< Optimal working length of the muscle fiber (m)
      AnyFloat TotalTendonLength ??= _TENDON_LENGTH_DESIGNVAR(0.01);///< The total tendon length (m)
      AnyFloat K1 ??= DesignVar(10); ///< K1 constant in the muscle model.  Factor for determining shortening speed at optimum length
      AnyFloat K2 ??= DesignVar(1); ///< K2 constant in the muscle model.  Factor for determining shortening speed at optimum length
      AnyFloat Epsilon0 ??= DesignVar(0.053); ///< Epsilon bar in the muscle model. Represents tendon strain at F0
      AnyFloat Fcfast ??= DesignVar(0.4); ///< Factor for determining shortening speed at optimum length
    };
    #endif

    #if BM_TRUNK_MUSCLES
    AnyFolder ILplL4CI =
    {
      AnyString Muscle = "ILplL4CI"; ///< Descriptive name for the muscle, e.g. for plotting
      AnyIntVar MuscleElemAmount = 1; ///< The total amount of elements for this muscle
      AnyFloat Pennationangle ??= DesignVar(0); ///< Pennation angle of the muscle fibers (degres)
      AnyFloat VolumeScaleFactor ??= DesignVar(1.0); ///< Factor for scaling the muscle volume
      AnyFloat MuscleVolume ??= .Volume*0.0090949; ///< Volume of the muscle (ml) (the fraction of the group volume is based on the strength of the previous model)
      AnyFloat MuscleVolumeSIScaled ??= ..VolumeUnitFactor*VolumeScaleFactor*MuscleVolume; ///< Scaled Volume of the muscle in SI base unit (m^3)
      AnyFloat OptimalFiberlength ??= _FIBER_LENGTH_DESIGNVAR(0.049411); ///< Optimal working length of the muscle fiber (m)
      AnyFloat TotalTendonLength ??= _TENDON_LENGTH_DESIGNVAR(0.01);///< The total tendon length (m)
      AnyFloat K1 ??= DesignVar(10); ///< K1 constant in the muscle model.  Factor for determining shortening speed at optimum length
      AnyFloat K2 ??= DesignVar(1); ///< K2 constant in the muscle model.  Factor for determining shortening speed at optimum length
      AnyFloat Epsilon0 ??= DesignVar(0.053); ///< Epsilon bar in the muscle model. Represents tendon strain at F0
      AnyFloat Fcfast ??= DesignVar(0.4); ///< Factor for determining shortening speed at optimum length
    };
    #endif

    #if BM_TRUNK_MUSCLES
    AnyFolder ILptC5SIPS =
    {
      AnyString Muscle = "ILptC5SIPS"; ///< Descriptive name for the muscle, e.g. for plotting
      AnyIntVar MuscleElemAmount = 1; ///< The total amount of elements for this muscle
      AnyFloat Pennationangle ??= DesignVar(0); ///< Pennation angle of the muscle fibers (degres)
      AnyFloat VolumeScaleFactor ??= DesignVar(1.0); ///< Factor for scaling the muscle volume
      AnyFloat MuscleVolume ??= .Volume*0.0077015; ///< Volume of the muscle (ml) (the fraction of the group volume is based on the strength of the previous model)
      AnyFloat MuscleVolumeSIScaled ??= ..VolumeUnitFactor*VolumeScaleFactor*MuscleVolume; ///< Scaled Volume of the muscle in SI base unit (m^3)
      AnyFloat OptimalFiberlength ??= _FIBER_LENGTH_DESIGNVAR(0.34383); ///< Optimal working length of the muscle fiber (m)
      AnyFloat TotalTendonLength ??= _TENDON_LENGTH_DESIGNVAR(0.01);///< The total tendon length (m)
      AnyFloat K1 ??= DesignVar(10); ///< K1 constant in the muscle model.  Factor for determining shortening speed at optimum length
      AnyFloat K2 ??= DesignVar(1); ///< K2 constant in the muscle model.  Factor for determining shortening speed at optimum length
      AnyFloat Epsilon0 ??= DesignVar(0.053); ///< Epsilon bar in the muscle model. Represents tendon strain at F0
      AnyFloat Fcfast ??= DesignVar(0.4); ///< Factor for determining shortening speed at optimum length
    };
    #endif

    #if BM_TRUNK_MUSCLES
    AnyFolder ILptC6SIPS =
    {
      AnyString Muscle = "ILptC6SIPS"; ///< Descriptive name for the muscle, e.g. for plotting
      AnyIntVar MuscleElemAmount = 1; ///< The total amount of elements for this muscle
      AnyFloat Pennationangle ??= DesignVar(0); ///< Pennation angle of the muscle fibers (degres)
      AnyFloat VolumeScaleFactor ??= DesignVar(1.0); ///< Factor for scaling the muscle volume
      AnyFloat MuscleVolume ??= .Volume*0.0099602; ///< Volume of the muscle (ml) (the fraction of the group volume is based on the strength of the previous model)
      AnyFloat MuscleVolumeSIScaled ??= ..VolumeUnitFactor*VolumeScaleFactor*MuscleVolume; ///< Scaled Volume of the muscle in SI base unit (m^3)
      AnyFloat OptimalFiberlength ??= _FIBER_LENGTH_DESIGNVAR(0.3196); ///< Optimal working length of the muscle fiber (m)
      AnyFloat TotalTendonLength ??= _TENDON_LENGTH_DESIGNVAR(0.01);///< The total tendon length (m)
      AnyFloat K1 ??= DesignVar(10); ///< K1 constant in the muscle model.  Factor for determining shortening speed at optimum length
      AnyFloat K2 ??= DesignVar(1); ///< K2 constant in the muscle model.  Factor for determining shortening speed at optimum length
      AnyFloat Epsilon0 ??= DesignVar(0.053); ///< Epsilon bar in the muscle model. Represents tendon strain at F0
      AnyFloat Fcfast ??= DesignVar(0.4); ///< Factor for determining shortening speed at optimum length
    };
    #endif

    #if BM_TRUNK_MUSCLES
    AnyFolder ILptC7CI =
    {
      AnyString Muscle = "ILptC7CI"; ///< Descriptive name for the muscle, e.g. for plotting
      AnyIntVar MuscleElemAmount = 1; ///< The total amount of elements for this muscle
      AnyFloat Pennationangle ??= DesignVar(0); ///< Pennation angle of the muscle fibers (degres)
      AnyFloat VolumeScaleFactor ??= DesignVar(1.0); ///< Factor for scaling the muscle volume
      AnyFloat MuscleVolume ??= .Volume*0.011785; ///< Volume of the muscle (ml) (the fraction of the group volume is based on the strength of the previous model)
      AnyFloat MuscleVolumeSIScaled ??= ..VolumeUnitFactor*VolumeScaleFactor*MuscleVolume; ///< Scaled Volume of the muscle in SI base unit (m^3)
      AnyFloat OptimalFiberlength ??= _FIBER_LENGTH_DESIGNVAR(0.31029); ///< Optimal working length of the muscle fiber (m)
      AnyFloat TotalTendonLength ??= _TENDON_LENGTH_DESIGNVAR(0.01);///< The total tendon length (m)
      AnyFloat K1 ??= DesignVar(10); ///< K1 constant in the muscle model.  Factor for determining shortening speed at optimum length
      AnyFloat K2 ??= DesignVar(1); ///< K2 constant in the muscle model.  Factor for determining shortening speed at optimum length
      AnyFloat Epsilon0 ??= DesignVar(0.053); ///< Epsilon bar in the muscle model. Represents tendon strain at F0
      AnyFloat Fcfast ??= DesignVar(0.4); ///< Factor for determining shortening speed at optimum length
    };
    #endif

    #if BM_TRUNK_MUSCLES
    AnyFolder ILptC8CI =
    {
      AnyString Muscle = "ILptC8CI"; ///< Descriptive name for the muscle, e.g. for plotting
      AnyIntVar MuscleElemAmount = 1; ///< The total amount of elements for this muscle
      AnyFloat Pennationangle ??= DesignVar(0); ///< Pennation angle of the muscle fibers (degres)
      AnyFloat VolumeScaleFactor ??= DesignVar(1.0); ///< Factor for scaling the muscle volume
      AnyFloat MuscleVolume ??= .Volume*0.0089268; ///< Volume of the muscle (ml) (the fraction of the group volume is based on the strength of the previous model)
      AnyFloat MuscleVolumeSIScaled ??= ..VolumeUnitFactor*VolumeScaleFactor*MuscleVolume; ///< Scaled Volume of the muscle in SI base unit (m^3)
      AnyFloat OptimalFiberlength ??= _FIBER_LENGTH_DESIGNVAR(0.26959); ///< Optimal working length of the muscle fiber (m)
      AnyFloat TotalTendonLength ??= _TENDON_LENGTH_DESIGNVAR(0.01);///< The total tendon length (m)
      AnyFloat K1 ??= DesignVar(10); ///< K1 constant in the muscle model.  Factor for determining shortening speed at optimum length
      AnyFloat K2 ??= DesignVar(1); ///< K2 constant in the muscle model.  Factor for determining shortening speed at optimum length
      AnyFloat Epsilon0 ??= DesignVar(0.053); ///< Epsilon bar in the muscle model. Represents tendon strain at F0
      AnyFloat Fcfast ??= DesignVar(0.4); ///< Factor for determining shortening speed at optimum length
    };
    #endif

    #if BM_TRUNK_MUSCLES
    AnyFolder ILptC9CI =
    {
      AnyString Muscle = "ILptC9CI"; ///< Descriptive name for the muscle, e.g. for plotting
      AnyIntVar MuscleElemAmount = 1; ///< The total amount of elements for this muscle
      AnyFloat Pennationangle ??= DesignVar(0); ///< Pennation angle of the muscle fibers (degres)
      AnyFloat VolumeScaleFactor ??= DesignVar(1.0); ///< Factor for scaling the muscle volume
      AnyFloat MuscleVolume ??= .Volume*0.010972; ///< Volume of the muscle (ml) (the fraction of the group volume is based on the strength of the previous model)
      AnyFloat MuscleVolumeSIScaled ??= ..VolumeUnitFactor*VolumeScaleFactor*MuscleVolume; ///< Scaled Volume of the muscle in SI base unit (m^3)
      AnyFloat OptimalFiberlength ??= _FIBER_LENGTH_DESIGNVAR(0.22533); ///< Optimal working length of the muscle fiber (m)
      AnyFloat TotalTendonLength ??= _TENDON_LENGTH_DESIGNVAR(0.01);///< The total tendon length (m)
      AnyFloat K1 ??= DesignVar(10); ///< K1 constant in the muscle model.  Factor for determining shortening speed at optimum length
      AnyFloat K2 ??= DesignVar(1); ///< K2 constant in the muscle model.  Factor for determining shortening speed at optimum length
      AnyFloat Epsilon0 ??= DesignVar(0.053); ///< Epsilon bar in the muscle model. Represents tendon strain at F0
      AnyFloat Fcfast ??= DesignVar(0.4); ///< Factor for determining shortening speed at optimum length
    };
    #endif

    #if BM_TRUNK_MUSCLES
    AnyFolder ILptC10CI =
    {
      AnyString Muscle = "ILptC10CI"; ///< Descriptive name for the muscle, e.g. for plotting
      AnyIntVar MuscleElemAmount = 1; ///< The total amount of elements for this muscle
      AnyFloat Pennationangle ??= DesignVar(0); ///< Pennation angle of the muscle fibers (degres)
      AnyFloat VolumeScaleFactor ??= DesignVar(1.0); ///< Factor for scaling the muscle volume
      AnyFloat MuscleVolume ??= .Volume*0.018442; ///< Volume of the muscle (ml) (the fraction of the group volume is based on the strength of the previous model)
      AnyFloat MuscleVolumeSIScaled ??= ..VolumeUnitFactor*VolumeScaleFactor*MuscleVolume; ///< Scaled Volume of the muscle in SI base unit (m^3)
      AnyFloat OptimalFiberlength ??= _FIBER_LENGTH_DESIGNVAR(0.18936); ///< Optimal working length of the muscle fiber (m)
      AnyFloat TotalTendonLength ??= _TENDON_LENGTH_DESIGNVAR(0.01);///< The total tendon length (m)
      AnyFloat K1 ??= DesignVar(10); ///< K1 constant in the muscle model.  Factor for determining shortening speed at optimum length
      AnyFloat K2 ??= DesignVar(1); ///< K2 constant in the muscle model.  Factor for determining shortening speed at optimum length
      AnyFloat Epsilon0 ??= DesignVar(0.053); ///< Epsilon bar in the muscle model. Represents tendon strain at F0
      AnyFloat Fcfast ??= DesignVar(0.4); ///< Factor for determining shortening speed at optimum length
    };
    #endif

    #if BM_TRUNK_MUSCLES
    AnyFolder ILptC11CI =
    {
      AnyString Muscle = "ILptC11CI"; ///< Descriptive name for the muscle, e.g. for plotting
      AnyIntVar MuscleElemAmount = 1; ///< The total amount of elements for this muscle
      AnyFloat Pennationangle ??= DesignVar(0); ///< Pennation angle of the muscle fibers (degres)
      AnyFloat VolumeScaleFactor ??= DesignVar(1.0); ///< Factor for scaling the muscle volume
      AnyFloat MuscleVolume ??= .Volume*0.018325; ///< Volume of the muscle (ml) (the fraction of the group volume is based on the strength of the previous model)
      AnyFloat MuscleVolumeSIScaled ??= ..VolumeUnitFactor*VolumeScaleFactor*MuscleVolume; ///< Scaled Volume of the muscle in SI base unit (m^3)
      AnyFloat OptimalFiberlength ??= _FIBER_LENGTH_DESIGNVAR(0.15298); ///< Optimal working length of the muscle fiber (m)
      AnyFloat TotalTendonLength ??= _TENDON_LENGTH_DESIGNVAR(0.01);///< The total tendon length (m)
      AnyFloat K1 ??= DesignVar(10); ///< K1 constant in the muscle model.  Factor for determining shortening speed at optimum length
      AnyFloat K2 ??= DesignVar(1); ///< K2 constant in the muscle model.  Factor for determining shortening speed at optimum length
      AnyFloat Epsilon0 ??= DesignVar(0.053); ///< Epsilon bar in the muscle model. Represents tendon strain at F0
      AnyFloat Fcfast ??= DesignVar(0.4); ///< Factor for determining shortening speed at optimum length
    };
    #endif

    #if BM_TRUNK_MUSCLES
    AnyFolder ILptC12CI =
    {
      AnyString Muscle = "ILptC12CI"; ///< Descriptive name for the muscle, e.g. for plotting
      AnyIntVar MuscleElemAmount = 1; ///< The total amount of elements for this muscle
      AnyFloat Pennationangle ??= DesignVar(0); ///< Pennation angle of the muscle fibers (degres)
      AnyFloat VolumeScaleFactor ??= DesignVar(1.0); ///< Factor for scaling the muscle volume
      AnyFloat MuscleVolume ??= .Volume*0.0159; ///< Volume of the muscle (ml) (the fraction of the group volume is based on the strength of the previous model)
      AnyFloat MuscleVolumeSIScaled ??= ..VolumeUnitFactor*VolumeScaleFactor*MuscleVolume; ///< Scaled Volume of the muscle in SI base unit (m^3)
      AnyFloat OptimalFiberlength ??= _FIBER_LENGTH_DESIGNVAR(0.11106); ///< Optimal working length of the muscle fiber (m)
      AnyFloat TotalTendonLength ??= _TENDON_LENGTH_DESIGNVAR(0.01);///< The total tendon length (m)
      AnyFloat K1 ??= DesignVar(10); ///< K1 constant in the muscle model.  Factor for determining shortening speed at optimum length
      AnyFloat K2 ??= DesignVar(1); ///< K2 constant in the muscle model.  Factor for determining shortening speed at optimum length
      AnyFloat Epsilon0 ??= DesignVar(0.053); ///< Epsilon bar in the muscle model. Represents tendon strain at F0
      AnyFloat Fcfast ??= DesignVar(0.4); ///< Factor for determining shortening speed at optimum length
    };
    #endif
  }; // IliocostalisLumborum group
  AnyFolder IliocostalisThoracis =
  {
    #if BM_TRUNK_MUSCLES
    AnyFolder ITC7R7 =
    {
      AnyString Muscle = "ITC7R7"; ///< Descriptive name for the muscle, e.g. for plotting
      AnyIntVar MuscleElemAmount = 1; ///< The total amount of elements for this muscle
      AnyFloat Pennationangle ??= DesignVar(0); ///< Pennation angle of the muscle fibers (degres)
      AnyFloat VolumeScaleFactor ??= DesignVar(1.0); ///< Factor for scaling the muscle volume
      AnyFloat MuscleVolume ??= .Volume*0.0036673; ///< Volume of the muscle (ml) (the fraction of the group volume is based on the strength of the previous model)
      AnyFloat MuscleVolumeSIScaled ??= ..VolumeUnitFactor*VolumeScaleFactor*MuscleVolume; ///< Scaled Volume of the muscle in SI base unit (m^3)
      AnyFloat OptimalFiberlength ??= _FIBER_LENGTH_DESIGNVAR(0.16372); ///< Optimal working length of the muscle fiber (m)
      AnyFloat TotalTendonLength ??= _TENDON_LENGTH_DESIGNVAR(0.01);///< The total tendon length (m)
      AnyFloat K1 ??= DesignVar(10); ///< K1 constant in the muscle model.  Factor for determining shortening speed at optimum length
      AnyFloat K2 ??= DesignVar(1); ///< K2 constant in the muscle model.  Factor for determining shortening speed at optimum length
      AnyFloat Epsilon0 ??= DesignVar(0.053); ///< Epsilon bar in the muscle model. Represents tendon strain at F0
      AnyFloat Fcfast ??= DesignVar(0.4); ///< Factor for determining shortening speed at optimum length
    };
    #endif

    #if BM_TRUNK_MUSCLES
    AnyFolder ITR1R7 =
    {
      AnyString Muscle = "ITR1R7"; ///< Descriptive name for the muscle, e.g. for plotting
      AnyIntVar MuscleElemAmount = 1; ///< The total amount of elements for this muscle
      AnyFloat Pennationangle ??= DesignVar(0); ///< Pennation angle of the muscle fibers (degres)
      AnyFloat VolumeScaleFactor ??= DesignVar(1.0); ///< Factor for scaling the muscle volume
      AnyFloat MuscleVolume ??= .Volume*0.0032399; ///< Volume of the muscle (ml) (the fraction of the group volume is based on the strength of the previous model)
      AnyFloat MuscleVolumeSIScaled ??= ..VolumeUnitFactor*VolumeScaleFactor*MuscleVolume; ///< Scaled Volume of the muscle in SI base unit (m^3)
      AnyFloat OptimalFiberlength ??= _FIBER_LENGTH_DESIGNVAR(0.14464); ///< Optimal working length of the muscle fiber (m)
      AnyFloat TotalTendonLength ??= _TENDON_LENGTH_DESIGNVAR(0.01);///< The total tendon length (m)
      AnyFloat K1 ??= DesignVar(10); ///< K1 constant in the muscle model.  Factor for determining shortening speed at optimum length
      AnyFloat K2 ??= DesignVar(1); ///< K2 constant in the muscle model.  Factor for determining shortening speed at optimum length
      AnyFloat Epsilon0 ??= DesignVar(0.053); ///< Epsilon bar in the muscle model. Represents tendon strain at F0
      AnyFloat Fcfast ??= DesignVar(0.4); ///< Factor for determining shortening speed at optimum length
    };
    #endif

    #if BM_TRUNK_MUSCLES
    AnyFolder ITR2R8 =
    {
      AnyString Muscle = "ITR2R8"; ///< Descriptive name for the muscle, e.g. for plotting
      AnyIntVar MuscleElemAmount = 1; ///< The total amount of elements for this muscle
      AnyFloat Pennationangle ??= DesignVar(0); ///< Pennation angle of the muscle fibers (degres)
      AnyFloat VolumeScaleFactor ??= DesignVar(1.0); ///< Factor for scaling the muscle volume
      AnyFloat MuscleVolume ??= .Volume*0.0037932; ///< Volume of the muscle (ml) (the fraction of the group volume is based on the strength of the previous model)
      AnyFloat MuscleVolumeSIScaled ??= ..VolumeUnitFactor*VolumeScaleFactor*MuscleVolume; ///< Scaled Volume of the muscle in SI base unit (m^3)
      AnyFloat OptimalFiberlength ??= _FIBER_LENGTH_DESIGNVAR(0.16934); ///< Optimal working length of the muscle fiber (m)
      AnyFloat TotalTendonLength ??= _TENDON_LENGTH_DESIGNVAR(0.01);///< The total tendon length (m)
      AnyFloat K1 ??= DesignVar(10); ///< K1 constant in the muscle model.  Factor for determining shortening speed at optimum length
      AnyFloat K2 ??= DesignVar(1); ///< K2 constant in the muscle model.  Factor for determining shortening speed at optimum length
      AnyFloat Epsilon0 ??= DesignVar(0.053); ///< Epsilon bar in the muscle model. Represents tendon strain at F0
      AnyFloat Fcfast ??= DesignVar(0.4); ///< Factor for determining shortening speed at optimum length
    };
    #endif

    #if BM_TRUNK_MUSCLES
    AnyFolder ITR3R9 =
    {
      AnyString Muscle = "ITR3R9"; ///< Descriptive name for the muscle, e.g. for plotting
      AnyIntVar MuscleElemAmount = 1; ///< The total amount of elements for this muscle
      AnyFloat Pennationangle ??= DesignVar(0); ///< Pennation angle of the muscle fibers (degres)
      AnyFloat VolumeScaleFactor ??= DesignVar(1.0); ///< Factor for scaling the muscle volume
      AnyFloat MuscleVolume ??= .Volume*0.0038315; ///< Volume of the muscle (ml) (the fraction of the group volume is based on the strength of the previous model)
      AnyFloat MuscleVolumeSIScaled ??= ..VolumeUnitFactor*VolumeScaleFactor*MuscleVolume; ///< Scaled Volume of the muscle in SI base unit (m^3)
      AnyFloat OptimalFiberlength ??= _FIBER_LENGTH_DESIGNVAR(0.17105); ///< Optimal working length of the muscle fiber (m)
      AnyFloat TotalTendonLength ??= _TENDON_LENGTH_DESIGNVAR(0.01);///< The total tendon length (m)
      AnyFloat K1 ??= DesignVar(10); ///< K1 constant in the muscle model.  Factor for determining shortening speed at optimum length
      AnyFloat K2 ??= DesignVar(1); ///< K2 constant in the muscle model.  Factor for determining shortening speed at optimum length
      AnyFloat Epsilon0 ??= DesignVar(0.053); ///< Epsilon bar in the muscle model. Represents tendon strain at F0
      AnyFloat Fcfast ??= DesignVar(0.4); ///< Factor for determining shortening speed at optimum length
    };
    #endif

    #if BM_TRUNK_MUSCLES
    AnyFolder ITR4R10 =
    {
      AnyString Muscle = "ITR4R10"; ///< Descriptive name for the muscle, e.g. for plotting
      AnyIntVar MuscleElemAmount = 1; ///< The total amount of elements for this muscle
      AnyFloat Pennationangle ??= DesignVar(0); ///< Pennation angle of the muscle fibers (degres)
      AnyFloat VolumeScaleFactor ??= DesignVar(1.0); ///< Factor for scaling the muscle volume
      AnyFloat MuscleVolume ??= .Volume*0.0038427; ///< Volume of the muscle (ml) (the fraction of the group volume is based on the strength of the previous model)
      AnyFloat MuscleVolumeSIScaled ??= ..VolumeUnitFactor*VolumeScaleFactor*MuscleVolume; ///< Scaled Volume of the muscle in SI base unit (m^3)
      AnyFloat OptimalFiberlength ??= _FIBER_LENGTH_DESIGNVAR(0.17155); ///< Optimal working length of the muscle fiber (m)
      AnyFloat TotalTendonLength ??= _TENDON_LENGTH_DESIGNVAR(0.01);///< The total tendon length (m)
      AnyFloat K1 ??= DesignVar(10); ///< K1 constant in the muscle model.  Factor for determining shortening speed at optimum length
      AnyFloat K2 ??= DesignVar(1); ///< K2 constant in the muscle model.  Factor for determining shortening speed at optimum length
      AnyFloat Epsilon0 ??= DesignVar(0.053); ///< Epsilon bar in the muscle model. Represents tendon strain at F0
      AnyFloat Fcfast ??= DesignVar(0.4); ///< Factor for determining shortening speed at optimum length
    };
    #endif

    #if BM_TRUNK_MUSCLES
    AnyFolder ITR5T11 =
    {
      AnyString Muscle = "ITR5R11"; ///< Descriptive name for the muscle, e.g. for plotting
      AnyIntVar MuscleElemAmount = 1; ///< The total amount of elements for this muscle
      AnyFloat Pennationangle ??= DesignVar(0); ///< Pennation angle of the muscle fibers (degres)
      AnyFloat VolumeScaleFactor ??= DesignVar(1.0); ///< Factor for scaling the muscle volume
      AnyFloat MuscleVolume ??= .Volume*0.0038623; ///< Volume of the muscle (ml) (the fraction of the group volume is based on the strength of the previous model)
      AnyFloat MuscleVolumeSIScaled ??= ..VolumeUnitFactor*VolumeScaleFactor*MuscleVolume; ///< Scaled Volume of the muscle in SI base unit (m^3)
      AnyFloat OptimalFiberlength ??= _FIBER_LENGTH_DESIGNVAR(0.17243); ///< Optimal working length of the muscle fiber (m)
      AnyFloat TotalTendonLength ??= _TENDON_LENGTH_DESIGNVAR(0.01);///< The total tendon length (m)
      AnyFloat K1 ??= DesignVar(10); ///< K1 constant in the muscle model.  Factor for determining shortening speed at optimum length
      AnyFloat K2 ??= DesignVar(1); ///< K2 constant in the muscle model.  Factor for determining shortening speed at optimum length
      AnyFloat Epsilon0 ??= DesignVar(0.053); ///< Epsilon bar in the muscle model. Represents tendon strain at F0
      AnyFloat Fcfast ??= DesignVar(0.4); ///< Factor for determining shortening speed at optimum length
    };
    #endif

    #if BM_TRUNK_MUSCLES
    AnyFolder ITR6T12 =
    {
      AnyString Muscle = "ITR6R12"; ///< Descriptive name for the muscle, e.g. for plotting
      AnyIntVar MuscleElemAmount = 1; ///< The total amount of elements for this muscle
      AnyFloat Pennationangle ??= DesignVar(0); ///< Pennation angle of the muscle fibers (degres)
      AnyFloat VolumeScaleFactor ??= DesignVar(1.0); ///< Factor for scaling the muscle volume
      AnyFloat MuscleVolume ??= .Volume*0.0042995; ///< Volume of the muscle (ml) (the fraction of the group volume is based on the strength of the previous model)
      AnyFloat MuscleVolumeSIScaled ??= ..VolumeUnitFactor*VolumeScaleFactor*MuscleVolume; ///< Scaled Volume of the muscle in SI base unit (m^3)
      AnyFloat OptimalFiberlength ??= _FIBER_LENGTH_DESIGNVAR(0.19195); ///< Optimal working length of the muscle fiber (m)
      AnyFloat TotalTendonLength ??= _TENDON_LENGTH_DESIGNVAR(0.01);///< The total tendon length (m)
      AnyFloat K1 ??= DesignVar(10); ///< K1 constant in the muscle model.  Factor for determining shortening speed at optimum length
      AnyFloat K2 ??= DesignVar(1); ///< K2 constant in the muscle model.  Factor for determining shortening speed at optimum length
      AnyFloat Epsilon0 ??= DesignVar(0.053); ///< Epsilon bar in the muscle model. Represents tendon strain at F0
      AnyFloat Fcfast ??= DesignVar(0.4); ///< Factor for determining shortening speed at optimum length
    };
    #endif
  }; // IliocostalisThoracis group
  AnyFolder IntercostalisExternus =
  {
    #if BM_TRUNK_MUSCLES
    AnyVar Volume ??= DesignVar(130.63); ///< Total volume of the muscle group (ml)
    AnyFolder IC_Ext_R1R2 =
    {
      AnyString Muscle = "IC_Ext_R1R2"; ///< Descriptive name for the muscle, e.g. for plotting
      AnyIntVar MuscleElemAmount = 1; ///< The total amount of elements for this muscle
      AnyFloat Pennationangle ??= DesignVar(0); ///< Pennation angle of the muscle fibers (degres)
      AnyFloat VolumeScaleFactor ??= DesignVar(1.0); ///< Factor for scaling the muscle volume
      AnyFloat MuscleVolume ??= .Volume*0.074539; ///< Volume of the muscle (ml) (the fraction of the group volume is based on the strength of the previous model)
      AnyFloat MuscleVolumeSIScaled ??= ..VolumeUnitFactor*VolumeScaleFactor*MuscleVolume; ///< Scaled Volume of the muscle in SI base unit (m^3)
      AnyFloat OptimalFiberlength ??= _FIBER_LENGTH_DESIGNVAR(0.038186); ///< Optimal working length of the muscle fiber (m)
      AnyFloat TotalTendonLength ??= _TENDON_LENGTH_DESIGNVAR(0.01);///< The total tendon length (m)
      AnyFloat K1 ??= DesignVar(10); ///< K1 constant in the muscle model.  Factor for determining shortening speed at optimum length
      AnyFloat K2 ??= DesignVar(1); ///< K2 constant in the muscle model.  Factor for determining shortening speed at optimum length
      AnyFloat Epsilon0 ??= DesignVar(0.053); ///< Epsilon bar in the muscle model. Represents tendon strain at F0
      AnyFloat Fcfast ??= DesignVar(0.4); ///< Factor for determining shortening speed at optimum length
    };
    #endif

    #if BM_TRUNK_MUSCLES
    AnyFolder IC_Ext_R2R3 =
    {
      AnyString Muscle = "IC_Ext_R2R3"; ///< Descriptive name for the muscle, e.g. for plotting
      AnyIntVar MuscleElemAmount = 1; ///< The total amount of elements for this muscle
      AnyFloat Pennationangle ??= DesignVar(0); ///< Pennation angle of the muscle fibers (degres)
      AnyFloat VolumeScaleFactor ??= DesignVar(1.0); ///< Factor for scaling the muscle volume
      AnyFloat MuscleVolume ??= .Volume*0.087989; ///< Volume of the muscle (ml) (the fraction of the group volume is based on the strength of the previous model)
      AnyFloat MuscleVolumeSIScaled ??= ..VolumeUnitFactor*VolumeScaleFactor*MuscleVolume; ///< Scaled Volume of the muscle in SI base unit (m^3)
      AnyFloat OptimalFiberlength ??= _FIBER_LENGTH_DESIGNVAR(0.0317); ///< Optimal working length of the muscle fiber (m)
      AnyFloat TotalTendonLength ??= _TENDON_LENGTH_DESIGNVAR(0.01);///< The total tendon length (m)
      AnyFloat K1 ??= DesignVar(10); ///< K1 constant in the muscle model.  Factor for determining shortening speed at optimum length
      AnyFloat K2 ??= DesignVar(1); ///< K2 constant in the muscle model.  Factor for determining shortening speed at optimum length
      AnyFloat Epsilon0 ??= DesignVar(0.053); ///< Epsilon bar in the muscle model. Represents tendon strain at F0
      AnyFloat Fcfast ??= DesignVar(0.4); ///< Factor for determining shortening speed at optimum length
    };
    #endif

    #if BM_TRUNK_MUSCLES
    AnyFolder IC_Ext_R3R4 =
    {
      AnyString Muscle = "IC_Ext_R3R4"; ///< Descriptive name for the muscle, e.g. for plotting
      AnyIntVar MuscleElemAmount = 1; ///< The total amount of elements for this muscle
      AnyFloat Pennationangle ??= DesignVar(0); ///< Pennation angle of the muscle fibers (degres)
      AnyFloat VolumeScaleFactor ??= DesignVar(1.0); ///< Factor for scaling the muscle volume
      AnyFloat MuscleVolume ??= .Volume*0.090901; ///< Volume of the muscle (ml) (the fraction of the group volume is based on the strength of the previous model)
      AnyFloat MuscleVolumeSIScaled ??= ..VolumeUnitFactor*VolumeScaleFactor*MuscleVolume; ///< Scaled Volume of the muscle in SI base unit (m^3)
      AnyFloat OptimalFiberlength ??= _FIBER_LENGTH_DESIGNVAR(0.027629); ///< Optimal working length of the muscle fiber (m)
      AnyFloat TotalTendonLength ??= _TENDON_LENGTH_DESIGNVAR(0.01);///< The total tendon length (m)
      AnyFloat K1 ??= DesignVar(10); ///< K1 constant in the muscle model.  Factor for determining shortening speed at optimum length
      AnyFloat K2 ??= DesignVar(1); ///< K2 constant in the muscle model.  Factor for determining shortening speed at optimum length
      AnyFloat Epsilon0 ??= DesignVar(0.053); ///< Epsilon bar in the muscle model. Represents tendon strain at F0
      AnyFloat Fcfast ??= DesignVar(0.4); ///< Factor for determining shortening speed at optimum length
    };
    #endif

    #if BM_TRUNK_MUSCLES
    AnyFolder IC_Ext_R4R5 =
    {
      AnyString Muscle = "IC_Ext_R4R5"; ///< Descriptive name for the muscle, e.g. for plotting
      AnyIntVar MuscleElemAmount = 1; ///< The total amount of elements for this muscle
      AnyFloat Pennationangle ??= DesignVar(0); ///< Pennation angle of the muscle fibers (degres)
      AnyFloat VolumeScaleFactor ??= DesignVar(1.0); ///< Factor for scaling the muscle volume
      AnyFloat MuscleVolume ??= .Volume*0.078742; ///< Volume of the muscle (ml) (the fraction of the group volume is based on the strength of the previous model)
      AnyFloat MuscleVolumeSIScaled ??= ..VolumeUnitFactor*VolumeScaleFactor*MuscleVolume; ///< Scaled Volume of the muscle in SI base unit (m^3)
      AnyFloat OptimalFiberlength ??= _FIBER_LENGTH_DESIGNVAR(0.022843); ///< Optimal working length of the muscle fiber (m)
      AnyFloat TotalTendonLength ??= _TENDON_LENGTH_DESIGNVAR(0.01);///< The total tendon length (m)
      AnyFloat K1 ??= DesignVar(10); ///< K1 constant in the muscle model.  Factor for determining shortening speed at optimum length
      AnyFloat K2 ??= DesignVar(1); ///< K2 constant in the muscle model.  Factor for determining shortening speed at optimum length
      AnyFloat Epsilon0 ??= DesignVar(0.053); ///< Epsilon bar in the muscle model. Represents tendon strain at F0
      AnyFloat Fcfast ??= DesignVar(0.4); ///< Factor for determining shortening speed at optimum length
    };
    #endif

    #if BM_TRUNK_MUSCLES
    AnyFolder IC_Ext_R5R6 =
    {
      AnyString Muscle = "IC_Ext_R5R6"; ///< Descriptive name for the muscle, e.g. for plotting
      AnyIntVar MuscleElemAmount = 1; ///< The total amount of elements for this muscle
      AnyFloat Pennationangle ??= DesignVar(0); ///< Pennation angle of the muscle fibers (degres)
      AnyFloat VolumeScaleFactor ??= DesignVar(1.0); ///< Factor for scaling the muscle volume
      AnyFloat MuscleVolume ??= .Volume*0.092157; ///< Volume of the muscle (ml) (the fraction of the group volume is based on the strength of the previous model)
      AnyFloat MuscleVolumeSIScaled ??= ..VolumeUnitFactor*VolumeScaleFactor*MuscleVolume; ///< Scaled Volume of the muscle in SI base unit (m^3)
      AnyFloat OptimalFiberlength ??= _FIBER_LENGTH_DESIGNVAR(0.026257); ///< Optimal working length of the muscle fiber (m)
      AnyFloat TotalTendonLength ??= _TENDON_LENGTH_DESIGNVAR(0.01);///< The total tendon length (m)
      AnyFloat K1 ??= DesignVar(10); ///< K1 constant in the muscle model.  Factor for determining shortening speed at optimum length
      AnyFloat K2 ??= DesignVar(1); ///< K2 constant in the muscle model.  Factor for determining shortening speed at optimum length
      AnyFloat Epsilon0 ??= DesignVar(0.053); ///< Epsilon bar in the muscle model. Represents tendon strain at F0
      AnyFloat Fcfast ??= DesignVar(0.4); ///< Factor for determining shortening speed at optimum length
    };
    #endif

    #if BM_TRUNK_MUSCLES
    AnyFolder IC_Ext_R6R7 =
    {
      AnyString Muscle = "IC_Ext_R6R7"; ///< Descriptive name for the muscle, e.g. for plotting
      AnyIntVar MuscleElemAmount = 1; ///< The total amount of elements for this muscle
      AnyFloat Pennationangle ??= DesignVar(0); ///< Pennation angle of the muscle fibers (degres)
      AnyFloat VolumeScaleFactor ??= DesignVar(1.0); ///< Factor for scaling the muscle volume
      AnyFloat MuscleVolume ??= .Volume*0.069198; ///< Volume of the muscle (ml) (the fraction of the group volume is based on the strength of the previous model)
      AnyFloat MuscleVolumeSIScaled ??= ..VolumeUnitFactor*VolumeScaleFactor*MuscleVolume; ///< Scaled Volume of the muscle in SI base unit (m^3)
      AnyFloat OptimalFiberlength ??= _FIBER_LENGTH_DESIGNVAR(0.018743); ///< Optimal working length of the muscle fiber (m)
      AnyFloat TotalTendonLength ??= _TENDON_LENGTH_DESIGNVAR(0.01);///< The total tendon length (m)
      AnyFloat K1 ??= DesignVar(10); ///< K1 constant in the muscle model.  Factor for determining shortening speed at optimum length
      AnyFloat K2 ??= DesignVar(1); ///< K2 constant in the muscle model.  Factor for determining shortening speed at optimum length
      AnyFloat Epsilon0 ??= DesignVar(0.053); ///< Epsilon bar in the muscle model. Represents tendon strain at F0
      AnyFloat Fcfast ??= DesignVar(0.4); ///< Factor for determining shortening speed at optimum length
    };
    #endif

    #if BM_TRUNK_MUSCLES
    AnyFolder IC_Ext_R7R8 =
    {
      AnyString Muscle = "IC_Ext_R7R8"; ///< Descriptive name for the muscle, e.g. for plotting
      AnyIntVar MuscleElemAmount = 1; ///< The total amount of elements for this muscle
      AnyFloat Pennationangle ??= DesignVar(0); ///< Pennation angle of the muscle fibers (degres)
      AnyFloat VolumeScaleFactor ??= DesignVar(1.0); ///< Factor for scaling the muscle volume
      AnyFloat MuscleVolume ??= .Volume*0.10238; ///< Volume of the muscle (ml) (the fraction of the group volume is based on the strength of the previous model)
      AnyFloat MuscleVolumeSIScaled ??= ..VolumeUnitFactor*VolumeScaleFactor*MuscleVolume; ///< Scaled Volume of the muscle in SI base unit (m^3)
      AnyFloat OptimalFiberlength ??= _FIBER_LENGTH_DESIGNVAR(0.0271); ///< Optimal working length of the muscle fiber (m)
      AnyFloat TotalTendonLength ??= _TENDON_LENGTH_DESIGNVAR(0.01);///< The total tendon length (m)
      AnyFloat K1 ??= DesignVar(10); ///< K1 constant in the muscle model.  Factor for determining shortening speed at optimum length
      AnyFloat K2 ??= DesignVar(1); ///< K2 constant in the muscle model.  Factor for determining shortening speed at optimum length
      AnyFloat Epsilon0 ??= DesignVar(0.053); ///< Epsilon bar in the muscle model. Represents tendon strain at F0
      AnyFloat Fcfast ??= DesignVar(0.4); ///< Factor for determining shortening speed at optimum length
    };
    #endif

    #if BM_TRUNK_MUSCLES
    AnyFolder IC_Ext_R8R9 =
    {
      AnyString Muscle = "IC_Ext_R8R9"; ///< Descriptive name for the muscle, e.g. for plotting
      AnyIntVar MuscleElemAmount = 1; ///< The total amount of elements for this muscle
      AnyFloat Pennationangle ??= DesignVar(0); ///< Pennation angle of the muscle fibers (degres)
      AnyFloat VolumeScaleFactor ??= DesignVar(1.0); ///< Factor for scaling the muscle volume
      AnyFloat MuscleVolume ??= .Volume*0.14002; ///< Volume of the muscle (ml) (the fraction of the group volume is based on the strength of the previous model)
      AnyFloat MuscleVolumeSIScaled ??= ..VolumeUnitFactor*VolumeScaleFactor*MuscleVolume; ///< Scaled Volume of the muscle in SI base unit (m^3)
      AnyFloat OptimalFiberlength ??= _FIBER_LENGTH_DESIGNVAR(0.038314); ///< Optimal working length of the muscle fiber (m)
      AnyFloat TotalTendonLength ??= _TENDON_LENGTH_DESIGNVAR(0.01);///< The total tendon length (m)
      AnyFloat K1 ??= DesignVar(10); ///< K1 constant in the muscle model.  Factor for determining shortening speed at optimum length
      AnyFloat K2 ??= DesignVar(1); ///< K2 constant in the muscle model.  Factor for determining shortening speed at optimum length
      AnyFloat Epsilon0 ??= DesignVar(0.053); ///< Epsilon bar in the muscle model. Represents tendon strain at F0
      AnyFloat Fcfast ??= DesignVar(0.4); ///< Factor for determining shortening speed at optimum length
    };
    #endif

    #if BM_TRUNK_MUSCLES
    AnyFolder IC_Ext_R9R10 =
    {
      AnyString Muscle = "IC_Ext_R9R10"; ///< Descriptive name for the muscle, e.g. for plotting
      AnyIntVar MuscleElemAmount = 1; ///< The total amount of elements for this muscle
      AnyFloat Pennationangle ??= DesignVar(0); ///< Pennation angle of the muscle fibers (degres)
      AnyFloat VolumeScaleFactor ??= DesignVar(1.0); ///< Factor for scaling the muscle volume
      AnyFloat MuscleVolume ??= .Volume*0.1024; ///< Volume of the muscle (ml) (the fraction of the group volume is based on the strength of the previous model)
      AnyFloat MuscleVolumeSIScaled ??= ..VolumeUnitFactor*VolumeScaleFactor*MuscleVolume; ///< Scaled Volume of the muscle in SI base unit (m^3)
      AnyFloat OptimalFiberlength ??= _FIBER_LENGTH_DESIGNVAR(0.029043); ///< Optimal working length of the muscle fiber (m)
      AnyFloat TotalTendonLength ??= _TENDON_LENGTH_DESIGNVAR(0.01);///< The total tendon length (m)
      AnyFloat K1 ??= DesignVar(10); ///< K1 constant in the muscle model.  Factor for determining shortening speed at optimum length
      AnyFloat K2 ??= DesignVar(1); ///< K2 constant in the muscle model.  Factor for determining shortening speed at optimum length
      AnyFloat Epsilon0 ??= DesignVar(0.053); ///< Epsilon bar in the muscle model. Represents tendon strain at F0
      AnyFloat Fcfast ??= DesignVar(0.4); ///< Factor for determining shortening speed at optimum length
    };
    #endif

    #if BM_TRUNK_MUSCLES
    AnyFolder IC_Ext_R10R11 =
    {
      AnyString Muscle = "IC_Ext_R10R11"; ///< Descriptive name for the muscle, e.g. for plotting
      AnyIntVar MuscleElemAmount = 1; ///< The total amount of elements for this muscle
      AnyFloat Pennationangle ??= DesignVar(0); ///< Pennation angle of the muscle fibers (degres)
      AnyFloat VolumeScaleFactor ??= DesignVar(1.0); ///< Factor for scaling the muscle volume
      AnyFloat MuscleVolume ??= .Volume*0.081438; ///< Volume of the muscle (ml) (the fraction of the group volume is based on the strength of the previous model)
      AnyFloat MuscleVolumeSIScaled ??= ..VolumeUnitFactor*VolumeScaleFactor*MuscleVolume; ///< Scaled Volume of the muscle in SI base unit (m^3)
      AnyFloat OptimalFiberlength ??= _FIBER_LENGTH_DESIGNVAR(0.0255); ///< Optimal working length of the muscle fiber (m)
      AnyFloat TotalTendonLength ??= _TENDON_LENGTH_DESIGNVAR(0.01);///< The total tendon length (m)
      AnyFloat K1 ??= DesignVar(10); ///< K1 constant in the muscle model.  Factor for determining shortening speed at optimum length
      AnyFloat K2 ??= DesignVar(1); ///< K2 constant in the muscle model.  Factor for determining shortening speed at optimum length
      AnyFloat Epsilon0 ??= DesignVar(0.053); ///< Epsilon bar in the muscle model. Represents tendon strain at F0
      AnyFloat Fcfast ??= DesignVar(0.4); ///< Factor for determining shortening speed at optimum length
    };
    #endif

    #if BM_TRUNK_MUSCLES
    AnyFolder IC_Ext_R11R12 =
    {
      AnyString Muscle = "IC_Ext_R11R12"; ///< Descriptive name for the muscle, e.g. for plotting
      AnyIntVar MuscleElemAmount = 1; ///< The total amount of elements for this muscle
      AnyFloat Pennationangle ??= DesignVar(0); ///< Pennation angle of the muscle fibers (degres)
      AnyFloat VolumeScaleFactor ??= DesignVar(1.0); ///< Factor for scaling the muscle volume
      AnyFloat MuscleVolume ??= .Volume*0.080239; ///< Volume of the muscle (ml) (the fraction of the group volume is based on the strength of the previous model)
      AnyFloat MuscleVolumeSIScaled ??= ..VolumeUnitFactor*VolumeScaleFactor*MuscleVolume; ///< Scaled Volume of the muscle in SI base unit (m^3)
      AnyFloat OptimalFiberlength ??= _FIBER_LENGTH_DESIGNVAR(0.045475); ///< Optimal working length of the muscle fiber (m)
      AnyFloat TotalTendonLength ??= _TENDON_LENGTH_DESIGNVAR(0.01);///< The total tendon length (m)
      AnyFloat K1 ??= DesignVar(10); ///< K1 constant in the muscle model.  Factor for determining shortening speed at optimum length
      AnyFloat K2 ??= DesignVar(1); ///< K2 constant in the muscle model.  Factor for determining shortening speed at optimum length
      AnyFloat Epsilon0 ??= DesignVar(0.053); ///< Epsilon bar in the muscle model. Represents tendon strain at F0
      AnyFloat Fcfast ??= DesignVar(0.4); ///< Factor for determining shortening speed at optimum length
    };
    #endif
  }; // IntercostalisExternus group
  AnyFolder IntercostalisInternus =
  {
    #if BM_TRUNK_MUSCLES
    AnyVar Volume ??= DesignVar(71.10); ///< Total volume of the muscle group (ml)
    AnyFolder IC_Int_R1R2 =
    {
      AnyString Muscle = "IC_Int_R1R2"; ///< Descriptive name for the muscle, e.g. for plotting
      AnyIntVar MuscleElemAmount = 1; ///< The total amount of elements for this muscle
      AnyFloat Pennationangle ??= DesignVar(0); ///< Pennation angle of the muscle fibers (degres)
      AnyFloat VolumeScaleFactor ??= DesignVar(1.0); ///< Factor for scaling the muscle volume
      AnyFloat MuscleVolume ??= .Volume*0.082311; ///< Volume of the muscle (ml) (the fraction of the group volume is based on the strength of the previous model)
      AnyFloat MuscleVolumeSIScaled ??= ..VolumeUnitFactor*VolumeScaleFactor*MuscleVolume; ///< Scaled Volume of the muscle in SI base unit (m^3)
      AnyFloat OptimalFiberlength ??= _FIBER_LENGTH_DESIGNVAR(0.0459); ///< Optimal working length of the muscle fiber (m)
      AnyFloat TotalTendonLength ??= _TENDON_LENGTH_DESIGNVAR(0.01);///< The total tendon length (m)
      AnyFloat K1 ??= DesignVar(10); ///< K1 constant in the muscle model.  Factor for determining shortening speed at optimum length
      AnyFloat K2 ??= DesignVar(1); ///< K2 constant in the muscle model.  Factor for determining shortening speed at optimum length
      AnyFloat Epsilon0 ??= DesignVar(0.053); ///< Epsilon bar in the muscle model. Represents tendon strain at F0
      AnyFloat Fcfast ??= DesignVar(0.4); ///< Factor for determining shortening speed at optimum length
    };
    #endif

    #if BM_TRUNK_MUSCLES
    AnyFolder IC_Int_R2R3 =
    {
      AnyString Muscle = "IC_Int_R2R3"; ///< Descriptive name for the muscle, e.g. for plotting
      AnyIntVar MuscleElemAmount = 1; ///< The total amount of elements for this muscle
      AnyFloat Pennationangle ??= DesignVar(0); ///< Pennation angle of the muscle fibers (degres)
      AnyFloat VolumeScaleFactor ??= DesignVar(1.0); ///< Factor for scaling the muscle volume
      AnyFloat MuscleVolume ??= .Volume*0.084978; ///< Volume of the muscle (ml) (the fraction of the group volume is based on the strength of the previous model)
      AnyFloat MuscleVolumeSIScaled ??= ..VolumeUnitFactor*VolumeScaleFactor*MuscleVolume; ///< Scaled Volume of the muscle in SI base unit (m^3)
      AnyFloat OptimalFiberlength ??= _FIBER_LENGTH_DESIGNVAR(0.033325); ///< Optimal working length of the muscle fiber (m)
      AnyFloat TotalTendonLength ??= _TENDON_LENGTH_DESIGNVAR(0.01);///< The total tendon length (m)
      AnyFloat K1 ??= DesignVar(10); ///< K1 constant in the muscle model.  Factor for determining shortening speed at optimum length
      AnyFloat K2 ??= DesignVar(1); ///< K2 constant in the muscle model.  Factor for determining shortening speed at optimum length
      AnyFloat Epsilon0 ??= DesignVar(0.053); ///< Epsilon bar in the muscle model. Represents tendon strain at F0
      AnyFloat Fcfast ??= DesignVar(0.4); ///< Factor for determining shortening speed at optimum length
    };
    #endif

    #if BM_TRUNK_MUSCLES
    AnyFolder IC_Int_R3R4 =
    {
      AnyString Muscle = "IC_Int_R3R4"; ///< Descriptive name for the muscle, e.g. for plotting
      AnyIntVar MuscleElemAmount = 1; ///< The total amount of elements for this muscle
      AnyFloat Pennationangle ??= DesignVar(0); ///< Pennation angle of the muscle fibers (degres)
      AnyFloat VolumeScaleFactor ??= DesignVar(1.0); ///< Factor for scaling the muscle volume
      AnyFloat MuscleVolume ??= .Volume*0.090261; ///< Volume of the muscle (ml) (the fraction of the group volume is based on the strength of the previous model)
      AnyFloat MuscleVolumeSIScaled ??= ..VolumeUnitFactor*VolumeScaleFactor*MuscleVolume; ///< Scaled Volume of the muscle in SI base unit (m^3)
      AnyFloat OptimalFiberlength ??= _FIBER_LENGTH_DESIGNVAR(0.029863); ///< Optimal working length of the muscle fiber (m)
      AnyFloat TotalTendonLength ??= _TENDON_LENGTH_DESIGNVAR(0.01);///< The total tendon length (m)
      AnyFloat K1 ??= DesignVar(10); ///< K1 constant in the muscle model.  Factor for determining shortening speed at optimum length
      AnyFloat K2 ??= DesignVar(1); ///< K2 constant in the muscle model.  Factor for determining shortening speed at optimum length
      AnyFloat Epsilon0 ??= DesignVar(0.053); ///< Epsilon bar in the muscle model. Represents tendon strain at F0
      AnyFloat Fcfast ??= DesignVar(0.4); ///< Factor for determining shortening speed at optimum length
    };
    #endif

    #if BM_TRUNK_MUSCLES
    AnyFolder IC_Int_R4R5 =
    {
      AnyString Muscle = "IC_Int_R4R5"; ///< Descriptive name for the muscle, e.g. for plotting
      AnyIntVar MuscleElemAmount = 1; ///< The total amount of elements for this muscle
      AnyFloat Pennationangle ??= DesignVar(0); ///< Pennation angle of the muscle fibers (degres)
      AnyFloat VolumeScaleFactor ??= DesignVar(1.0); ///< Factor for scaling the muscle volume
      AnyFloat MuscleVolume ??= .Volume*0.077665; ///< Volume of the muscle (ml) (the fraction of the group volume is based on the strength of the previous model)
      AnyFloat MuscleVolumeSIScaled ??= ..VolumeUnitFactor*VolumeScaleFactor*MuscleVolume; ///< Scaled Volume of the muscle in SI base unit (m^3)
      AnyFloat OptimalFiberlength ??= _FIBER_LENGTH_DESIGNVAR(0.024525); ///< Optimal working length of the muscle fiber (m)
      AnyFloat TotalTendonLength ??= _TENDON_LENGTH_DESIGNVAR(0.01);///< The total tendon length (m)
      AnyFloat K1 ??= DesignVar(10); ///< K1 constant in the muscle model.  Factor for determining shortening speed at optimum length
      AnyFloat K2 ??= DesignVar(1); ///< K2 constant in the muscle model.  Factor for determining shortening speed at optimum length
      AnyFloat Epsilon0 ??= DesignVar(0.053); ///< Epsilon bar in the muscle model. Represents tendon strain at F0
      AnyFloat Fcfast ??= DesignVar(0.4); ///< Factor for determining shortening speed at optimum length
    };
    #endif

    #if BM_TRUNK_MUSCLES
    AnyFolder IC_Int_R5R6 =
    {
      AnyString Muscle = "IC_Int_R5R6"; ///< Descriptive name for the muscle, e.g. for plotting
      AnyIntVar MuscleElemAmount = 1; ///< The total amount of elements for this muscle
      AnyFloat Pennationangle ??= DesignVar(0); ///< Pennation angle of the muscle fibers (degres)
      AnyFloat VolumeScaleFactor ??= DesignVar(1.0); ///< Factor for scaling the muscle volume
      AnyFloat MuscleVolume ??= .Volume*0.10121; ///< Volume of the muscle (ml) (the fraction of the group volume is based on the strength of the previous model)
      AnyFloat MuscleVolumeSIScaled ??= ..VolumeUnitFactor*VolumeScaleFactor*MuscleVolume; ///< Scaled Volume of the muscle in SI base unit (m^3)
      AnyFloat OptimalFiberlength ??= _FIBER_LENGTH_DESIGNVAR(0.031387); ///< Optimal working length of the muscle fiber (m)
      AnyFloat TotalTendonLength ??= _TENDON_LENGTH_DESIGNVAR(0.01);///< The total tendon length (m)
      AnyFloat K1 ??= DesignVar(10); ///< K1 constant in the muscle model.  Factor for determining shortening speed at optimum length
      AnyFloat K2 ??= DesignVar(1); ///< K2 constant in the muscle model.  Factor for determining shortening speed at optimum length
      AnyFloat Epsilon0 ??= DesignVar(0.053); ///< Epsilon bar in the muscle model. Represents tendon strain at F0
      AnyFloat Fcfast ??= DesignVar(0.4); ///< Factor for determining shortening speed at optimum length
    };
    #endif

    #if BM_TRUNK_MUSCLES
    AnyFolder IC_Int_R6R7 =
    {
      AnyString Muscle = "IC_Int_R6R7"; ///< Descriptive name for the muscle, e.g. for plotting
      AnyIntVar MuscleElemAmount = 1; ///< The total amount of elements for this muscle
      AnyFloat Pennationangle ??= DesignVar(0); ///< Pennation angle of the muscle fibers (degres)
      AnyFloat VolumeScaleFactor ??= DesignVar(1.0); ///< Factor for scaling the muscle volume
      AnyFloat MuscleVolume ??= .Volume*0.079833; ///< Volume of the muscle (ml) (the fraction of the group volume is based on the strength of the previous model)
      AnyFloat MuscleVolumeSIScaled ??= ..VolumeUnitFactor*VolumeScaleFactor*MuscleVolume; ///< Scaled Volume of the muscle in SI base unit (m^3)
      AnyFloat OptimalFiberlength ??= _FIBER_LENGTH_DESIGNVAR(0.023538); ///< Optimal working length of the muscle fiber (m)
      AnyFloat TotalTendonLength ??= _TENDON_LENGTH_DESIGNVAR(0.01);///< The total tendon length (m)
      AnyFloat K1 ??= DesignVar(10); ///< K1 constant in the muscle model.  Factor for determining shortening speed at optimum length
      AnyFloat K2 ??= DesignVar(1); ///< K2 constant in the muscle model.  Factor for determining shortening speed at optimum length
      AnyFloat Epsilon0 ??= DesignVar(0.053); ///< Epsilon bar in the muscle model. Represents tendon strain at F0
      AnyFloat Fcfast ??= DesignVar(0.4); ///< Factor for determining shortening speed at optimum length
    };
    #endif

    #if BM_TRUNK_MUSCLES
    AnyFolder IC_Int_R7R8 =
    {
      AnyString Muscle = "IC_Int_R7R8"; ///< Descriptive name for the muscle, e.g. for plotting
      AnyIntVar MuscleElemAmount = 1; ///< The total amount of elements for this muscle
      AnyFloat Pennationangle ??= DesignVar(0); ///< Pennation angle of the muscle fibers (degres)
      AnyFloat VolumeScaleFactor ??= DesignVar(1.0); ///< Factor for scaling the muscle volume
      AnyFloat MuscleVolume ??= .Volume*0.10537; ///< Volume of the muscle (ml) (the fraction of the group volume is based on the strength of the previous model)
      AnyFloat MuscleVolumeSIScaled ??= ..VolumeUnitFactor*VolumeScaleFactor*MuscleVolume; ///< Scaled Volume of the muscle in SI base unit (m^3)
      AnyFloat OptimalFiberlength ??= _FIBER_LENGTH_DESIGNVAR(0.030363); ///< Optimal working length of the muscle fiber (m)
      AnyFloat TotalTendonLength ??= _TENDON_LENGTH_DESIGNVAR(0.01);///< The total tendon length (m)
      AnyFloat K1 ??= DesignVar(10); ///< K1 constant in the muscle model.  Factor for determining shortening speed at optimum length
      AnyFloat K2 ??= DesignVar(1); ///< K2 constant in the muscle model.  Factor for determining shortening speed at optimum length
      AnyFloat Epsilon0 ??= DesignVar(0.053); ///< Epsilon bar in the muscle model. Represents tendon strain at F0
      AnyFloat Fcfast ??= DesignVar(0.4); ///< Factor for determining shortening speed at optimum length
    };
    #endif

    #if BM_TRUNK_MUSCLES
    AnyFolder IC_Int_R8R9 =
    {
      AnyString Muscle = "IC_Int_R8R9"; ///< Descriptive name for the muscle, e.g. for plotting
      AnyIntVar MuscleElemAmount = 1; ///< The total amount of elements for this muscle
      AnyFloat Pennationangle ??= DesignVar(0); ///< Pennation angle of the muscle fibers (degres)
      AnyFloat VolumeScaleFactor ??= DesignVar(1.0); ///< Factor for scaling the muscle volume
      AnyFloat MuscleVolume ??= .Volume*0.14096; ///< Volume of the muscle (ml) (the fraction of the group volume is based on the strength of the previous model)
      AnyFloat MuscleVolumeSIScaled ??= ..VolumeUnitFactor*VolumeScaleFactor*MuscleVolume; ///< Scaled Volume of the muscle in SI base unit (m^3)
      AnyFloat OptimalFiberlength ??= _FIBER_LENGTH_DESIGNVAR(0.041987); ///< Optimal working length of the muscle fiber (m)
      AnyFloat TotalTendonLength ??= _TENDON_LENGTH_DESIGNVAR(0.01);///< The total tendon length (m)
      AnyFloat K1 ??= DesignVar(10); ///< K1 constant in the muscle model.  Factor for determining shortening speed at optimum length
      AnyFloat K2 ??= DesignVar(1); ///< K2 constant in the muscle model.  Factor for determining shortening speed at optimum length
      AnyFloat Epsilon0 ??= DesignVar(0.053); ///< Epsilon bar in the muscle model. Represents tendon strain at F0
      AnyFloat Fcfast ??= DesignVar(0.4); ///< Factor for determining shortening speed at optimum length
    };
    #endif

    #if BM_TRUNK_MUSCLES
    AnyFolder IC_Int_R9R10 =
    {
      AnyString Muscle = "IC_Int_R9R10"; ///< Descriptive name for the muscle, e.g. for plotting
      AnyIntVar MuscleElemAmount = 1; ///< The total amount of elements for this muscle
      AnyFloat Pennationangle ??= DesignVar(0); ///< Pennation angle of the muscle fibers (degres)
      AnyFloat VolumeScaleFactor ??= DesignVar(1.0); ///< Factor for scaling the muscle volume
      AnyFloat MuscleVolume ??= .Volume*0.10005; ///< Volume of the muscle (ml) (the fraction of the group volume is based on the strength of the previous model)
      AnyFloat MuscleVolumeSIScaled ??= ..VolumeUnitFactor*VolumeScaleFactor*MuscleVolume; ///< Scaled Volume of the muscle in SI base unit (m^3)
      AnyFloat OptimalFiberlength ??= _FIBER_LENGTH_DESIGNVAR(0.030888); ///< Optimal working length of the muscle fiber (m)
      AnyFloat TotalTendonLength ??= _TENDON_LENGTH_DESIGNVAR(0.01);///< The total tendon length (m)
      AnyFloat K1 ??= DesignVar(10); ///< K1 constant in the muscle model.  Factor for determining shortening speed at optimum length
      AnyFloat K2 ??= DesignVar(1); ///< K2 constant in the muscle model.  Factor for determining shortening speed at optimum length
      AnyFloat Epsilon0 ??= DesignVar(0.053); ///< Epsilon bar in the muscle model. Represents tendon strain at F0
      AnyFloat Fcfast ??= DesignVar(0.4); ///< Factor for determining shortening speed at optimum length
    };
    #endif

    #if BM_TRUNK_MUSCLES
    AnyFolder IC_Int_R10R11 =
    {
      AnyString Muscle = "IC_Int_R10R11"; ///< Descriptive name for the muscle, e.g. for plotting
      AnyIntVar MuscleElemAmount = 1; ///< The total amount of elements for this muscle
      AnyFloat Pennationangle ??= DesignVar(0); ///< Pennation angle of the muscle fibers (degres)
      AnyFloat VolumeScaleFactor ??= DesignVar(1.0); ///< Factor for scaling the muscle volume
      AnyFloat MuscleVolume ??= .Volume*0.071588; ///< Volume of the muscle (ml) (the fraction of the group volume is based on the strength of the previous model)
      AnyFloat MuscleVolumeSIScaled ??= ..VolumeUnitFactor*VolumeScaleFactor*MuscleVolume; ///< Scaled Volume of the muscle in SI base unit (m^3)
      AnyFloat OptimalFiberlength ??= _FIBER_LENGTH_DESIGNVAR(0.0244); ///< Optimal working length of the muscle fiber (m)
      AnyFloat TotalTendonLength ??= _TENDON_LENGTH_DESIGNVAR(0.01);///< The total tendon length (m)
      AnyFloat K1 ??= DesignVar(10); ///< K1 constant in the muscle model.  Factor for determining shortening speed at optimum length
      AnyFloat K2 ??= DesignVar(1); ///< K2 constant in the muscle model.  Factor for determining shortening speed at optimum length
      AnyFloat Epsilon0 ??= DesignVar(0.053); ///< Epsilon bar in the muscle model. Represents tendon strain at F0
      AnyFloat Fcfast ??= DesignVar(0.4); ///< Factor for determining shortening speed at optimum length
    };
    #endif

    #if BM_TRUNK_MUSCLES
    AnyFolder IC_Int_R11R12 =
    {
      AnyString Muscle = "IC_Int_R11R12"; ///< Descriptive name for the muscle, e.g. for plotting
      AnyIntVar MuscleElemAmount = 1; ///< The total amount of elements for this muscle
      AnyFloat Pennationangle ??= DesignVar(0); ///< Pennation angle of the muscle fibers (degres)
      AnyFloat VolumeScaleFactor ??= DesignVar(1.0); ///< Factor for scaling the muscle volume
      AnyFloat MuscleVolume ??= .Volume*0.065771; ///< Volume of the muscle (ml) (the fraction of the group volume is based on the strength of the previous model)
      AnyFloat MuscleVolumeSIScaled ??= ..VolumeUnitFactor*VolumeScaleFactor*MuscleVolume; ///< Scaled Volume of the muscle in SI base unit (m^3)
      AnyFloat OptimalFiberlength ??= _FIBER_LENGTH_DESIGNVAR(0.040575); ///< Optimal working length of the muscle fiber (m)
      AnyFloat TotalTendonLength ??= _TENDON_LENGTH_DESIGNVAR(0.01);///< The total tendon length (m)
      AnyFloat K1 ??= DesignVar(10); ///< K1 constant in the muscle model.  Factor for determining shortening speed at optimum length
      AnyFloat K2 ??= DesignVar(1); ///< K2 constant in the muscle model.  Factor for determining shortening speed at optimum length
      AnyFloat Epsilon0 ??= DesignVar(0.053); ///< Epsilon bar in the muscle model. Represents tendon strain at F0
      AnyFloat Fcfast ??= DesignVar(0.4); ///< Factor for determining shortening speed at optimum length
    };
    #endif
  }; // IntercostalisInternus group
  AnyFolder IntercostalisIntimus =
  {
    #if BM_TRUNK_MUSCLES
    AnyVar Volume ??= DesignVar(48.92); ///< Total volume of the muscle group (ml)
    AnyFolder IC_Inn_R1R2 =
    {
      AnyString Muscle = "IC_Inn_R1R2"; ///< Descriptive name for the muscle, e.g. for plotting
      AnyIntVar MuscleElemAmount = 1; ///< The total amount of elements for this muscle
      AnyFloat Pennationangle ??= DesignVar(0); ///< Pennation angle of the muscle fibers (degres)
      AnyFloat VolumeScaleFactor ??= DesignVar(1.0); ///< Factor for scaling the muscle volume
      AnyFloat MuscleVolume ??= .Volume*0.059865; ///< Volume of the muscle (ml) (the fraction of the group volume is based on the strength of the previous model)
      AnyFloat MuscleVolumeSIScaled ??= ..VolumeUnitFactor*VolumeScaleFactor*MuscleVolume; ///< Scaled Volume of the muscle in SI base unit (m^3)
      AnyFloat OptimalFiberlength ??= _FIBER_LENGTH_DESIGNVAR(0.033383); ///< Optimal working length of the muscle fiber (m)
      AnyFloat TotalTendonLength ??= _TENDON_LENGTH_DESIGNVAR(0.01);///< The total tendon length (m)
      AnyFloat K1 ??= DesignVar(10); ///< K1 constant in the muscle model.  Factor for determining shortening speed at optimum length
      AnyFloat K2 ??= DesignVar(1); ///< K2 constant in the muscle model.  Factor for determining shortening speed at optimum length
      AnyFloat Epsilon0 ??= DesignVar(0.053); ///< Epsilon bar in the muscle model. Represents tendon strain at F0
      AnyFloat Fcfast ??= DesignVar(0.4); ///< Factor for determining shortening speed at optimum length
    };
    #endif

    #if BM_TRUNK_MUSCLES
    AnyFolder IC_Inn_R2R3 =
    {
      AnyString Muscle = "IC_Inn_R2R3"; ///< Descriptive name for the muscle, e.g. for plotting
      AnyIntVar MuscleElemAmount = 1; ///< The total amount of elements for this muscle
      AnyFloat Pennationangle ??= DesignVar(0); ///< Pennation angle of the muscle fibers (degres)
      AnyFloat VolumeScaleFactor ??= DesignVar(1.0); ///< Factor for scaling the muscle volume
      AnyFloat MuscleVolume ??= .Volume*0.063353; ///< Volume of the muscle (ml) (the fraction of the group volume is based on the strength of the previous model)
      AnyFloat MuscleVolumeSIScaled ??= ..VolumeUnitFactor*VolumeScaleFactor*MuscleVolume; ///< Scaled Volume of the muscle in SI base unit (m^3)
      AnyFloat OptimalFiberlength ??= _FIBER_LENGTH_DESIGNVAR(0.024844); ///< Optimal working length of the muscle fiber (m)
      AnyFloat TotalTendonLength ??= _TENDON_LENGTH_DESIGNVAR(0.01);///< The total tendon length (m)
      AnyFloat K1 ??= DesignVar(10); ///< K1 constant in the muscle model.  Factor for determining shortening speed at optimum length
      AnyFloat K2 ??= DesignVar(1); ///< K2 constant in the muscle model.  Factor for determining shortening speed at optimum length
      AnyFloat Epsilon0 ??= DesignVar(0.053); ///< Epsilon bar in the muscle model. Represents tendon strain at F0
      AnyFloat Fcfast ??= DesignVar(0.4); ///< Factor for determining shortening speed at optimum length
    };
    #endif

    #if BM_TRUNK_MUSCLES
    AnyFolder IC_Inn_R3R4 =
    {
      AnyString Muscle = "IC_Inn_R3R4"; ///< Descriptive name for the muscle, e.g. for plotting
      AnyIntVar MuscleElemAmount = 1; ///< The total amount of elements for this muscle
      AnyFloat Pennationangle ??= DesignVar(0); ///< Pennation angle of the muscle fibers (degres)
      AnyFloat VolumeScaleFactor ??= DesignVar(1.0); ///< Factor for scaling the muscle volume
      AnyFloat MuscleVolume ??= .Volume*0.061929; ///< Volume of the muscle (ml) (the fraction of the group volume is based on the strength of the previous model)
      AnyFloat MuscleVolumeSIScaled ??= ..VolumeUnitFactor*VolumeScaleFactor*MuscleVolume; ///< Scaled Volume of the muscle in SI base unit (m^3)
      AnyFloat OptimalFiberlength ??= _FIBER_LENGTH_DESIGNVAR(0.020489); ///< Optimal working length of the muscle fiber (m)
      AnyFloat TotalTendonLength ??= _TENDON_LENGTH_DESIGNVAR(0.01);///< The total tendon length (m)
      AnyFloat K1 ??= DesignVar(10); ///< K1 constant in the muscle model.  Factor for determining shortening speed at optimum length
      AnyFloat K2 ??= DesignVar(1); ///< K2 constant in the muscle model.  Factor for determining shortening speed at optimum length
      AnyFloat Epsilon0 ??= DesignVar(0.053); ///< Epsilon bar in the muscle model. Represents tendon strain at F0
      AnyFloat Fcfast ??= DesignVar(0.4); ///< Factor for determining shortening speed at optimum length
    };
    #endif

    #if BM_TRUNK_MUSCLES
    AnyFolder IC_Inn_R4R5 =
    {
      AnyString Muscle = "IC_Inn_R4R5"; ///< Descriptive name for the muscle, e.g. for plotting
      AnyIntVar MuscleElemAmount = 1; ///< The total amount of elements for this muscle
      AnyFloat Pennationangle ??= DesignVar(0); ///< Pennation angle of the muscle fibers (degres)
      AnyFloat VolumeScaleFactor ??= DesignVar(1.0); ///< Factor for scaling the muscle volume
      AnyFloat MuscleVolume ??= .Volume*0.051126; ///< Volume of the muscle (ml) (the fraction of the group volume is based on the strength of the previous model)
      AnyFloat MuscleVolumeSIScaled ??= ..VolumeUnitFactor*VolumeScaleFactor*MuscleVolume; ///< Scaled Volume of the muscle in SI base unit (m^3)
      AnyFloat OptimalFiberlength ??= _FIBER_LENGTH_DESIGNVAR(0.016144); ///< Optimal working length of the muscle fiber (m)
      AnyFloat TotalTendonLength ??= _TENDON_LENGTH_DESIGNVAR(0.01);///< The total tendon length (m)
      AnyFloat K1 ??= DesignVar(10); ///< K1 constant in the muscle model.  Factor for determining shortening speed at optimum length
      AnyFloat K2 ??= DesignVar(1); ///< K2 constant in the muscle model.  Factor for determining shortening speed at optimum length
      AnyFloat Epsilon0 ??= DesignVar(0.053); ///< Epsilon bar in the muscle model. Represents tendon strain at F0
      AnyFloat Fcfast ??= DesignVar(0.4); ///< Factor for determining shortening speed at optimum length
    };
    #endif

    #if BM_TRUNK_MUSCLES
    AnyFolder IC_Inn_R5R6 =
    {
      AnyString Muscle = "IC_Inn_R5R6"; ///< Descriptive name for the muscle, e.g. for plotting
      AnyIntVar MuscleElemAmount = 1; ///< The total amount of elements for this muscle
      AnyFloat Pennationangle ??= DesignVar(0); ///< Pennation angle of the muscle fibers (degres)
      AnyFloat VolumeScaleFactor ??= DesignVar(1.0); ///< Factor for scaling the muscle volume
      AnyFloat MuscleVolume ??= .Volume*0.067497; ///< Volume of the muscle (ml) (the fraction of the group volume is based on the strength of the previous model)
      AnyFloat MuscleVolumeSIScaled ??= ..VolumeUnitFactor*VolumeScaleFactor*MuscleVolume; ///< Scaled Volume of the muscle in SI base unit (m^3)
      AnyFloat OptimalFiberlength ??= _FIBER_LENGTH_DESIGNVAR(0.020933); ///< Optimal working length of the muscle fiber (m)
      AnyFloat TotalTendonLength ??= _TENDON_LENGTH_DESIGNVAR(0.01);///< The total tendon length (m)
      AnyFloat K1 ??= DesignVar(10); ///< K1 constant in the muscle model.  Factor for determining shortening speed at optimum length
      AnyFloat K2 ??= DesignVar(1); ///< K2 constant in the muscle model.  Factor for determining shortening speed at optimum length
      AnyFloat Epsilon0 ??= DesignVar(0.053); ///< Epsilon bar in the muscle model. Represents tendon strain at F0
      AnyFloat Fcfast ??= DesignVar(0.4); ///< Factor for determining shortening speed at optimum length
    };
    #endif

    #if BM_TRUNK_MUSCLES
    AnyFolder IC_Inn_R6R7 =
    {
      AnyString Muscle = "IC_Inn_R6R7"; ///< Descriptive name for the muscle, e.g. for plotting
      AnyIntVar MuscleElemAmount = 1; ///< The total amount of elements for this muscle
      AnyFloat Pennationangle ??= DesignVar(0); ///< Pennation angle of the muscle fibers (degres)
      AnyFloat VolumeScaleFactor ??= DesignVar(1.0); ///< Factor for scaling the muscle volume
      AnyFloat MuscleVolume ??= .Volume*0.048766; ///< Volume of the muscle (ml) (the fraction of the group volume is based on the strength of the previous model)
      AnyFloat MuscleVolumeSIScaled ??= ..VolumeUnitFactor*VolumeScaleFactor*MuscleVolume; ///< Scaled Volume of the muscle in SI base unit (m^3)
      AnyFloat OptimalFiberlength ??= _FIBER_LENGTH_DESIGNVAR(0.014378); ///< Optimal working length of the muscle fiber (m)
      AnyFloat TotalTendonLength ??= _TENDON_LENGTH_DESIGNVAR(0.01);///< The total tendon length (m)
      AnyFloat K1 ??= DesignVar(10); ///< K1 constant in the muscle model.  Factor for determining shortening speed at optimum length
      AnyFloat K2 ??= DesignVar(1); ///< K2 constant in the muscle model.  Factor for determining shortening speed at optimum length
      AnyFloat Epsilon0 ??= DesignVar(0.053); ///< Epsilon bar in the muscle model. Represents tendon strain at F0
      AnyFloat Fcfast ??= DesignVar(0.4); ///< Factor for determining shortening speed at optimum length
    };
    #endif

    #if BM_TRUNK_MUSCLES
    AnyFolder IC_Inn_R7R8 =
    {
      AnyString Muscle = "IC_Inn_R7R8"; ///< Descriptive name for the muscle, e.g. for plotting
      AnyIntVar MuscleElemAmount = 1; ///< The total amount of elements for this muscle
      AnyFloat Pennationangle ??= DesignVar(0); ///< Pennation angle of the muscle fibers (degres)
      AnyFloat VolumeScaleFactor ??= DesignVar(1.0); ///< Factor for scaling the muscle volume
      AnyFloat MuscleVolume ??= .Volume*0.067367; ///< Volume of the muscle (ml) (the fraction of the group volume is based on the strength of the previous model)
      AnyFloat MuscleVolumeSIScaled ??= ..VolumeUnitFactor*VolumeScaleFactor*MuscleVolume; ///< Scaled Volume of the muscle in SI base unit (m^3)
      AnyFloat OptimalFiberlength ??= _FIBER_LENGTH_DESIGNVAR(0.019411); ///< Optimal working length of the muscle fiber (m)
      AnyFloat TotalTendonLength ??= _TENDON_LENGTH_DESIGNVAR(0.01);///< The total tendon length (m)
      AnyFloat K1 ??= DesignVar(10); ///< K1 constant in the muscle model.  Factor for determining shortening speed at optimum length
      AnyFloat K2 ??= DesignVar(1); ///< K2 constant in the muscle model.  Factor for determining shortening speed at optimum length
      AnyFloat Epsilon0 ??= DesignVar(0.053); ///< Epsilon bar in the muscle model. Represents tendon strain at F0
      AnyFloat Fcfast ??= DesignVar(0.4); ///< Factor for determining shortening speed at optimum length
    };
    #endif

    #if BM_TRUNK_MUSCLES
    AnyFolder IC_Inn_R8R9 =
    {
      AnyString Muscle = "IC_Inn_R8R9"; ///< Descriptive name for the muscle, e.g. for plotting
      AnyIntVar MuscleElemAmount = 1; ///< The total amount of elements for this muscle
      AnyFloat Pennationangle ??= DesignVar(0); ///< Pennation angle of the muscle fibers (degres)
      AnyFloat VolumeScaleFactor ??= DesignVar(1.0); ///< Factor for scaling the muscle volume
      AnyFloat MuscleVolume ??= .Volume*0.09613; ///< Volume of the muscle (ml) (the fraction of the group volume is based on the strength of the previous model)
      AnyFloat MuscleVolumeSIScaled ??= ..VolumeUnitFactor*VolumeScaleFactor*MuscleVolume; ///< Scaled Volume of the muscle in SI base unit (m^3)
      AnyFloat OptimalFiberlength ??= _FIBER_LENGTH_DESIGNVAR(0.028633); ///< Optimal working length of the muscle fiber (m)
      AnyFloat TotalTendonLength ??= _TENDON_LENGTH_DESIGNVAR(0.01);///< The total tendon length (m)
      AnyFloat K1 ??= DesignVar(10); ///< K1 constant in the muscle model.  Factor for determining shortening speed at optimum length
      AnyFloat K2 ??= DesignVar(1); ///< K2 constant in the muscle model.  Factor for determining shortening speed at optimum length
      AnyFloat Epsilon0 ??= DesignVar(0.053); ///< Epsilon bar in the muscle model. Represents tendon strain at F0
      AnyFloat Fcfast ??= DesignVar(0.4); ///< Factor for determining shortening speed at optimum length
    };
    #endif

    #if BM_TRUNK_MUSCLES
    AnyFolder IC_Inn_R9R10 =
    {
      AnyString Muscle = "IC_Inn_R9R10"; ///< Descriptive name for the muscle, e.g. for plotting
      AnyIntVar MuscleElemAmount = 1; ///< The total amount of elements for this muscle
      AnyFloat Pennationangle ??= DesignVar(0); ///< Pennation angle of the muscle fibers (degres)
      AnyFloat VolumeScaleFactor ??= DesignVar(1.0); ///< Factor for scaling the muscle volume
      AnyFloat MuscleVolume ??= .Volume*0.070218; ///< Volume of the muscle (ml) (the fraction of the group volume is based on the strength of the previous model)
      AnyFloat MuscleVolumeSIScaled ??= ..VolumeUnitFactor*VolumeScaleFactor*MuscleVolume; ///< Scaled Volume of the muscle in SI base unit (m^3)
      AnyFloat OptimalFiberlength ??= _FIBER_LENGTH_DESIGNVAR(0.021678); ///< Optimal working length of the muscle fiber (m)
      AnyFloat TotalTendonLength ??= _TENDON_LENGTH_DESIGNVAR(0.01);///< The total tendon length (m)
      AnyFloat K1 ??= DesignVar(10); ///< K1 constant in the muscle model.  Factor for determining shortening speed at optimum length
      AnyFloat K2 ??= DesignVar(1); ///< K2 constant in the muscle model.  Factor for determining shortening speed at optimum length
      AnyFloat Epsilon0 ??= DesignVar(0.053); ///< Epsilon bar in the muscle model. Represents tendon strain at F0
      AnyFloat Fcfast ??= DesignVar(0.4); ///< Factor for determining shortening speed at optimum length
    };
    #endif

    #if BM_TRUNK_MUSCLES
    AnyFolder IC_Inn_R10R11 =
    {
      AnyString Muscle = "IC_Inn_R10R11"; ///< Descriptive name for the muscle, e.g. for plotting
      AnyIntVar MuscleElemAmount = 1; ///< The total amount of elements for this muscle
      AnyFloat Pennationangle ??= DesignVar(0); ///< Pennation angle of the muscle fibers (degres)
      AnyFloat VolumeScaleFactor ??= DesignVar(1.0); ///< Factor for scaling the muscle volume
      AnyFloat MuscleVolume ??= .Volume*0.050904; ///< Volume of the muscle (ml) (the fraction of the group volume is based on the strength of the previous model)
      AnyFloat MuscleVolumeSIScaled ??= ..VolumeUnitFactor*VolumeScaleFactor*MuscleVolume; ///< Scaled Volume of the muscle in SI base unit (m^3)
      AnyFloat OptimalFiberlength ??= _FIBER_LENGTH_DESIGNVAR(0.01735); ///< Optimal working length of the muscle fiber (m)
      AnyFloat TotalTendonLength ??= _TENDON_LENGTH_DESIGNVAR(0.01);///< The total tendon length (m)
      AnyFloat K1 ??= DesignVar(10); ///< K1 constant in the muscle model.  Factor for determining shortening speed at optimum length
      AnyFloat K2 ??= DesignVar(1); ///< K2 constant in the muscle model.  Factor for determining shortening speed at optimum length
      AnyFloat Epsilon0 ??= DesignVar(0.053); ///< Epsilon bar in the muscle model. Represents tendon strain at F0
      AnyFloat Fcfast ??= DesignVar(0.4); ///< Factor for determining shortening speed at optimum length
    };
    #endif

    #if BM_TRUNK_MUSCLES
    AnyFolder IC_Inn_R11R12 =
    {
      AnyString Muscle = "IC_Inn_R11R12"; ///< Descriptive name for the muscle, e.g. for plotting
      AnyIntVar MuscleElemAmount = 1; ///< The total amount of elements for this muscle
      AnyFloat Pennationangle ??= DesignVar(0); ///< Pennation angle of the muscle fibers (degres)
      AnyFloat VolumeScaleFactor ??= DesignVar(1.0); ///< Factor for scaling the muscle volume
      AnyFloat MuscleVolume ??= .Volume*0.050858; ///< Volume of the muscle (ml) (the fraction of the group volume is based on the strength of the previous model)
      AnyFloat MuscleVolumeSIScaled ??= ..VolumeUnitFactor*VolumeScaleFactor*MuscleVolume; ///< Scaled Volume of the muscle in SI base unit (m^3)
      AnyFloat OptimalFiberlength ??= _FIBER_LENGTH_DESIGNVAR(0.031375); ///< Optimal working length of the muscle fiber (m)
      AnyFloat TotalTendonLength ??= _TENDON_LENGTH_DESIGNVAR(0.01);///< The total tendon length (m)
      AnyFloat K1 ??= DesignVar(10); ///< K1 constant in the muscle model.  Factor for determining shortening speed at optimum length
      AnyFloat K2 ??= DesignVar(1); ///< K2 constant in the muscle model.  Factor for determining shortening speed at optimum length
      AnyFloat Epsilon0 ??= DesignVar(0.053); ///< Epsilon bar in the muscle model. Represents tendon strain at F0
      AnyFloat Fcfast ??= DesignVar(0.4); ///< Factor for determining shortening speed at optimum length
    };
    #endif
  }; // IntercostalisIntimus group
  AnyFolder LevatorCostarum =
  {
    #if BM_TRUNK_MUSCLES
    AnyVar Volume ??= DesignVar(22.42); ///< Total volume of the muscle group (ml)
    AnyFolder LCBrC7R1 =
    {
      AnyString Muscle = "LCBrC7R1"; ///< Descriptive name for the muscle, e.g. for plotting
      AnyIntVar MuscleElemAmount = 1; ///< The total amount of elements for this muscle
      AnyFloat Pennationangle ??= DesignVar(0); ///< Pennation angle of the muscle fibers (degres)
      AnyFloat VolumeScaleFactor ??= DesignVar(1.0); ///< Factor for scaling the muscle volume
      AnyFloat MuscleVolume ??= .Volume*0.041425; ///< Volume of the muscle (ml) (the fraction of the group volume is based on the strength of the previous model)
      AnyFloat MuscleVolumeSIScaled ??= ..VolumeUnitFactor*VolumeScaleFactor*MuscleVolume; ///< Scaled Volume of the muscle in SI base unit (m^3)
      AnyFloat OptimalFiberlength ??= _FIBER_LENGTH_DESIGNVAR(0.035713); ///< Optimal working length of the muscle fiber (m)
      AnyFloat TotalTendonLength ??= _TENDON_LENGTH_DESIGNVAR(0.01);///< The total tendon length (m)
      AnyFloat K1 ??= DesignVar(10); ///< K1 constant in the muscle model.  Factor for determining shortening speed at optimum length
      AnyFloat K2 ??= DesignVar(1); ///< K2 constant in the muscle model.  Factor for determining shortening speed at optimum length
      AnyFloat Epsilon0 ??= DesignVar(0.053); ///< Epsilon bar in the muscle model. Represents tendon strain at F0
      AnyFloat Fcfast ??= DesignVar(0.4); ///< Factor for determining shortening speed at optimum length
    };
    #endif

    #if BM_TRUNK_MUSCLES
    AnyFolder LCBrT1R2 =
    {
      AnyString Muscle = "LCBrT1R2"; ///< Descriptive name for the muscle, e.g. for plotting
      AnyIntVar MuscleElemAmount = 1; ///< The total amount of elements for this muscle
      AnyFloat Pennationangle ??= DesignVar(0); ///< Pennation angle of the muscle fibers (degres)
      AnyFloat VolumeScaleFactor ??= DesignVar(1.0); ///< Factor for scaling the muscle volume
      AnyFloat MuscleVolume ??= .Volume*0.036232; ///< Volume of the muscle (ml) (the fraction of the group volume is based on the strength of the previous model)
      AnyFloat MuscleVolumeSIScaled ??= ..VolumeUnitFactor*VolumeScaleFactor*MuscleVolume; ///< Scaled Volume of the muscle in SI base unit (m^3)
      AnyFloat OptimalFiberlength ??= _FIBER_LENGTH_DESIGNVAR(0.031236); ///< Optimal working length of the muscle fiber (m)
      AnyFloat TotalTendonLength ??= _TENDON_LENGTH_DESIGNVAR(0.01);///< The total tendon length (m)
      AnyFloat K1 ??= DesignVar(10); ///< K1 constant in the muscle model.  Factor for determining shortening speed at optimum length
      AnyFloat K2 ??= DesignVar(1); ///< K2 constant in the muscle model.  Factor for determining shortening speed at optimum length
      AnyFloat Epsilon0 ??= DesignVar(0.053); ///< Epsilon bar in the muscle model. Represents tendon strain at F0
      AnyFloat Fcfast ??= DesignVar(0.4); ///< Factor for determining shortening speed at optimum length
    };
    #endif

    #if BM_TRUNK_MUSCLES
    AnyFolder LCBrT2R3 =
    {
      AnyString Muscle = "LCBrT2R3"; ///< Descriptive name for the muscle, e.g. for plotting
      AnyIntVar MuscleElemAmount = 1; ///< The total amount of elements for this muscle
      AnyFloat Pennationangle ??= DesignVar(0); ///< Pennation angle of the muscle fibers (degres)
      AnyFloat VolumeScaleFactor ??= DesignVar(1.0); ///< Factor for scaling the muscle volume
      AnyFloat MuscleVolume ??= .Volume*0.03316; ///< Volume of the muscle (ml) (the fraction of the group volume is based on the strength of the previous model)
      AnyFloat MuscleVolumeSIScaled ??= ..VolumeUnitFactor*VolumeScaleFactor*MuscleVolume; ///< Scaled Volume of the muscle in SI base unit (m^3)
      AnyFloat OptimalFiberlength ??= _FIBER_LENGTH_DESIGNVAR(0.028588); ///< Optimal working length of the muscle fiber (m)
      AnyFloat TotalTendonLength ??= _TENDON_LENGTH_DESIGNVAR(0.01);///< The total tendon length (m)
      AnyFloat K1 ??= DesignVar(10); ///< K1 constant in the muscle model.  Factor for determining shortening speed at optimum length
      AnyFloat K2 ??= DesignVar(1); ///< K2 constant in the muscle model.  Factor for determining shortening speed at optimum length
      AnyFloat Epsilon0 ??= DesignVar(0.053); ///< Epsilon bar in the muscle model. Represents tendon strain at F0
      AnyFloat Fcfast ??= DesignVar(0.4); ///< Factor for determining shortening speed at optimum length
    };
    #endif

    #if BM_TRUNK_MUSCLES
    AnyFolder LCBrT3R4 =
    {
      AnyString Muscle = "LCBrT3R4"; ///< Descriptive name for the muscle, e.g. for plotting
      AnyIntVar MuscleElemAmount = 1; ///< The total amount of elements for this muscle
      AnyFloat Pennationangle ??= DesignVar(0); ///< Pennation angle of the muscle fibers (degres)
      AnyFloat VolumeScaleFactor ??= DesignVar(1.0); ///< Factor for scaling the muscle volume
      AnyFloat MuscleVolume ??= .Volume*0.03624; ///< Volume of the muscle (ml) (the fraction of the group volume is based on the strength of the previous model)
      AnyFloat MuscleVolumeSIScaled ??= ..VolumeUnitFactor*VolumeScaleFactor*MuscleVolume; ///< Scaled Volume of the muscle in SI base unit (m^3)
      AnyFloat OptimalFiberlength ??= _FIBER_LENGTH_DESIGNVAR(0.031243); ///< Optimal working length of the muscle fiber (m)
      AnyFloat TotalTendonLength ??= _TENDON_LENGTH_DESIGNVAR(0.01);///< The total tendon length (m)
      AnyFloat K1 ??= DesignVar(10); ///< K1 constant in the muscle model.  Factor for determining shortening speed at optimum length
      AnyFloat K2 ??= DesignVar(1); ///< K2 constant in the muscle model.  Factor for determining shortening speed at optimum length
      AnyFloat Epsilon0 ??= DesignVar(0.053); ///< Epsilon bar in the muscle model. Represents tendon strain at F0
      AnyFloat Fcfast ??= DesignVar(0.4); ///< Factor for determining shortening speed at optimum length
    };
    #endif

    #if BM_TRUNK_MUSCLES
    AnyFolder LCBrT4R5 =
    {
      AnyString Muscle = "LCBrT4R5"; ///< Descriptive name for the muscle, e.g. for plotting
      AnyIntVar MuscleElemAmount = 1; ///< The total amount of elements for this muscle
      AnyFloat Pennationangle ??= DesignVar(0); ///< Pennation angle of the muscle fibers (degres)
      AnyFloat VolumeScaleFactor ??= DesignVar(1.0); ///< Factor for scaling the muscle volume
      AnyFloat MuscleVolume ??= .Volume*0.043731; ///< Volume of the muscle (ml) (the fraction of the group volume is based on the strength of the previous model)
      AnyFloat MuscleVolumeSIScaled ??= ..VolumeUnitFactor*VolumeScaleFactor*MuscleVolume; ///< Scaled Volume of the muscle in SI base unit (m^3)
      AnyFloat OptimalFiberlength ??= _FIBER_LENGTH_DESIGNVAR(0.037701); ///< Optimal working length of the muscle fiber (m)
      AnyFloat TotalTendonLength ??= _TENDON_LENGTH_DESIGNVAR(0.01);///< The total tendon length (m)
      AnyFloat K1 ??= DesignVar(10); ///< K1 constant in the muscle model.  Factor for determining shortening speed at optimum length
      AnyFloat K2 ??= DesignVar(1); ///< K2 constant in the muscle model.  Factor for determining shortening speed at optimum length
      AnyFloat Epsilon0 ??= DesignVar(0.053); ///< Epsilon bar in the muscle model. Represents tendon strain at F0
      AnyFloat Fcfast ??= DesignVar(0.4); ///< Factor for determining shortening speed at optimum length
    };
    #endif

    #if BM_TRUNK_MUSCLES
    AnyFolder LCBrT5R6 =
    {
      AnyString Muscle = "LCBrT5R6"; ///< Descriptive name for the muscle, e.g. for plotting
      AnyIntVar MuscleElemAmount = 1; ///< The total amount of elements for this muscle
      AnyFloat Pennationangle ??= DesignVar(0); ///< Pennation angle of the muscle fibers (degres)
      AnyFloat VolumeScaleFactor ??= DesignVar(1.0); ///< Factor for scaling the muscle volume
      AnyFloat MuscleVolume ??= .Volume*0.044312; ///< Volume of the muscle (ml) (the fraction of the group volume is based on the strength of the previous model)
      AnyFloat MuscleVolumeSIScaled ??= ..VolumeUnitFactor*VolumeScaleFactor*MuscleVolume; ///< Scaled Volume of the muscle in SI base unit (m^3)
      AnyFloat OptimalFiberlength ??= _FIBER_LENGTH_DESIGNVAR(0.038203); ///< Optimal working length of the muscle fiber (m)
      AnyFloat TotalTendonLength ??= _TENDON_LENGTH_DESIGNVAR(0.01);///< The total tendon length (m)
      AnyFloat K1 ??= DesignVar(10); ///< K1 constant in the muscle model.  Factor for determining shortening speed at optimum length
      AnyFloat K2 ??= DesignVar(1); ///< K2 constant in the muscle model.  Factor for determining shortening speed at optimum length
      AnyFloat Epsilon0 ??= DesignVar(0.053); ///< Epsilon bar in the muscle model. Represents tendon strain at F0
      AnyFloat Fcfast ??= DesignVar(0.4); ///< Factor for determining shortening speed at optimum length
    };
    #endif

    #if BM_TRUNK_MUSCLES
    AnyFolder LCBrT6R7 =
    {
      AnyString Muscle = "LCBrT6R7"; ///< Descriptive name for the muscle, e.g. for plotting
      AnyIntVar MuscleElemAmount = 1; ///< The total amount of elements for this muscle
      AnyFloat Pennationangle ??= DesignVar(0); ///< Pennation angle of the muscle fibers (degres)
      AnyFloat VolumeScaleFactor ??= DesignVar(1.0); ///< Factor for scaling the muscle volume
      AnyFloat MuscleVolume ??= .Volume*0.037409; ///< Volume of the muscle (ml) (the fraction of the group volume is based on the strength of the previous model)
      AnyFloat MuscleVolumeSIScaled ??= ..VolumeUnitFactor*VolumeScaleFactor*MuscleVolume; ///< Scaled Volume of the muscle in SI base unit (m^3)
      AnyFloat OptimalFiberlength ??= _FIBER_LENGTH_DESIGNVAR(0.032251); ///< Optimal working length of the muscle fiber (m)
      AnyFloat TotalTendonLength ??= _TENDON_LENGTH_DESIGNVAR(0.01);///< The total tendon length (m)
      AnyFloat K1 ??= DesignVar(10); ///< K1 constant in the muscle model.  Factor for determining shortening speed at optimum length
      AnyFloat K2 ??= DesignVar(1); ///< K2 constant in the muscle model.  Factor for determining shortening speed at optimum length
      AnyFloat Epsilon0 ??= DesignVar(0.053); ///< Epsilon bar in the muscle model. Represents tendon strain at F0
      AnyFloat Fcfast ??= DesignVar(0.4); ///< Factor for determining shortening speed at optimum length
    };
    #endif

    #if BM_TRUNK_MUSCLES
    AnyFolder LCBrT7R8 =
    {
      AnyString Muscle = "LCBrT7R8"; ///< Descriptive name for the muscle, e.g. for plotting
      AnyIntVar MuscleElemAmount = 1; ///< The total amount of elements for this muscle
      AnyFloat Pennationangle ??= DesignVar(0); ///< Pennation angle of the muscle fibers (degres)
      AnyFloat VolumeScaleFactor ??= DesignVar(1.0); ///< Factor for scaling the muscle volume
      AnyFloat MuscleVolume ??= .Volume*0.043745; ///< Volume of the muscle (ml) (the fraction of the group volume is based on the strength of the previous model)
      AnyFloat MuscleVolumeSIScaled ??= ..VolumeUnitFactor*VolumeScaleFactor*MuscleVolume; ///< Scaled Volume of the muscle in SI base unit (m^3)
      AnyFloat OptimalFiberlength ??= _FIBER_LENGTH_DESIGNVAR(0.037713); ///< Optimal working length of the muscle fiber (m)
      AnyFloat TotalTendonLength ??= _TENDON_LENGTH_DESIGNVAR(0.01);///< The total tendon length (m)
      AnyFloat K1 ??= DesignVar(10); ///< K1 constant in the muscle model.  Factor for determining shortening speed at optimum length
      AnyFloat K2 ??= DesignVar(1); ///< K2 constant in the muscle model.  Factor for determining shortening speed at optimum length
      AnyFloat Epsilon0 ??= DesignVar(0.053); ///< Epsilon bar in the muscle model. Represents tendon strain at F0
      AnyFloat Fcfast ??= DesignVar(0.4); ///< Factor for determining shortening speed at optimum length
    };
    #endif

    #if BM_TRUNK_MUSCLES
    AnyFolder LCBrT8R9 =
    {
      AnyString Muscle = "LCBrT8R9"; ///< Descriptive name for the muscle, e.g. for plotting
      AnyIntVar MuscleElemAmount = 1; ///< The total amount of elements for this muscle
      AnyFloat Pennationangle ??= DesignVar(0); ///< Pennation angle of the muscle fibers (degres)
      AnyFloat VolumeScaleFactor ??= DesignVar(1.0); ///< Factor for scaling the muscle volume
      AnyFloat MuscleVolume ??= .Volume*0.047005; ///< Volume of the muscle (ml) (the fraction of the group volume is based on the strength of the previous model)
      AnyFloat MuscleVolumeSIScaled ??= ..VolumeUnitFactor*VolumeScaleFactor*MuscleVolume; ///< Scaled Volume of the muscle in SI base unit (m^3)
      AnyFloat OptimalFiberlength ??= _FIBER_LENGTH_DESIGNVAR(0.040524); ///< Optimal working length of the muscle fiber (m)
      AnyFloat TotalTendonLength ??= _TENDON_LENGTH_DESIGNVAR(0.01);///< The total tendon length (m)
      AnyFloat K1 ??= DesignVar(10); ///< K1 constant in the muscle model.  Factor for determining shortening speed at optimum length
      AnyFloat K2 ??= DesignVar(1); ///< K2 constant in the muscle model.  Factor for determining shortening speed at optimum length
      AnyFloat Epsilon0 ??= DesignVar(0.053); ///< Epsilon bar in the muscle model. Represents tendon strain at F0
      AnyFloat Fcfast ??= DesignVar(0.4); ///< Factor for determining shortening speed at optimum length
    };
    #endif

    #if BM_TRUNK_MUSCLES
    AnyFolder LCBrT9R10 =
    {
      AnyString Muscle = "LCBrT9R10"; ///< Descriptive name for the muscle, e.g. for plotting
      AnyIntVar MuscleElemAmount = 1; ///< The total amount of elements for this muscle
      AnyFloat Pennationangle ??= DesignVar(0); ///< Pennation angle of the muscle fibers (degres)
      AnyFloat VolumeScaleFactor ??= DesignVar(1.0); ///< Factor for scaling the muscle volume
      AnyFloat MuscleVolume ??= .Volume*0.049725; ///< Volume of the muscle (ml) (the fraction of the group volume is based on the strength of the previous model)
      AnyFloat MuscleVolumeSIScaled ??= ..VolumeUnitFactor*VolumeScaleFactor*MuscleVolume; ///< Scaled Volume of the muscle in SI base unit (m^3)
      AnyFloat OptimalFiberlength ??= _FIBER_LENGTH_DESIGNVAR(0.042869); ///< Optimal working length of the muscle fiber (m)
      AnyFloat TotalTendonLength ??= _TENDON_LENGTH_DESIGNVAR(0.01);///< The total tendon length (m)
      AnyFloat K1 ??= DesignVar(10); ///< K1 constant in the muscle model.  Factor for determining shortening speed at optimum length
      AnyFloat K2 ??= DesignVar(1); ///< K2 constant in the muscle model.  Factor for determining shortening speed at optimum length
      AnyFloat Epsilon0 ??= DesignVar(0.053); ///< Epsilon bar in the muscle model. Represents tendon strain at F0
      AnyFloat Fcfast ??= DesignVar(0.4); ///< Factor for determining shortening speed at optimum length
    };
    #endif

    #if BM_TRUNK_MUSCLES
    AnyFolder LCBrT10R11 =
    {
      AnyString Muscle = "LCBrT10R11"; ///< Descriptive name for the muscle, e.g. for plotting
      AnyIntVar MuscleElemAmount = 1; ///< The total amount of elements for this muscle
      AnyFloat Pennationangle ??= DesignVar(0); ///< Pennation angle of the muscle fibers (degres)
      AnyFloat VolumeScaleFactor ??= DesignVar(1.0); ///< Factor for scaling the muscle volume
      AnyFloat MuscleVolume ??= .Volume*0.047572; ///< Volume of the muscle (ml) (the fraction of the group volume is based on the strength of the previous model)
      AnyFloat MuscleVolumeSIScaled ??= ..VolumeUnitFactor*VolumeScaleFactor*MuscleVolume; ///< Scaled Volume of the muscle in SI base unit (m^3)
      AnyFloat OptimalFiberlength ??= _FIBER_LENGTH_DESIGNVAR(0.041013); ///< Optimal working length of the muscle fiber (m)
      AnyFloat TotalTendonLength ??= _TENDON_LENGTH_DESIGNVAR(0.01);///< The total tendon length (m)
      AnyFloat K1 ??= DesignVar(10); ///< K1 constant in the muscle model.  Factor for determining shortening speed at optimum length
      AnyFloat K2 ??= DesignVar(1); ///< K2 constant in the muscle model.  Factor for determining shortening speed at optimum length
      AnyFloat Epsilon0 ??= DesignVar(0.053); ///< Epsilon bar in the muscle model. Represents tendon strain at F0
      AnyFloat Fcfast ??= DesignVar(0.4); ///< Factor for determining shortening speed at optimum length
    };
    #endif

    #if BM_TRUNK_MUSCLES
    AnyFolder LCBrT11R12 =
    {
      AnyString Muscle = "LCBrT11R12"; ///< Descriptive name for the muscle, e.g. for plotting
      AnyIntVar MuscleElemAmount = 1; ///< The total amount of elements for this muscle
      AnyFloat Pennationangle ??= DesignVar(0); ///< Pennation angle of the muscle fibers (degres)
      AnyFloat VolumeScaleFactor ??= DesignVar(1.0); ///< Factor for scaling the muscle volume
      AnyFloat MuscleVolume ??= .Volume*0.044465; ///< Volume of the muscle (ml) (the fraction of the group volume is based on the strength of the previous model)
      AnyFloat MuscleVolumeSIScaled ??= ..VolumeUnitFactor*VolumeScaleFactor*MuscleVolume; ///< Scaled Volume of the muscle in SI base unit (m^3)
      AnyFloat OptimalFiberlength ??= _FIBER_LENGTH_DESIGNVAR(0.038334); ///< Optimal working length of the muscle fiber (m)
      AnyFloat TotalTendonLength ??= _TENDON_LENGTH_DESIGNVAR(0.01);///< The total tendon length (m)
      AnyFloat K1 ??= DesignVar(10); ///< K1 constant in the muscle model.  Factor for determining shortening speed at optimum length
      AnyFloat K2 ??= DesignVar(1); ///< K2 constant in the muscle model.  Factor for determining shortening speed at optimum length
      AnyFloat Epsilon0 ??= DesignVar(0.053); ///< Epsilon bar in the muscle model. Represents tendon strain at F0
      AnyFloat Fcfast ??= DesignVar(0.4); ///< Factor for determining shortening speed at optimum length
    };
    #endif

    #if BM_TRUNK_MUSCLES
    AnyFolder LCLgT5R7 =
    {
      AnyString Muscle = "LCLgT5R7"; ///< Descriptive name for the muscle, e.g. for plotting
      AnyIntVar MuscleElemAmount = 1; ///< The total amount of elements for this muscle
      AnyFloat Pennationangle ??= DesignVar(0); ///< Pennation angle of the muscle fibers (degres)
      AnyFloat VolumeScaleFactor ??= DesignVar(1.0); ///< Factor for scaling the muscle volume
      AnyFloat MuscleVolume ??= .Volume*0.072697; ///< Volume of the muscle (ml) (the fraction of the group volume is based on the strength of the previous model)
      AnyFloat MuscleVolumeSIScaled ??= ..VolumeUnitFactor*VolumeScaleFactor*MuscleVolume; ///< Scaled Volume of the muscle in SI base unit (m^3)
      AnyFloat OptimalFiberlength ??= _FIBER_LENGTH_DESIGNVAR(0.062673); ///< Optimal working length of the muscle fiber (m)
      AnyFloat TotalTendonLength ??= _TENDON_LENGTH_DESIGNVAR(0.01);///< The total tendon length (m)
      AnyFloat K1 ??= DesignVar(10); ///< K1 constant in the muscle model.  Factor for determining shortening speed at optimum length
      AnyFloat K2 ??= DesignVar(1); ///< K2 constant in the muscle model.  Factor for determining shortening speed at optimum length
      AnyFloat Epsilon0 ??= DesignVar(0.053); ///< Epsilon bar in the muscle model. Represents tendon strain at F0
      AnyFloat Fcfast ??= DesignVar(0.4); ///< Factor for determining shortening speed at optimum length
    };
    #endif

    #if BM_TRUNK_MUSCLES
    AnyFolder LCLgT6R8 =
    {
      AnyString Muscle = "LCLgT6R8"; ///< Descriptive name for the muscle, e.g. for plotting
      AnyIntVar MuscleElemAmount = 1; ///< The total amount of elements for this muscle
      AnyFloat Pennationangle ??= DesignVar(0); ///< Pennation angle of the muscle fibers (degres)
      AnyFloat VolumeScaleFactor ??= DesignVar(1.0); ///< Factor for scaling the muscle volume
      AnyFloat MuscleVolume ??= .Volume*0.079098; ///< Volume of the muscle (ml) (the fraction of the group volume is based on the strength of the previous model)
      AnyFloat MuscleVolumeSIScaled ??= ..VolumeUnitFactor*VolumeScaleFactor*MuscleVolume; ///< Scaled Volume of the muscle in SI base unit (m^3)
      AnyFloat OptimalFiberlength ??= _FIBER_LENGTH_DESIGNVAR(0.068192); ///< Optimal working length of the muscle fiber (m)
      AnyFloat TotalTendonLength ??= _TENDON_LENGTH_DESIGNVAR(0.01);///< The total tendon length (m)
      AnyFloat K1 ??= DesignVar(10); ///< K1 constant in the muscle model.  Factor for determining shortening speed at optimum length
      AnyFloat K2 ??= DesignVar(1); ///< K2 constant in the muscle model.  Factor for determining shortening speed at optimum length
      AnyFloat Epsilon0 ??= DesignVar(0.053); ///< Epsilon bar in the muscle model. Represents tendon strain at F0
      AnyFloat Fcfast ??= DesignVar(0.4); ///< Factor for determining shortening speed at optimum length
    };
    #endif

    #if BM_TRUNK_MUSCLES
    AnyFolder LCLgT7R9 =
    {
      AnyString Muscle = "LCLgT7R9"; ///< Descriptive name for the muscle, e.g. for plotting
      AnyIntVar MuscleElemAmount = 1; ///< The total amount of elements for this muscle
      AnyFloat Pennationangle ??= DesignVar(0); ///< Pennation angle of the muscle fibers (degres)
      AnyFloat VolumeScaleFactor ??= DesignVar(1.0); ///< Factor for scaling the muscle volume
      AnyFloat MuscleVolume ??= .Volume*0.085191; ///< Volume of the muscle (ml) (the fraction of the group volume is based on the strength of the previous model)
      AnyFloat MuscleVolumeSIScaled ??= ..VolumeUnitFactor*VolumeScaleFactor*MuscleVolume; ///< Scaled Volume of the muscle in SI base unit (m^3)
      AnyFloat OptimalFiberlength ??= _FIBER_LENGTH_DESIGNVAR(0.073445); ///< Optimal working length of the muscle fiber (m)
      AnyFloat TotalTendonLength ??= _TENDON_LENGTH_DESIGNVAR(0.01);///< The total tendon length (m)
      AnyFloat K1 ??= DesignVar(10); ///< K1 constant in the muscle model.  Factor for determining shortening speed at optimum length
      AnyFloat K2 ??= DesignVar(1); ///< K2 constant in the muscle model.  Factor for determining shortening speed at optimum length
      AnyFloat Epsilon0 ??= DesignVar(0.053); ///< Epsilon bar in the muscle model. Represents tendon strain at F0
      AnyFloat Fcfast ??= DesignVar(0.4); ///< Factor for determining shortening speed at optimum length
    };
    #endif

    #if BM_TRUNK_MUSCLES
    AnyFolder LCLgT8R10 =
    {
      AnyString Muscle = "LCLgT8R10"; ///< Descriptive name for the muscle, e.g. for plotting
      AnyIntVar MuscleElemAmount = 1; ///< The total amount of elements for this muscle
      AnyFloat Pennationangle ??= DesignVar(0); ///< Pennation angle of the muscle fibers (degres)
      AnyFloat VolumeScaleFactor ??= DesignVar(1.0); ///< Factor for scaling the muscle volume
      AnyFloat MuscleVolume ??= .Volume*0.076961; ///< Volume of the muscle (ml) (the fraction of the group volume is based on the strength of the previous model)
      AnyFloat MuscleVolumeSIScaled ??= ..VolumeUnitFactor*VolumeScaleFactor*MuscleVolume; ///< Scaled Volume of the muscle in SI base unit (m^3)
      AnyFloat OptimalFiberlength ??= _FIBER_LENGTH_DESIGNVAR(0.06635); ///< Optimal working length of the muscle fiber (m)
      AnyFloat TotalTendonLength ??= _TENDON_LENGTH_DESIGNVAR(0.01);///< The total tendon length (m)
      AnyFloat K1 ??= DesignVar(10); ///< K1 constant in the muscle model.  Factor for determining shortening speed at optimum length
      AnyFloat K2 ??= DesignVar(1); ///< K2 constant in the muscle model.  Factor for determining shortening speed at optimum length
      AnyFloat Epsilon0 ??= DesignVar(0.053); ///< Epsilon bar in the muscle model. Represents tendon strain at F0
      AnyFloat Fcfast ??= DesignVar(0.4); ///< Factor for determining shortening speed at optimum length
    };
    #endif

    #if BM_TRUNK_MUSCLES
    AnyFolder LCLgT9R11 =
    {
      AnyString Muscle = "LCLgT9R11"; ///< Descriptive name for the muscle, e.g. for plotting
      AnyIntVar MuscleElemAmount = 1; ///< The total amount of elements for this muscle
      AnyFloat Pennationangle ??= DesignVar(0); ///< Pennation angle of the muscle fibers (degres)
      AnyFloat VolumeScaleFactor ??= DesignVar(1.0); ///< Factor for scaling the muscle volume
      AnyFloat MuscleVolume ??= .Volume*0.090129; ///< Volume of the muscle (ml) (the fraction of the group volume is based on the strength of the previous model)
      AnyFloat MuscleVolumeSIScaled ??= ..VolumeUnitFactor*VolumeScaleFactor*MuscleVolume; ///< Scaled Volume of the muscle in SI base unit (m^3)
      AnyFloat OptimalFiberlength ??= _FIBER_LENGTH_DESIGNVAR(0.077702); ///< Optimal working length of the muscle fiber (m)
      AnyFloat TotalTendonLength ??= _TENDON_LENGTH_DESIGNVAR(0.01);///< The total tendon length (m)
      AnyFloat K1 ??= DesignVar(10); ///< K1 constant in the muscle model.  Factor for determining shortening speed at optimum length
      AnyFloat K2 ??= DesignVar(1); ///< K2 constant in the muscle model.  Factor for determining shortening speed at optimum length
      AnyFloat Epsilon0 ??= DesignVar(0.053); ///< Epsilon bar in the muscle model. Represents tendon strain at F0
      AnyFloat Fcfast ??= DesignVar(0.4); ///< Factor for determining shortening speed at optimum length
    };
    #endif

    #if BM_TRUNK_MUSCLES
    AnyFolder LCLgT10R12 =
    {
      AnyString Muscle = "LCLgT10R12"; ///< Descriptive name for the muscle, e.g. for plotting
      AnyIntVar MuscleElemAmount = 1; ///< The total amount of elements for this muscle
      AnyFloat Pennationangle ??= DesignVar(0); ///< Pennation angle of the muscle fibers (degres)
      AnyFloat VolumeScaleFactor ??= DesignVar(1.0); ///< Factor for scaling the muscle volume
      AnyFloat MuscleVolume ??= .Volume*0.090903; ///< Volume of the muscle (ml) (the fraction of the group volume is based on the strength of the previous model)
      AnyFloat MuscleVolumeSIScaled ??= ..VolumeUnitFactor*VolumeScaleFactor*MuscleVolume; ///< Scaled Volume of the muscle in SI base unit (m^3)
      AnyFloat OptimalFiberlength ??= _FIBER_LENGTH_DESIGNVAR(0.078369); ///< Optimal working length of the muscle fiber (m)
      AnyFloat TotalTendonLength ??= _TENDON_LENGTH_DESIGNVAR(0.01);///< The total tendon length (m)
      AnyFloat K1 ??= DesignVar(10); ///< K1 constant in the muscle model.  Factor for determining shortening speed at optimum length
      AnyFloat K2 ??= DesignVar(1); ///< K2 constant in the muscle model.  Factor for determining shortening speed at optimum length
      AnyFloat Epsilon0 ??= DesignVar(0.053); ///< Epsilon bar in the muscle model. Represents tendon strain at F0
      AnyFloat Fcfast ??= DesignVar(0.4); ///< Factor for determining shortening speed at optimum length
    };
    #endif
  }; // LevatorCostarum group
  AnyFolder LongissimusCapitis =
  {
    #if BM_TRUNK_MUSCLES
    AnyVar Volume ??= DesignVar(11.06); ///< Total volume of the muscle group (ml)
    AnyFolder LongissimusCapitisC3C0 =
    {
      AnyString Muscle = "LongissimusCapitisC3C0"; ///< Descriptive name for the muscle, e.g. for plotting
      AnyIntVar MuscleElemAmount = 1; ///< The total amount of elements for this muscle
      AnyFloat Pennationangle ??= DesignVar(0); ///< Pennation angle of the muscle fibers (degres)
      AnyFloat VolumeScaleFactor ??= DesignVar(1.0); ///< Factor for scaling the muscle volume
      AnyFloat MuscleVolume ??= .Volume*0.040957; ///< Volume of the muscle (ml) (the fraction of the group volume is based on the strength of the previous model)
      AnyFloat MuscleVolumeSIScaled ??= ..VolumeUnitFactor*VolumeScaleFactor*MuscleVolume; ///< Scaled Volume of the muscle in SI base unit (m^3)
      AnyFloat OptimalFiberlength ??= _FIBER_LENGTH_DESIGNVAR(0.047192); ///< Optimal working length of the muscle fiber (m)
      AnyFloat TotalTendonLength ??= _TENDON_LENGTH_DESIGNVAR(0.01);///< The total tendon length (m)
      AnyFloat K1 ??= DesignVar(10); ///< K1 constant in the muscle model.  Factor for determining shortening speed at optimum length
      AnyFloat K2 ??= DesignVar(1); ///< K2 constant in the muscle model.  Factor for determining shortening speed at optimum length
      AnyFloat Epsilon0 ??= DesignVar(0.053); ///< Epsilon bar in the muscle model. Represents tendon strain at F0
      AnyFloat Fcfast ??= DesignVar(0.4); ///< Factor for determining shortening speed at optimum length
    };
    #endif

    #if BM_TRUNK_MUSCLES
    AnyFolder LongissimusCapitisC4C0 =
    {
      AnyString Muscle = "LongissimusCapitisC4C0"; ///< Descriptive name for the muscle, e.g. for plotting
      AnyIntVar MuscleElemAmount = 1; ///< The total amount of elements for this muscle
      AnyFloat Pennationangle ??= DesignVar(0); ///< Pennation angle of the muscle fibers (degres)
      AnyFloat VolumeScaleFactor ??= DesignVar(1.0); ///< Factor for scaling the muscle volume
      AnyFloat MuscleVolume ??= .Volume*0.051337; ///< Volume of the muscle (ml) (the fraction of the group volume is based on the strength of the previous model)
      AnyFloat MuscleVolumeSIScaled ??= ..VolumeUnitFactor*VolumeScaleFactor*MuscleVolume; ///< Scaled Volume of the muscle in SI base unit (m^3)
      AnyFloat OptimalFiberlength ??= _FIBER_LENGTH_DESIGNVAR(0.059151); ///< Optimal working length of the muscle fiber (m)
      AnyFloat TotalTendonLength ??= _TENDON_LENGTH_DESIGNVAR(0.01);///< The total tendon length (m)
      AnyFloat K1 ??= DesignVar(10); ///< K1 constant in the muscle model.  Factor for determining shortening speed at optimum length
      AnyFloat K2 ??= DesignVar(1); ///< K2 constant in the muscle model.  Factor for determining shortening speed at optimum length
      AnyFloat Epsilon0 ??= DesignVar(0.053); ///< Epsilon bar in the muscle model. Represents tendon strain at F0
      AnyFloat Fcfast ??= DesignVar(0.4); ///< Factor for determining shortening speed at optimum length
    };
    #endif

    #if BM_TRUNK_MUSCLES
    AnyFolder LongissimusCapitisC5C0 =
    {
      AnyString Muscle = "LongissimusCapitisC5C0"; ///< Descriptive name for the muscle, e.g. for plotting
      AnyIntVar MuscleElemAmount = 1; ///< The total amount of elements for this muscle
      AnyFloat Pennationangle ??= DesignVar(0); ///< Pennation angle of the muscle fibers (degres)
      AnyFloat VolumeScaleFactor ??= DesignVar(1.0); ///< Factor for scaling the muscle volume
      AnyFloat MuscleVolume ??= .Volume*0.062386; ///< Volume of the muscle (ml) (the fraction of the group volume is based on the strength of the previous model)
      AnyFloat MuscleVolumeSIScaled ??= ..VolumeUnitFactor*VolumeScaleFactor*MuscleVolume; ///< Scaled Volume of the muscle in SI base unit (m^3)
      AnyFloat OptimalFiberlength ??= _FIBER_LENGTH_DESIGNVAR(0.071882); ///< Optimal working length of the muscle fiber (m)
      AnyFloat TotalTendonLength ??= _TENDON_LENGTH_DESIGNVAR(0.01);///< The total tendon length (m)
      AnyFloat K1 ??= DesignVar(10); ///< K1 constant in the muscle model.  Factor for determining shortening speed at optimum length
      AnyFloat K2 ??= DesignVar(1); ///< K2 constant in the muscle model.  Factor for determining shortening speed at optimum length
      AnyFloat Epsilon0 ??= DesignVar(0.053); ///< Epsilon bar in the muscle model. Represents tendon strain at F0
      AnyFloat Fcfast ??= DesignVar(0.4); ///< Factor for determining shortening speed at optimum length
    };
    #endif

    #if BM_TRUNK_MUSCLES
    AnyFolder LongissimusCapitisC6C0 =
    {
      AnyString Muscle = "LongissimusCapitisC6C0"; ///< Descriptive name for the muscle, e.g. for plotting
      AnyIntVar MuscleElemAmount = 1; ///< The total amount of elements for this muscle
      AnyFloat Pennationangle ??= DesignVar(0); ///< Pennation angle of the muscle fibers (degres)
      AnyFloat VolumeScaleFactor ??= DesignVar(1.0); ///< Factor for scaling the muscle volume
      AnyFloat MuscleVolume ??= .Volume*0.070658; ///< Volume of the muscle (ml) (the fraction of the group volume is based on the strength of the previous model)
      AnyFloat MuscleVolumeSIScaled ??= ..VolumeUnitFactor*VolumeScaleFactor*MuscleVolume; ///< Scaled Volume of the muscle in SI base unit (m^3)
      AnyFloat OptimalFiberlength ??= _FIBER_LENGTH_DESIGNVAR(0.081413); ///< Optimal working length of the muscle fiber (m)
      AnyFloat TotalTendonLength ??= _TENDON_LENGTH_DESIGNVAR(0.01);///< The total tendon length (m)
      AnyFloat K1 ??= DesignVar(10); ///< K1 constant in the muscle model.  Factor for determining shortening speed at optimum length
      AnyFloat K2 ??= DesignVar(1); ///< K2 constant in the muscle model.  Factor for determining shortening speed at optimum length
      AnyFloat Epsilon0 ??= DesignVar(0.053); ///< Epsilon bar in the muscle model. Represents tendon strain at F0
      AnyFloat Fcfast ??= DesignVar(0.4); ///< Factor for determining shortening speed at optimum length
    };
    #endif

    #if BM_TRUNK_MUSCLES
    AnyFolder LongissimusCapitisC7C0 =
    {
      AnyString Muscle = "LongissimusCapitisC7C0"; ///< Descriptive name for the muscle, e.g. for plotting
      AnyIntVar MuscleElemAmount = 1; ///< The total amount of elements for this muscle
      AnyFloat Pennationangle ??= DesignVar(0); ///< Pennation angle of the muscle fibers (degres)
      AnyFloat VolumeScaleFactor ??= DesignVar(1.0); ///< Factor for scaling the muscle volume
      AnyFloat MuscleVolume ??= .Volume*0.075564; ///< Volume of the muscle (ml) (the fraction of the group volume is based on the strength of the previous model)
      AnyFloat MuscleVolumeSIScaled ??= ..VolumeUnitFactor*VolumeScaleFactor*MuscleVolume; ///< Scaled Volume of the muscle in SI base unit (m^3)
      AnyFloat OptimalFiberlength ??= _FIBER_LENGTH_DESIGNVAR(0.087067); ///< Optimal working length of the muscle fiber (m)
      AnyFloat TotalTendonLength ??= _TENDON_LENGTH_DESIGNVAR(0.01);///< The total tendon length (m)
      AnyFloat K1 ??= DesignVar(10); ///< K1 constant in the muscle model.  Factor for determining shortening speed at optimum length
      AnyFloat K2 ??= DesignVar(1); ///< K2 constant in the muscle model.  Factor for determining shortening speed at optimum length
      AnyFloat Epsilon0 ??= DesignVar(0.053); ///< Epsilon bar in the muscle model. Represents tendon strain at F0
      AnyFloat Fcfast ??= DesignVar(0.4); ///< Factor for determining shortening speed at optimum length
    };
    #endif

    #if BM_TRUNK_MUSCLES
    AnyFolder LongissimusCapitisT1C0 =
    {
      AnyString Muscle = "LongissimusCapitisT1C0"; ///< Descriptive name for the muscle, e.g. for plotting
      AnyIntVar MuscleElemAmount = 1; ///< The total amount of elements for this muscle
      AnyFloat Pennationangle ??= DesignVar(0); ///< Pennation angle of the muscle fibers (degres)
      AnyFloat VolumeScaleFactor ??= DesignVar(1.0); ///< Factor for scaling the muscle volume
      AnyFloat MuscleVolume ??= .Volume*0.09625; ///< Volume of the muscle (ml) (the fraction of the group volume is based on the strength of the previous model)
      AnyFloat MuscleVolumeSIScaled ??= ..VolumeUnitFactor*VolumeScaleFactor*MuscleVolume; ///< Scaled Volume of the muscle in SI base unit (m^3)
      AnyFloat OptimalFiberlength ??= _FIBER_LENGTH_DESIGNVAR(0.1109); ///< Optimal working length of the muscle fiber (m)
      AnyFloat TotalTendonLength ??= _TENDON_LENGTH_DESIGNVAR(0.01);///< The total tendon length (m)
      AnyFloat K1 ??= DesignVar(10); ///< K1 constant in the muscle model.  Factor for determining shortening speed at optimum length
      AnyFloat K2 ??= DesignVar(1); ///< K2 constant in the muscle model.  Factor for determining shortening speed at optimum length
      AnyFloat Epsilon0 ??= DesignVar(0.053); ///< Epsilon bar in the muscle model. Represents tendon strain at F0
      AnyFloat Fcfast ??= DesignVar(0.4); ///< Factor for determining shortening speed at optimum length
    };
    #endif

    #if BM_TRUNK_MUSCLES
    AnyFolder LongissimusCapitisT2C0 =
    {
      AnyString Muscle = "LongissimusCapitisT2C0"; ///< Descriptive name for the muscle, e.g. for plotting
      AnyIntVar MuscleElemAmount = 1; ///< The total amount of elements for this muscle
      AnyFloat Pennationangle ??= DesignVar(0); ///< Pennation angle of the muscle fibers (degres)
      AnyFloat VolumeScaleFactor ??= DesignVar(1.0); ///< Factor for scaling the muscle volume
      AnyFloat MuscleVolume ??= .Volume*0.11665; ///< Volume of the muscle (ml) (the fraction of the group volume is based on the strength of the previous model)
      AnyFloat MuscleVolumeSIScaled ??= ..VolumeUnitFactor*VolumeScaleFactor*MuscleVolume; ///< Scaled Volume of the muscle in SI base unit (m^3)
      AnyFloat OptimalFiberlength ??= _FIBER_LENGTH_DESIGNVAR(0.1344); ///< Optimal working length of the muscle fiber (m)
      AnyFloat TotalTendonLength ??= _TENDON_LENGTH_DESIGNVAR(0.01);///< The total tendon length (m)
      AnyFloat K1 ??= DesignVar(10); ///< K1 constant in the muscle model.  Factor for determining shortening speed at optimum length
      AnyFloat K2 ??= DesignVar(1); ///< K2 constant in the muscle model.  Factor for determining shortening speed at optimum length
      AnyFloat Epsilon0 ??= DesignVar(0.053); ///< Epsilon bar in the muscle model. Represents tendon strain at F0
      AnyFloat Fcfast ??= DesignVar(0.4); ///< Factor for determining shortening speed at optimum length
    };
    #endif

    #if BM_TRUNK_MUSCLES
    AnyFolder LongissimusCapitisT3C0 =
    {
      AnyString Muscle = "LongissimusCapitisT3C0"; ///< Descriptive name for the muscle, e.g. for plotting
      AnyIntVar MuscleElemAmount = 1; ///< The total amount of elements for this muscle
      AnyFloat Pennationangle ??= DesignVar(0); ///< Pennation angle of the muscle fibers (degres)
      AnyFloat VolumeScaleFactor ??= DesignVar(1.0); ///< Factor for scaling the muscle volume
      AnyFloat MuscleVolume ??= .Volume*0.13883; ///< Volume of the muscle (ml) (the fraction of the group volume is based on the strength of the previous model)
      AnyFloat MuscleVolumeSIScaled ??= ..VolumeUnitFactor*VolumeScaleFactor*MuscleVolume; ///< Scaled Volume of the muscle in SI base unit (m^3)
      AnyFloat OptimalFiberlength ??= _FIBER_LENGTH_DESIGNVAR(0.15996); ///< Optimal working length of the muscle fiber (m)
      AnyFloat TotalTendonLength ??= _TENDON_LENGTH_DESIGNVAR(0.01);///< The total tendon length (m)
      AnyFloat K1 ??= DesignVar(10); ///< K1 constant in the muscle model.  Factor for determining shortening speed at optimum length
      AnyFloat K2 ??= DesignVar(1); ///< K2 constant in the muscle model.  Factor for determining shortening speed at optimum length
      AnyFloat Epsilon0 ??= DesignVar(0.053); ///< Epsilon bar in the muscle model. Represents tendon strain at F0
      AnyFloat Fcfast ??= DesignVar(0.4); ///< Factor for determining shortening speed at optimum length
    };
    #endif

    #if BM_TRUNK_MUSCLES
    AnyFolder LongissimusCapitisT4C0 =
    {
      AnyString Muscle = "LongissimusCapitisT4C0"; ///< Descriptive name for the muscle, e.g. for plotting
      AnyIntVar MuscleElemAmount = 1; ///< The total amount of elements for this muscle
      AnyFloat Pennationangle ??= DesignVar(0); ///< Pennation angle of the muscle fibers (degres)
      AnyFloat VolumeScaleFactor ??= DesignVar(1.0); ///< Factor for scaling the muscle volume
      AnyFloat MuscleVolume ??= .Volume*0.16124; ///< Volume of the muscle (ml) (the fraction of the group volume is based on the strength of the previous model)
      AnyFloat MuscleVolumeSIScaled ??= ..VolumeUnitFactor*VolumeScaleFactor*MuscleVolume; ///< Scaled Volume of the muscle in SI base unit (m^3)
      AnyFloat OptimalFiberlength ??= _FIBER_LENGTH_DESIGNVAR(0.18579); ///< Optimal working length of the muscle fiber (m)
      AnyFloat TotalTendonLength ??= _TENDON_LENGTH_DESIGNVAR(0.01);///< The total tendon length (m)
      AnyFloat K1 ??= DesignVar(10); ///< K1 constant in the muscle model.  Factor for determining shortening speed at optimum length
      AnyFloat K2 ??= DesignVar(1); ///< K2 constant in the muscle model.  Factor for determining shortening speed at optimum length
      AnyFloat Epsilon0 ??= DesignVar(0.053); ///< Epsilon bar in the muscle model. Represents tendon strain at F0
      AnyFloat Fcfast ??= DesignVar(0.4); ///< Factor for determining shortening speed at optimum length
    };
    #endif

    #if BM_TRUNK_MUSCLES
    AnyFolder LongissimusCapitisT5C0 =
    {
      AnyString Muscle = "LongissimusCapitisT5C0"; ///< Descriptive name for the muscle, e.g. for plotting
      AnyIntVar MuscleElemAmount = 1; ///< The total amount of elements for this muscle
      AnyFloat Pennationangle ??= DesignVar(0); ///< Pennation angle of the muscle fibers (degres)
      AnyFloat VolumeScaleFactor ??= DesignVar(1.0); ///< Factor for scaling the muscle volume
      AnyFloat MuscleVolume ??= .Volume*0.18613; ///< Volume of the muscle (ml) (the fraction of the group volume is based on the strength of the previous model)
      AnyFloat MuscleVolumeSIScaled ??= ..VolumeUnitFactor*VolumeScaleFactor*MuscleVolume; ///< Scaled Volume of the muscle in SI base unit (m^3)
      AnyFloat OptimalFiberlength ??= _FIBER_LENGTH_DESIGNVAR(0.21446); ///< Optimal working length of the muscle fiber (m)
      AnyFloat TotalTendonLength ??= _TENDON_LENGTH_DESIGNVAR(0.01);///< The total tendon length (m)
      AnyFloat K1 ??= DesignVar(10); ///< K1 constant in the muscle model.  Factor for determining shortening speed at optimum length
      AnyFloat K2 ??= DesignVar(1); ///< K2 constant in the muscle model.  Factor for determining shortening speed at optimum length
      AnyFloat Epsilon0 ??= DesignVar(0.053); ///< Epsilon bar in the muscle model. Represents tendon strain at F0
      AnyFloat Fcfast ??= DesignVar(0.4); ///< Factor for determining shortening speed at optimum length
    };
    #endif
  }; // LongissimusCapitis group
  AnyFolder LongissimusCervicis =
  {
    #if BM_TRUNK_MUSCLES
    AnyVar Volume ??= DesignVar(17.61); ///< Total volume of the muscle group (ml)
    AnyFolder LongissimusCervicisT1C2 =
    {
      AnyString Muscle = "LongissimusCervicisT1C2"; ///< Descriptive name for the muscle, e.g. for plotting
      AnyIntVar MuscleElemAmount = 1; ///< The total amount of elements for this muscle
      AnyFloat Pennationangle ??= DesignVar(0); ///< Pennation angle of the muscle fibers (degres)
      AnyFloat VolumeScaleFactor ??= DesignVar(1.0); ///< Factor for scaling the muscle volume
      AnyFloat MuscleVolume ??= .Volume*0.16532; ///< Volume of the muscle (ml) (the fraction of the group volume is based on the strength of the previous model)
      AnyFloat MuscleVolumeSIScaled ??= ..VolumeUnitFactor*VolumeScaleFactor*MuscleVolume; ///< Scaled Volume of the muscle in SI base unit (m^3)
      AnyFloat OptimalFiberlength ??= _FIBER_LENGTH_DESIGNVAR(0.097703); ///< Optimal working length of the muscle fiber (m)
      AnyFloat TotalTendonLength ??= _TENDON_LENGTH_DESIGNVAR(0.01);///< The total tendon length (m)
      AnyFloat K1 ??= DesignVar(10); ///< K1 constant in the muscle model.  Factor for determining shortening speed at optimum length
      AnyFloat K2 ??= DesignVar(1); ///< K2 constant in the muscle model.  Factor for determining shortening speed at optimum length
      AnyFloat Epsilon0 ??= DesignVar(0.053); ///< Epsilon bar in the muscle model. Represents tendon strain at F0
      AnyFloat Fcfast ??= DesignVar(0.4); ///< Factor for determining shortening speed at optimum length
    };
    #endif

    #if BM_TRUNK_MUSCLES
    AnyFolder LongissimusCervicisT2C3 =
    {
      AnyString Muscle = "LongissimusCervicisT2C3"; ///< Descriptive name for the muscle, e.g. for plotting
      AnyIntVar MuscleElemAmount = 1; ///< The total amount of elements for this muscle
      AnyFloat Pennationangle ??= DesignVar(0); ///< Pennation angle of the muscle fibers (degres)
      AnyFloat VolumeScaleFactor ??= DesignVar(1.0); ///< Factor for scaling the muscle volume
      AnyFloat MuscleVolume ??= .Volume*0.17851; ///< Volume of the muscle (ml) (the fraction of the group volume is based on the strength of the previous model)
      AnyFloat MuscleVolumeSIScaled ??= ..VolumeUnitFactor*VolumeScaleFactor*MuscleVolume; ///< Scaled Volume of the muscle in SI base unit (m^3)
      AnyFloat OptimalFiberlength ??= _FIBER_LENGTH_DESIGNVAR(0.1055); ///< Optimal working length of the muscle fiber (m)
      AnyFloat TotalTendonLength ??= _TENDON_LENGTH_DESIGNVAR(0.01);///< The total tendon length (m)
      AnyFloat K1 ??= DesignVar(10); ///< K1 constant in the muscle model.  Factor for determining shortening speed at optimum length
      AnyFloat K2 ??= DesignVar(1); ///< K2 constant in the muscle model.  Factor for determining shortening speed at optimum length
      AnyFloat Epsilon0 ??= DesignVar(0.053); ///< Epsilon bar in the muscle model. Represents tendon strain at F0
      AnyFloat Fcfast ??= DesignVar(0.4); ///< Factor for determining shortening speed at optimum length
    };
    #endif

    #if BM_TRUNK_MUSCLES
    AnyFolder LongissimusCervicisT3C4 =
    {
      AnyString Muscle = "LongissimusCervicisT3C4"; ///< Descriptive name for the muscle, e.g. for plotting
      AnyIntVar MuscleElemAmount = 1; ///< The total amount of elements for this muscle
      AnyFloat Pennationangle ??= DesignVar(0); ///< Pennation angle of the muscle fibers (degres)
      AnyFloat VolumeScaleFactor ??= DesignVar(1.0); ///< Factor for scaling the muscle volume
      AnyFloat MuscleVolume ??= .Volume*0.19809; ///< Volume of the muscle (ml) (the fraction of the group volume is based on the strength of the previous model)
      AnyFloat MuscleVolumeSIScaled ??= ..VolumeUnitFactor*VolumeScaleFactor*MuscleVolume; ///< Scaled Volume of the muscle in SI base unit (m^3)
      AnyFloat OptimalFiberlength ??= _FIBER_LENGTH_DESIGNVAR(0.11707); ///< Optimal working length of the muscle fiber (m)
      AnyFloat TotalTendonLength ??= _TENDON_LENGTH_DESIGNVAR(0.01);///< The total tendon length (m)
      AnyFloat K1 ??= DesignVar(10); ///< K1 constant in the muscle model.  Factor for determining shortening speed at optimum length
      AnyFloat K2 ??= DesignVar(1); ///< K2 constant in the muscle model.  Factor for determining shortening speed at optimum length
      AnyFloat Epsilon0 ??= DesignVar(0.053); ///< Epsilon bar in the muscle model. Represents tendon strain at F0
      AnyFloat Fcfast ??= DesignVar(0.4); ///< Factor for determining shortening speed at optimum length
    };
    #endif

    #if BM_TRUNK_MUSCLES
    AnyFolder LongissimusCervicisT4C5 =
    {
      AnyString Muscle = "LongissimusCervicisT4C5"; ///< Descriptive name for the muscle, e.g. for plotting
      AnyIntVar MuscleElemAmount = 1; ///< The total amount of elements for this muscle
      AnyFloat Pennationangle ??= DesignVar(0); ///< Pennation angle of the muscle fibers (degres)
      AnyFloat VolumeScaleFactor ??= DesignVar(1.0); ///< Factor for scaling the muscle volume
      AnyFloat MuscleVolume ??= .Volume*0.21583; ///< Volume of the muscle (ml) (the fraction of the group volume is based on the strength of the previous model)
      AnyFloat MuscleVolumeSIScaled ??= ..VolumeUnitFactor*VolumeScaleFactor*MuscleVolume; ///< Scaled Volume of the muscle in SI base unit (m^3)
      AnyFloat OptimalFiberlength ??= _FIBER_LENGTH_DESIGNVAR(0.12756); ///< Optimal working length of the muscle fiber (m)
      AnyFloat TotalTendonLength ??= _TENDON_LENGTH_DESIGNVAR(0.01);///< The total tendon length (m)
      AnyFloat K1 ??= DesignVar(10); ///< K1 constant in the muscle model.  Factor for determining shortening speed at optimum length
      AnyFloat K2 ??= DesignVar(1); ///< K2 constant in the muscle model.  Factor for determining shortening speed at optimum length
      AnyFloat Epsilon0 ??= DesignVar(0.053); ///< Epsilon bar in the muscle model. Represents tendon strain at F0
      AnyFloat Fcfast ??= DesignVar(0.4); ///< Factor for determining shortening speed at optimum length
    };
    #endif

    #if BM_TRUNK_MUSCLES
    AnyFolder LongissimusCervicisT5C6 =
    {
      AnyString Muscle = "LongissimusCervicisT5C6"; ///< Descriptive name for the muscle, e.g. for plotting
      AnyIntVar MuscleElemAmount = 1; ///< The total amount of elements for this muscle
      AnyFloat Pennationangle ??= DesignVar(0); ///< Pennation angle of the muscle fibers (degres)
      AnyFloat VolumeScaleFactor ??= DesignVar(1.0); ///< Factor for scaling the muscle volume
      AnyFloat MuscleVolume ??= .Volume*0.24225; ///< Volume of the muscle (ml) (the fraction of the group volume is based on the strength of the previous model)
      AnyFloat MuscleVolumeSIScaled ??= ..VolumeUnitFactor*VolumeScaleFactor*MuscleVolume; ///< Scaled Volume of the muscle in SI base unit (m^3)
      AnyFloat OptimalFiberlength ??= _FIBER_LENGTH_DESIGNVAR(0.14318); ///< Optimal working length of the muscle fiber (m)
      AnyFloat TotalTendonLength ??= _TENDON_LENGTH_DESIGNVAR(0.01);///< The total tendon length (m)
      AnyFloat K1 ??= DesignVar(10); ///< K1 constant in the muscle model.  Factor for determining shortening speed at optimum length
      AnyFloat K2 ??= DesignVar(1); ///< K2 constant in the muscle model.  Factor for determining shortening speed at optimum length
      AnyFloat Epsilon0 ??= DesignVar(0.053); ///< Epsilon bar in the muscle model. Represents tendon strain at F0
      AnyFloat Fcfast ??= DesignVar(0.4); ///< Factor for determining shortening speed at optimum length
    };
    #endif
  }; // LongissimusCervicis group
  AnyFolder LongissimusThoracis =
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