/**^
This folder implements the simple muscle models for the trunk model.
Anatomical muscles are in many cases split into
several branches (elements). Strength parameters are split between the branches,
typically by uniform split.
*/

AnyFolder DefaultMusPar = {
  AnyVar PCSAfactor ??= ....StrengthParameters.SpecificMuscleTensionSpine; // = PCSAfactor in N/cm^2 , the PCSA itself is given in cm^2 so F0 is in Newton`s.
};

AnyVar StrengthScaleSpine = ...Scaling.StrengthScaling.Spine.StrengthScale;


AnyFolder Spinalis = {

    #if BM_TRUNK_MUSCLES
    AnyMuscleModel SpinalisL1T2 = {
        AnyFolder& MuscleParameters = ...Data.unscaled.ModelParameters.Muscles.Spinalis.SpinalisL1T2;
        AnyIntVar MuscleElemNo = 1; ///< The number of this element of the muscle
        AnyIntVar MuscleElemAmount = MuscleParameters.MuscleElemAmount; ///< The total amount of elements for this muscle
        F0 ??= ..DefaultMusPar.PCSAfactor*PCSA; ///< Maximum force output at optimum fiber length
        Lf0 ??= MuscleParameters.OptimalFiberlength / cos(pi/180*MuscleParameters.Pennationangle); //< Optimal fiber length corrected by pennation angle
        AnyVar PCSA ??= 1e4*..StrengthScaleSpine*MuscleParameters.MuscleVolumeSIScaled/(Lf0); ///< PCSA (cm2) of the individual element is total volumen divided by the sum of muscle element fiber lengths.
        Vol0 ??= (1e-4*PCSA) * Lf0; // New calculation of the vol for the specific muscle branch
    };
    #endif

    #if BM_TRUNK_MUSCLES
    AnyMuscleModel SpinalisL1T3 = {
        AnyFolder& MuscleParameters = ...Data.unscaled.ModelParameters.Muscles.Spinalis.SpinalisL1T3;
        AnyIntVar MuscleElemNo = 1; ///< The number of this element of the muscle
        AnyIntVar MuscleElemAmount = MuscleParameters.MuscleElemAmount; ///< The total amount of elements for this muscle
        F0 ??= ..DefaultMusPar.PCSAfactor*PCSA; ///< Maximum force output at optimum fiber length
        Lf0 ??= MuscleParameters.OptimalFiberlength / cos(pi/180*MuscleParameters.Pennationangle); //< Optimal fiber length corrected by pennation angle
        AnyVar PCSA ??= 1e4*..StrengthScaleSpine*MuscleParameters.MuscleVolumeSIScaled/(Lf0); ///< PCSA (cm2) of the individual element is total volumen divided by the sum of muscle element fiber lengths.
        Vol0 ??= (1e-4*PCSA) * Lf0; // New calculation of the vol for the specific muscle branch
    };
    #endif

    #if BM_TRUNK_MUSCLES
    AnyMuscleModel SpinalisL2T1 = {
        AnyFolder& MuscleParameters = ...Data.unscaled.ModelParameters.Muscles.Spinalis.SpinalisL2T1;
        AnyIntVar MuscleElemNo = 1; ///< The number of this element of the muscle
        AnyIntVar MuscleElemAmount = MuscleParameters.MuscleElemAmount; ///< The total amount of elements for this muscle
        F0 ??= ..DefaultMusPar.PCSAfactor*PCSA; ///< Maximum force output at optimum fiber length
        Lf0 ??= MuscleParameters.OptimalFiberlength / cos(pi/180*MuscleParameters.Pennationangle); //< Optimal fiber length corrected by pennation angle
        AnyVar PCSA ??= 1e4*..StrengthScaleSpine*MuscleParameters.MuscleVolumeSIScaled/(Lf0); ///< PCSA (cm2) of the individual element is total volumen divided by the sum of muscle element fiber lengths.
        Vol0 ??= (1e-4*PCSA) * Lf0; // New calculation of the vol for the specific muscle branch
    };
    #endif

    #if BM_TRUNK_MUSCLES
    AnyMuscleModel SpinalisT11T6 = {
        AnyFolder& MuscleParameters = ...Data.unscaled.ModelParameters.Muscles.Spinalis.SpinalisT11T6;
        AnyIntVar MuscleElemNo = 1; ///< The number of this element of the muscle
        AnyIntVar MuscleElemAmount = MuscleParameters.MuscleElemAmount; ///< The total amount of elements for this muscle
        F0 ??= ..DefaultMusPar.PCSAfactor*PCSA; ///< Maximum force output at optimum fiber length
        Lf0 ??= MuscleParameters.OptimalFiberlength / cos(pi/180*MuscleParameters.Pennationangle); //< Optimal fiber length corrected by pennation angle
        AnyVar PCSA ??= 1e4*..StrengthScaleSpine*MuscleParameters.MuscleVolumeSIScaled/(Lf0); ///< PCSA (cm2) of the individual element is total volumen divided by the sum of muscle element fiber lengths.
        Vol0 ??= (1e-4*PCSA) * Lf0; // New calculation of the vol for the specific muscle branch
    };
    #endif

    #if BM_TRUNK_MUSCLES
    AnyMuscleModel SpinalisT12T4 = {
        AnyFolder& MuscleParameters = ...Data.unscaled.ModelParameters.Muscles.Spinalis.SpinalisT12T4;
        AnyIntVar MuscleElemNo = 1; ///< The number of this element of the muscle
        AnyIntVar MuscleElemAmount = MuscleParameters.MuscleElemAmount; ///< The total amount of elements for this muscle
        F0 ??= ..DefaultMusPar.PCSAfactor*PCSA; ///< Maximum force output at optimum fiber length
        Lf0 ??= MuscleParameters.OptimalFiberlength / cos(pi/180*MuscleParameters.Pennationangle); //< Optimal fiber length corrected by pennation angle
        AnyVar PCSA ??= 1e4*..StrengthScaleSpine*MuscleParameters.MuscleVolumeSIScaled/(Lf0); ///< PCSA (cm2) of the individual element is total volumen divided by the sum of muscle element fiber lengths.
        Vol0 ??= (1e-4*PCSA) * Lf0; // New calculation of the vol for the specific muscle branch
    };
    #endif

    #if BM_TRUNK_MUSCLES
    AnyMuscleModel SpinalisT12T5 = {
        AnyFolder& MuscleParameters = ...Data.unscaled.ModelParameters.Muscles.Spinalis.SpinalisT12T5;
        AnyIntVar MuscleElemNo = 1; ///< The number of this element of the muscle
        AnyIntVar MuscleElemAmount = MuscleParameters.MuscleElemAmount; ///< The total amount of elements for this muscle
        F0 ??= ..DefaultMusPar.PCSAfactor*PCSA; ///< Maximum force output at optimum fiber length
        Lf0 ??= MuscleParameters.OptimalFiberlength / cos(pi/180*MuscleParameters.Pennationangle); //< Optimal fiber length corrected by pennation angle
        AnyVar PCSA ??= 1e4*..StrengthScaleSpine*MuscleParameters.MuscleVolumeSIScaled/(Lf0); ///< PCSA (cm2) of the individual element is total volumen divided by the sum of muscle element fiber lengths.
        Vol0 ??= (1e-4*PCSA) * Lf0; // New calculation of the vol for the specific muscle branch
    };
    #endif

};

AnyFolder TransversusSingle = {

    #if BM_TRUNK_MUSCLES & BM_TRUNK_CAVITY_MODEL == _CAVITY_MODEL_BUCKLE_
    AnyMuscleModel TransversusAbdominisL1 = {
        AnyFolder& MuscleParameters = ...Data.unscaled.ModelParameters.Muscles.TransversusSingle.TransversusAbdominisL1;
        AnyIntVar MuscleElemNo = 1; ///< The number of this element of the muscle
        AnyIntVar MuscleElemAmount = MuscleParameters.MuscleElemAmount; ///< The total amount of elements for this muscle
        F0 ??= ..DefaultMusPar.PCSAfactor*PCSA; ///< Maximum force output at optimum fiber length
        Lf0 ??= MuscleParameters.OptimalFiberlength / cos(pi/180*MuscleParameters.Pennationangle); //< Optimal fiber length corrected by pennation angle
        AnyVar PCSA ??= 1e4*..StrengthScaleSpine*MuscleParameters.MuscleVolumeSIScaled/(Lf0); ///< PCSA (cm2) of the individual element is total volumen divided by the sum of muscle element fiber lengths.
        Vol0 ??= (1e-4*PCSA) * Lf0; // New calculation of the vol for the specific muscle branch
    };
    #endif

    #if BM_TRUNK_MUSCLES & BM_TRUNK_CAVITY_MODEL == _CAVITY_MODEL_BUCKLE_
    AnyMuscleModel TransversusAbdominisL2 = {
        AnyFolder& MuscleParameters = ...Data.unscaled.ModelParameters.Muscles.TransversusSingle.TransversusAbdominisL2;
        AnyIntVar MuscleElemNo = 1; ///< The number of this element of the muscle
        AnyIntVar MuscleElemAmount = MuscleParameters.MuscleElemAmount; ///< The total amount of elements for this muscle
        F0 ??= ..DefaultMusPar.PCSAfactor*PCSA; ///< Maximum force output at optimum fiber length
        Lf0 ??= MuscleParameters.OptimalFiberlength / cos(pi/180*MuscleParameters.Pennationangle); //< Optimal fiber length corrected by pennation angle
        AnyVar PCSA ??= 1e4*..StrengthScaleSpine*MuscleParameters.MuscleVolumeSIScaled/(Lf0); ///< PCSA (cm2) of the individual element is total volumen divided by the sum of muscle element fiber lengths.
        Vol0 ??= (1e-4*PCSA) * Lf0; // New calculation of the vol for the specific muscle branch
    };
    #endif

    #if BM_TRUNK_MUSCLES & BM_TRUNK_CAVITY_MODEL == _CAVITY_MODEL_BUCKLE_
    AnyMuscleModel TransversusAbdominisL3 = {
        AnyFolder& MuscleParameters = ...Data.unscaled.ModelParameters.Muscles.TransversusSingle.TransversusAbdominisL3;
        AnyIntVar MuscleElemNo = 1; ///< The number of this element of the muscle
        AnyIntVar MuscleElemAmount = MuscleParameters.MuscleElemAmount; ///< The total amount of elements for this muscle
        F0 ??= ..DefaultMusPar.PCSAfactor*PCSA; ///< Maximum force output at optimum fiber length
        Lf0 ??= MuscleParameters.OptimalFiberlength / cos(pi/180*MuscleParameters.Pennationangle); //< Optimal fiber length corrected by pennation angle
        AnyVar PCSA ??= 1e4*..StrengthScaleSpine*MuscleParameters.MuscleVolumeSIScaled/(Lf0); ///< PCSA (cm2) of the individual element is total volumen divided by the sum of muscle element fiber lengths.
        Vol0 ??= (1e-4*PCSA) * Lf0; // New calculation of the vol for the specific muscle branch
    };
    #endif

    #if BM_TRUNK_MUSCLES & BM_TRUNK_CAVITY_MODEL == _CAVITY_MODEL_BUCKLE_
    AnyMuscleModel TransversusAbdominisL4 = {
        AnyFolder& MuscleParameters = ...Data.unscaled.ModelParameters.Muscles.TransversusSingle.TransversusAbdominisL4;
        AnyIntVar MuscleElemNo = 1; ///< The number of this element of the muscle
        AnyIntVar MuscleElemAmount = MuscleParameters.MuscleElemAmount; ///< The total amount of elements for this muscle
        F0 ??= ..DefaultMusPar.PCSAfactor*PCSA; ///< Maximum force output at optimum fiber length
        Lf0 ??= MuscleParameters.OptimalFiberlength / cos(pi/180*MuscleParameters.Pennationangle); //< Optimal fiber length corrected by pennation angle
        AnyVar PCSA ??= 1e4*..StrengthScaleSpine*MuscleParameters.MuscleVolumeSIScaled/(Lf0); ///< PCSA (cm2) of the individual element is total volumen divided by the sum of muscle element fiber lengths.
        Vol0 ??= (1e-4*PCSA) * Lf0; // New calculation of the vol for the specific muscle branch
    };
    #endif

    #if BM_TRUNK_MUSCLES & BM_TRUNK_CAVITY_MODEL == _CAVITY_MODEL_BUCKLE_
    AnyMuscleModel TransversusAbdominisL5 = {
        AnyFolder& MuscleParameters = ...Data.unscaled.ModelParameters.Muscles.TransversusSingle.TransversusAbdominisL5;
        AnyIntVar MuscleElemNo = 1; ///< The number of this element of the muscle
        AnyIntVar MuscleElemAmount = MuscleParameters.MuscleElemAmount; ///< The total amount of elements for this muscle
        F0 ??= ..DefaultMusPar.PCSAfactor*PCSA; ///< Maximum force output at optimum fiber length
        Lf0 ??= MuscleParameters.OptimalFiberlength / cos(pi/180*MuscleParameters.Pennationangle); //< Optimal fiber length corrected by pennation angle
        AnyVar PCSA ??= 1e4*..StrengthScaleSpine*MuscleParameters.MuscleVolumeSIScaled/(Lf0); ///< PCSA (cm2) of the individual element is total volumen divided by the sum of muscle element fiber lengths.
        Vol0 ??= (1e-4*PCSA) * Lf0; // New calculation of the vol for the specific muscle branch
    };
    #endif

};

AnyFolder Left = {

    AnyFolder Diaphragm = {

        #if BM_TRUNK_MUSCLES & BM_TRUNK_CAVITY_MODEL == _CAVITY_MODEL_VOLUME_
        AnyMuscleModel DiaphragmL1_1 = {
            AnyFolder& MuscleParameters = ....Data.unscaled.ModelParameters.Muscles.Diaphragm.DiaphragmL1_1;
            AnyIntVar MuscleElemNo = 1; ///< The number of this element of the muscle
            AnyIntVar MuscleElemAmount = MuscleParameters.MuscleElemAmount; ///< The total amount of elements for this muscle
            F0 ??= ...DefaultMusPar.PCSAfactor*PCSA; ///< Maximum force output at optimum fiber length
            Lf0 ??= MuscleParameters.OptimalFiberlength / cos(pi/180*MuscleParameters.Pennationangle); //< Optimal fiber length corrected by pennation angle
            AnyVar PCSA ??= 1e4*...StrengthScaleSpine*MuscleParameters.MuscleVolumeSIScaled/(Lf0); ///< PCSA (cm2) of the individual element is total volumen divided by the sum of muscle element fiber lengths.
            Vol0 ??= (1e-4*PCSA) * Lf0; // New calculation of the vol for the specific muscle branch
        };
        #endif

        #if BM_TRUNK_MUSCLES & BM_TRUNK_CAVITY_MODEL == _CAVITY_MODEL_VOLUME_
        AnyMuscleModel DiaphragmL1_2 = {
            AnyFolder& MuscleParameters = ....Data.unscaled.ModelParameters.Muscles.Diaphragm.DiaphragmL1_2;
            AnyIntVar MuscleElemNo = 1; ///< The number of this element of the muscle
            AnyIntVar MuscleElemAmount = MuscleParameters.MuscleElemAmount; ///< The total amount of elements for this muscle
            F0 ??= ...DefaultMusPar.PCSAfactor*PCSA; ///< Maximum force output at optimum fiber length
            Lf0 ??= MuscleParameters.OptimalFiberlength / cos(pi/180*MuscleParameters.Pennationangle); //< Optimal fiber length corrected by pennation angle
            AnyVar PCSA ??= 1e4*...StrengthScaleSpine*MuscleParameters.MuscleVolumeSIScaled/(Lf0); ///< PCSA (cm2) of the individual element is total volumen divided by the sum of muscle element fiber lengths.
            Vol0 ??= (1e-4*PCSA) * Lf0; // New calculation of the vol for the specific muscle branch
        };
        #endif

        #if BM_TRUNK_MUSCLES & BM_TRUNK_CAVITY_MODEL == _CAVITY_MODEL_VOLUME_
        AnyMuscleModel DiaphragmL2_1 = {
            AnyFolder& MuscleParameters = ....Data.unscaled.ModelParameters.Muscles.Diaphragm.DiaphragmL2_1;
            AnyIntVar MuscleElemNo = 1; ///< The number of this element of the muscle
            AnyIntVar MuscleElemAmount = MuscleParameters.MuscleElemAmount; ///< The total amount of elements for this muscle
            F0 ??= ...DefaultMusPar.PCSAfactor*PCSA; ///< Maximum force output at optimum fiber length
            Lf0 ??= MuscleParameters.OptimalFiberlength / cos(pi/180*MuscleParameters.Pennationangle); //< Optimal fiber length corrected by pennation angle
            AnyVar PCSA ??= 1e4*...StrengthScaleSpine*MuscleParameters.MuscleVolumeSIScaled/(Lf0); ///< PCSA (cm2) of the individual element is total volumen divided by the sum of muscle element fiber lengths.
            Vol0 ??= (1e-4*PCSA) * Lf0; // New calculation of the vol for the specific muscle branch
        };
        #endif

        #if BM_TRUNK_MUSCLES & BM_TRUNK_CAVITY_MODEL == _CAVITY_MODEL_VOLUME_
        AnyMuscleModel DiaphragmL2_2 = {
            AnyFolder& MuscleParameters = ....Data.unscaled.ModelParameters.Muscles.Diaphragm.DiaphragmL2_2;
            AnyIntVar MuscleElemNo = 1; ///< The number of this element of the muscle
            AnyIntVar MuscleElemAmount = MuscleParameters.MuscleElemAmount; ///< The total amount of elements for this muscle
            F0 ??= ...DefaultMusPar.PCSAfactor*PCSA; ///< Maximum force output at optimum fiber length
            Lf0 ??= MuscleParameters.OptimalFiberlength / cos(pi/180*MuscleParameters.Pennationangle); //< Optimal fiber length corrected by pennation angle
            AnyVar PCSA ??= 1e4*...StrengthScaleSpine*MuscleParameters.MuscleVolumeSIScaled/(Lf0); ///< PCSA (cm2) of the individual element is total volumen divided by the sum of muscle element fiber lengths.
            Vol0 ??= (1e-4*PCSA) * Lf0; // New calculation of the vol for the specific muscle branch
        };
        #endif

        #if BM_TRUNK_MUSCLES & BM_TRUNK_CAVITY_MODEL == _CAVITY_MODEL_VOLUME_
        AnyMuscleModel DiaphragmL1_3 = {
            AnyFolder& MuscleParameters = ....Data.unscaled.ModelParameters.Muscles.Diaphragm.DiaphragmL1_3;
            AnyIntVar MuscleElemNo = 1; ///< The number of this element of the muscle
            AnyIntVar MuscleElemAmount = MuscleParameters.MuscleElemAmount; ///< The total amount of elements for this muscle
            F0 ??= ...DefaultMusPar.PCSAfactor*PCSA; ///< Maximum force output at optimum fiber length
            Lf0 ??= MuscleParameters.OptimalFiberlength / cos(pi/180*MuscleParameters.Pennationangle); //< Optimal fiber length corrected by pennation angle
            AnyVar PCSA ??= 1e4*...StrengthScaleSpine*MuscleParameters.MuscleVolumeSIScaled/(Lf0); ///< PCSA (cm2) of the individual element is total volumen divided by the sum of muscle element fiber lengths.
            Vol0 ??= (1e-4*PCSA) * Lf0; // New calculation of the vol for the specific muscle branch
        };
        #endif

        #if BM_TRUNK_MUSCLES & BM_TRUNK_CAVITY_MODEL == _CAVITY_MODEL_VOLUME_
        AnyMuscleModel DiaphragmR12_1 = {
            AnyFolder& MuscleParameters = ....Data.unscaled.ModelParameters.Muscles.Diaphragm.DiaphragmR12_1;
            AnyIntVar MuscleElemNo = 1; ///< The number of this element of the muscle
            AnyIntVar MuscleElemAmount = MuscleParameters.MuscleElemAmount; ///< The total amount of elements for this muscle
            F0 ??= ...DefaultMusPar.PCSAfactor*PCSA; ///< Maximum force output at optimum fiber length
            Lf0 ??= MuscleParameters.OptimalFiberlength / cos(pi/180*MuscleParameters.Pennationangle); //< Optimal fiber length corrected by pennation angle
            AnyVar PCSA ??= 1e4*...StrengthScaleSpine*MuscleParameters.MuscleVolumeSIScaled/(Lf0); ///< PCSA (cm2) of the individual element is total volumen divided by the sum of muscle element fiber lengths.
            Vol0 ??= (1e-4*PCSA) * Lf0; // New calculation of the vol for the specific muscle branch
        };
        #endif

        #if BM_TRUNK_MUSCLES & BM_TRUNK_CAVITY_MODEL == _CAVITY_MODEL_VOLUME_
        AnyMuscleModel DiaphragmR12_2 = {
            AnyFolder& MuscleParameters = ....Data.unscaled.ModelParameters.Muscles.Diaphragm.DiaphragmR12_2;
            AnyIntVar MuscleElemNo = 1; ///< The number of this element of the muscle
            AnyIntVar MuscleElemAmount = MuscleParameters.MuscleElemAmount; ///< The total amount of elements for this muscle
            F0 ??= ...DefaultMusPar.PCSAfactor*PCSA; ///< Maximum force output at optimum fiber length
            Lf0 ??= MuscleParameters.OptimalFiberlength / cos(pi/180*MuscleParameters.Pennationangle); //< Optimal fiber length corrected by pennation angle
            AnyVar PCSA ??= 1e4*...StrengthScaleSpine*MuscleParameters.MuscleVolumeSIScaled/(Lf0); ///< PCSA (cm2) of the individual element is total volumen divided by the sum of muscle element fiber lengths.
            Vol0 ??= (1e-4*PCSA) * Lf0; // New calculation of the vol for the specific muscle branch
        };
        #endif

        #if BM_TRUNK_MUSCLES & BM_TRUNK_CAVITY_MODEL == _CAVITY_MODEL_VOLUME_
        AnyMuscleModel DiaphragmR11_1 = {
            AnyFolder& MuscleParameters = ....Data.unscaled.ModelParameters.Muscles.Diaphragm.DiaphragmR11_1;
            AnyIntVar MuscleElemNo = 1; ///< The number of this element of the muscle
            AnyIntVar MuscleElemAmount = MuscleParameters.MuscleElemAmount; ///< The total amount of elements for this muscle
            F0 ??= ...DefaultMusPar.PCSAfactor*PCSA; ///< Maximum force output at optimum fiber length
            Lf0 ??= MuscleParameters.OptimalFiberlength / cos(pi/180*MuscleParameters.Pennationangle); //< Optimal fiber length corrected by pennation angle
            AnyVar PCSA ??= 1e4*...StrengthScaleSpine*MuscleParameters.MuscleVolumeSIScaled/(Lf0); ///< PCSA (cm2) of the individual element is total volumen divided by the sum of muscle element fiber lengths.
            Vol0 ??= (1e-4*PCSA) * Lf0; // New calculation of the vol for the specific muscle branch
        };
        #endif

        #if BM_TRUNK_MUSCLES & BM_TRUNK_CAVITY_MODEL == _CAVITY_MODEL_VOLUME_
        AnyMuscleModel DiaphragmR11_2 = {
            AnyFolder& MuscleParameters = ....Data.unscaled.ModelParameters.Muscles.Diaphragm.DiaphragmR11_2;
            AnyIntVar MuscleElemNo = 1; ///< The number of this element of the muscle
            AnyIntVar MuscleElemAmount = MuscleParameters.MuscleElemAmount; ///< The total amount of elements for this muscle
            F0 ??= ...DefaultMusPar.PCSAfactor*PCSA; ///< Maximum force output at optimum fiber length
            Lf0 ??= MuscleParameters.OptimalFiberlength / cos(pi/180*MuscleParameters.Pennationangle); //< Optimal fiber length corrected by pennation angle
            AnyVar PCSA ??= 1e4*...StrengthScaleSpine*MuscleParameters.MuscleVolumeSIScaled/(Lf0); ///< PCSA (cm2) of the individual element is total volumen divided by the sum of muscle element fiber lengths.
            Vol0 ??= (1e-4*PCSA) * Lf0; // New calculation of the vol for the specific muscle branch
        };
        #endif

        #if BM_TRUNK_MUSCLES & BM_TRUNK_CAVITY_MODEL == _CAVITY_MODEL_VOLUME_
        AnyMuscleModel DiaphragmR11_3 = {
            AnyFolder& MuscleParameters = ....Data.unscaled.ModelParameters.Muscles.Diaphragm.DiaphragmR11_3;
            AnyIntVar MuscleElemNo = 1; ///< The number of this element of the muscle
            AnyIntVar MuscleElemAmount = MuscleParameters.MuscleElemAmount; ///< The total amount of elements for this muscle
            F0 ??= ...DefaultMusPar.PCSAfactor*PCSA; ///< Maximum force output at optimum fiber length
            Lf0 ??= MuscleParameters.OptimalFiberlength / cos(pi/180*MuscleParameters.Pennationangle); //< Optimal fiber length corrected by pennation angle
            AnyVar PCSA ??= 1e4*...StrengthScaleSpine*MuscleParameters.MuscleVolumeSIScaled/(Lf0); ///< PCSA (cm2) of the individual element is total volumen divided by the sum of muscle element fiber lengths.
            Vol0 ??= (1e-4*PCSA) * Lf0; // New calculation of the vol for the specific muscle branch
        };
        #endif

        #if BM_TRUNK_MUSCLES & BM_TRUNK_CAVITY_MODEL == _CAVITY_MODEL_VOLUME_
        AnyMuscleModel DiaphragmR10_1 = {
            AnyFolder& MuscleParameters = ....Data.unscaled.ModelParameters.Muscles.Diaphragm.DiaphragmR10_1;
            AnyIntVar MuscleElemNo = 1; ///< The number of this element of the muscle
            AnyIntVar MuscleElemAmount = MuscleParameters.MuscleElemAmount; ///< The total amount of elements for this muscle
            F0 ??= ...DefaultMusPar.PCSAfactor*PCSA; ///< Maximum force output at optimum fiber length
            Lf0 ??= MuscleParameters.OptimalFiberlength / cos(pi/180*MuscleParameters.Pennationangle); //< Optimal fiber length corrected by pennation angle
            AnyVar PCSA ??= 1e4*...StrengthScaleSpine*MuscleParameters.MuscleVolumeSIScaled/(Lf0); ///< PCSA (cm2) of the individual element is total volumen divided by the sum of muscle element fiber lengths.
            Vol0 ??= (1e-4*PCSA) * Lf0; // New calculation of the vol for the specific muscle branch
        };
        #endif

        #if BM_TRUNK_MUSCLES & BM_TRUNK_CAVITY_MODEL == _CAVITY_MODEL_VOLUME_
        AnyMuscleModel DiaphragmR10_2 = {
            AnyFolder& MuscleParameters = ....Data.unscaled.ModelParameters.Muscles.Diaphragm.DiaphragmR10_2;
            AnyIntVar MuscleElemNo = 1; ///< The number of this element of the muscle
            AnyIntVar MuscleElemAmount = MuscleParameters.MuscleElemAmount; ///< The total amount of elements for this muscle
            F0 ??= ...DefaultMusPar.PCSAfactor*PCSA; ///< Maximum force output at optimum fiber length
            Lf0 ??= MuscleParameters.OptimalFiberlength / cos(pi/180*MuscleParameters.Pennationangle); //< Optimal fiber length corrected by pennation angle
            AnyVar PCSA ??= 1e4*...StrengthScaleSpine*MuscleParameters.MuscleVolumeSIScaled/(Lf0); ///< PCSA (cm2) of the individual element is total volumen divided by the sum of muscle element fiber lengths.
            Vol0 ??= (1e-4*PCSA) * Lf0; // New calculation of the vol for the specific muscle branch
        };
        #endif

        #if BM_TRUNK_MUSCLES & BM_TRUNK_CAVITY_MODEL == _CAVITY_MODEL_VOLUME_
        AnyMuscleModel DiaphragmR10_3 = {
            AnyFolder& MuscleParameters = ....Data.unscaled.ModelParameters.Muscles.Diaphragm.DiaphragmR10_3;
            AnyIntVar MuscleElemNo = 1; ///< The number of this element of the muscle
            AnyIntVar MuscleElemAmount = MuscleParameters.MuscleElemAmount; ///< The total amount of elements for this muscle
            F0 ??= ...DefaultMusPar.PCSAfactor*PCSA; ///< Maximum force output at optimum fiber length
            Lf0 ??= MuscleParameters.OptimalFiberlength / cos(pi/180*MuscleParameters.Pennationangle); //< Optimal fiber length corrected by pennation angle
            AnyVar PCSA ??= 1e4*...StrengthScaleSpine*MuscleParameters.MuscleVolumeSIScaled/(Lf0); ///< PCSA (cm2) of the individual element is total volumen divided by the sum of muscle element fiber lengths.
            Vol0 ??= (1e-4*PCSA) * Lf0; // New calculation of the vol for the specific muscle branch
        };
        #endif

        #if BM_TRUNK_MUSCLES & BM_TRUNK_CAVITY_MODEL == _CAVITY_MODEL_VOLUME_
        AnyMuscleModel DiaphragmCC_1 = {
            AnyFolder& MuscleParameters = ....Data.unscaled.ModelParameters.Muscles.Diaphragm.DiaphragmCC_1;
            AnyIntVar MuscleElemNo = 1; ///< The number of this element of the muscle
            AnyIntVar MuscleElemAmount = MuscleParameters.MuscleElemAmount; ///< The total amount of elements for this muscle
            F0 ??= ...DefaultMusPar.PCSAfactor*PCSA; ///< Maximum force output at optimum fiber length
            Lf0 ??= MuscleParameters.OptimalFiberlength / cos(pi/180*MuscleParameters.Pennationangle); //< Optimal fiber length corrected by pennation angle
            AnyVar PCSA ??= 1e4*...StrengthScaleSpine*MuscleParameters.MuscleVolumeSIScaled/(Lf0); ///< PCSA (cm2) of the individual element is total volumen divided by the sum of muscle element fiber lengths.
            Vol0 ??= (1e-4*PCSA) * Lf0; // New calculation of the vol for the specific muscle branch
        };
        #endif

        #if BM_TRUNK_MUSCLES & BM_TRUNK_CAVITY_MODEL == _CAVITY_MODEL_VOLUME_
        AnyMuscleModel DiaphragmCC_2 = {
            AnyFolder& MuscleParameters = ....Data.unscaled.ModelParameters.Muscles.Diaphragm.DiaphragmCC_2;
            AnyIntVar MuscleElemNo = 1; ///< The number of this element of the muscle
            AnyIntVar MuscleElemAmount = MuscleParameters.MuscleElemAmount; ///< The total amount of elements for this muscle
            F0 ??= ...DefaultMusPar.PCSAfactor*PCSA; ///< Maximum force output at optimum fiber length
            Lf0 ??= MuscleParameters.OptimalFiberlength / cos(pi/180*MuscleParameters.Pennationangle); //< Optimal fiber length corrected by pennation angle
            AnyVar PCSA ??= 1e4*...StrengthScaleSpine*MuscleParameters.MuscleVolumeSIScaled/(Lf0); ///< PCSA (cm2) of the individual element is total volumen divided by the sum of muscle element fiber lengths.
            Vol0 ??= (1e-4*PCSA) * Lf0; // New calculation of the vol for the specific muscle branch
        };
        #endif

        #if BM_TRUNK_MUSCLES & BM_TRUNK_CAVITY_MODEL == _CAVITY_MODEL_VOLUME_
        AnyMuscleModel DiaphragmCC_3 = {
            AnyFolder& MuscleParameters = ....Data.unscaled.ModelParameters.Muscles.Diaphragm.DiaphragmCC_3;
            AnyIntVar MuscleElemNo = 1; ///< The number of this element of the muscle
            AnyIntVar MuscleElemAmount = MuscleParameters.MuscleElemAmount; ///< The total amount of elements for this muscle
            F0 ??= ...DefaultMusPar.PCSAfactor*PCSA; ///< Maximum force output at optimum fiber length
            Lf0 ??= MuscleParameters.OptimalFiberlength / cos(pi/180*MuscleParameters.Pennationangle); //< Optimal fiber length corrected by pennation angle
            AnyVar PCSA ??= 1e4*...StrengthScaleSpine*MuscleParameters.MuscleVolumeSIScaled/(Lf0); ///< PCSA (cm2) of the individual element is total volumen divided by the sum of muscle element fiber lengths.
            Vol0 ??= (1e-4*PCSA) * Lf0; // New calculation of the vol for the specific muscle branch
        };
        #endif

        #if BM_TRUNK_MUSCLES & BM_TRUNK_CAVITY_MODEL == _CAVITY_MODEL_VOLUME_
        AnyMuscleModel DiaphragmCC_4 = {
            AnyFolder& MuscleParameters = ....Data.unscaled.ModelParameters.Muscles.Diaphragm.DiaphragmCC_4;
            AnyIntVar MuscleElemNo = 1; ///< The number of this element of the muscle
            AnyIntVar MuscleElemAmount = MuscleParameters.MuscleElemAmount; ///< The total amount of elements for this muscle
            F0 ??= ...DefaultMusPar.PCSAfactor*PCSA; ///< Maximum force output at optimum fiber length
            Lf0 ??= MuscleParameters.OptimalFiberlength / cos(pi/180*MuscleParameters.Pennationangle); //< Optimal fiber length corrected by pennation angle
            AnyVar PCSA ??= 1e4*...StrengthScaleSpine*MuscleParameters.MuscleVolumeSIScaled/(Lf0); ///< PCSA (cm2) of the individual element is total volumen divided by the sum of muscle element fiber lengths.
            Vol0 ??= (1e-4*PCSA) * Lf0; // New calculation of the vol for the specific muscle branch
        };
        #endif

        #if BM_TRUNK_MUSCLES & BM_TRUNK_CAVITY_MODEL == _CAVITY_MODEL_VOLUME_
        AnyMuscleModel DiaphragmCC_5 = {
            AnyFolder& MuscleParameters = ....Data.unscaled.ModelParameters.Muscles.Diaphragm.DiaphragmCC_5;
            AnyIntVar MuscleElemNo = 1; ///< The number of this element of the muscle
            AnyIntVar MuscleElemAmount = MuscleParameters.MuscleElemAmount; ///< The total amount of elements for this muscle
            F0 ??= ...DefaultMusPar.PCSAfactor*PCSA; ///< Maximum force output at optimum fiber length
            Lf0 ??= MuscleParameters.OptimalFiberlength / cos(pi/180*MuscleParameters.Pennationangle); //< Optimal fiber length corrected by pennation angle
            AnyVar PCSA ??= 1e4*...StrengthScaleSpine*MuscleParameters.MuscleVolumeSIScaled/(Lf0); ///< PCSA (cm2) of the individual element is total volumen divided by the sum of muscle element fiber lengths.
            Vol0 ??= (1e-4*PCSA) * Lf0; // New calculation of the vol for the specific muscle branch
        };
        #endif

        #if BM_TRUNK_MUSCLES & BM_TRUNK_CAVITY_MODEL == _CAVITY_MODEL_VOLUME_
        AnyMuscleModel DiaphragmCC_6 = {
            AnyFolder& MuscleParameters = ....Data.unscaled.ModelParameters.Muscles.Diaphragm.DiaphragmCC_6;
            AnyIntVar MuscleElemNo = 1; ///< The number of this element of the muscle
            AnyIntVar MuscleElemAmount = MuscleParameters.MuscleElemAmount; ///< The total amount of elements for this muscle
            F0 ??= ...DefaultMusPar.PCSAfactor*PCSA; ///< Maximum force output at optimum fiber length
            Lf0 ??= MuscleParameters.OptimalFiberlength / cos(pi/180*MuscleParameters.Pennationangle); //< Optimal fiber length corrected by pennation angle
            AnyVar PCSA ??= 1e4*...StrengthScaleSpine*MuscleParameters.MuscleVolumeSIScaled/(Lf0); ///< PCSA (cm2) of the individual element is total volumen divided by the sum of muscle element fiber lengths.
            Vol0 ??= (1e-4*PCSA) * Lf0; // New calculation of the vol for the specific muscle branch
        };
        #endif

        #if BM_TRUNK_MUSCLES & BM_TRUNK_CAVITY_MODEL == _CAVITY_MODEL_VOLUME_
        AnyMuscleModel DiaphragmCC_7 = {
            AnyFolder& MuscleParameters = ....Data.unscaled.ModelParameters.Muscles.Diaphragm.DiaphragmCC_7;
            AnyIntVar MuscleElemNo = 1; ///< The number of this element of the muscle
            AnyIntVar MuscleElemAmount = MuscleParameters.MuscleElemAmount; ///< The total amount of elements for this muscle
            F0 ??= ...DefaultMusPar.PCSAfactor*PCSA; ///< Maximum force output at optimum fiber length
            Lf0 ??= MuscleParameters.OptimalFiberlength / cos(pi/180*MuscleParameters.Pennationangle); //< Optimal fiber length corrected by pennation angle
            AnyVar PCSA ??= 1e4*...StrengthScaleSpine*MuscleParameters.MuscleVolumeSIScaled/(Lf0); ///< PCSA (cm2) of the individual element is total volumen divided by the sum of muscle element fiber lengths.
            Vol0 ??= (1e-4*PCSA) * Lf0; // New calculation of the vol for the specific muscle branch
        };
        #endif

        #if BM_TRUNK_MUSCLES & BM_TRUNK_CAVITY_MODEL == _CAVITY_MODEL_VOLUME_
        AnyMuscleModel DiaphragmXiphoid = {
            AnyFolder& MuscleParameters = ....Data.unscaled.ModelParameters.Muscles.Diaphragm.DiaphragmXiphoid;
            AnyIntVar MuscleElemNo = 1; ///< The number of this element of the muscle
            AnyIntVar MuscleElemAmount = MuscleParameters.MuscleElemAmount; ///< The total amount of elements for this muscle
            F0 ??= ...DefaultMusPar.PCSAfactor*PCSA; ///< Maximum force output at optimum fiber length
            Lf0 ??= MuscleParameters.OptimalFiberlength / cos(pi/180*MuscleParameters.Pennationangle); //< Optimal fiber length corrected by pennation angle
            AnyVar PCSA ??= 1e4*...StrengthScaleSpine*MuscleParameters.MuscleVolumeSIScaled/(Lf0); ///< PCSA (cm2) of the individual element is total volumen divided by the sum of muscle element fiber lengths.
            Vol0 ??= (1e-4*PCSA) * Lf0; // New calculation of the vol for the specific muscle branch
        };
        #endif

    };

    AnyFolder Hyoid = {

        #if BM_TRUNK_MUSCLES
        AnyMuscleModel LumpedHyoidStC0 = {
            AnyFolder& MuscleParameters = ....Data.unscaled.ModelParameters.Muscles.Hyoid.LumpedHyoidStC0;
            AnyIntVar MuscleElemNo = 1; ///< The number of this element of the muscle
            AnyIntVar MuscleElemAmount = MuscleParameters.MuscleElemAmount; ///< The total amount of elements for this muscle
            F0 ??= ...DefaultMusPar.PCSAfactor*PCSA; ///< Maximum force output at optimum fiber length
            Lf0 ??= MuscleParameters.OptimalFiberlength / cos(pi/180*MuscleParameters.Pennationangle); //< Optimal fiber length corrected by pennation angle
            AnyVar PCSA ??= 1e4*...StrengthScaleSpine*MuscleParameters.MuscleVolumeSIScaled/(Lf0); ///< PCSA (cm2) of the individual element is total volumen divided by the sum of muscle element fiber lengths.
            Vol0 ??= (1e-4*PCSA) * Lf0; // New calculation of the vol for the specific muscle branch
        };
        #endif

    };

    AnyFolder IliocostalisCervicis = {

        #if BM_TRUNK_MUSCLES
        AnyMuscleModel IliocostalisCervicisR3C4 = {
            AnyFolder& MuscleParameters = ....Data.unscaled.ModelParameters.Muscles.IliocostalisCervicis.IliocostalisCervicisR3C4;
            AnyIntVar MuscleElemNo = 1; ///< The number of this element of the muscle
            AnyIntVar MuscleElemAmount = MuscleParameters.MuscleElemAmount; ///< The total amount of elements for this muscle
            F0 ??= ...DefaultMusPar.PCSAfactor*PCSA; ///< Maximum force output at optimum fiber length
            Lf0 ??= MuscleParameters.OptimalFiberlength / cos(pi/180*MuscleParameters.Pennationangle); //< Optimal fiber length corrected by pennation angle
            AnyVar PCSA ??= 1e4*...StrengthScaleSpine*MuscleParameters.MuscleVolumeSIScaled/(Lf0); ///< PCSA (cm2) of the individual element is total volumen divided by the sum of muscle element fiber lengths.
            Vol0 ??= (1e-4*PCSA) * Lf0; // New calculation of the vol for the specific muscle branch
        };
        #endif

        #if BM_TRUNK_MUSCLES
        AnyMuscleModel IliocostalisCervicisR4C5 = {
            AnyFolder& MuscleParameters = ....Data.unscaled.ModelParameters.Muscles.IliocostalisCervicis.IliocostalisCervicisR4C5;
            AnyIntVar MuscleElemNo = 1; ///< The number of this element of the muscle
            AnyIntVar MuscleElemAmount = MuscleParameters.MuscleElemAmount; ///< The total amount of elements for this muscle
            F0 ??= ...DefaultMusPar.PCSAfactor*PCSA; ///< Maximum force output at optimum fiber length
            Lf0 ??= MuscleParameters.OptimalFiberlength / cos(pi/180*MuscleParameters.Pennationangle); //< Optimal fiber length corrected by pennation angle
            AnyVar PCSA ??= 1e4*...StrengthScaleSpine*MuscleParameters.MuscleVolumeSIScaled/(Lf0); ///< PCSA (cm2) of the individual element is total volumen divided by the sum of muscle element fiber lengths.
            Vol0 ??= (1e-4*PCSA) * Lf0; // New calculation of the vol for the specific muscle branch
        };
        #endif

        #if BM_TRUNK_MUSCLES
        AnyMuscleModel IliocostalisCervicisR5C6 = {
            AnyFolder& MuscleParameters = ....Data.unscaled.ModelParameters.Muscles.IliocostalisCervicis.IliocostalisCervicisR5C6;
            AnyIntVar MuscleElemNo = 1; ///< The number of this element of the muscle
            AnyIntVar MuscleElemAmount = MuscleParameters.MuscleElemAmount; ///< The total amount of elements for this muscle
            F0 ??= ...DefaultMusPar.PCSAfactor*PCSA; ///< Maximum force output at optimum fiber length
            Lf0 ??= MuscleParameters.OptimalFiberlength / cos(pi/180*MuscleParameters.Pennationangle); //< Optimal fiber length corrected by pennation angle
            AnyVar PCSA ??= 1e4*...StrengthScaleSpine*MuscleParameters.MuscleVolumeSIScaled/(Lf0); ///< PCSA (cm2) of the individual element is total volumen divided by the sum of muscle element fiber lengths.
            Vol0 ??= (1e-4*PCSA) * Lf0; // New calculation of the vol for the specific muscle branch
        };
        #endif

        #if BM_TRUNK_MUSCLES
        AnyMuscleModel IliocostalisCervicisR6C4 = {
            AnyFolder& MuscleParameters = ....Data.unscaled.ModelParameters.Muscles.IliocostalisCervicis.IliocostalisCervicisR6C4;
            AnyIntVar MuscleElemNo = 1; ///< The number of this element of the muscle
            AnyIntVar MuscleElemAmount = MuscleParameters.MuscleElemAmount; ///< The total amount of elements for this muscle
            F0 ??= ...DefaultMusPar.PCSAfactor*PCSA; ///< Maximum force output at optimum fiber length
            Lf0 ??= MuscleParameters.OptimalFiberlength / cos(pi/180*MuscleParameters.Pennationangle); //< Optimal fiber length corrected by pennation angle
            AnyVar PCSA ??= 1e4*...StrengthScaleSpine*MuscleParameters.MuscleVolumeSIScaled/(Lf0); ///< PCSA (cm2) of the individual element is total volumen divided by the sum of muscle element fiber lengths.
            Vol0 ??= (1e-4*PCSA) * Lf0; // New calculation of the vol for the specific muscle branch
        };
        #endif

    };

    AnyFolder IliocostalisLumborum = {

        #if BM_TRUNK_MUSCLES
        AnyMuscleModel IliocostalisLumborumL1 = {
            AnyFolder& MuscleParameters = ....Data.unscaled.ModelParameters.Muscles.IliocostalisLumborum.IliocostalisLumborumL1;
            AnyIntVar MuscleElemNo = 1; ///< The number of this element of the muscle
            AnyIntVar MuscleElemAmount = MuscleParameters.MuscleElemAmount; ///< The total amount of elements for this muscle
            F0 ??= ...DefaultMusPar.PCSAfactor*PCSA; ///< Maximum force output at optimum fiber length
            Lf0 ??= MuscleParameters.OptimalFiberlength / cos(pi/180*MuscleParameters.Pennationangle); //< Optimal fiber length corrected by pennation angle
            AnyVar PCSA ??= 1e4*...StrengthScaleSpine*MuscleParameters.MuscleVolumeSIScaled/(Lf0); ///< PCSA (cm2) of the individual element is total volumen divided by the sum of muscle element fiber lengths.
            Vol0 ??= (1e-4*PCSA) * Lf0; // New calculation of the vol for the specific muscle branch
        };
        #endif

        #if BM_TRUNK_MUSCLES
        AnyMuscleModel IliocostalisLumborumL2 = {
            AnyFolder& MuscleParameters = ....Data.unscaled.ModelParameters.Muscles.IliocostalisLumborum.IliocostalisLumborumL2;
            AnyIntVar MuscleElemNo = 1; ///< The number of this element of the muscle
            AnyIntVar MuscleElemAmount = MuscleParameters.MuscleElemAmount; ///< The total amount of elements for this muscle
            F0 ??= ...DefaultMusPar.PCSAfactor*PCSA; ///< Maximum force output at optimum fiber length
            Lf0 ??= MuscleParameters.OptimalFiberlength / cos(pi/180*MuscleParameters.Pennationangle); //< Optimal fiber length corrected by pennation angle
            AnyVar PCSA ??= 1e4*...StrengthScaleSpine*MuscleParameters.MuscleVolumeSIScaled/(Lf0); ///< PCSA (cm2) of the individual element is total volumen divided by the sum of muscle element fiber lengths.
            Vol0 ??= (1e-4*PCSA) * Lf0; // New calculation of the vol for the specific muscle branch
        };
        #endif

        #if BM_TRUNK_MUSCLES
        AnyMuscleModel IliocostalisLumborumL3 = {
            AnyFolder& MuscleParameters = ....Data.unscaled.ModelParameters.Muscles.IliocostalisLumborum.IliocostalisLumborumL3;
            AnyIntVar MuscleElemNo = 1; ///< The number of this element of the muscle
            AnyIntVar MuscleElemAmount = MuscleParameters.MuscleElemAmount; ///< The total amount of elements for this muscle
            F0 ??= ...DefaultMusPar.PCSAfactor*PCSA; ///< Maximum force output at optimum fiber length
            Lf0 ??= MuscleParameters.OptimalFiberlength / cos(pi/180*MuscleParameters.Pennationangle); //< Optimal fiber length corrected by pennation angle
            AnyVar PCSA ??= 1e4*...StrengthScaleSpine*MuscleParameters.MuscleVolumeSIScaled/(Lf0); ///< PCSA (cm2) of the individual element is total volumen divided by the sum of muscle element fiber lengths.
            Vol0 ??= (1e-4*PCSA) * Lf0; // New calculation of the vol for the specific muscle branch
        };
        #endif

        #if BM_TRUNK_MUSCLES
        AnyMuscleModel IliocostalisLumborumL4 = {
            AnyFolder& MuscleParameters = ....Data.unscaled.ModelParameters.Muscles.IliocostalisLumborum.IliocostalisLumborumL4;
            AnyIntVar MuscleElemNo = 1; ///< The number of this element of the muscle
            AnyIntVar MuscleElemAmount = MuscleParameters.MuscleElemAmount; ///< The total amount of elements for this muscle
            F0 ??= ...DefaultMusPar.PCSAfactor*PCSA; ///< Maximum force output at optimum fiber length
            Lf0 ??= MuscleParameters.OptimalFiberlength / cos(pi/180*MuscleParameters.Pennationangle); //< Optimal fiber length corrected by pennation angle
            AnyVar PCSA ??= 1e4*...StrengthScaleSpine*MuscleParameters.MuscleVolumeSIScaled/(Lf0); ///< PCSA (cm2) of the individual element is total volumen divided by the sum of muscle element fiber lengths.
            Vol0 ??= (1e-4*PCSA) * Lf0; // New calculation of the vol for the specific muscle branch
        };
        #endif

        #if BM_TRUNK_MUSCLES
        AnyMuscleModel IliocostalisLumborumR5 = {
            AnyFolder& MuscleParameters = ....Data.unscaled.ModelParameters.Muscles.IliocostalisLumborum.IliocostalisLumborumR5;
            AnyIntVar MuscleElemNo = 1; ///< The number of this element of the muscle
            AnyIntVar MuscleElemAmount = MuscleParameters.MuscleElemAmount; ///< The total amount of elements for this muscle
            F0 ??= ...DefaultMusPar.PCSAfactor*PCSA; ///< Maximum force output at optimum fiber length
            Lf0 ??= MuscleParameters.OptimalFiberlength / cos(pi/180*MuscleParameters.Pennationangle); //< Optimal fiber length corrected by pennation angle
            AnyVar PCSA ??= 1e4*...StrengthScaleSpine*MuscleParameters.MuscleVolumeSIScaled/(Lf0); ///< PCSA (cm2) of the individual element is total volumen divided by the sum of muscle element fiber lengths.
            Vol0 ??= (1e-4*PCSA) * Lf0; // New calculation of the vol for the specific muscle branch
        };
        #endif

        #if BM_TRUNK_MUSCLES
        AnyMuscleModel IliocostalisLumborumR6 = {
            AnyFolder& MuscleParameters = ....Data.unscaled.ModelParameters.Muscles.IliocostalisLumborum.IliocostalisLumborumR6;
            AnyIntVar MuscleElemNo = 1; ///< The number of this element of the muscle
            AnyIntVar MuscleElemAmount = MuscleParameters.MuscleElemAmount; ///< The total amount of elements for this muscle
            F0 ??= ...DefaultMusPar.PCSAfactor*PCSA; ///< Maximum force output at optimum fiber length
            Lf0 ??= MuscleParameters.OptimalFiberlength / cos(pi/180*MuscleParameters.Pennationangle); //< Optimal fiber length corrected by pennation angle
            AnyVar PCSA ??= 1e4*...StrengthScaleSpine*MuscleParameters.MuscleVolumeSIScaled/(Lf0); ///< PCSA (cm2) of the individual element is total volumen divided by the sum of muscle element fiber lengths.
            Vol0 ??= (1e-4*PCSA) * Lf0; // New calculation of the vol for the specific muscle branch
        };
        #endif

        #if BM_TRUNK_MUSCLES
        AnyMuscleModel IliocostalisLumborumR7 = {
            AnyFolder& MuscleParameters = ....Data.unscaled.ModelParameters.Muscles.IliocostalisLumborum.IliocostalisLumborumR7;
            AnyIntVar MuscleElemNo = 1; ///< The number of this element of the muscle
            AnyIntVar MuscleElemAmount = MuscleParameters.MuscleElemAmount; ///< The total amount of elements for this muscle
            F0 ??= ...DefaultMusPar.PCSAfactor*PCSA; ///< Maximum force output at optimum fiber length
            Lf0 ??= MuscleParameters.OptimalFiberlength / cos(pi/180*MuscleParameters.Pennationangle); //< Optimal fiber length corrected by pennation angle
            AnyVar PCSA ??= 1e4*...StrengthScaleSpine*MuscleParameters.MuscleVolumeSIScaled/(Lf0); ///< PCSA (cm2) of the individual element is total volumen divided by the sum of muscle element fiber lengths.
            Vol0 ??= (1e-4*PCSA) * Lf0; // New calculation of the vol for the specific muscle branch
        };
        #endif

        #if BM_TRUNK_MUSCLES
        AnyMuscleModel IliocostalisLumborumR8 = {
            AnyFolder& MuscleParameters = ....Data.unscaled.ModelParameters.Muscles.IliocostalisLumborum.IliocostalisLumborumR8;
            AnyIntVar MuscleElemNo = 1; ///< The number of this element of the muscle
            AnyIntVar MuscleElemAmount = MuscleParameters.MuscleElemAmount; ///< The total amount of elements for this muscle
            F0 ??= ...DefaultMusPar.PCSAfactor*PCSA; ///< Maximum force output at optimum fiber length
            Lf0 ??= MuscleParameters.OptimalFiberlength / cos(pi/180*MuscleParameters.Pennationangle); //< Optimal fiber length corrected by pennation angle
            AnyVar PCSA ??= 1e4*...StrengthScaleSpine*MuscleParameters.MuscleVolumeSIScaled/(Lf0); ///< PCSA (cm2) of the individual element is total volumen divided by the sum of muscle element fiber lengths.
            Vol0 ??= (1e-4*PCSA) * Lf0; // New calculation of the vol for the specific muscle branch
        };
        #endif

        #if BM_TRUNK_MUSCLES
        AnyMuscleModel IliocostalisLumborumR9 = {
            AnyFolder& MuscleParameters = ....Data.unscaled.ModelParameters.Muscles.IliocostalisLumborum.IliocostalisLumborumR9;
            AnyIntVar MuscleElemNo = 1; ///< The number of this element of the muscle
            AnyIntVar MuscleElemAmount = MuscleParameters.MuscleElemAmount; ///< The total amount of elements for this muscle
            F0 ??= ...DefaultMusPar.PCSAfactor*PCSA; ///< Maximum force output at optimum fiber length
            Lf0 ??= MuscleParameters.OptimalFiberlength / cos(pi/180*MuscleParameters.Pennationangle); //< Optimal fiber length corrected by pennation angle
            AnyVar PCSA ??= 1e4*...StrengthScaleSpine*MuscleParameters.MuscleVolumeSIScaled/(Lf0); ///< PCSA (cm2) of the individual element is total volumen divided by the sum of muscle element fiber lengths.
            Vol0 ??= (1e-4*PCSA) * Lf0; // New calculation of the vol for the specific muscle branch
        };
        #endif

        #if BM_TRUNK_MUSCLES
        AnyMuscleModel IliocostalisLumborumR10 = {
            AnyFolder& MuscleParameters = ....Data.unscaled.ModelParameters.Muscles.IliocostalisLumborum.IliocostalisLumborumR10;
            AnyIntVar MuscleElemNo = 1; ///< The number of this element of the muscle
            AnyIntVar MuscleElemAmount = MuscleParameters.MuscleElemAmount; ///< The total amount of elements for this muscle
            F0 ??= ...DefaultMusPar.PCSAfactor*PCSA; ///< Maximum force output at optimum fiber length
            Lf0 ??= MuscleParameters.OptimalFiberlength / cos(pi/180*MuscleParameters.Pennationangle); //< Optimal fiber length corrected by pennation angle
            AnyVar PCSA ??= 1e4*...StrengthScaleSpine*MuscleParameters.MuscleVolumeSIScaled/(Lf0); ///< PCSA (cm2) of the individual element is total volumen divided by the sum of muscle element fiber lengths.
            Vol0 ??= (1e-4*PCSA) * Lf0; // New calculation of the vol for the specific muscle branch
        };
        #endif

        #if BM_TRUNK_MUSCLES
        AnyMuscleModel IliocostalisLumborumR11 = {
            AnyFolder& MuscleParameters = ....Data.unscaled.ModelParameters.Muscles.IliocostalisLumborum.IliocostalisLumborumR11;
            AnyIntVar MuscleElemNo = 1; ///< The number of this element of the muscle
            AnyIntVar MuscleElemAmount = MuscleParameters.MuscleElemAmount; ///< The total amount of elements for this muscle
            F0 ??= ...DefaultMusPar.PCSAfactor*PCSA; ///< Maximum force output at optimum fiber length
            Lf0 ??= MuscleParameters.OptimalFiberlength / cos(pi/180*MuscleParameters.Pennationangle); //< Optimal fiber length corrected by pennation angle
            AnyVar PCSA ??= 1e4*...StrengthScaleSpine*MuscleParameters.MuscleVolumeSIScaled/(Lf0); ///< PCSA (cm2) of the individual element is total volumen divided by the sum of muscle element fiber lengths.
            Vol0 ??= (1e-4*PCSA) * Lf0; // New calculation of the vol for the specific muscle branch
        };
        #endif

        #if BM_TRUNK_MUSCLES
        AnyMuscleModel IliocostalisLumborumR12 = {
            AnyFolder& MuscleParameters = ....Data.unscaled.ModelParameters.Muscles.IliocostalisLumborum.IliocostalisLumborumR12;
            AnyIntVar MuscleElemNo = 1; ///< The number of this element of the muscle
            AnyIntVar MuscleElemAmount = MuscleParameters.MuscleElemAmount; ///< The total amount of elements for this muscle
            F0 ??= ...DefaultMusPar.PCSAfactor*PCSA; ///< Maximum force output at optimum fiber length
            Lf0 ??= MuscleParameters.OptimalFiberlength / cos(pi/180*MuscleParameters.Pennationangle); //< Optimal fiber length corrected by pennation angle
            AnyVar PCSA ??= 1e4*...StrengthScaleSpine*MuscleParameters.MuscleVolumeSIScaled/(Lf0); ///< PCSA (cm2) of the individual element is total volumen divided by the sum of muscle element fiber lengths.
            Vol0 ??= (1e-4*PCSA) * Lf0; // New calculation of the vol for the specific muscle branch
        };
        #endif

    };

    AnyFolder IliocostalisThoracis = {

        #if BM_TRUNK_MUSCLES
        AnyMuscleModel IliocostalisThoracisC7R7 = {
            AnyFolder& MuscleParameters = ....Data.unscaled.ModelParameters.Muscles.IliocostalisThoracis.IliocostalisThoracisC7R7;
            AnyIntVar MuscleElemNo = 1; ///< The number of this element of the muscle
            AnyIntVar MuscleElemAmount = MuscleParameters.MuscleElemAmount; ///< The total amount of elements for this muscle
            F0 ??= ...DefaultMusPar.PCSAfactor*PCSA; ///< Maximum force output at optimum fiber length
            Lf0 ??= MuscleParameters.OptimalFiberlength / cos(pi/180*MuscleParameters.Pennationangle); //< Optimal fiber length corrected by pennation angle
            AnyVar PCSA ??= 1e4*...StrengthScaleSpine*MuscleParameters.MuscleVolumeSIScaled/(Lf0); ///< PCSA (cm2) of the individual element is total volumen divided by the sum of muscle element fiber lengths.
            Vol0 ??= (1e-4*PCSA) * Lf0; // New calculation of the vol for the specific muscle branch
        };
        #endif

        #if BM_TRUNK_MUSCLES
        AnyMuscleModel IliocostalisThoracisR1R7 = {
            AnyFolder& MuscleParameters = ....Data.unscaled.ModelParameters.Muscles.IliocostalisThoracis.IliocostalisThoracisR1R7;
            AnyIntVar MuscleElemNo = 1; ///< The number of this element of the muscle
            AnyIntVar MuscleElemAmount = MuscleParameters.MuscleElemAmount; ///< The total amount of elements for this muscle
            F0 ??= ...DefaultMusPar.PCSAfactor*PCSA; ///< Maximum force output at optimum fiber length
            Lf0 ??= MuscleParameters.OptimalFiberlength / cos(pi/180*MuscleParameters.Pennationangle); //< Optimal fiber length corrected by pennation angle
            AnyVar PCSA ??= 1e4*...StrengthScaleSpine*MuscleParameters.MuscleVolumeSIScaled/(Lf0); ///< PCSA (cm2) of the individual element is total volumen divided by the sum of muscle element fiber lengths.
            Vol0 ??= (1e-4*PCSA) * Lf0; // New calculation of the vol for the specific muscle branch
        };
        #endif

        #if BM_TRUNK_MUSCLES
        AnyMuscleModel IliocostalisThoracisR2R8 = {
            AnyFolder& MuscleParameters = ....Data.unscaled.ModelParameters.Muscles.IliocostalisThoracis.IliocostalisThoracisR2R8;
            AnyIntVar MuscleElemNo = 1; ///< The number of this element of the muscle
            AnyIntVar MuscleElemAmount = MuscleParameters.MuscleElemAmount; ///< The total amount of elements for this muscle
            F0 ??= ...DefaultMusPar.PCSAfactor*PCSA; ///< Maximum force output at optimum fiber length
            Lf0 ??= MuscleParameters.OptimalFiberlength / cos(pi/180*MuscleParameters.Pennationangle); //< Optimal fiber length corrected by pennation angle
            AnyVar PCSA ??= 1e4*...StrengthScaleSpine*MuscleParameters.MuscleVolumeSIScaled/(Lf0); ///< PCSA (cm2) of the individual element is total volumen divided by the sum of muscle element fiber lengths.
            Vol0 ??= (1e-4*PCSA) * Lf0; // New calculation of the vol for the specific muscle branch
        };
        #endif

        #if BM_TRUNK_MUSCLES
        AnyMuscleModel IliocostalisThoracisR3R9 = {
            AnyFolder& MuscleParameters = ....Data.unscaled.ModelParameters.Muscles.IliocostalisThoracis.IliocostalisThoracisR3R9;
            AnyIntVar MuscleElemNo = 1; ///< The number of this element of the muscle
            AnyIntVar MuscleElemAmount = MuscleParameters.MuscleElemAmount; ///< The total amount of elements for this muscle
            F0 ??= ...DefaultMusPar.PCSAfactor*PCSA; ///< Maximum force output at optimum fiber length
            Lf0 ??= MuscleParameters.OptimalFiberlength / cos(pi/180*MuscleParameters.Pennationangle); //< Optimal fiber length corrected by pennation angle
            AnyVar PCSA ??= 1e4*...StrengthScaleSpine*MuscleParameters.MuscleVolumeSIScaled/(Lf0); ///< PCSA (cm2) of the individual element is total volumen divided by the sum of muscle element fiber lengths.
            Vol0 ??= (1e-4*PCSA) * Lf0; // New calculation of the vol for the specific muscle branch
        };
        #endif

        #if BM_TRUNK_MUSCLES
        AnyMuscleModel IliocostalisThoracisR4R10 = {
            AnyFolder& MuscleParameters = ....Data.unscaled.ModelParameters.Muscles.IliocostalisThoracis.IliocostalisThoracisR4R10;
            AnyIntVar MuscleElemNo = 1; ///< The number of this element of the muscle
            AnyIntVar MuscleElemAmount = MuscleParameters.MuscleElemAmount; ///< The total amount of elements for this muscle
            F0 ??= ...DefaultMusPar.PCSAfactor*PCSA; ///< Maximum force output at optimum fiber length
            Lf0 ??= MuscleParameters.OptimalFiberlength / cos(pi/180*MuscleParameters.Pennationangle); //< Optimal fiber length corrected by pennation angle
            AnyVar PCSA ??= 1e4*...StrengthScaleSpine*MuscleParameters.MuscleVolumeSIScaled/(Lf0); ///< PCSA (cm2) of the individual element is total volumen divided by the sum of muscle element fiber lengths.
            Vol0 ??= (1e-4*PCSA) * Lf0; // New calculation of the vol for the specific muscle branch
        };
        #endif

        #if BM_TRUNK_MUSCLES
        AnyMuscleModel IliocostalisThoracisR5R11 = {
            AnyFolder& MuscleParameters = ....Data.unscaled.ModelParameters.Muscles.IliocostalisThoracis.IliocostalisThoracisR5R11;
            AnyIntVar MuscleElemNo = 1; ///< The number of this element of the muscle
            AnyIntVar MuscleElemAmount = MuscleParameters.MuscleElemAmount; ///< The total amount of elements for this muscle
            F0 ??= ...DefaultMusPar.PCSAfactor*PCSA; ///< Maximum force output at optimum fiber length
            Lf0 ??= MuscleParameters.OptimalFiberlength / cos(pi/180*MuscleParameters.Pennationangle); //< Optimal fiber length corrected by pennation angle
            AnyVar PCSA ??= 1e4*...StrengthScaleSpine*MuscleParameters.MuscleVolumeSIScaled/(Lf0); ///< PCSA (cm2) of the individual element is total volumen divided by the sum of muscle element fiber lengths.
            Vol0 ??= (1e-4*PCSA) * Lf0; // New calculation of the vol for the specific muscle branch
        };
        #endif

        #if BM_TRUNK_MUSCLES
        AnyMuscleModel IliocostalisThoracisR6R12 = {
            AnyFolder& MuscleParameters = ....Data.unscaled.ModelParameters.Muscles.IliocostalisThoracis.IliocostalisThoracisR6R12;
            AnyIntVar MuscleElemNo = 1; ///< The number of this element of the muscle
            AnyIntVar MuscleElemAmount = MuscleParameters.MuscleElemAmount; ///< The total amount of elements for this muscle
            F0 ??= ...DefaultMusPar.PCSAfactor*PCSA; ///< Maximum force output at optimum fiber length
            Lf0 ??= MuscleParameters.OptimalFiberlength / cos(pi/180*MuscleParameters.Pennationangle); //< Optimal fiber length corrected by pennation angle
            AnyVar PCSA ??= 1e4*...StrengthScaleSpine*MuscleParameters.MuscleVolumeSIScaled/(Lf0); ///< PCSA (cm2) of the individual element is total volumen divided by the sum of muscle element fiber lengths.
            Vol0 ??= (1e-4*PCSA) * Lf0; // New calculation of the vol for the specific muscle branch
        };
        #endif

    };

    AnyFolder IntercostalisExternus = {

        #if BM_TRUNK_MUSCLES
        AnyMuscleModel IntercostalisExternusR1R2 = {
            AnyFolder& MuscleParameters = ....Data.unscaled.ModelParameters.Muscles.IntercostalisExternus.IntercostalisExternusR1R2;
            AnyIntVar MuscleElemNo = 1; ///< The number of this element of the muscle
            AnyIntVar MuscleElemAmount = MuscleParameters.MuscleElemAmount; ///< The total amount of elements for this muscle
            F0 ??= ...DefaultMusPar.PCSAfactor*PCSA; ///< Maximum force output at optimum fiber length
            Lf0 ??= MuscleParameters.OptimalFiberlength / cos(pi/180*MuscleParameters.Pennationangle); //< Optimal fiber length corrected by pennation angle
            AnyVar PCSA ??= 1e4*...StrengthScaleSpine*MuscleParameters.MuscleVolumeSIScaled/(Lf0); ///< PCSA (cm2) of the individual element is total volumen divided by the sum of muscle element fiber lengths.
            Vol0 ??= (1e-4*PCSA) * Lf0; // New calculation of the vol for the specific muscle branch
        };
        #endif

        #if BM_TRUNK_MUSCLES
        AnyMuscleModel IntercostalisExternusR2R3 = {
            AnyFolder& MuscleParameters = ....Data.unscaled.ModelParameters.Muscles.IntercostalisExternus.IntercostalisExternusR2R3;
            AnyIntVar MuscleElemNo = 1; ///< The number of this element of the muscle
            AnyIntVar MuscleElemAmount = MuscleParameters.MuscleElemAmount; ///< The total amount of elements for this muscle
            F0 ??= ...DefaultMusPar.PCSAfactor*PCSA; ///< Maximum force output at optimum fiber length
            Lf0 ??= MuscleParameters.OptimalFiberlength / cos(pi/180*MuscleParameters.Pennationangle); //< Optimal fiber length corrected by pennation angle
            AnyVar PCSA ??= 1e4*...StrengthScaleSpine*MuscleParameters.MuscleVolumeSIScaled/(Lf0); ///< PCSA (cm2) of the individual element is total volumen divided by the sum of muscle element fiber lengths.
            Vol0 ??= (1e-4*PCSA) * Lf0; // New calculation of the vol for the specific muscle branch
        };
        #endif

        #if BM_TRUNK_MUSCLES
        AnyMuscleModel IntercostalisExternusR3R4 = {
            AnyFolder& MuscleParameters = ....Data.unscaled.ModelParameters.Muscles.IntercostalisExternus.IntercostalisExternusR3R4;
            AnyIntVar MuscleElemNo = 1; ///< The number of this element of the muscle
            AnyIntVar MuscleElemAmount = MuscleParameters.MuscleElemAmount; ///< The total amount of elements for this muscle
            F0 ??= ...DefaultMusPar.PCSAfactor*PCSA; ///< Maximum force output at optimum fiber length
            Lf0 ??= MuscleParameters.OptimalFiberlength / cos(pi/180*MuscleParameters.Pennationangle); //< Optimal fiber length corrected by pennation angle
            AnyVar PCSA ??= 1e4*...StrengthScaleSpine*MuscleParameters.MuscleVolumeSIScaled/(Lf0); ///< PCSA (cm2) of the individual element is total volumen divided by the sum of muscle element fiber lengths.
            Vol0 ??= (1e-4*PCSA) * Lf0; // New calculation of the vol for the specific muscle branch
        };
        #endif

        #if BM_TRUNK_MUSCLES
        AnyMuscleModel IntercostalisExternusR4R5 = {
            AnyFolder& MuscleParameters = ....Data.unscaled.ModelParameters.Muscles.IntercostalisExternus.IntercostalisExternusR4R5;
            AnyIntVar MuscleElemNo = 1; ///< The number of this element of the muscle
            AnyIntVar MuscleElemAmount = MuscleParameters.MuscleElemAmount; ///< The total amount of elements for this muscle
            F0 ??= ...DefaultMusPar.PCSAfactor*PCSA; ///< Maximum force output at optimum fiber length
            Lf0 ??= MuscleParameters.OptimalFiberlength / cos(pi/180*MuscleParameters.Pennationangle); //< Optimal fiber length corrected by pennation angle
            AnyVar PCSA ??= 1e4*...StrengthScaleSpine*MuscleParameters.MuscleVolumeSIScaled/(Lf0); ///< PCSA (cm2) of the individual element is total volumen divided by the sum of muscle element fiber lengths.
            Vol0 ??= (1e-4*PCSA) * Lf0; // New calculation of the vol for the specific muscle branch
        };
        #endif

        #if BM_TRUNK_MUSCLES
        AnyMuscleModel IntercostalisExternusR5R6 = {
            AnyFolder& MuscleParameters = ....Data.unscaled.ModelParameters.Muscles.IntercostalisExternus.IntercostalisExternusR5R6;
            AnyIntVar MuscleElemNo = 1; ///< The number of this element of the muscle
            AnyIntVar MuscleElemAmount = MuscleParameters.MuscleElemAmount; ///< The total amount of elements for this muscle
            F0 ??= ...DefaultMusPar.PCSAfactor*PCSA; ///< Maximum force output at optimum fiber length
            Lf0 ??= MuscleParameters.OptimalFiberlength / cos(pi/180*MuscleParameters.Pennationangle); //< Optimal fiber length corrected by pennation angle
            AnyVar PCSA ??= 1e4*...StrengthScaleSpine*MuscleParameters.MuscleVolumeSIScaled/(Lf0); ///< PCSA (cm2) of the individual element is total volumen divided by the sum of muscle element fiber lengths.
            Vol0 ??= (1e-4*PCSA) * Lf0; // New calculation of the vol for the specific muscle branch
        };
        #endif

        #if BM_TRUNK_MUSCLES
        AnyMuscleModel IntercostalisExternusR6R7 = {
            AnyFolder& MuscleParameters = ....Data.unscaled.ModelParameters.Muscles.IntercostalisExternus.IntercostalisExternusR6R7;
            AnyIntVar MuscleElemNo = 1; ///< The number of this element of the muscle
            AnyIntVar MuscleElemAmount = MuscleParameters.MuscleElemAmount; ///< The total amount of elements for this muscle
            F0 ??= ...DefaultMusPar.PCSAfactor*PCSA; ///< Maximum force output at optimum fiber length
            Lf0 ??= MuscleParameters.OptimalFiberlength / cos(pi/180*MuscleParameters.Pennationangle); //< Optimal fiber length corrected by pennation angle
            AnyVar PCSA ??= 1e4*...StrengthScaleSpine*MuscleParameters.MuscleVolumeSIScaled/(Lf0); ///< PCSA (cm2) of the individual element is total volumen divided by the sum of muscle element fiber lengths.
            Vol0 ??= (1e-4*PCSA) * Lf0; // New calculation of the vol for the specific muscle branch
        };
        #endif

        #if BM_TRUNK_MUSCLES
        AnyMuscleModel IntercostalisExternusR7R8 = {
            AnyFolder& MuscleParameters = ....Data.unscaled.ModelParameters.Muscles.IntercostalisExternus.IntercostalisExternusR7R8;
            AnyIntVar MuscleElemNo = 1; ///< The number of this element of the muscle
            AnyIntVar MuscleElemAmount = MuscleParameters.MuscleElemAmount; ///< The total amount of elements for this muscle
            F0 ??= ...DefaultMusPar.PCSAfactor*PCSA; ///< Maximum force output at optimum fiber length
            Lf0 ??= MuscleParameters.OptimalFiberlength / cos(pi/180*MuscleParameters.Pennationangle); //< Optimal fiber length corrected by pennation angle
            AnyVar PCSA ??= 1e4*...StrengthScaleSpine*MuscleParameters.MuscleVolumeSIScaled/(Lf0); ///< PCSA (cm2) of the individual element is total volumen divided by the sum of muscle element fiber lengths.
            Vol0 ??= (1e-4*PCSA) * Lf0; // New calculation of the vol for the specific muscle branch
        };
        #endif

        #if BM_TRUNK_MUSCLES
        AnyMuscleModel IntercostalisExternusR8R9 = {
            AnyFolder& MuscleParameters = ....Data.unscaled.ModelParameters.Muscles.IntercostalisExternus.IntercostalisExternusR8R9;
            AnyIntVar MuscleElemNo = 1; ///< The number of this element of the muscle
            AnyIntVar MuscleElemAmount = MuscleParameters.MuscleElemAmount; ///< The total amount of elements for this muscle
            F0 ??= ...DefaultMusPar.PCSAfactor*PCSA; ///< Maximum force output at optimum fiber length
            Lf0 ??= MuscleParameters.OptimalFiberlength / cos(pi/180*MuscleParameters.Pennationangle); //< Optimal fiber length corrected by pennation angle
            AnyVar PCSA ??= 1e4*...StrengthScaleSpine*MuscleParameters.MuscleVolumeSIScaled/(Lf0); ///< PCSA (cm2) of the individual element is total volumen divided by the sum of muscle element fiber lengths.
            Vol0 ??= (1e-4*PCSA) * Lf0; // New calculation of the vol for the specific muscle branch
        };
        #endif

        #if BM_TRUNK_MUSCLES
        AnyMuscleModel IntercostalisExternusR9R10 = {
            AnyFolder& MuscleParameters = ....Data.unscaled.ModelParameters.Muscles.IntercostalisExternus.IntercostalisExternusR9R10;
            AnyIntVar MuscleElemNo = 1; ///< The number of this element of the muscle
            AnyIntVar MuscleElemAmount = MuscleParameters.MuscleElemAmount; ///< The total amount of elements for this muscle
            F0 ??= ...DefaultMusPar.PCSAfactor*PCSA; ///< Maximum force output at optimum fiber length
            Lf0 ??= MuscleParameters.OptimalFiberlength / cos(pi/180*MuscleParameters.Pennationangle); //< Optimal fiber length corrected by pennation angle
            AnyVar PCSA ??= 1e4*...StrengthScaleSpine*MuscleParameters.MuscleVolumeSIScaled/(Lf0); ///< PCSA (cm2) of the individual element is total volumen divided by the sum of muscle element fiber lengths.
            Vol0 ??= (1e-4*PCSA) * Lf0; // New calculation of the vol for the specific muscle branch
        };
        #endif

        #if BM_TRUNK_MUSCLES
        AnyMuscleModel IntercostalisExternusR10R11 = {
            AnyFolder& MuscleParameters = ....Data.unscaled.ModelParameters.Muscles.IntercostalisExternus.IntercostalisExternusR10R11;
            AnyIntVar MuscleElemNo = 1; ///< The number of this element of the muscle
            AnyIntVar MuscleElemAmount = MuscleParameters.MuscleElemAmount; ///< The total amount of elements for this muscle
            F0 ??= ...DefaultMusPar.PCSAfactor*PCSA; ///< Maximum force output at optimum fiber length
            Lf0 ??= MuscleParameters.OptimalFiberlength / cos(pi/180*MuscleParameters.Pennationangle); //< Optimal fiber length corrected by pennation angle
            AnyVar PCSA ??= 1e4*...StrengthScaleSpine*MuscleParameters.MuscleVolumeSIScaled/(Lf0); ///< PCSA (cm2) of the individual element is total volumen divided by the sum of muscle element fiber lengths.
            Vol0 ??= (1e-4*PCSA) * Lf0; // New calculation of the vol for the specific muscle branch
        };
        #endif

        #if BM_TRUNK_MUSCLES
        AnyMuscleModel IntercostalisExternusR11R12 = {
            AnyFolder& MuscleParameters = ....Data.unscaled.ModelParameters.Muscles.IntercostalisExternus.IntercostalisExternusR11R12;
            AnyIntVar MuscleElemNo = 1; ///< The number of this element of the muscle
            AnyIntVar MuscleElemAmount = MuscleParameters.MuscleElemAmount; ///< The total amount of elements for this muscle
            F0 ??= ...DefaultMusPar.PCSAfactor*PCSA; ///< Maximum force output at optimum fiber length
            Lf0 ??= MuscleParameters.OptimalFiberlength / cos(pi/180*MuscleParameters.Pennationangle); //< Optimal fiber length corrected by pennation angle
            AnyVar PCSA ??= 1e4*...StrengthScaleSpine*MuscleParameters.MuscleVolumeSIScaled/(Lf0); ///< PCSA (cm2) of the individual element is total volumen divided by the sum of muscle element fiber lengths.
            Vol0 ??= (1e-4*PCSA) * Lf0; // New calculation of the vol for the specific muscle branch
        };
        #endif

    };

    AnyFolder IntercostalisInternus = {

        #if BM_TRUNK_MUSCLES
        AnyMuscleModel IntercostalisInternusR1R2 = {
            AnyFolder& MuscleParameters = ....Data.unscaled.ModelParameters.Muscles.IntercostalisInternus.IntercostalisInternusR1R2;
            AnyIntVar MuscleElemNo = 1; ///< The number of this element of the muscle
            AnyIntVar MuscleElemAmount = MuscleParameters.MuscleElemAmount; ///< The total amount of elements for this muscle
            F0 ??= ...DefaultMusPar.PCSAfactor*PCSA; ///< Maximum force output at optimum fiber length
            Lf0 ??= MuscleParameters.OptimalFiberlength / cos(pi/180*MuscleParameters.Pennationangle); //< Optimal fiber length corrected by pennation angle
            AnyVar PCSA ??= 1e4*...StrengthScaleSpine*MuscleParameters.MuscleVolumeSIScaled/(Lf0); ///< PCSA (cm2) of the individual element is total volumen divided by the sum of muscle element fiber lengths.
            Vol0 ??= (1e-4*PCSA) * Lf0; // New calculation of the vol for the specific muscle branch
        };
        #endif

        #if BM_TRUNK_MUSCLES
        AnyMuscleModel IntercostalisInternusR2R3 = {
            AnyFolder& MuscleParameters = ....Data.unscaled.ModelParameters.Muscles.IntercostalisInternus.IntercostalisInternusR2R3;
            AnyIntVar MuscleElemNo = 1; ///< The number of this element of the muscle
            AnyIntVar MuscleElemAmount = MuscleParameters.MuscleElemAmount; ///< The total amount of elements for this muscle
            F0 ??= ...DefaultMusPar.PCSAfactor*PCSA; ///< Maximum force output at optimum fiber length
            Lf0 ??= MuscleParameters.OptimalFiberlength / cos(pi/180*MuscleParameters.Pennationangle); //< Optimal fiber length corrected by pennation angle
            AnyVar PCSA ??= 1e4*...StrengthScaleSpine*MuscleParameters.MuscleVolumeSIScaled/(Lf0); ///< PCSA (cm2) of the individual element is total volumen divided by the sum of muscle element fiber lengths.
            Vol0 ??= (1e-4*PCSA) * Lf0; // New calculation of the vol for the specific muscle branch
        };
        #endif

        #if BM_TRUNK_MUSCLES
        AnyMuscleModel IntercostalisInternusR3R4 = {
            AnyFolder& MuscleParameters = ....Data.unscaled.ModelParameters.Muscles.IntercostalisInternus.IntercostalisInternusR3R4;
            AnyIntVar MuscleElemNo = 1; ///< The number of this element of the muscle
            AnyIntVar MuscleElemAmount = MuscleParameters.MuscleElemAmount; ///< The total amount of elements for this muscle
            F0 ??= ...DefaultMusPar.PCSAfactor*PCSA; ///< Maximum force output at optimum fiber length
            Lf0 ??= MuscleParameters.OptimalFiberlength / cos(pi/180*MuscleParameters.Pennationangle); //< Optimal fiber length corrected by pennation angle
            AnyVar PCSA ??= 1e4*...StrengthScaleSpine*MuscleParameters.MuscleVolumeSIScaled/(Lf0); ///< PCSA (cm2) of the individual element is total volumen divided by the sum of muscle element fiber lengths.
            Vol0 ??= (1e-4*PCSA) * Lf0; // New calculation of the vol for the specific muscle branch
        };
        #endif

        #if BM_TRUNK_MUSCLES
        AnyMuscleModel IntercostalisInternusR4R5 = {
            AnyFolder& MuscleParameters = ....Data.unscaled.ModelParameters.Muscles.IntercostalisInternus.IntercostalisInternusR4R5;
            AnyIntVar MuscleElemNo = 1; ///< The number of this element of the muscle
            AnyIntVar MuscleElemAmount = MuscleParameters.MuscleElemAmount; ///< The total amount of elements for this muscle
            F0 ??= ...DefaultMusPar.PCSAfactor*PCSA; ///< Maximum force output at optimum fiber length
            Lf0 ??= MuscleParameters.OptimalFiberlength / cos(pi/180*MuscleParameters.Pennationangle); //< Optimal fiber length corrected by pennation angle
            AnyVar PCSA ??= 1e4*...StrengthScaleSpine*MuscleParameters.MuscleVolumeSIScaled/(Lf0); ///< PCSA (cm2) of the individual element is total volumen divided by the sum of muscle element fiber lengths.
            Vol0 ??= (1e-4*PCSA) * Lf0; // New calculation of the vol for the specific muscle branch
        };
        #endif

        #if BM_TRUNK_MUSCLES
        AnyMuscleModel IntercostalisInternusR5R6 = {
            AnyFolder& MuscleParameters = ....Data.unscaled.ModelParameters.Muscles.IntercostalisInternus.IntercostalisInternusR5R6;
            AnyIntVar MuscleElemNo = 1; ///< The number of this element of the muscle
            AnyIntVar MuscleElemAmount = MuscleParameters.MuscleElemAmount; ///< The total amount of elements for this muscle
            F0 ??= ...DefaultMusPar.PCSAfactor*PCSA; ///< Maximum force output at optimum fiber length
            Lf0 ??= MuscleParameters.OptimalFiberlength / cos(pi/180*MuscleParameters.Pennationangle); //< Optimal fiber length corrected by pennation angle
            AnyVar PCSA ??= 1e4*...StrengthScaleSpine*MuscleParameters.MuscleVolumeSIScaled/(Lf0); ///< PCSA (cm2) of the individual element is total volumen divided by the sum of muscle element fiber lengths.
            Vol0 ??= (1e-4*PCSA) * Lf0; // New calculation of the vol for the specific muscle branch
        };
        #endif

        #if BM_TRUNK_MUSCLES
        AnyMuscleModel IntercostalisInternusR6R7 = {
            AnyFolder& MuscleParameters = ....Data.unscaled.ModelParameters.Muscles.IntercostalisInternus.IntercostalisInternusR6R7;
            AnyIntVar MuscleElemNo = 1; ///< The number of this element of the muscle
            AnyIntVar MuscleElemAmount = MuscleParameters.MuscleElemAmount; ///< The total amount of elements for this muscle
            F0 ??= ...DefaultMusPar.PCSAfactor*PCSA; ///< Maximum force output at optimum fiber length
            Lf0 ??= MuscleParameters.OptimalFiberlength / cos(pi/180*MuscleParameters.Pennationangle); //< Optimal fiber length corrected by pennation angle
            AnyVar PCSA ??= 1e4*...StrengthScaleSpine*MuscleParameters.MuscleVolumeSIScaled/(Lf0); ///< PCSA (cm2) of the individual element is total volumen divided by the sum of muscle element fiber lengths.
            Vol0 ??= (1e-4*PCSA) * Lf0; // New calculation of the vol for the specific muscle branch
        };
        #endif

        #if BM_TRUNK_MUSCLES
        AnyMuscleModel IntercostalisInternusR7R8 = {
            AnyFolder& MuscleParameters = ....Data.unscaled.ModelParameters.Muscles.IntercostalisInternus.IntercostalisInternusR7R8;
            AnyIntVar MuscleElemNo = 1; ///< The number of this element of the muscle
            AnyIntVar MuscleElemAmount = MuscleParameters.MuscleElemAmount; ///< The total amount of elements for this muscle
            F0 ??= ...DefaultMusPar.PCSAfactor*PCSA; ///< Maximum force output at optimum fiber length
            Lf0 ??= MuscleParameters.OptimalFiberlength / cos(pi/180*MuscleParameters.Pennationangle); //< Optimal fiber length corrected by pennation angle
            AnyVar PCSA ??= 1e4*...StrengthScaleSpine*MuscleParameters.MuscleVolumeSIScaled/(Lf0); ///< PCSA (cm2) of the individual element is total volumen divided by the sum of muscle element fiber lengths.
            Vol0 ??= (1e-4*PCSA) * Lf0; // New calculation of the vol for the specific muscle branch
        };
        #endif

        #if BM_TRUNK_MUSCLES
        AnyMuscleModel IntercostalisInternusR8R9 = {
            AnyFolder& MuscleParameters = ....Data.unscaled.ModelParameters.Muscles.IntercostalisInternus.IntercostalisInternusR8R9;
            AnyIntVar MuscleElemNo = 1; ///< The number of this element of the muscle
            AnyIntVar MuscleElemAmount = MuscleParameters.MuscleElemAmount; ///< The total amount of elements for this muscle
            F0 ??= ...DefaultMusPar.PCSAfactor*PCSA; ///< Maximum force output at optimum fiber length
            Lf0 ??= MuscleParameters.OptimalFiberlength / cos(pi/180*MuscleParameters.Pennationangle); //< Optimal fiber length corrected by pennation angle
            AnyVar PCSA ??= 1e4*...StrengthScaleSpine*MuscleParameters.MuscleVolumeSIScaled/(Lf0); ///< PCSA (cm2) of the individual element is total volumen divided by the sum of muscle element fiber lengths.
            Vol0 ??= (1e-4*PCSA) * Lf0; // New calculation of the vol for the specific muscle branch
        };
        #endif

        #if BM_TRUNK_MUSCLES
        AnyMuscleModel IntercostalisInternusR9R10 = {
            AnyFolder& MuscleParameters = ....Data.unscaled.ModelParameters.Muscles.IntercostalisInternus.IntercostalisInternusR9R10;
            AnyIntVar MuscleElemNo = 1; ///< The number of this element of the muscle
            AnyIntVar MuscleElemAmount = MuscleParameters.MuscleElemAmount; ///< The total amount of elements for this muscle
            F0 ??= ...DefaultMusPar.PCSAfactor*PCSA; ///< Maximum force output at optimum fiber length
            Lf0 ??= MuscleParameters.OptimalFiberlength / cos(pi/180*MuscleParameters.Pennationangle); //< Optimal fiber length corrected by pennation angle
            AnyVar PCSA ??= 1e4*...StrengthScaleSpine*MuscleParameters.MuscleVolumeSIScaled/(Lf0); ///< PCSA (cm2) of the individual element is total volumen divided by the sum of muscle element fiber lengths.
            Vol0 ??= (1e-4*PCSA) * Lf0; // New calculation of the vol for the specific muscle branch
        };
        #endif

        #if BM_TRUNK_MUSCLES
        AnyMuscleModel IntercostalisInternusR10R11 = {
            AnyFolder& MuscleParameters = ....Data.unscaled.ModelParameters.Muscles.IntercostalisInternus.IntercostalisInternusR10R11;
            AnyIntVar MuscleElemNo = 1; ///< The number of this element of the muscle
            AnyIntVar MuscleElemAmount = MuscleParameters.MuscleElemAmount; ///< The total amount of elements for this muscle
            F0 ??= ...DefaultMusPar.PCSAfactor*PCSA; ///< Maximum force output at optimum fiber length
            Lf0 ??= MuscleParameters.OptimalFiberlength / cos(pi/180*MuscleParameters.Pennationangle); //< Optimal fiber length corrected by pennation angle
            AnyVar PCSA ??= 1e4*...StrengthScaleSpine*MuscleParameters.MuscleVolumeSIScaled/(Lf0); ///< PCSA (cm2) of the individual element is total volumen divided by the sum of muscle element fiber lengths.
            Vol0 ??= (1e-4*PCSA) * Lf0; // New calculation of the vol for the specific muscle branch
        };
        #endif

        #if BM_TRUNK_MUSCLES
        AnyMuscleModel IntercostalisInternusR11R12 = {
            AnyFolder& MuscleParameters = ....Data.unscaled.ModelParameters.Muscles.IntercostalisInternus.IntercostalisInternusR11R12;
            AnyIntVar MuscleElemNo = 1; ///< The number of this element of the muscle
            AnyIntVar MuscleElemAmount = MuscleParameters.MuscleElemAmount; ///< The total amount of elements for this muscle
            F0 ??= ...DefaultMusPar.PCSAfactor*PCSA; ///< Maximum force output at optimum fiber length
            Lf0 ??= MuscleParameters.OptimalFiberlength / cos(pi/180*MuscleParameters.Pennationangle); //< Optimal fiber length corrected by pennation angle
            AnyVar PCSA ??= 1e4*...StrengthScaleSpine*MuscleParameters.MuscleVolumeSIScaled/(Lf0); ///< PCSA (cm2) of the individual element is total volumen divided by the sum of muscle element fiber lengths.
            Vol0 ??= (1e-4*PCSA) * Lf0; // New calculation of the vol for the specific muscle branch
        };
        #endif

    };

    AnyFolder IntercostalisIntimus = {

        #if BM_TRUNK_MUSCLES
        AnyMuscleModel IntercostalisIntimusR1R2 = {
            AnyFolder& MuscleParameters = ....Data.unscaled.ModelParameters.Muscles.IntercostalisIntimus.IntercostalisIntimusR1R2;
            AnyIntVar MuscleElemNo = 1; ///< The number of this element of the muscle
            AnyIntVar MuscleElemAmount = MuscleParameters.MuscleElemAmount; ///< The total amount of elements for this muscle
            F0 ??= ...DefaultMusPar.PCSAfactor*PCSA; ///< Maximum force output at optimum fiber length
            Lf0 ??= MuscleParameters.OptimalFiberlength / cos(pi/180*MuscleParameters.Pennationangle); //< Optimal fiber length corrected by pennation angle
            AnyVar PCSA ??= 1e4*...StrengthScaleSpine*MuscleParameters.MuscleVolumeSIScaled/(Lf0); ///< PCSA (cm2) of the individual element is total volumen divided by the sum of muscle element fiber lengths.
            Vol0 ??= (1e-4*PCSA) * Lf0; // New calculation of the vol for the specific muscle branch
        };
        #endif

        #if BM_TRUNK_MUSCLES
        AnyMuscleModel IntercostalisIntimusR2R3 = {
            AnyFolder& MuscleParameters = ....Data.unscaled.ModelParameters.Muscles.IntercostalisIntimus.IntercostalisIntimusR2R3;
            AnyIntVar MuscleElemNo = 1; ///< The number of this element of the muscle
            AnyIntVar MuscleElemAmount = MuscleParameters.MuscleElemAmount; ///< The total amount of elements for this muscle
            F0 ??= ...DefaultMusPar.PCSAfactor*PCSA; ///< Maximum force output at optimum fiber length
            Lf0 ??= MuscleParameters.OptimalFiberlength / cos(pi/180*MuscleParameters.Pennationangle); //< Optimal fiber length corrected by pennation angle
            AnyVar PCSA ??= 1e4*...StrengthScaleSpine*MuscleParameters.MuscleVolumeSIScaled/(Lf0); ///< PCSA (cm2) of the individual element is total volumen divided by the sum of muscle element fiber lengths.
            Vol0 ??= (1e-4*PCSA) * Lf0; // New calculation of the vol for the specific muscle branch
        };
        #endif

        #if BM_TRUNK_MUSCLES
        AnyMuscleModel IntercostalisIntimusR3R4 = {
            AnyFolder& MuscleParameters = ....Data.unscaled.ModelParameters.Muscles.IntercostalisIntimus.IntercostalisIntimusR3R4;
            AnyIntVar MuscleElemNo = 1; ///< The number of this element of the muscle
            AnyIntVar MuscleElemAmount = MuscleParameters.MuscleElemAmount; ///< The total amount of elements for this muscle
            F0 ??= ...DefaultMusPar.PCSAfactor*PCSA; ///< Maximum force output at optimum fiber length
            Lf0 ??= MuscleParameters.OptimalFiberlength / cos(pi/180*MuscleParameters.Pennationangle); //< Optimal fiber length corrected by pennation angle
            AnyVar PCSA ??= 1e4*...StrengthScaleSpine*MuscleParameters.MuscleVolumeSIScaled/(Lf0); ///< PCSA (cm2) of the individual element is total volumen divided by the sum of muscle element fiber lengths.
            Vol0 ??= (1e-4*PCSA) * Lf0; // New calculation of the vol for the specific muscle branch
        };
        #endif

        #if BM_TRUNK_MUSCLES
        AnyMuscleModel IntercostalisIntimusR4R5 = {
            AnyFolder& MuscleParameters = ....Data.unscaled.ModelParameters.Muscles.IntercostalisIntimus.IntercostalisIntimusR4R5;
            AnyIntVar MuscleElemNo = 1; ///< The number of this element of the muscle
            AnyIntVar MuscleElemAmount = MuscleParameters.MuscleElemAmount; ///< The total amount of elements for this muscle
            F0 ??= ...DefaultMusPar.PCSAfactor*PCSA; ///< Maximum force output at optimum fiber length
            Lf0 ??= MuscleParameters.OptimalFiberlength / cos(pi/180*MuscleParameters.Pennationangle); //< Optimal fiber length corrected by pennation angle
            AnyVar PCSA ??= 1e4*...StrengthScaleSpine*MuscleParameters.MuscleVolumeSIScaled/(Lf0); ///< PCSA (cm2) of the individual element is total volumen divided by the sum of muscle element fiber lengths.
            Vol0 ??= (1e-4*PCSA) * Lf0; // New calculation of the vol for the specific muscle branch
        };
        #endif

        #if BM_TRUNK_MUSCLES
        AnyMuscleModel IntercostalisIntimusR5R6 = {
            AnyFolder& MuscleParameters = ....Data.unscaled.ModelParameters.Muscles.IntercostalisIntimus.IntercostalisIntimusR5R6;
            AnyIntVar MuscleElemNo = 1; ///< The number of this element of the muscle
            AnyIntVar MuscleElemAmount = MuscleParameters.MuscleElemAmount; ///< The total amount of elements for this muscle
            F0 ??= ...DefaultMusPar.PCSAfactor*PCSA; ///< Maximum force output at optimum fiber length
            Lf0 ??= MuscleParameters.OptimalFiberlength / cos(pi/180*MuscleParameters.Pennationangle); //< Optimal fiber length corrected by pennation angle
            AnyVar PCSA ??= 1e4*...StrengthScaleSpine*MuscleParameters.MuscleVolumeSIScaled/(Lf0); ///< PCSA (cm2) of the individual element is total volumen divided by the sum of muscle element fiber lengths.
            Vol0 ??= (1e-4*PCSA) * Lf0; // New calculation of the vol for the specific muscle branch
        };
        #endif

        #if BM_TRUNK_MUSCLES
        AnyMuscleModel IntercostalisIntimusR6R7 = {
            AnyFolder& MuscleParameters = ....Data.unscaled.ModelParameters.Muscles.IntercostalisIntimus.IntercostalisIntimusR6R7;
            AnyIntVar MuscleElemNo = 1; ///< The number of this element of the muscle
            AnyIntVar MuscleElemAmount = MuscleParameters.MuscleElemAmount; ///< The total amount of elements for this muscle
            F0 ??= ...DefaultMusPar.PCSAfactor*PCSA; ///< Maximum force output at optimum fiber length
            Lf0 ??= MuscleParameters.OptimalFiberlength / cos(pi/180*MuscleParameters.Pennationangle); //< Optimal fiber length corrected by pennation angle
            AnyVar PCSA ??= 1e4*...StrengthScaleSpine*MuscleParameters.MuscleVolumeSIScaled/(Lf0); ///< PCSA (cm2) of the individual element is total volumen divided by the sum of muscle element fiber lengths.
            Vol0 ??= (1e-4*PCSA) * Lf0; // New calculation of the vol for the specific muscle branch
        };
        #endif

        #if BM_TRUNK_MUSCLES
        AnyMuscleModel IntercostalisIntimusR7R8 = {
            AnyFolder& MuscleParameters = ....Data.unscaled.ModelParameters.Muscles.IntercostalisIntimus.IntercostalisIntimusR7R8;
            AnyIntVar MuscleElemNo = 1; ///< The number of this element of the muscle
            AnyIntVar MuscleElemAmount = MuscleParameters.MuscleElemAmount; ///< The total amount of elements for this muscle
            F0 ??= ...DefaultMusPar.PCSAfactor*PCSA; ///< Maximum force output at optimum fiber length
            Lf0 ??= MuscleParameters.OptimalFiberlength / cos(pi/180*MuscleParameters.Pennationangle); //< Optimal fiber length corrected by pennation angle
            AnyVar PCSA ??= 1e4*...StrengthScaleSpine*MuscleParameters.MuscleVolumeSIScaled/(Lf0); ///< PCSA (cm2) of the individual element is total volumen divided by the sum of muscle element fiber lengths.
            Vol0 ??= (1e-4*PCSA) * Lf0; // New calculation of the vol for the specific muscle branch
        };
        #endif

        #if BM_TRUNK_MUSCLES
        AnyMuscleModel IntercostalisIntimusR8R9 = {
            AnyFolder& MuscleParameters = ....Data.unscaled.ModelParameters.Muscles.IntercostalisIntimus.IntercostalisIntimusR8R9;
            AnyIntVar MuscleElemNo = 1; ///< The number of this element of the muscle
            AnyIntVar MuscleElemAmount = MuscleParameters.MuscleElemAmount; ///< The total amount of elements for this muscle
            F0 ??= ...DefaultMusPar.PCSAfactor*PCSA; ///< Maximum force output at optimum fiber length
            Lf0 ??= MuscleParameters.OptimalFiberlength / cos(pi/180*MuscleParameters.Pennationangle); //< Optimal fiber length corrected by pennation angle
            AnyVar PCSA ??= 1e4*...StrengthScaleSpine*MuscleParameters.MuscleVolumeSIScaled/(Lf0); ///< PCSA (cm2) of the individual element is total volumen divided by the sum of muscle element fiber lengths.
            Vol0 ??= (1e-4*PCSA) * Lf0; // New calculation of the vol for the specific muscle branch
        };
        #endif

        #if BM_TRUNK_MUSCLES
        AnyMuscleModel IntercostalisIntimusR9R10 = {
            AnyFolder& MuscleParameters = ....Data.unscaled.ModelParameters.Muscles.IntercostalisIntimus.IntercostalisIntimusR9R10;
            AnyIntVar MuscleElemNo = 1; ///< The number of this element of the muscle
            AnyIntVar MuscleElemAmount = MuscleParameters.MuscleElemAmount; ///< The total amount of elements for this muscle
            F0 ??= ...DefaultMusPar.PCSAfactor*PCSA; ///< Maximum force output at optimum fiber length
            Lf0 ??= MuscleParameters.OptimalFiberlength / cos(pi/180*MuscleParameters.Pennationangle); //< Optimal fiber length corrected by pennation angle
            AnyVar PCSA ??= 1e4*...StrengthScaleSpine*MuscleParameters.MuscleVolumeSIScaled/(Lf0); ///< PCSA (cm2) of the individual element is total volumen divided by the sum of muscle element fiber lengths.
            Vol0 ??= (1e-4*PCSA) * Lf0; // New calculation of the vol for the specific muscle branch
        };
        #endif

        #if BM_TRUNK_MUSCLES
        AnyMuscleModel IntercostalisIntimusR10R11 = {
            AnyFolder& MuscleParameters = ....Data.unscaled.ModelParameters.Muscles.IntercostalisIntimus.IntercostalisIntimusR10R11;
            AnyIntVar MuscleElemNo = 1; ///< The number of this element of the muscle
            AnyIntVar MuscleElemAmount = MuscleParameters.MuscleElemAmount; ///< The total amount of elements for this muscle
            F0 ??= ...DefaultMusPar.PCSAfactor*PCSA; ///< Maximum force output at optimum fiber length
            Lf0 ??= MuscleParameters.OptimalFiberlength / cos(pi/180*MuscleParameters.Pennationangle); //< Optimal fiber length corrected by pennation angle
            AnyVar PCSA ??= 1e4*...StrengthScaleSpine*MuscleParameters.MuscleVolumeSIScaled/(Lf0); ///< PCSA (cm2) of the individual element is total volumen divided by the sum of muscle element fiber lengths.
            Vol0 ??= (1e-4*PCSA) * Lf0; // New calculation of the vol for the specific muscle branch
        };
        #endif

        #if BM_TRUNK_MUSCLES
        AnyMuscleModel IntercostalisIntimusR11R12 = {
            AnyFolder& MuscleParameters = ....Data.unscaled.ModelParameters.Muscles.IntercostalisIntimus.IntercostalisIntimusR11R12;
            AnyIntVar MuscleElemNo = 1; ///< The number of this element of the muscle
            AnyIntVar MuscleElemAmount = MuscleParameters.MuscleElemAmount; ///< The total amount of elements for this muscle
            F0 ??= ...DefaultMusPar.PCSAfactor*PCSA; ///< Maximum force output at optimum fiber length
            Lf0 ??= MuscleParameters.OptimalFiberlength / cos(pi/180*MuscleParameters.Pennationangle); //< Optimal fiber length corrected by pennation angle
            AnyVar PCSA ??= 1e4*...StrengthScaleSpine*MuscleParameters.MuscleVolumeSIScaled/(Lf0); ///< PCSA (cm2) of the individual element is total volumen divided by the sum of muscle element fiber lengths.
            Vol0 ??= (1e-4*PCSA) * Lf0; // New calculation of the vol for the specific muscle branch
        };
        #endif

    };
    AnyFolder LevatorCostarum = {

        #if BM_TRUNK_MUSCLES
        AnyMuscleModel LevatorCostarumC7R1 = {
            AnyFolder& MuscleParameters = ....Data.unscaled.ModelParameters.Muscles.LevatorCostarum.LevatorCostarumC7R1;
            AnyIntVar MuscleElemNo = 1; ///< The number of this element of the muscle
            AnyIntVar MuscleElemAmount = MuscleParameters.MuscleElemAmount; ///< The total amount of elements for this muscle
            F0 ??= ...DefaultMusPar.PCSAfactor*PCSA; ///< Maximum force output at optimum fiber length
            Lf0 ??= MuscleParameters.OptimalFiberlength / cos(pi/180*MuscleParameters.Pennationangle); //< Optimal fiber length corrected by pennation angle
            AnyVar PCSA ??= 1e4*...StrengthScaleSpine*MuscleParameters.MuscleVolumeSIScaled/(Lf0); ///< PCSA (cm2) of the individual element is total volumen divided by the sum of muscle element fiber lengths.
            Vol0 ??= (1e-4*PCSA) * Lf0; // New calculation of the vol for the specific muscle branch
        };
        #endif

        #if BM_TRUNK_MUSCLES
        AnyMuscleModel LevatorCostarumT1R2 = {
            AnyFolder& MuscleParameters = ....Data.unscaled.ModelParameters.Muscles.LevatorCostarum.LevatorCostarumT1R2;
            AnyIntVar MuscleElemNo = 1; ///< The number of this element of the muscle
            AnyIntVar MuscleElemAmount = MuscleParameters.MuscleElemAmount; ///< The total amount of elements for this muscle
            F0 ??= ...DefaultMusPar.PCSAfactor*PCSA; ///< Maximum force output at optimum fiber length
            Lf0 ??= MuscleParameters.OptimalFiberlength / cos(pi/180*MuscleParameters.Pennationangle); //< Optimal fiber length corrected by pennation angle
            AnyVar PCSA ??= 1e4*...StrengthScaleSpine*MuscleParameters.MuscleVolumeSIScaled/(Lf0); ///< PCSA (cm2) of the individual element is total volumen divided by the sum of muscle element fiber lengths.
            Vol0 ??= (1e-4*PCSA) * Lf0; // New calculation of the vol for the specific muscle branch
        };
        #endif

        #if BM_TRUNK_MUSCLES
        AnyMuscleModel LevatorCostarumT2R3 = {
            AnyFolder& MuscleParameters = ....Data.unscaled.ModelParameters.Muscles.LevatorCostarum.LevatorCostarumT2R3;
            AnyIntVar MuscleElemNo = 1; ///< The number of this element of the muscle
            AnyIntVar MuscleElemAmount = MuscleParameters.MuscleElemAmount; ///< The total amount of elements for this muscle
            F0 ??= ...DefaultMusPar.PCSAfactor*PCSA; ///< Maximum force output at optimum fiber length
            Lf0 ??= MuscleParameters.OptimalFiberlength / cos(pi/180*MuscleParameters.Pennationangle); //< Optimal fiber length corrected by pennation angle
            AnyVar PCSA ??= 1e4*...StrengthScaleSpine*MuscleParameters.MuscleVolumeSIScaled/(Lf0); ///< PCSA (cm2) of the individual element is total volumen divided by the sum of muscle element fiber lengths.
            Vol0 ??= (1e-4*PCSA) * Lf0; // New calculation of the vol for the specific muscle branch
        };
        #endif

        #if BM_TRUNK_MUSCLES
        AnyMuscleModel LevatorCostarumT3R4 = {
            AnyFolder& MuscleParameters = ....Data.unscaled.ModelParameters.Muscles.LevatorCostarum.LevatorCostarumT3R4;
            AnyIntVar MuscleElemNo = 1; ///< The number of this element of the muscle
            AnyIntVar MuscleElemAmount = MuscleParameters.MuscleElemAmount; ///< The total amount of elements for this muscle
            F0 ??= ...DefaultMusPar.PCSAfactor*PCSA; ///< Maximum force output at optimum fiber length
            Lf0 ??= MuscleParameters.OptimalFiberlength / cos(pi/180*MuscleParameters.Pennationangle); //< Optimal fiber length corrected by pennation angle
            AnyVar PCSA ??= 1e4*...StrengthScaleSpine*MuscleParameters.MuscleVolumeSIScaled/(Lf0); ///< PCSA (cm2) of the individual element is total volumen divided by the sum of muscle element fiber lengths.
            Vol0 ??= (1e-4*PCSA) * Lf0; // New calculation of the vol for the specific muscle branch
        };
        #endif

        #if BM_TRUNK_MUSCLES
        AnyMuscleModel LevatorCostarumT4R5 = {
            AnyFolder& MuscleParameters = ....Data.unscaled.ModelParameters.Muscles.LevatorCostarum.LevatorCostarumT4R5;
            AnyIntVar MuscleElemNo = 1; ///< The number of this element of the muscle
            AnyIntVar MuscleElemAmount = MuscleParameters.MuscleElemAmount; ///< The total amount of elements for this muscle
            F0 ??= ...DefaultMusPar.PCSAfactor*PCSA; ///< Maximum force output at optimum fiber length
            Lf0 ??= MuscleParameters.OptimalFiberlength / cos(pi/180*MuscleParameters.Pennationangle); //< Optimal fiber length corrected by pennation angle
            AnyVar PCSA ??= 1e4*...StrengthScaleSpine*MuscleParameters.MuscleVolumeSIScaled/(Lf0); ///< PCSA (cm2) of the individual element is total volumen divided by the sum of muscle element fiber lengths.
            Vol0 ??= (1e-4*PCSA) * Lf0; // New calculation of the vol for the specific muscle branch
        };
        #endif

        #if BM_TRUNK_MUSCLES
        AnyMuscleModel LevatorCostarumT5R6 = {
            AnyFolder& MuscleParameters = ....Data.unscaled.ModelParameters.Muscles.LevatorCostarum.LevatorCostarumT5R6;
            AnyIntVar MuscleElemNo = 1; ///< The number of this element of the muscle
            AnyIntVar MuscleElemAmount = MuscleParameters.MuscleElemAmount; ///< The total amount of elements for this muscle
            F0 ??= ...DefaultMusPar.PCSAfactor*PCSA; ///< Maximum force output at optimum fiber length
            Lf0 ??= MuscleParameters.OptimalFiberlength / cos(pi/180*MuscleParameters.Pennationangle); //< Optimal fiber length corrected by pennation angle
            AnyVar PCSA ??= 1e4*...StrengthScaleSpine*MuscleParameters.MuscleVolumeSIScaled/(Lf0); ///< PCSA (cm2) of the individual element is total volumen divided by the sum of muscle element fiber lengths.
            Vol0 ??= (1e-4*PCSA) * Lf0; // New calculation of the vol for the specific muscle branch
        };
        #endif

        #if BM_TRUNK_MUSCLES
        AnyMuscleModel LevatorCostarumT6R7 = {
            AnyFolder& MuscleParameters = ....Data.unscaled.ModelParameters.Muscles.LevatorCostarum.LevatorCostarumT6R7;
            AnyIntVar MuscleElemNo = 1; ///< The number of this element of the muscle
            AnyIntVar MuscleElemAmount = MuscleParameters.MuscleElemAmount; ///< The total amount of elements for this muscle
            F0 ??= ...DefaultMusPar.PCSAfactor*PCSA; ///< Maximum force output at optimum fiber length
            Lf0 ??= MuscleParameters.OptimalFiberlength / cos(pi/180*MuscleParameters.Pennationangle); //< Optimal fiber length corrected by pennation angle
            AnyVar PCSA ??= 1e4*...StrengthScaleSpine*MuscleParameters.MuscleVolumeSIScaled/(Lf0); ///< PCSA (cm2) of the individual element is total volumen divided by the sum of muscle element fiber lengths.
            Vol0 ??= (1e-4*PCSA) * Lf0; // New calculation of the vol for the specific muscle branch
        };
        #endif

        #if BM_TRUNK_MUSCLES
        AnyMuscleModel LevatorCostarumT7R8 = {
            AnyFolder& MuscleParameters = ....Data.unscaled.ModelParameters.Muscles.LevatorCostarum.LevatorCostarumT7R8;
            AnyIntVar MuscleElemNo = 1; ///< The number of this element of the muscle
            AnyIntVar MuscleElemAmount = MuscleParameters.MuscleElemAmount; ///< The total amount of elements for this muscle
            F0 ??= ...DefaultMusPar.PCSAfactor*PCSA; ///< Maximum force output at optimum fiber length
            Lf0 ??= MuscleParameters.OptimalFiberlength / cos(pi/180*MuscleParameters.Pennationangle); //< Optimal fiber length corrected by pennation angle
            AnyVar PCSA ??= 1e4*...StrengthScaleSpine*MuscleParameters.MuscleVolumeSIScaled/(Lf0); ///< PCSA (cm2) of the individual element is total volumen divided by the sum of muscle element fiber lengths.
            Vol0 ??= (1e-4*PCSA) * Lf0; // New calculation of the vol for the specific muscle branch
        };
        #endif

        #if BM_TRUNK_MUSCLES
        AnyMuscleModel LevatorCostarumT8R9 = {
            AnyFolder& MuscleParameters = ....Data.unscaled.ModelParameters.Muscles.LevatorCostarum.LevatorCostarumT8R9;
            AnyIntVar MuscleElemNo = 1; ///< The number of this element of the muscle
            AnyIntVar MuscleElemAmount = MuscleParameters.MuscleElemAmount; ///< The total amount of elements for this muscle
            F0 ??= ...DefaultMusPar.PCSAfactor*PCSA; ///< Maximum force output at optimum fiber length
            Lf0 ??= MuscleParameters.OptimalFiberlength / cos(pi/180*MuscleParameters.Pennationangle); //< Optimal fiber length corrected by pennation angle
            AnyVar PCSA ??= 1e4*...StrengthScaleSpine*MuscleParameters.MuscleVolumeSIScaled/(Lf0); ///< PCSA (cm2) of the individual element is total volumen divided by the sum of muscle element fiber lengths.
            Vol0 ??= (1e-4*PCSA) * Lf0; // New calculation of the vol for the specific muscle branch
        };
        #endif

        #if BM_TRUNK_MUSCLES
        AnyMuscleModel LevatorCostarumT9R10 = {
            AnyFolder& MuscleParameters = ....Data.unscaled.ModelParameters.Muscles.LevatorCostarum.LevatorCostarumT9R10;
            AnyIntVar MuscleElemNo = 1; ///< The number of this element of the muscle
            AnyIntVar MuscleElemAmount = MuscleParameters.MuscleElemAmount; ///< The total amount of elements for this muscle
            F0 ??= ...DefaultMusPar.PCSAfactor*PCSA; ///< Maximum force output at optimum fiber length
            Lf0 ??= MuscleParameters.OptimalFiberlength / cos(pi/180*MuscleParameters.Pennationangle); //< Optimal fiber length corrected by pennation angle
            AnyVar PCSA ??= 1e4*...StrengthScaleSpine*MuscleParameters.MuscleVolumeSIScaled/(Lf0); ///< PCSA (cm2) of the individual element is total volumen divided by the sum of muscle element fiber lengths.
            Vol0 ??= (1e-4*PCSA) * Lf0; // New calculation of the vol for the specific muscle branch
        };
        #endif

        #if BM_TRUNK_MUSCLES
        AnyMuscleModel LevatorCostarumT10R11 = {
            AnyFolder& MuscleParameters = ....Data.unscaled.ModelParameters.Muscles.LevatorCostarum.LevatorCostarumT10R11;
            AnyIntVar MuscleElemNo = 1; ///< The number of this element of the muscle
            AnyIntVar MuscleElemAmount = MuscleParameters.MuscleElemAmount; ///< The total amount of elements for this muscle
            F0 ??= ...DefaultMusPar.PCSAfactor*PCSA; ///< Maximum force output at optimum fiber length
            Lf0 ??= MuscleParameters.OptimalFiberlength / cos(pi/180*MuscleParameters.Pennationangle); //< Optimal fiber length corrected by pennation angle
            AnyVar PCSA ??= 1e4*...StrengthScaleSpine*MuscleParameters.MuscleVolumeSIScaled/(Lf0); ///< PCSA (cm2) of the individual element is total volumen divided by the sum of muscle element fiber lengths.
            Vol0 ??= (1e-4*PCSA) * Lf0; // New calculation of the vol for the specific muscle branch
        };
        #endif

        #if BM_TRUNK_MUSCLES
        AnyMuscleModel LevatorCostarumT11R12 = {
            AnyFolder& MuscleParameters = ....Data.unscaled.ModelParameters.Muscles.LevatorCostarum.LevatorCostarumT11R12;
            AnyIntVar MuscleElemNo = 1; ///< The number of this element of the muscle
            AnyIntVar MuscleElemAmount = MuscleParameters.MuscleElemAmount; ///< The total amount of elements for this muscle
            F0 ??= ...DefaultMusPar.PCSAfactor*PCSA; ///< Maximum force output at optimum fiber length
            Lf0 ??= MuscleParameters.OptimalFiberlength / cos(pi/180*MuscleParameters.Pennationangle); //< Optimal fiber length corrected by pennation angle
            AnyVar PCSA ??= 1e4*...StrengthScaleSpine*MuscleParameters.MuscleVolumeSIScaled/(Lf0); ///< PCSA (cm2) of the individual element is total volumen divided by the sum of muscle element fiber lengths.
            Vol0 ??= (1e-4*PCSA) * Lf0; // New calculation of the vol for the specific muscle branch
        };
        #endif

        #if BM_TRUNK_MUSCLES
        AnyMuscleModel LevatorCostarumT5R7 = {
            AnyFolder& MuscleParameters = ....Data.unscaled.ModelParameters.Muscles.LevatorCostarum.LevatorCostarumT5R7;
            AnyIntVar MuscleElemNo = 1; ///< The number of this element of the muscle
            AnyIntVar MuscleElemAmount = MuscleParameters.MuscleElemAmount; ///< The total amount of elements for this muscle
            F0 ??= ...DefaultMusPar.PCSAfactor*PCSA; ///< Maximum force output at optimum fiber length
            Lf0 ??= MuscleParameters.OptimalFiberlength / cos(pi/180*MuscleParameters.Pennationangle); //< Optimal fiber length corrected by pennation angle
            AnyVar PCSA ??= 1e4*...StrengthScaleSpine*MuscleParameters.MuscleVolumeSIScaled/(Lf0); ///< PCSA (cm2) of the individual element is total volumen divided by the sum of muscle element fiber lengths.
            Vol0 ??= (1e-4*PCSA) * Lf0; // New calculation of the vol for the specific muscle branch
        };
        #endif

        #if BM_TRUNK_MUSCLES
        AnyMuscleModel LevatorCostarumT6R8 = {
            AnyFolder& MuscleParameters = ....Data.unscaled.ModelParameters.Muscles.LevatorCostarum.LevatorCostarumT6R8;
            AnyIntVar MuscleElemNo = 1; ///< The number of this element of the muscle
            AnyIntVar MuscleElemAmount = MuscleParameters.MuscleElemAmount; ///< The total amount of elements for this muscle
            F0 ??= ...DefaultMusPar.PCSAfactor*PCSA; ///< Maximum force output at optimum fiber length
            Lf0 ??= MuscleParameters.OptimalFiberlength / cos(pi/180*MuscleParameters.Pennationangle); //< Optimal fiber length corrected by pennation angle
            AnyVar PCSA ??= 1e4*...StrengthScaleSpine*MuscleParameters.MuscleVolumeSIScaled/(Lf0); ///< PCSA (cm2) of the individual element is total volumen divided by the sum of muscle element fiber lengths.
            Vol0 ??= (1e-4*PCSA) * Lf0; // New calculation of the vol for the specific muscle branch
        };
        #endif

        #if BM_TRUNK_MUSCLES
        AnyMuscleModel LevatorCostarumT7R9 = {
            AnyFolder& MuscleParameters = ....Data.unscaled.ModelParameters.Muscles.LevatorCostarum.LevatorCostarumT7R9;
            AnyIntVar MuscleElemNo = 1; ///< The number of this element of the muscle
            AnyIntVar MuscleElemAmount = MuscleParameters.MuscleElemAmount; ///< The total amount of elements for this muscle
            F0 ??= ...DefaultMusPar.PCSAfactor*PCSA; ///< Maximum force output at optimum fiber length
            Lf0 ??= MuscleParameters.OptimalFiberlength / cos(pi/180*MuscleParameters.Pennationangle); //< Optimal fiber length corrected by pennation angle
            AnyVar PCSA ??= 1e4*...StrengthScaleSpine*MuscleParameters.MuscleVolumeSIScaled/(Lf0); ///< PCSA (cm2) of the individual element is total volumen divided by the sum of muscle element fiber lengths.
            Vol0 ??= (1e-4*PCSA) * Lf0; // New calculation of the vol for the specific muscle branch
        };
        #endif

        #if BM_TRUNK_MUSCLES
        AnyMuscleModel LevatorCostarumT8R10 = {
            AnyFolder& MuscleParameters = ....Data.unscaled.ModelParameters.Muscles.LevatorCostarum.LevatorCostarumT8R10;
            AnyIntVar MuscleElemNo = 1; ///< The number of this element of the muscle
            AnyIntVar MuscleElemAmount = MuscleParameters.MuscleElemAmount; ///< The total amount of elements for this muscle
            F0 ??= ...DefaultMusPar.PCSAfactor*PCSA; ///< Maximum force output at optimum fiber length
            Lf0 ??= MuscleParameters.OptimalFiberlength / cos(pi/180*MuscleParameters.Pennationangle); //< Optimal fiber length corrected by pennation angle
            AnyVar PCSA ??= 1e4*...StrengthScaleSpine*MuscleParameters.MuscleVolumeSIScaled/(Lf0); ///< PCSA (cm2) of the individual element is total volumen divided by the sum of muscle element fiber lengths.
            Vol0 ??= (1e-4*PCSA) * Lf0; // New calculation of the vol for the specific muscle branch
        };
        #endif

        #if BM_TRUNK_MUSCLES
        AnyMuscleModel LevatorCostarumT9R11 = {
            AnyFolder& MuscleParameters = ....Data.unscaled.ModelParameters.Muscles.LevatorCostarum.LevatorCostarumT9R11;
            AnyIntVar MuscleElemNo = 1; ///< The number of this element of the muscle
            AnyIntVar MuscleElemAmount = MuscleParameters.MuscleElemAmount; ///< The total amount of elements for this muscle
            F0 ??= ...DefaultMusPar.PCSAfactor*PCSA; ///< Maximum force output at optimum fiber length
            Lf0 ??= MuscleParameters.OptimalFiberlength / cos(pi/180*MuscleParameters.Pennationangle); //< Optimal fiber length corrected by pennation angle
            AnyVar PCSA ??= 1e4*...StrengthScaleSpine*MuscleParameters.MuscleVolumeSIScaled/(Lf0); ///< PCSA (cm2) of the individual element is total volumen divided by the sum of muscle element fiber lengths.
            Vol0 ??= (1e-4*PCSA) * Lf0; // New calculation of the vol for the specific muscle branch
        };
        #endif

        #if BM_TRUNK_MUSCLES
        AnyMuscleModel LevatorCostarumT10R12 = {
            AnyFolder& MuscleParameters = ....Data.unscaled.ModelParameters.Muscles.LevatorCostarum.LevatorCostarumT10R12;
            AnyIntVar MuscleElemNo = 1; ///< The number of this element of the muscle
            AnyIntVar MuscleElemAmount = MuscleParameters.MuscleElemAmount; ///< The total amount of elements for this muscle
            F0 ??= ...DefaultMusPar.PCSAfactor*PCSA; ///< Maximum force output at optimum fiber length
            Lf0 ??= MuscleParameters.OptimalFiberlength / cos(pi/180*MuscleParameters.Pennationangle); //< Optimal fiber length corrected by pennation angle
            AnyVar PCSA ??= 1e4*...StrengthScaleSpine*MuscleParameters.MuscleVolumeSIScaled/(Lf0); ///< PCSA (cm2) of the individual element is total volumen divided by the sum of muscle element fiber lengths.
            Vol0 ??= (1e-4*PCSA) * Lf0; // New calculation of the vol for the specific muscle branch
        };
        #endif

    };

    AnyFolder LongissimusCapitis = {

        #if BM_TRUNK_MUSCLES
        AnyMuscleModel LongissimusCapitisC3 = {
            AnyFolder& MuscleParameters = ....Data.unscaled.ModelParameters.Muscles.LongissimusCapitis.LongissimusCapitisC3;
            AnyIntVar MuscleElemNo = 1; ///< The number of this element of the muscle
            AnyIntVar MuscleElemAmount = MuscleParameters.MuscleElemAmount; ///< The total amount of elements for this muscle
            F0 ??= ...DefaultMusPar.PCSAfactor*PCSA; ///< Maximum force output at optimum fiber length
            Lf0 ??= MuscleParameters.OptimalFiberlength / cos(pi/180*MuscleParameters.Pennationangle); //< Optimal fiber length corrected by pennation angle
            AnyVar PCSA ??= 1e4*...StrengthScaleSpine*MuscleParameters.MuscleVolumeSIScaled/(Lf0); ///< PCSA (cm2) of the individual element is total volumen divided by the sum of muscle element fiber lengths.
            Vol0 ??= (1e-4*PCSA) * Lf0; // New calculation of the vol for the specific muscle branch
        };
        #endif

        #if BM_TRUNK_MUSCLES
        AnyMuscleModel LongissimusCapitisC4 = {
            AnyFolder& MuscleParameters = ....Data.unscaled.ModelParameters.Muscles.LongissimusCapitis.LongissimusCapitisC4;
            AnyIntVar MuscleElemNo = 1; ///< The number of this element of the muscle
            AnyIntVar MuscleElemAmount = MuscleParameters.MuscleElemAmount; ///< The total amount of elements for this muscle
            F0 ??= ...DefaultMusPar.PCSAfactor*PCSA; ///< Maximum force output at optimum fiber length
            Lf0 ??= MuscleParameters.OptimalFiberlength / cos(pi/180*MuscleParameters.Pennationangle); //< Optimal fiber length corrected by pennation angle
            AnyVar PCSA ??= 1e4*...StrengthScaleSpine*MuscleParameters.MuscleVolumeSIScaled/(Lf0); ///< PCSA (cm2) of the individual element is total volumen divided by the sum of muscle element fiber lengths.
            Vol0 ??= (1e-4*PCSA) * Lf0; // New calculation of the vol for the specific muscle branch
        };
        #endif

        #if BM_TRUNK_MUSCLES
        AnyMuscleModel LongissimusCapitisC5 = {
            AnyFolder& MuscleParameters = ....Data.unscaled.ModelParameters.Muscles.LongissimusCapitis.LongissimusCapitisC5;
            AnyIntVar MuscleElemNo = 1; ///< The number of this element of the muscle
            AnyIntVar MuscleElemAmount = MuscleParameters.MuscleElemAmount; ///< The total amount of elements for this muscle
            F0 ??= ...DefaultMusPar.PCSAfactor*PCSA; ///< Maximum force output at optimum fiber length
            Lf0 ??= MuscleParameters.OptimalFiberlength / cos(pi/180*MuscleParameters.Pennationangle); //< Optimal fiber length corrected by pennation angle
            AnyVar PCSA ??= 1e4*...StrengthScaleSpine*MuscleParameters.MuscleVolumeSIScaled/(Lf0); ///< PCSA (cm2) of the individual element is total volumen divided by the sum of muscle element fiber lengths.
            Vol0 ??= (1e-4*PCSA) * Lf0; // New calculation of the vol for the specific muscle branch
        };
        #endif

        #if BM_TRUNK_MUSCLES
        AnyMuscleModel LongissimusCapitisC6 = {
            AnyFolder& MuscleParameters = ....Data.unscaled.ModelParameters.Muscles.LongissimusCapitis.LongissimusCapitisC6;
            AnyIntVar MuscleElemNo = 1; ///< The number of this element of the muscle
            AnyIntVar MuscleElemAmount = MuscleParameters.MuscleElemAmount; ///< The total amount of elements for this muscle
            F0 ??= ...DefaultMusPar.PCSAfactor*PCSA; ///< Maximum force output at optimum fiber length
            Lf0 ??= MuscleParameters.OptimalFiberlength / cos(pi/180*MuscleParameters.Pennationangle); //< Optimal fiber length corrected by pennation angle
            AnyVar PCSA ??= 1e4*...StrengthScaleSpine*MuscleParameters.MuscleVolumeSIScaled/(Lf0); ///< PCSA (cm2) of the individual element is total volumen divided by the sum of muscle element fiber lengths.
            Vol0 ??= (1e-4*PCSA) * Lf0; // New calculation of the vol for the specific muscle branch
        };
        #endif

        #if BM_TRUNK_MUSCLES
        AnyMuscleModel LongissimusCapitisC7 = {
            AnyFolder& MuscleParameters = ....Data.unscaled.ModelParameters.Muscles.LongissimusCapitis.LongissimusCapitisC7;
            AnyIntVar MuscleElemNo = 1; ///< The number of this element of the muscle
            AnyIntVar MuscleElemAmount = MuscleParameters.MuscleElemAmount; ///< The total amount of elements for this muscle
            F0 ??= ...DefaultMusPar.PCSAfactor*PCSA; ///< Maximum force output at optimum fiber length
            Lf0 ??= MuscleParameters.OptimalFiberlength / cos(pi/180*MuscleParameters.Pennationangle); //< Optimal fiber length corrected by pennation angle
            AnyVar PCSA ??= 1e4*...StrengthScaleSpine*MuscleParameters.MuscleVolumeSIScaled/(Lf0); ///< PCSA (cm2) of the individual element is total volumen divided by the sum of muscle element fiber lengths.
            Vol0 ??= (1e-4*PCSA) * Lf0; // New calculation of the vol for the specific muscle branch
        };
        #endif

        #if BM_TRUNK_MUSCLES
        AnyMuscleModel LongissimusCapitisT1 = {
            AnyFolder& MuscleParameters = ....Data.unscaled.ModelParameters.Muscles.LongissimusCapitis.LongissimusCapitisT1;
            AnyIntVar MuscleElemNo = 1; ///< The number of this element of the muscle
            AnyIntVar MuscleElemAmount = MuscleParameters.MuscleElemAmount; ///< The total amount of elements for this muscle
            F0 ??= ...DefaultMusPar.PCSAfactor*PCSA; ///< Maximum force output at optimum fiber length
            Lf0 ??= MuscleParameters.OptimalFiberlength / cos(pi/180*MuscleParameters.Pennationangle); //< Optimal fiber length corrected by pennation angle
            AnyVar PCSA ??= 1e4*...StrengthScaleSpine*MuscleParameters.MuscleVolumeSIScaled/(Lf0); ///< PCSA (cm2) of the individual element is total volumen divided by the sum of muscle element fiber lengths.
            Vol0 ??= (1e-4*PCSA) * Lf0; // New calculation of the vol for the specific muscle branch
        };
        #endif

        #if BM_TRUNK_MUSCLES
        AnyMuscleModel LongissimusCapitisT2 = {
            AnyFolder& MuscleParameters = ....Data.unscaled.ModelParameters.Muscles.LongissimusCapitis.LongissimusCapitisT2;
            AnyIntVar MuscleElemNo = 1; ///< The number of this element of the muscle
            AnyIntVar MuscleElemAmount = MuscleParameters.MuscleElemAmount; ///< The total amount of elements for this muscle
            F0 ??= ...DefaultMusPar.PCSAfactor*PCSA; ///< Maximum force output at optimum fiber length
            Lf0 ??= MuscleParameters.OptimalFiberlength / cos(pi/180*MuscleParameters.Pennationangle); //< Optimal fiber length corrected by pennation angle
            AnyVar PCSA ??= 1e4*...StrengthScaleSpine*MuscleParameters.MuscleVolumeSIScaled/(Lf0); ///< PCSA (cm2) of the individual element is total volumen divided by the sum of muscle element fiber lengths.
            Vol0 ??= (1e-4*PCSA) * Lf0; // New calculation of the vol for the specific muscle branch
        };
        #endif

        #if BM_TRUNK_MUSCLES
        AnyMuscleModel LongissimusCapitisT3 = {
            AnyFolder& MuscleParameters = ....Data.unscaled.ModelParameters.Muscles.LongissimusCapitis.LongissimusCapitisT3;
            AnyIntVar MuscleElemNo = 1; ///< The number of this element of the muscle
            AnyIntVar MuscleElemAmount = MuscleParameters.MuscleElemAmount; ///< The total amount of elements for this muscle
            F0 ??= ...DefaultMusPar.PCSAfactor*PCSA; ///< Maximum force output at optimum fiber length
            Lf0 ??= MuscleParameters.OptimalFiberlength / cos(pi/180*MuscleParameters.Pennationangle); //< Optimal fiber length corrected by pennation angle
            AnyVar PCSA ??= 1e4*...StrengthScaleSpine*MuscleParameters.MuscleVolumeSIScaled/(Lf0); ///< PCSA (cm2) of the individual element is total volumen divided by the sum of muscle element fiber lengths.
            Vol0 ??= (1e-4*PCSA) * Lf0; // New calculation of the vol for the specific muscle branch
        };
        #endif

        #if BM_TRUNK_MUSCLES
        AnyMuscleModel LongissimusCapitisT4 = {
            AnyFolder& MuscleParameters = ....Data.unscaled.ModelParameters.Muscles.LongissimusCapitis.LongissimusCapitisT4;
            AnyIntVar MuscleElemNo = 1; ///< The number of this element of the muscle
            AnyIntVar MuscleElemAmount = MuscleParameters.MuscleElemAmount; ///< The total amount of elements for this muscle
            F0 ??= ...DefaultMusPar.PCSAfactor*PCSA; ///< Maximum force output at optimum fiber length
            Lf0 ??= MuscleParameters.OptimalFiberlength / cos(pi/180*MuscleParameters.Pennationangle); //< Optimal fiber length corrected by pennation angle
            AnyVar PCSA ??= 1e4*...StrengthScaleSpine*MuscleParameters.MuscleVolumeSIScaled/(Lf0); ///< PCSA (cm2) of the individual element is total volumen divided by the sum of muscle element fiber lengths.
            Vol0 ??= (1e-4*PCSA) * Lf0; // New calculation of the vol for the specific muscle branch
        };
        #endif

        #if BM_TRUNK_MUSCLES
        AnyMuscleModel LongissimusCapitisT5 = {
            AnyFolder& MuscleParameters = ....Data.unscaled.ModelParameters.Muscles.LongissimusCapitis.LongissimusCapitisT5;
            AnyIntVar MuscleElemNo = 1; ///< The number of this element of the muscle
            AnyIntVar MuscleElemAmount = MuscleParameters.MuscleElemAmount; ///< The total amount of elements for this muscle
            F0 ??= ...DefaultMusPar.PCSAfactor*PCSA; ///< Maximum force output at optimum fiber length
            Lf0 ??= MuscleParameters.OptimalFiberlength / cos(pi/180*MuscleParameters.Pennationangle); //< Optimal fiber length corrected by pennation angle
            AnyVar PCSA ??= 1e4*...StrengthScaleSpine*MuscleParameters.MuscleVolumeSIScaled/(Lf0); ///< PCSA (cm2) of the individual element is total volumen divided by the sum of muscle element fiber lengths.
            Vol0 ??= (1e-4*PCSA) * Lf0; // New calculation of the vol for the specific muscle branch
        };
        #endif

    };

    AnyFolder LongissimusCervicis = {

        #if BM_TRUNK_MUSCLES
        AnyMuscleModel LongissimusCervicisT1C2 = {
            AnyFolder& MuscleParameters = ....Data.unscaled.ModelParameters.Muscles.LongissimusCervicis.LongissimusCervicisT1C2;
            AnyIntVar MuscleElemNo = 1; ///< The number of this element of the muscle
            AnyIntVar MuscleElemAmount = MuscleParameters.MuscleElemAmount; ///< The total amount of elements for this muscle
            F0 ??= ...DefaultMusPar.PCSAfactor*PCSA; ///< Maximum force output at optimum fiber length
            Lf0 ??= MuscleParameters.OptimalFiberlength / cos(pi/180*MuscleParameters.Pennationangle); //< Optimal fiber length corrected by pennation angle
            AnyVar PCSA ??= 1e4*...StrengthScaleSpine*MuscleParameters.MuscleVolumeSIScaled/(Lf0); ///< PCSA (cm2) of the individual element is total volumen divided by the sum of muscle element fiber lengths.
            Vol0 ??= (1e-4*PCSA) * Lf0; // New calculation of the vol for the specific muscle branch
        };
        #endif

        #if BM_TRUNK_MUSCLES
        AnyMuscleModel LongissimusCervicisT2C3 = {
            AnyFolder& MuscleParameters = ....Data.unscaled.ModelParameters.Muscles.LongissimusCervicis.LongissimusCervicisT2C3;
            AnyIntVar MuscleElemNo = 1; ///< The number of this element of the muscle
            AnyIntVar MuscleElemAmount = MuscleParameters.MuscleElemAmount; ///< The total amount of elements for this muscle
            F0 ??= ...DefaultMusPar.PCSAfactor*PCSA; ///< Maximum force output at optimum fiber length
            Lf0 ??= MuscleParameters.OptimalFiberlength / cos(pi/180*MuscleParameters.Pennationangle); //< Optimal fiber length corrected by pennation angle
            AnyVar PCSA ??= 1e4*...StrengthScaleSpine*MuscleParameters.MuscleVolumeSIScaled/(Lf0); ///< PCSA (cm2) of the individual element is total volumen divided by the sum of muscle element fiber lengths.
            Vol0 ??= (1e-4*PCSA) * Lf0; // New calculation of the vol for the specific muscle branch
        };
        #endif

        #if BM_TRUNK_MUSCLES
        AnyMuscleModel LongissimusCervicisT3C4 = {
            AnyFolder& MuscleParameters = ....Data.unscaled.ModelParameters.Muscles.LongissimusCervicis.LongissimusCervicisT3C4;
            AnyIntVar MuscleElemNo = 1; ///< The number of this element of the muscle
            AnyIntVar MuscleElemAmount = MuscleParameters.MuscleElemAmount; ///< The total amount of elements for this muscle
            F0 ??= ...DefaultMusPar.PCSAfactor*PCSA; ///< Maximum force output at optimum fiber length
            Lf0 ??= MuscleParameters.OptimalFiberlength / cos(pi/180*MuscleParameters.Pennationangle); //< Optimal fiber length corrected by pennation angle
            AnyVar PCSA ??= 1e4*...StrengthScaleSpine*MuscleParameters.MuscleVolumeSIScaled/(Lf0); ///< PCSA (cm2) of the individual element is total volumen divided by the sum of muscle element fiber lengths.
            Vol0 ??= (1e-4*PCSA) * Lf0; // New calculation of the vol for the specific muscle branch
        };
        #endif

        #if BM_TRUNK_MUSCLES
        AnyMuscleModel LongissimusCervicisT4C5 = {
            AnyFolder& MuscleParameters = ....Data.unscaled.ModelParameters.Muscles.LongissimusCervicis.LongissimusCervicisT4C5;
            AnyIntVar MuscleElemNo = 1; ///< The number of this element of the muscle
            AnyIntVar MuscleElemAmount = MuscleParameters.MuscleElemAmount; ///< The total amount of elements for this muscle
            F0 ??= ...DefaultMusPar.PCSAfactor*PCSA; ///< Maximum force output at optimum fiber length
            Lf0 ??= MuscleParameters.OptimalFiberlength / cos(pi/180*MuscleParameters.Pennationangle); //< Optimal fiber length corrected by pennation angle
            AnyVar PCSA ??= 1e4*...StrengthScaleSpine*MuscleParameters.MuscleVolumeSIScaled/(Lf0); ///< PCSA (cm2) of the individual element is total volumen divided by the sum of muscle element fiber lengths.
            Vol0 ??= (1e-4*PCSA) * Lf0; // New calculation of the vol for the specific muscle branch
        };
        #endif

        #if BM_TRUNK_MUSCLES
        AnyMuscleModel LongissimusCervicisT5C6 = {
            AnyFolder& MuscleParameters = ....Data.unscaled.ModelParameters.Muscles.LongissimusCervicis.LongissimusCervicisT5C6;
            AnyIntVar MuscleElemNo = 1; ///< The number of this element of the muscle
            AnyIntVar MuscleElemAmount = MuscleParameters.MuscleElemAmount; ///< The total amount of elements for this muscle
            F0 ??= ...DefaultMusPar.PCSAfactor*PCSA; ///< Maximum force output at optimum fiber length
            Lf0 ??= MuscleParameters.OptimalFiberlength / cos(pi/180*MuscleParameters.Pennationangle); //< Optimal fiber length corrected by pennation angle
            AnyVar PCSA ??= 1e4*...StrengthScaleSpine*MuscleParameters.MuscleVolumeSIScaled/(Lf0); ///< PCSA (cm2) of the individual element is total volumen divided by the sum of muscle element fiber lengths.
            Vol0 ??= (1e-4*PCSA) * Lf0; // New calculation of the vol for the specific muscle branch
        };
        #endif

    };

    AnyFolder LongissimusThoracis = {

        #if BM_TRUNK_MUSCLES
        AnyMuscleModel LongissimusThoracisL1IC = {
            AnyFolder& MuscleParameters = ....Data.unscaled.ModelParameters.Muscles.LongissimusThoracis.LongissimusThoracisL1IC;
            AnyIntVar MuscleElemNo = 1; ///< The number of this element of the muscle
            AnyIntVar MuscleElemAmount = MuscleParameters.MuscleElemAmount; ///< The total amount of elements for this muscle
            F0 ??= ...DefaultMusPar.PCSAfactor*PCSA; ///< Maximum force output at optimum fiber length
            Lf0 ??= MuscleParameters.OptimalFiberlength / cos(pi/180*MuscleParameters.Pennationangle); //< Optimal fiber length corrected by pennation angle
            AnyVar PCSA ??= 1e4*...StrengthScaleSpine*MuscleParameters.MuscleVolumeSIScaled/(Lf0); ///< PCSA (cm2) of the individual element is total volumen divided by the sum of muscle element fiber lengths.
            Vol0 ??= (1e-4*PCSA) * Lf0; // New calculation of the vol for the specific muscle branch
        };
        #endif

        #if BM_TRUNK_MUSCLES
        AnyMuscleModel LongissimusThoracisL2IC = {
            AnyFolder& MuscleParameters = ....Data.unscaled.ModelParameters.Muscles.LongissimusThoracis.LongissimusThoracisL2IC;
            AnyIntVar MuscleElemNo = 1; ///< The number of this element of the muscle
            AnyIntVar MuscleElemAmount = MuscleParameters.MuscleElemAmount; ///< The total amount of elements for this muscle
            F0 ??= ...DefaultMusPar.PCSAfactor*PCSA; ///< Maximum force output at optimum fiber length
            Lf0 ??= MuscleParameters.OptimalFiberlength / cos(pi/180*MuscleParameters.Pennationangle); //< Optimal fiber length corrected by pennation angle
            AnyVar PCSA ??= 1e4*...StrengthScaleSpine*MuscleParameters.MuscleVolumeSIScaled/(Lf0); ///< PCSA (cm2) of the individual element is total volumen divided by the sum of muscle element fiber lengths.
            Vol0 ??= (1e-4*PCSA) * Lf0; // New calculation of the vol for the specific muscle branch
        };
        #endif

        #if BM_TRUNK_MUSCLES
        AnyMuscleModel LongissimusThoracisL3IC = {
            AnyFolder& MuscleParameters = ....Data.unscaled.ModelParameters.Muscles.LongissimusThoracis.LongissimusThoracisL3IC;
            AnyIntVar MuscleElemNo = 1; ///< The number of this element of the muscle
            AnyIntVar MuscleElemAmount = MuscleParameters.MuscleElemAmount; ///< The total amount of elements for this muscle
            F0 ??= ...DefaultMusPar.PCSAfactor*PCSA; ///< Maximum force output at optimum fiber length
            Lf0 ??= MuscleParameters.OptimalFiberlength / cos(pi/180*MuscleParameters.Pennationangle); //< Optimal fiber length corrected by pennation angle
            AnyVar PCSA ??= 1e4*...StrengthScaleSpine*MuscleParameters.MuscleVolumeSIScaled/(Lf0); ///< PCSA (cm2) of the individual element is total volumen divided by the sum of muscle element fiber lengths.
            Vol0 ??= (1e-4*PCSA) * Lf0; // New calculation of the vol for the specific muscle branch
        };
        #endif

        #if BM_TRUNK_MUSCLES
        AnyMuscleModel LongissimusThoracisL4IC = {
            AnyFolder& MuscleParameters = ....Data.unscaled.ModelParameters.Muscles.LongissimusThoracis.LongissimusThoracisL4IC;
            AnyIntVar MuscleElemNo = 1; ///< The number of this element of the muscle
            AnyIntVar MuscleElemAmount = MuscleParameters.MuscleElemAmount; ///< The total amount of elements for this muscle
            F0 ??= ...DefaultMusPar.PCSAfactor*PCSA; ///< Maximum force output at optimum fiber length
            Lf0 ??= MuscleParameters.OptimalFiberlength / cos(pi/180*MuscleParameters.Pennationangle); //< Optimal fiber length corrected by pennation angle
            AnyVar PCSA ??= 1e4*...StrengthScaleSpine*MuscleParameters.MuscleVolumeSIScaled/(Lf0); ///< PCSA (cm2) of the individual element is total volumen divided by the sum of muscle element fiber lengths.
            Vol0 ??= (1e-4*PCSA) * Lf0; // New calculation of the vol for the specific muscle branch
        };
        #endif

        #if BM_TRUNK_MUSCLES
        AnyMuscleModel LongissimusThoracisL5Ilium = {
            AnyFolder& MuscleParameters = ....Data.unscaled.ModelParameters.Muscles.LongissimusThoracis.LongissimusThoracisL5Ilium;
            AnyIntVar MuscleElemNo = 1; ///< The number of this element of the muscle
            AnyIntVar MuscleElemAmount = MuscleParameters.MuscleElemAmount; ///< The total amount of elements for this muscle
            F0 ??= ...DefaultMusPar.PCSAfactor*PCSA; ///< Maximum force output at optimum fiber length
            Lf0 ??= MuscleParameters.OptimalFiberlength / cos(pi/180*MuscleParameters.Pennationangle); //< Optimal fiber length corrected by pennation angle
            AnyVar PCSA ??= 1e4*...StrengthScaleSpine*MuscleParameters.MuscleVolumeSIScaled/(Lf0); ///< PCSA (cm2) of the individual element is total volumen divided by the sum of muscle element fiber lengths.
            Vol0 ??= (1e-4*PCSA) * Lf0; // New calculation of the vol for the specific muscle branch
        };
        #endif

        #if BM_TRUNK_MUSCLES
        AnyMuscleModel LongissimusThoracisT1L1 = {
            AnyFolder& MuscleParameters = ....Data.unscaled.ModelParameters.Muscles.LongissimusThoracis.LongissimusThoracisT1L1;
            AnyIntVar MuscleElemNo = 1; ///< The number of this element of the muscle
            AnyIntVar MuscleElemAmount = MuscleParameters.MuscleElemAmount; ///< The total amount of elements for this muscle
            F0 ??= ...DefaultMusPar.PCSAfactor*PCSA; ///< Maximum force output at optimum fiber length
            Lf0 ??= MuscleParameters.OptimalFiberlength / cos(pi/180*MuscleParameters.Pennationangle); //< Optimal fiber length corrected by pennation angle
            AnyVar PCSA ??= 1e4*...StrengthScaleSpine*MuscleParameters.MuscleVolumeSIScaled/(Lf0); ///< PCSA (cm2) of the individual element is total volumen divided by the sum of muscle element fiber lengths.
            Vol0 ??= (1e-4*PCSA) * Lf0; // New calculation of the vol for the specific muscle branch
        };
        #endif

        #if BM_TRUNK_MUSCLES
        AnyMuscleModel LongissimusThoracisT2L2 = {
            AnyFolder& MuscleParameters = ....Data.unscaled.ModelParameters.Muscles.LongissimusThoracis.LongissimusThoracisT2L2;
            AnyIntVar MuscleElemNo = 1; ///< The number of this element of the muscle
            AnyIntVar MuscleElemAmount = MuscleParameters.MuscleElemAmount; ///< The total amount of elements for this muscle
            F0 ??= ...DefaultMusPar.PCSAfactor*PCSA; ///< Maximum force output at optimum fiber length
            Lf0 ??= MuscleParameters.OptimalFiberlength / cos(pi/180*MuscleParameters.Pennationangle); //< Optimal fiber length corrected by pennation angle
            AnyVar PCSA ??= 1e4*...StrengthScaleSpine*MuscleParameters.MuscleVolumeSIScaled/(Lf0); ///< PCSA (cm2) of the individual element is total volumen divided by the sum of muscle element fiber lengths.
            Vol0 ??= (1e-4*PCSA) * Lf0; // New calculation of the vol for the specific muscle branch
        };
        #endif

        #if BM_TRUNK_MUSCLES
        AnyMuscleModel LongissimusThoracisT3L3 = {
            AnyFolder& MuscleParameters = ....Data.unscaled.ModelParameters.Muscles.LongissimusThoracis.LongissimusThoracisT3L3;
            AnyIntVar MuscleElemNo = 1; ///< The number of this element of the muscle
            AnyIntVar MuscleElemAmount = MuscleParameters.MuscleElemAmount; ///< The total amount of elements for this muscle
            F0 ??= ...DefaultMusPar.PCSAfactor*PCSA; ///< Maximum force output at optimum fiber length
            Lf0 ??= MuscleParameters.OptimalFiberlength / cos(pi/180*MuscleParameters.Pennationangle); //< Optimal fiber length corrected by pennation angle
            AnyVar PCSA ??= 1e4*...StrengthScaleSpine*MuscleParameters.MuscleVolumeSIScaled/(Lf0); ///< PCSA (cm2) of the individual element is total volumen divided by the sum of muscle element fiber lengths.
            Vol0 ??= (1e-4*PCSA) * Lf0; // New calculation of the vol for the specific muscle branch
        };
        #endif

        #if BM_TRUNK_MUSCLES
        AnyMuscleModel LongissimusThoracisT4L4 = {
            AnyFolder& MuscleParameters = ....Data.unscaled.ModelParameters.Muscles.LongissimusThoracis.LongissimusThoracisT4L4;
            AnyIntVar MuscleElemNo = 1; ///< The number of this element of the muscle
            AnyIntVar MuscleElemAmount = MuscleParameters.MuscleElemAmount; ///< The total amount of elements for this muscle
            F0 ??= ...DefaultMusPar.PCSAfactor*PCSA; ///< Maximum force output at optimum fiber length
            Lf0 ??= MuscleParameters.OptimalFiberlength / cos(pi/180*MuscleParameters.Pennationangle); //< Optimal fiber length corrected by pennation angle
            AnyVar PCSA ??= 1e4*...StrengthScaleSpine*MuscleParameters.MuscleVolumeSIScaled/(Lf0); ///< PCSA (cm2) of the individual element is total volumen divided by the sum of muscle element fiber lengths.
            Vol0 ??= (1e-4*PCSA) * Lf0; // New calculation of the vol for the specific muscle branch
        };
        #endif

        #if BM_TRUNK_MUSCLES
        AnyMuscleModel LongissimusThoracisT5L5 = {
            AnyFolder& MuscleParameters = ....Data.unscaled.ModelParameters.Muscles.LongissimusThoracis.LongissimusThoracisT5L5;
            AnyIntVar MuscleElemNo = 1; ///< The number of this element of the muscle
            AnyIntVar MuscleElemAmount = MuscleParameters.MuscleElemAmount; ///< The total amount of elements for this muscle
            F0 ??= ...DefaultMusPar.PCSAfactor*PCSA; ///< Maximum force output at optimum fiber length
            Lf0 ??= MuscleParameters.OptimalFiberlength / cos(pi/180*MuscleParameters.Pennationangle); //< Optimal fiber length corrected by pennation angle
            AnyVar PCSA ??= 1e4*...StrengthScaleSpine*MuscleParameters.MuscleVolumeSIScaled/(Lf0); ///< PCSA (cm2) of the individual element is total volumen divided by the sum of muscle element fiber lengths.
            Vol0 ??= (1e-4*PCSA) * Lf0; // New calculation of the vol for the specific muscle branch
        };
        #endif

        #if BM_TRUNK_MUSCLES
        AnyMuscleModel LongissimusThoracisT6S1 = {
            AnyFolder& MuscleParameters = ....Data.unscaled.ModelParameters.Muscles.LongissimusThoracis.LongissimusThoracisT6S1;
            AnyIntVar MuscleElemNo = 1; ///< The number of this element of the muscle
            AnyIntVar MuscleElemAmount = MuscleParameters.MuscleElemAmount; ///< The total amount of elements for this muscle
            F0 ??= ...DefaultMusPar.PCSAfactor*PCSA; ///< Maximum force output at optimum fiber length
            Lf0 ??= MuscleParameters.OptimalFiberlength / cos(pi/180*MuscleParameters.Pennationangle); //< Optimal fiber length corrected by pennation angle
            AnyVar PCSA ??= 1e4*...StrengthScaleSpine*MuscleParameters.MuscleVolumeSIScaled/(Lf0); ///< PCSA (cm2) of the individual element is total volumen divided by the sum of muscle element fiber lengths.
            Vol0 ??= (1e-4*PCSA) * Lf0; // New calculation of the vol for the specific muscle branch
        };
        #endif

        #if BM_TRUNK_MUSCLES
        AnyMuscleModel LongissimusThoracisT7S2 = {
            AnyFolder& MuscleParameters = ....Data.unscaled.ModelParameters.Muscles.LongissimusThoracis.LongissimusThoracisT7S2;
            AnyIntVar MuscleElemNo = 1; ///< The number of this element of the muscle
            AnyIntVar MuscleElemAmount = MuscleParameters.MuscleElemAmount; ///< The total amount of elements for this muscle
            F0 ??= ...DefaultMusPar.PCSAfactor*PCSA; ///< Maximum force output at optimum fiber length
            Lf0 ??= MuscleParameters.OptimalFiberlength / cos(pi/180*MuscleParameters.Pennationangle); //< Optimal fiber length corrected by pennation angle
            AnyVar PCSA ??= 1e4*...StrengthScaleSpine*MuscleParameters.MuscleVolumeSIScaled/(Lf0); ///< PCSA (cm2) of the individual element is total volumen divided by the sum of muscle element fiber lengths.
            Vol0 ??= (1e-4*PCSA) * Lf0; // New calculation of the vol for the specific muscle branch
        };
        #endif

        #if BM_TRUNK_MUSCLES
        AnyMuscleModel LongissimusThoracisT8S3 = {
            AnyFolder& MuscleParameters = ....Data.unscaled.ModelParameters.Muscles.LongissimusThoracis.LongissimusThoracisT8S3;
            AnyIntVar MuscleElemNo = 1; ///< The number of this element of the muscle
            AnyIntVar MuscleElemAmount = MuscleParameters.MuscleElemAmount; ///< The total amount of elements for this muscle
            F0 ??= ...DefaultMusPar.PCSAfactor*PCSA; ///< Maximum force output at optimum fiber length
            Lf0 ??= MuscleParameters.OptimalFiberlength / cos(pi/180*MuscleParameters.Pennationangle); //< Optimal fiber length corrected by pennation angle
            AnyVar PCSA ??= 1e4*...StrengthScaleSpine*MuscleParameters.MuscleVolumeSIScaled/(Lf0); ///< PCSA (cm2) of the individual element is total volumen divided by the sum of muscle element fiber lengths.
            Vol0 ??= (1e-4*PCSA) * Lf0; // New calculation of the vol for the specific muscle branch
        };
        #endif

        #if BM_TRUNK_MUSCLES
        AnyMuscleModel LongissimusThoracisT9S4 = {
            AnyFolder& MuscleParameters = ....Data.unscaled.ModelParameters.Muscles.LongissimusThoracis.LongissimusThoracisT9S4;
            AnyIntVar MuscleElemNo = 1; ///< The number of this element of the muscle
            AnyIntVar MuscleElemAmount = MuscleParameters.MuscleElemAmount; ///< The total amount of elements for this muscle
            F0 ??= ...DefaultMusPar.PCSAfactor*PCSA; ///< Maximum force output at optimum fiber length
            Lf0 ??= MuscleParameters.OptimalFiberlength / cos(pi/180*MuscleParameters.Pennationangle); //< Optimal fiber length corrected by pennation angle
            AnyVar PCSA ??= 1e4*...StrengthScaleSpine*MuscleParameters.MuscleVolumeSIScaled/(Lf0); ///< PCSA (cm2) of the individual element is total volumen divided by the sum of muscle element fiber lengths.
            Vol0 ??= (1e-4*PCSA) * Lf0; // New calculation of the vol for the specific muscle branch
        };
        #endif

        #if BM_TRUNK_MUSCLES
        AnyMuscleModel LongissimusThoracisT10S3 = {
            AnyFolder& MuscleParameters = ....Data.unscaled.ModelParameters.Muscles.LongissimusThoracis.LongissimusThoracisT10S3;
            AnyIntVar MuscleElemNo = 1; ///< The number of this element of the muscle
            AnyIntVar MuscleElemAmount = MuscleParameters.MuscleElemAmount; ///< The total amount of elements for this muscle
            F0 ??= ...DefaultMusPar.PCSAfactor*PCSA; ///< Maximum force output at optimum fiber length
            Lf0 ??= MuscleParameters.OptimalFiberlength / cos(pi/180*MuscleParameters.Pennationangle); //< Optimal fiber length corrected by pennation angle
            AnyVar PCSA ??= 1e4*...StrengthScaleSpine*MuscleParameters.MuscleVolumeSIScaled/(Lf0); ///< PCSA (cm2) of the individual element is total volumen divided by the sum of muscle element fiber lengths.
            Vol0 ??= (1e-4*PCSA) * Lf0; // New calculation of the vol for the specific muscle branch
        };
        #endif

        #if BM_TRUNK_MUSCLES
        AnyMuscleModel LongissimusThoracisT11S3 = {
            AnyFolder& MuscleParameters = ....Data.unscaled.ModelParameters.Muscles.LongissimusThoracis.LongissimusThoracisT11S3;
            AnyIntVar MuscleElemNo = 1; ///< The number of this element of the muscle
            AnyIntVar MuscleElemAmount = MuscleParameters.MuscleElemAmount; ///< The total amount of elements for this muscle
            F0 ??= ...DefaultMusPar.PCSAfactor*PCSA; ///< Maximum force output at optimum fiber length
            Lf0 ??= MuscleParameters.OptimalFiberlength / cos(pi/180*MuscleParameters.Pennationangle); //< Optimal fiber length corrected by pennation angle
            AnyVar PCSA ??= 1e4*...StrengthScaleSpine*MuscleParameters.MuscleVolumeSIScaled/(Lf0); ///< PCSA (cm2) of the individual element is total volumen divided by the sum of muscle element fiber lengths.
            Vol0 ??= (1e-4*PCSA) * Lf0; // New calculation of the vol for the specific muscle branch
        };
        #endif

        #if BM_TRUNK_MUSCLES
        AnyMuscleModel LongissimusThoracisT12S3 = {
            AnyFolder& MuscleParameters = ....Data.unscaled.ModelParameters.Muscles.LongissimusThoracis.LongissimusThoracisT12S3;
            AnyIntVar MuscleElemNo = 1; ///< The number of this element of the muscle
            AnyIntVar MuscleElemAmount = MuscleParameters.MuscleElemAmount; ///< The total amount of elements for this muscle
            F0 ??= ...DefaultMusPar.PCSAfactor*PCSA; ///< Maximum force output at optimum fiber length
            Lf0 ??= MuscleParameters.OptimalFiberlength / cos(pi/180*MuscleParameters.Pennationangle); //< Optimal fiber length corrected by pennation angle
            AnyVar PCSA ??= 1e4*...StrengthScaleSpine*MuscleParameters.MuscleVolumeSIScaled/(Lf0); ///< PCSA (cm2) of the individual element is total volumen divided by the sum of muscle element fiber lengths.
            Vol0 ??= (1e-4*PCSA) * Lf0; // New calculation of the vol for the specific muscle branch
        };
        #endif

        #if BM_TRUNK_MUSCLES
        AnyMuscleModel LongissimusThoracisR3L3 = {
            AnyFolder& MuscleParameters = ....Data.unscaled.ModelParameters.Muscles.LongissimusThoracis.LongissimusThoracisR3L3;
            AnyIntVar MuscleElemNo = 1; ///< The number of this element of the muscle
            AnyIntVar MuscleElemAmount = MuscleParameters.MuscleElemAmount; ///< The total amount of elements for this muscle
            F0 ??= ...DefaultMusPar.PCSAfactor*PCSA; ///< Maximum force output at optimum fiber length
            Lf0 ??= MuscleParameters.OptimalFiberlength / cos(pi/180*MuscleParameters.Pennationangle); //< Optimal fiber length corrected by pennation angle
            AnyVar PCSA ??= 1e4*...StrengthScaleSpine*MuscleParameters.MuscleVolumeSIScaled/(Lf0); ///< PCSA (cm2) of the individual element is total volumen divided by the sum of muscle element fiber lengths.
            Vol0 ??= (1e-4*PCSA) * Lf0; // New calculation of the vol for the specific muscle branch
        };
        #endif

        #if BM_TRUNK_MUSCLES
        AnyMuscleModel LongissimusThoracisR4L4 = {
            AnyFolder& MuscleParameters = ....Data.unscaled.ModelParameters.Muscles.LongissimusThoracis.LongissimusThoracisR4L4;
            AnyIntVar MuscleElemNo = 1; ///< The number of this element of the muscle
            AnyIntVar MuscleElemAmount = MuscleParameters.MuscleElemAmount; ///< The total amount of elements for this muscle
            F0 ??= ...DefaultMusPar.PCSAfactor*PCSA; ///< Maximum force output at optimum fiber length
            Lf0 ??= MuscleParameters.OptimalFiberlength / cos(pi/180*MuscleParameters.Pennationangle); //< Optimal fiber length corrected by pennation angle
            AnyVar PCSA ??= 1e4*...StrengthScaleSpine*MuscleParameters.MuscleVolumeSIScaled/(Lf0); ///< PCSA (cm2) of the individual element is total volumen divided by the sum of muscle element fiber lengths.
            Vol0 ??= (1e-4*PCSA) * Lf0; // New calculation of the vol for the specific muscle branch
        };
        #endif

        #if BM_TRUNK_MUSCLES
        AnyMuscleModel LongissimusThoracisR5L5 = {
            AnyFolder& MuscleParameters = ....Data.unscaled.ModelParameters.Muscles.LongissimusThoracis.LongissimusThoracisR5L5;
            AnyIntVar MuscleElemNo = 1; ///< The number of this element of the muscle
            AnyIntVar MuscleElemAmount = MuscleParameters.MuscleElemAmount; ///< The total amount of elements for this muscle
            F0 ??= ...DefaultMusPar.PCSAfactor*PCSA; ///< Maximum force output at optimum fiber length
            Lf0 ??= MuscleParameters.OptimalFiberlength / cos(pi/180*MuscleParameters.Pennationangle); //< Optimal fiber length corrected by pennation angle
            AnyVar PCSA ??= 1e4*...StrengthScaleSpine*MuscleParameters.MuscleVolumeSIScaled/(Lf0); ///< PCSA (cm2) of the individual element is total volumen divided by the sum of muscle element fiber lengths.
            Vol0 ??= (1e-4*PCSA) * Lf0; // New calculation of the vol for the specific muscle branch
        };
        #endif

        #if BM_TRUNK_MUSCLES
        AnyMuscleModel LongissimusThoracisR6S1 = {
            AnyFolder& MuscleParameters = ....Data.unscaled.ModelParameters.Muscles.LongissimusThoracis.LongissimusThoracisR6S1;
            AnyIntVar MuscleElemNo = 1; ///< The number of this element of the muscle
            AnyIntVar MuscleElemAmount = MuscleParameters.MuscleElemAmount; ///< The total amount of elements for this muscle
            F0 ??= ...DefaultMusPar.PCSAfactor*PCSA; ///< Maximum force output at optimum fiber length
            Lf0 ??= MuscleParameters.OptimalFiberlength / cos(pi/180*MuscleParameters.Pennationangle); //< Optimal fiber length corrected by pennation angle
            AnyVar PCSA ??= 1e4*...StrengthScaleSpine*MuscleParameters.MuscleVolumeSIScaled/(Lf0); ///< PCSA (cm2) of the individual element is total volumen divided by the sum of muscle element fiber lengths.
            Vol0 ??= (1e-4*PCSA) * Lf0; // New calculation of the vol for the specific muscle branch
        };
        #endif

        #if BM_TRUNK_MUSCLES
        AnyMuscleModel LongissimusThoracisR7S2 = {
            AnyFolder& MuscleParameters = ....Data.unscaled.ModelParameters.Muscles.LongissimusThoracis.LongissimusThoracisR7S2;
            AnyIntVar MuscleElemNo = 1; ///< The number of this element of the muscle
            AnyIntVar MuscleElemAmount = MuscleParameters.MuscleElemAmount; ///< The total amount of elements for this muscle
            F0 ??= ...DefaultMusPar.PCSAfactor*PCSA; ///< Maximum force output at optimum fiber length
            Lf0 ??= MuscleParameters.OptimalFiberlength / cos(pi/180*MuscleParameters.Pennationangle); //< Optimal fiber length corrected by pennation angle
            AnyVar PCSA ??= 1e4*...StrengthScaleSpine*MuscleParameters.MuscleVolumeSIScaled/(Lf0); ///< PCSA (cm2) of the individual element is total volumen divided by the sum of muscle element fiber lengths.
            Vol0 ??= (1e-4*PCSA) * Lf0; // New calculation of the vol for the specific muscle branch
        };
        #endif

        #if BM_TRUNK_MUSCLES
        AnyMuscleModel LongissimusThoracisR8S3 = {
            AnyFolder& MuscleParameters = ....Data.unscaled.ModelParameters.Muscles.LongissimusThoracis.LongissimusThoracisR8S3;
            AnyIntVar MuscleElemNo = 1; ///< The number of this element of the muscle
            AnyIntVar MuscleElemAmount = MuscleParameters.MuscleElemAmount; ///< The total amount of elements for this muscle
            F0 ??= ...DefaultMusPar.PCSAfactor*PCSA; ///< Maximum force output at optimum fiber length
            Lf0 ??= MuscleParameters.OptimalFiberlength / cos(pi/180*MuscleParameters.Pennationangle); //< Optimal fiber length corrected by pennation angle
            AnyVar PCSA ??= 1e4*...StrengthScaleSpine*MuscleParameters.MuscleVolumeSIScaled/(Lf0); ///< PCSA (cm2) of the individual element is total volumen divided by the sum of muscle element fiber lengths.
            Vol0 ??= (1e-4*PCSA) * Lf0; // New calculation of the vol for the specific muscle branch
        };
        #endif

        #if BM_TRUNK_MUSCLES
        AnyMuscleModel LongissimusThoracisR9S4 = {
            AnyFolder& MuscleParameters = ....Data.unscaled.ModelParameters.Muscles.LongissimusThoracis.LongissimusThoracisR9S4;
            AnyIntVar MuscleElemNo = 1; ///< The number of this element of the muscle
            AnyIntVar MuscleElemAmount = MuscleParameters.MuscleElemAmount; ///< The total amount of elements for this muscle
            F0 ??= ...DefaultMusPar.PCSAfactor*PCSA; ///< Maximum force output at optimum fiber length
            Lf0 ??= MuscleParameters.OptimalFiberlength / cos(pi/180*MuscleParameters.Pennationangle); //< Optimal fiber length corrected by pennation angle
            AnyVar PCSA ??= 1e4*...StrengthScaleSpine*MuscleParameters.MuscleVolumeSIScaled/(Lf0); ///< PCSA (cm2) of the individual element is total volumen divided by the sum of muscle element fiber lengths.
            Vol0 ??= (1e-4*PCSA) * Lf0; // New calculation of the vol for the specific muscle branch
        };
        #endif

        #if BM_TRUNK_MUSCLES
        AnyMuscleModel LongissimusThoracisR10S3 = {
            AnyFolder& MuscleParameters = ....Data.unscaled.ModelParameters.Muscles.LongissimusThoracis.LongissimusThoracisR10S3;
            AnyIntVar MuscleElemNo = 1; ///< The number of this element of the muscle
            AnyIntVar MuscleElemAmount = MuscleParameters.MuscleElemAmount; ///< The total amount of elements for this muscle
            F0 ??= ...DefaultMusPar.PCSAfactor*PCSA; ///< Maximum force output at optimum fiber length
            Lf0 ??= MuscleParameters.OptimalFiberlength / cos(pi/180*MuscleParameters.Pennationangle); //< Optimal fiber length corrected by pennation angle
            AnyVar PCSA ??= 1e4*...StrengthScaleSpine*MuscleParameters.MuscleVolumeSIScaled/(Lf0); ///< PCSA (cm2) of the individual element is total volumen divided by the sum of muscle element fiber lengths.
            Vol0 ??= (1e-4*PCSA) * Lf0; // New calculation of the vol for the specific muscle branch
        };
        #endif

        #if BM_TRUNK_MUSCLES
        AnyMuscleModel LongissimusThoracisR11S3 = {
            AnyFolder& MuscleParameters = ....Data.unscaled.ModelParameters.Muscles.LongissimusThoracis.LongissimusThoracisR11S3;
            AnyIntVar MuscleElemNo = 1; ///< The number of this element of the muscle
            AnyIntVar MuscleElemAmount = MuscleParameters.MuscleElemAmount; ///< The total amount of elements for this muscle
            F0 ??= ...DefaultMusPar.PCSAfactor*PCSA; ///< Maximum force output at optimum fiber length
            Lf0 ??= MuscleParameters.OptimalFiberlength / cos(pi/180*MuscleParameters.Pennationangle); //< Optimal fiber length corrected by pennation angle
            AnyVar PCSA ??= 1e4*...StrengthScaleSpine*MuscleParameters.MuscleVolumeSIScaled/(Lf0); ///< PCSA (cm2) of the individual element is total volumen divided by the sum of muscle element fiber lengths.
            Vol0 ??= (1e-4*PCSA) * Lf0; // New calculation of the vol for the specific muscle branch
        };
        #endif

        #if BM_TRUNK_MUSCLES
        AnyMuscleModel LongissimusThoracisR12S3 = {
            AnyFolder& MuscleParameters = ....Data.unscaled.ModelParameters.Muscles.LongissimusThoracis.LongissimusThoracisR12S3;
            AnyIntVar MuscleElemNo = 1; ///< The number of this element of the muscle
            AnyIntVar MuscleElemAmount = MuscleParameters.MuscleElemAmount; ///< The total amount of elements for this muscle
            F0 ??= ...DefaultMusPar.PCSAfactor*PCSA; ///< Maximum force output at optimum fiber length
            Lf0 ??= MuscleParameters.OptimalFiberlength / cos(pi/180*MuscleParameters.Pennationangle); //< Optimal fiber length corrected by pennation angle
            AnyVar PCSA ??= 1e4*...StrengthScaleSpine*MuscleParameters.MuscleVolumeSIScaled/(Lf0); ///< PCSA (cm2) of the individual element is total volumen divided by the sum of muscle element fiber lengths.
            Vol0 ??= (1e-4*PCSA) * Lf0; // New calculation of the vol for the specific muscle branch
        };
        #endif

    };

    AnyFolder LongusCapitis = {

        #if BM_TRUNK_MUSCLES
        AnyMuscleModel LongusCapitisC6 = {
            AnyFolder& MuscleParameters = ....Data.unscaled.ModelParameters.Muscles.LongusCapitis.LongusCapitisC6;
            AnyIntVar MuscleElemNo = 1; ///< The number of this element of the muscle
            AnyIntVar MuscleElemAmount = MuscleParameters.MuscleElemAmount; ///< The total amount of elements for this muscle
            F0 ??= ...DefaultMusPar.PCSAfactor*PCSA; ///< Maximum force output at optimum fiber length
            Lf0 ??= MuscleParameters.OptimalFiberlength / cos(pi/180*MuscleParameters.Pennationangle); //< Optimal fiber length corrected by pennation angle
            AnyVar PCSA ??= 1e4*...StrengthScaleSpine*MuscleParameters.MuscleVolumeSIScaled/(Lf0); ///< PCSA (cm2) of the individual element is total volumen divided by the sum of muscle element fiber lengths.
            Vol0 ??= (1e-4*PCSA) * Lf0; // New calculation of the vol for the specific muscle branch
        };
        #endif

        #if BM_TRUNK_MUSCLES
        AnyMuscleModel LongusCapitisC5 = {
            AnyFolder& MuscleParameters = ....Data.unscaled.ModelParameters.Muscles.LongusCapitis.LongusCapitisC5;
            AnyIntVar MuscleElemNo = 1; ///< The number of this element of the muscle
            AnyIntVar MuscleElemAmount = MuscleParameters.MuscleElemAmount; ///< The total amount of elements for this muscle
            F0 ??= ...DefaultMusPar.PCSAfactor*PCSA; ///< Maximum force output at optimum fiber length
            Lf0 ??= MuscleParameters.OptimalFiberlength / cos(pi/180*MuscleParameters.Pennationangle); //< Optimal fiber length corrected by pennation angle
            AnyVar PCSA ??= 1e4*...StrengthScaleSpine*MuscleParameters.MuscleVolumeSIScaled/(Lf0); ///< PCSA (cm2) of the individual element is total volumen divided by the sum of muscle element fiber lengths.
            Vol0 ??= (1e-4*PCSA) * Lf0; // New calculation of the vol for the specific muscle branch
        };
        #endif

        #if BM_TRUNK_MUSCLES
        AnyMuscleModel LongusCapitisC4 = {
            AnyFolder& MuscleParameters = ....Data.unscaled.ModelParameters.Muscles.LongusCapitis.LongusCapitisC4;
            AnyIntVar MuscleElemNo = 1; ///< The number of this element of the muscle
            AnyIntVar MuscleElemAmount = MuscleParameters.MuscleElemAmount; ///< The total amount of elements for this muscle
            F0 ??= ...DefaultMusPar.PCSAfactor*PCSA; ///< Maximum force output at optimum fiber length
            Lf0 ??= MuscleParameters.OptimalFiberlength / cos(pi/180*MuscleParameters.Pennationangle); //< Optimal fiber length corrected by pennation angle
            AnyVar PCSA ??= 1e4*...StrengthScaleSpine*MuscleParameters.MuscleVolumeSIScaled/(Lf0); ///< PCSA (cm2) of the individual element is total volumen divided by the sum of muscle element fiber lengths.
            Vol0 ??= (1e-4*PCSA) * Lf0; // New calculation of the vol for the specific muscle branch
        };
        #endif

        #if BM_TRUNK_MUSCLES
        AnyMuscleModel LongusCapitisC3 = {
            AnyFolder& MuscleParameters = ....Data.unscaled.ModelParameters.Muscles.LongusCapitis.LongusCapitisC3;
            AnyIntVar MuscleElemNo = 1; ///< The number of this element of the muscle
            AnyIntVar MuscleElemAmount = MuscleParameters.MuscleElemAmount; ///< The total amount of elements for this muscle
            F0 ??= ...DefaultMusPar.PCSAfactor*PCSA; ///< Maximum force output at optimum fiber length
            Lf0 ??= MuscleParameters.OptimalFiberlength / cos(pi/180*MuscleParameters.Pennationangle); //< Optimal fiber length corrected by pennation angle
            AnyVar PCSA ??= 1e4*...StrengthScaleSpine*MuscleParameters.MuscleVolumeSIScaled/(Lf0); ///< PCSA (cm2) of the individual element is total volumen divided by the sum of muscle element fiber lengths.
            Vol0 ??= (1e-4*PCSA) * Lf0; // New calculation of the vol for the specific muscle branch
        };
        #endif

    };

    AnyFolder LongusColli = {

        #if BM_TRUNK_MUSCLES
        AnyMuscleModel LongusColliT3C6 = {
            AnyFolder& MuscleParameters = ....Data.unscaled.ModelParameters.Muscles.LongusColli.LongusColliT3C6;
            AnyIntVar MuscleElemNo = 1; ///< The number of this element of the muscle
            AnyIntVar MuscleElemAmount = MuscleParameters.MuscleElemAmount; ///< The total amount of elements for this muscle
            F0 ??= ...DefaultMusPar.PCSAfactor*PCSA; ///< Maximum force output at optimum fiber length
            Lf0 ??= MuscleParameters.OptimalFiberlength / cos(pi/180*MuscleParameters.Pennationangle); //< Optimal fiber length corrected by pennation angle
            AnyVar PCSA ??= 1e4*...StrengthScaleSpine*MuscleParameters.MuscleVolumeSIScaled/(Lf0); ///< PCSA (cm2) of the individual element is total volumen divided by the sum of muscle element fiber lengths.
            Vol0 ??= (1e-4*PCSA) * Lf0; // New calculation of the vol for the specific muscle branch
        };
        #endif

        #if BM_TRUNK_MUSCLES
        AnyMuscleModel LongusColliT2C5_1 = {
            AnyFolder& MuscleParameters = ....Data.unscaled.ModelParameters.Muscles.LongusColli.LongusColliT2C5_1;
            AnyIntVar MuscleElemNo = 1; ///< The number of this element of the muscle
            AnyIntVar MuscleElemAmount = MuscleParameters.MuscleElemAmount; ///< The total amount of elements for this muscle
            F0 ??= ...DefaultMusPar.PCSAfactor*PCSA; ///< Maximum force output at optimum fiber length
            Lf0 ??= MuscleParameters.OptimalFiberlength / cos(pi/180*MuscleParameters.Pennationangle); //< Optimal fiber length corrected by pennation angle
            AnyVar PCSA ??= 1e4*...StrengthScaleSpine*MuscleParameters.MuscleVolumeSIScaled/(Lf0); ///< PCSA (cm2) of the individual element is total volumen divided by the sum of muscle element fiber lengths.
            Vol0 ??= (1e-4*PCSA) * Lf0; // New calculation of the vol for the specific muscle branch
        };
        #endif

        #if BM_TRUNK_MUSCLES
        AnyMuscleModel LongusColliT2C3 = {
            AnyFolder& MuscleParameters = ....Data.unscaled.ModelParameters.Muscles.LongusColli.LongusColliT2C3;
            AnyIntVar MuscleElemNo = 1; ///< The number of this element of the muscle
            AnyIntVar MuscleElemAmount = MuscleParameters.MuscleElemAmount; ///< The total amount of elements for this muscle
            F0 ??= ...DefaultMusPar.PCSAfactor*PCSA; ///< Maximum force output at optimum fiber length
            Lf0 ??= MuscleParameters.OptimalFiberlength / cos(pi/180*MuscleParameters.Pennationangle); //< Optimal fiber length corrected by pennation angle
            AnyVar PCSA ??= 1e4*...StrengthScaleSpine*MuscleParameters.MuscleVolumeSIScaled/(Lf0); ///< PCSA (cm2) of the individual element is total volumen divided by the sum of muscle element fiber lengths.
            Vol0 ??= (1e-4*PCSA) * Lf0; // New calculation of the vol for the specific muscle branch
        };
        #endif

        #if BM_TRUNK_MUSCLES
        AnyMuscleModel LongusColliT2C2 = {
            AnyFolder& MuscleParameters = ....Data.unscaled.ModelParameters.Muscles.LongusColli.LongusColliT2C2;
            AnyIntVar MuscleElemNo = 1; ///< The number of this element of the muscle
            AnyIntVar MuscleElemAmount = MuscleParameters.MuscleElemAmount; ///< The total amount of elements for this muscle
            F0 ??= ...DefaultMusPar.PCSAfactor*PCSA; ///< Maximum force output at optimum fiber length
            Lf0 ??= MuscleParameters.OptimalFiberlength / cos(pi/180*MuscleParameters.Pennationangle); //< Optimal fiber length corrected by pennation angle
            AnyVar PCSA ??= 1e4*...StrengthScaleSpine*MuscleParameters.MuscleVolumeSIScaled/(Lf0); ///< PCSA (cm2) of the individual element is total volumen divided by the sum of muscle element fiber lengths.
            Vol0 ??= (1e-4*PCSA) * Lf0; // New calculation of the vol for the specific muscle branch
        };
        #endif

        #if BM_TRUNK_MUSCLES
        AnyMuscleModel LongusColliT1C4 = {
            AnyFolder& MuscleParameters = ....Data.unscaled.ModelParameters.Muscles.LongusColli.LongusColliT1C4;
            AnyIntVar MuscleElemNo = 1; ///< The number of this element of the muscle
            AnyIntVar MuscleElemAmount = MuscleParameters.MuscleElemAmount; ///< The total amount of elements for this muscle
            F0 ??= ...DefaultMusPar.PCSAfactor*PCSA; ///< Maximum force output at optimum fiber length
            Lf0 ??= MuscleParameters.OptimalFiberlength / cos(pi/180*MuscleParameters.Pennationangle); //< Optimal fiber length corrected by pennation angle
            AnyVar PCSA ??= 1e4*...StrengthScaleSpine*MuscleParameters.MuscleVolumeSIScaled/(Lf0); ///< PCSA (cm2) of the individual element is total volumen divided by the sum of muscle element fiber lengths.
            Vol0 ??= (1e-4*PCSA) * Lf0; // New calculation of the vol for the specific muscle branch
        };
        #endif

        #if BM_TRUNK_MUSCLES
        AnyMuscleModel LongusColliT1C3 = {
            AnyFolder& MuscleParameters = ....Data.unscaled.ModelParameters.Muscles.LongusColli.LongusColliT1C3;
            AnyIntVar MuscleElemNo = 1; ///< The number of this element of the muscle
            AnyIntVar MuscleElemAmount = MuscleParameters.MuscleElemAmount; ///< The total amount of elements for this muscle
            F0 ??= ...DefaultMusPar.PCSAfactor*PCSA; ///< Maximum force output at optimum fiber length
            Lf0 ??= MuscleParameters.OptimalFiberlength / cos(pi/180*MuscleParameters.Pennationangle); //< Optimal fiber length corrected by pennation angle
            AnyVar PCSA ??= 1e4*...StrengthScaleSpine*MuscleParameters.MuscleVolumeSIScaled/(Lf0); ///< PCSA (cm2) of the individual element is total volumen divided by the sum of muscle element fiber lengths.
            Vol0 ??= (1e-4*PCSA) * Lf0; // New calculation of the vol for the specific muscle branch
        };
        #endif

        #if BM_TRUNK_MUSCLES
        AnyMuscleModel LongusColliT1C2 = {
            AnyFolder& MuscleParameters = ....Data.unscaled.ModelParameters.Muscles.LongusColli.LongusColliT1C2;
            AnyIntVar MuscleElemNo = 1; ///< The number of this element of the muscle
            AnyIntVar MuscleElemAmount = MuscleParameters.MuscleElemAmount; ///< The total amount of elements for this muscle
            F0 ??= ...DefaultMusPar.PCSAfactor*PCSA; ///< Maximum force output at optimum fiber length
            Lf0 ??= MuscleParameters.OptimalFiberlength / cos(pi/180*MuscleParameters.Pennationangle); //< Optimal fiber length corrected by pennation angle
            AnyVar PCSA ??= 1e4*...StrengthScaleSpine*MuscleParameters.MuscleVolumeSIScaled/(Lf0); ///< PCSA (cm2) of the individual element is total volumen divided by the sum of muscle element fiber lengths.
            Vol0 ??= (1e-4*PCSA) * Lf0; // New calculation of the vol for the specific muscle branch
        };
        #endif

        #if BM_TRUNK_MUSCLES
        AnyMuscleModel LongusColliC7C3 = {
            AnyFolder& MuscleParameters = ....Data.unscaled.ModelParameters.Muscles.LongusColli.LongusColliC7C3;
            AnyIntVar MuscleElemNo = 1; ///< The number of this element of the muscle
            AnyIntVar MuscleElemAmount = MuscleParameters.MuscleElemAmount; ///< The total amount of elements for this muscle
            F0 ??= ...DefaultMusPar.PCSAfactor*PCSA; ///< Maximum force output at optimum fiber length
            Lf0 ??= MuscleParameters.OptimalFiberlength / cos(pi/180*MuscleParameters.Pennationangle); //< Optimal fiber length corrected by pennation angle
            AnyVar PCSA ??= 1e4*...StrengthScaleSpine*MuscleParameters.MuscleVolumeSIScaled/(Lf0); ///< PCSA (cm2) of the individual element is total volumen divided by the sum of muscle element fiber lengths.
            Vol0 ??= (1e-4*PCSA) * Lf0; // New calculation of the vol for the specific muscle branch
        };
        #endif

        #if BM_TRUNK_MUSCLES
        AnyMuscleModel LongusColliC6C2_1 = {
            AnyFolder& MuscleParameters = ....Data.unscaled.ModelParameters.Muscles.LongusColli.LongusColliC6C2_1;
            AnyIntVar MuscleElemNo = 1; ///< The number of this element of the muscle
            AnyIntVar MuscleElemAmount = MuscleParameters.MuscleElemAmount; ///< The total amount of elements for this muscle
            F0 ??= ...DefaultMusPar.PCSAfactor*PCSA; ///< Maximum force output at optimum fiber length
            Lf0 ??= MuscleParameters.OptimalFiberlength / cos(pi/180*MuscleParameters.Pennationangle); //< Optimal fiber length corrected by pennation angle
            AnyVar PCSA ??= 1e4*...StrengthScaleSpine*MuscleParameters.MuscleVolumeSIScaled/(Lf0); ///< PCSA (cm2) of the individual element is total volumen divided by the sum of muscle element fiber lengths.
            Vol0 ??= (1e-4*PCSA) * Lf0; // New calculation of the vol for the specific muscle branch
        };
        #endif

        #if BM_TRUNK_MUSCLES
        AnyMuscleModel LongusColliC5C1_1 = {
            AnyFolder& MuscleParameters = ....Data.unscaled.ModelParameters.Muscles.LongusColli.LongusColliC5C1_1;
            AnyIntVar MuscleElemNo = 1; ///< The number of this element of the muscle
            AnyIntVar MuscleElemAmount = MuscleParameters.MuscleElemAmount; ///< The total amount of elements for this muscle
            F0 ??= ...DefaultMusPar.PCSAfactor*PCSA; ///< Maximum force output at optimum fiber length
            Lf0 ??= MuscleParameters.OptimalFiberlength / cos(pi/180*MuscleParameters.Pennationangle); //< Optimal fiber length corrected by pennation angle
            AnyVar PCSA ??= 1e4*...StrengthScaleSpine*MuscleParameters.MuscleVolumeSIScaled/(Lf0); ///< PCSA (cm2) of the individual element is total volumen divided by the sum of muscle element fiber lengths.
            Vol0 ??= (1e-4*PCSA) * Lf0; // New calculation of the vol for the specific muscle branch
        };
        #endif

        #if BM_TRUNK_MUSCLES
        AnyMuscleModel LongusColliC3C1 = {
            AnyFolder& MuscleParameters = ....Data.unscaled.ModelParameters.Muscles.LongusColli.LongusColliC3C1;
            AnyIntVar MuscleElemNo = 1; ///< The number of this element of the muscle
            AnyIntVar MuscleElemAmount = MuscleParameters.MuscleElemAmount; ///< The total amount of elements for this muscle
            F0 ??= ...DefaultMusPar.PCSAfactor*PCSA; ///< Maximum force output at optimum fiber length
            Lf0 ??= MuscleParameters.OptimalFiberlength / cos(pi/180*MuscleParameters.Pennationangle); //< Optimal fiber length corrected by pennation angle
            AnyVar PCSA ??= 1e4*...StrengthScaleSpine*MuscleParameters.MuscleVolumeSIScaled/(Lf0); ///< PCSA (cm2) of the individual element is total volumen divided by the sum of muscle element fiber lengths.
            Vol0 ??= (1e-4*PCSA) * Lf0; // New calculation of the vol for the specific muscle branch
        };
        #endif

        #if BM_TRUNK_MUSCLES
        AnyMuscleModel LongusColliC4C1 = {
            AnyFolder& MuscleParameters = ....Data.unscaled.ModelParameters.Muscles.LongusColli.LongusColliC4C1;
            AnyIntVar MuscleElemNo = 1; ///< The number of this element of the muscle
            AnyIntVar MuscleElemAmount = MuscleParameters.MuscleElemAmount; ///< The total amount of elements for this muscle
            F0 ??= ...DefaultMusPar.PCSAfactor*PCSA; ///< Maximum force output at optimum fiber length
            Lf0 ??= MuscleParameters.OptimalFiberlength / cos(pi/180*MuscleParameters.Pennationangle); //< Optimal fiber length corrected by pennation angle
            AnyVar PCSA ??= 1e4*...StrengthScaleSpine*MuscleParameters.MuscleVolumeSIScaled/(Lf0); ///< PCSA (cm2) of the individual element is total volumen divided by the sum of muscle element fiber lengths.
            Vol0 ??= (1e-4*PCSA) * Lf0; // New calculation of the vol for the specific muscle branch
        };
        #endif

        #if BM_TRUNK_MUSCLES
        AnyMuscleModel LongusColliC5C1_2 = {
            AnyFolder& MuscleParameters = ....Data.unscaled.ModelParameters.Muscles.LongusColli.LongusColliC5C1_2;
            AnyIntVar MuscleElemNo = 1; ///< The number of this element of the muscle
            AnyIntVar MuscleElemAmount = MuscleParameters.MuscleElemAmount; ///< The total amount of elements for this muscle
            F0 ??= ...DefaultMusPar.PCSAfactor*PCSA; ///< Maximum force output at optimum fiber length
            Lf0 ??= MuscleParameters.OptimalFiberlength / cos(pi/180*MuscleParameters.Pennationangle); //< Optimal fiber length corrected by pennation angle
            AnyVar PCSA ??= 1e4*...StrengthScaleSpine*MuscleParameters.MuscleVolumeSIScaled/(Lf0); ///< PCSA (cm2) of the individual element is total volumen divided by the sum of muscle element fiber lengths.
            Vol0 ??= (1e-4*PCSA) * Lf0; // New calculation of the vol for the specific muscle branch
        };
        #endif

        #if BM_TRUNK_MUSCLES
        AnyMuscleModel LongusColliC4C2 = {
            AnyFolder& MuscleParameters = ....Data.unscaled.ModelParameters.Muscles.LongusColli.LongusColliC4C2;
            AnyIntVar MuscleElemNo = 1; ///< The number of this element of the muscle
            AnyIntVar MuscleElemAmount = MuscleParameters.MuscleElemAmount; ///< The total amount of elements for this muscle
            F0 ??= ...DefaultMusPar.PCSAfactor*PCSA; ///< Maximum force output at optimum fiber length
            Lf0 ??= MuscleParameters.OptimalFiberlength / cos(pi/180*MuscleParameters.Pennationangle); //< Optimal fiber length corrected by pennation angle
            AnyVar PCSA ??= 1e4*...StrengthScaleSpine*MuscleParameters.MuscleVolumeSIScaled/(Lf0); ///< PCSA (cm2) of the individual element is total volumen divided by the sum of muscle element fiber lengths.
            Vol0 ??= (1e-4*PCSA) * Lf0; // New calculation of the vol for the specific muscle branch
        };
        #endif

        #if BM_TRUNK_MUSCLES
        AnyMuscleModel LongusColliC5C2 = {
            AnyFolder& MuscleParameters = ....Data.unscaled.ModelParameters.Muscles.LongusColli.LongusColliC5C2;
            AnyIntVar MuscleElemNo = 1; ///< The number of this element of the muscle
            AnyIntVar MuscleElemAmount = MuscleParameters.MuscleElemAmount; ///< The total amount of elements for this muscle
            F0 ??= ...DefaultMusPar.PCSAfactor*PCSA; ///< Maximum force output at optimum fiber length
            Lf0 ??= MuscleParameters.OptimalFiberlength / cos(pi/180*MuscleParameters.Pennationangle); //< Optimal fiber length corrected by pennation angle
            AnyVar PCSA ??= 1e4*...StrengthScaleSpine*MuscleParameters.MuscleVolumeSIScaled/(Lf0); ///< PCSA (cm2) of the individual element is total volumen divided by the sum of muscle element fiber lengths.
            Vol0 ??= (1e-4*PCSA) * Lf0; // New calculation of the vol for the specific muscle branch
        };
        #endif

        #if BM_TRUNK_MUSCLES
        AnyMuscleModel LongusColliC6C2_2 = {
            AnyFolder& MuscleParameters = ....Data.unscaled.ModelParameters.Muscles.LongusColli.LongusColliC6C2_2;
            AnyIntVar MuscleElemNo = 1; ///< The number of this element of the muscle
            AnyIntVar MuscleElemAmount = MuscleParameters.MuscleElemAmount; ///< The total amount of elements for this muscle
            F0 ??= ...DefaultMusPar.PCSAfactor*PCSA; ///< Maximum force output at optimum fiber length
            Lf0 ??= MuscleParameters.OptimalFiberlength / cos(pi/180*MuscleParameters.Pennationangle); //< Optimal fiber length corrected by pennation angle
            AnyVar PCSA ??= 1e4*...StrengthScaleSpine*MuscleParameters.MuscleVolumeSIScaled/(Lf0); ///< PCSA (cm2) of the individual element is total volumen divided by the sum of muscle element fiber lengths.
            Vol0 ??= (1e-4*PCSA) * Lf0; // New calculation of the vol for the specific muscle branch
        };
        #endif

        #if BM_TRUNK_MUSCLES
        AnyMuscleModel LongusColliC6C3 = {
            AnyFolder& MuscleParameters = ....Data.unscaled.ModelParameters.Muscles.LongusColli.LongusColliC6C3;
            AnyIntVar MuscleElemNo = 1; ///< The number of this element of the muscle
            AnyIntVar MuscleElemAmount = MuscleParameters.MuscleElemAmount; ///< The total amount of elements for this muscle
            F0 ??= ...DefaultMusPar.PCSAfactor*PCSA; ///< Maximum force output at optimum fiber length
            Lf0 ??= MuscleParameters.OptimalFiberlength / cos(pi/180*MuscleParameters.Pennationangle); //< Optimal fiber length corrected by pennation angle
            AnyVar PCSA ??= 1e4*...StrengthScaleSpine*MuscleParameters.MuscleVolumeSIScaled/(Lf0); ///< PCSA (cm2) of the individual element is total volumen divided by the sum of muscle element fiber lengths.
            Vol0 ??= (1e-4*PCSA) * Lf0; // New calculation of the vol for the specific muscle branch
        };
        #endif

        #if BM_TRUNK_MUSCLES
        AnyMuscleModel LongusColliT1C6 = {
            AnyFolder& MuscleParameters = ....Data.unscaled.ModelParameters.Muscles.LongusColli.LongusColliT1C6;
            AnyIntVar MuscleElemNo = 1; ///< The number of this element of the muscle
            AnyIntVar MuscleElemAmount = MuscleParameters.MuscleElemAmount; ///< The total amount of elements for this muscle
            F0 ??= ...DefaultMusPar.PCSAfactor*PCSA; ///< Maximum force output at optimum fiber length
            Lf0 ??= MuscleParameters.OptimalFiberlength / cos(pi/180*MuscleParameters.Pennationangle); //< Optimal fiber length corrected by pennation angle
            AnyVar PCSA ??= 1e4*...StrengthScaleSpine*MuscleParameters.MuscleVolumeSIScaled/(Lf0); ///< PCSA (cm2) of the individual element is total volumen divided by the sum of muscle element fiber lengths.
            Vol0 ??= (1e-4*PCSA) * Lf0; // New calculation of the vol for the specific muscle branch
        };
        #endif

        #if BM_TRUNK_MUSCLES
        AnyMuscleModel LongusColliT2C6 = {
            AnyFolder& MuscleParameters = ....Data.unscaled.ModelParameters.Muscles.LongusColli.LongusColliT2C6;
            AnyIntVar MuscleElemNo = 1; ///< The number of this element of the muscle
            AnyIntVar MuscleElemAmount = MuscleParameters.MuscleElemAmount; ///< The total amount of elements for this muscle
            F0 ??= ...DefaultMusPar.PCSAfactor*PCSA; ///< Maximum force output at optimum fiber length
            Lf0 ??= MuscleParameters.OptimalFiberlength / cos(pi/180*MuscleParameters.Pennationangle); //< Optimal fiber length corrected by pennation angle
            AnyVar PCSA ??= 1e4*...StrengthScaleSpine*MuscleParameters.MuscleVolumeSIScaled/(Lf0); ///< PCSA (cm2) of the individual element is total volumen divided by the sum of muscle element fiber lengths.
            Vol0 ??= (1e-4*PCSA) * Lf0; // New calculation of the vol for the specific muscle branch
        };
        #endif

        #if BM_TRUNK_MUSCLES
        AnyMuscleModel LongusColliT2C5_2 = {
            AnyFolder& MuscleParameters = ....Data.unscaled.ModelParameters.Muscles.LongusColli.LongusColliT2C5_2;
            AnyIntVar MuscleElemNo = 1; ///< The number of this element of the muscle
            AnyIntVar MuscleElemAmount = MuscleParameters.MuscleElemAmount; ///< The total amount of elements for this muscle
            F0 ??= ...DefaultMusPar.PCSAfactor*PCSA; ///< Maximum force output at optimum fiber length
            Lf0 ??= MuscleParameters.OptimalFiberlength / cos(pi/180*MuscleParameters.Pennationangle); //< Optimal fiber length corrected by pennation angle
            AnyVar PCSA ??= 1e4*...StrengthScaleSpine*MuscleParameters.MuscleVolumeSIScaled/(Lf0); ///< PCSA (cm2) of the individual element is total volumen divided by the sum of muscle element fiber lengths.
            Vol0 ??= (1e-4*PCSA) * Lf0; // New calculation of the vol for the specific muscle branch
        };
        #endif

    };

    AnyFolder MultifidusCervicis = {

        #if BM_TRUNK_MUSCLES
        AnyMuscleModel MultifidusCervicisC5C2 = {
            AnyFolder& MuscleParameters = ....Data.unscaled.ModelParameters.Muscles.MultifidusCervicis.MultifidusCervicisC5C2;
            AnyIntVar MuscleElemNo = 1; ///< The number of this element of the muscle
            AnyIntVar MuscleElemAmount = MuscleParameters.MuscleElemAmount; ///< The total amount of elements for this muscle
            F0 ??= ...DefaultMusPar.PCSAfactor*PCSA; ///< Maximum force output at optimum fiber length
            Lf0 ??= MuscleParameters.OptimalFiberlength / cos(pi/180*MuscleParameters.Pennationangle); //< Optimal fiber length corrected by pennation angle
            AnyVar PCSA ??= 1e4*...StrengthScaleSpine*MuscleParameters.MuscleVolumeSIScaled/(Lf0); ///< PCSA (cm2) of the individual element is total volumen divided by the sum of muscle element fiber lengths.
            Vol0 ??= (1e-4*PCSA) * Lf0; // New calculation of the vol for the specific muscle branch
        };
        #endif

        #if BM_TRUNK_MUSCLES
        AnyMuscleModel MultifidusCervicisC6C2 = {
            AnyFolder& MuscleParameters = ....Data.unscaled.ModelParameters.Muscles.MultifidusCervicis.MultifidusCervicisC6C2;
            AnyIntVar MuscleElemNo = 1; ///< The number of this element of the muscle
            AnyIntVar MuscleElemAmount = MuscleParameters.MuscleElemAmount; ///< The total amount of elements for this muscle
            F0 ??= ...DefaultMusPar.PCSAfactor*PCSA; ///< Maximum force output at optimum fiber length
            Lf0 ??= MuscleParameters.OptimalFiberlength / cos(pi/180*MuscleParameters.Pennationangle); //< Optimal fiber length corrected by pennation angle
            AnyVar PCSA ??= 1e4*...StrengthScaleSpine*MuscleParameters.MuscleVolumeSIScaled/(Lf0); ///< PCSA (cm2) of the individual element is total volumen divided by the sum of muscle element fiber lengths.
            Vol0 ??= (1e-4*PCSA) * Lf0; // New calculation of the vol for the specific muscle branch
        };
        #endif

        #if BM_TRUNK_MUSCLES
        AnyMuscleModel MultifidusCervicisC6C3 = {
            AnyFolder& MuscleParameters = ....Data.unscaled.ModelParameters.Muscles.MultifidusCervicis.MultifidusCervicisC6C3;
            AnyIntVar MuscleElemNo = 1; ///< The number of this element of the muscle
            AnyIntVar MuscleElemAmount = MuscleParameters.MuscleElemAmount; ///< The total amount of elements for this muscle
            F0 ??= ...DefaultMusPar.PCSAfactor*PCSA; ///< Maximum force output at optimum fiber length
            Lf0 ??= MuscleParameters.OptimalFiberlength / cos(pi/180*MuscleParameters.Pennationangle); //< Optimal fiber length corrected by pennation angle
            AnyVar PCSA ??= 1e4*...StrengthScaleSpine*MuscleParameters.MuscleVolumeSIScaled/(Lf0); ///< PCSA (cm2) of the individual element is total volumen divided by the sum of muscle element fiber lengths.
            Vol0 ??= (1e-4*PCSA) * Lf0; // New calculation of the vol for the specific muscle branch
        };
        #endif

        #if BM_TRUNK_MUSCLES
        AnyMuscleModel MultifidusCervicisC7C3 = {
            AnyFolder& MuscleParameters = ....Data.unscaled.ModelParameters.Muscles.MultifidusCervicis.MultifidusCervicisC7C3;
            AnyIntVar MuscleElemNo = 1; ///< The number of this element of the muscle
            AnyIntVar MuscleElemAmount = MuscleParameters.MuscleElemAmount; ///< The total amount of elements for this muscle
            F0 ??= ...DefaultMusPar.PCSAfactor*PCSA; ///< Maximum force output at optimum fiber length
            Lf0 ??= MuscleParameters.OptimalFiberlength / cos(pi/180*MuscleParameters.Pennationangle); //< Optimal fiber length corrected by pennation angle
            AnyVar PCSA ??= 1e4*...StrengthScaleSpine*MuscleParameters.MuscleVolumeSIScaled/(Lf0); ///< PCSA (cm2) of the individual element is total volumen divided by the sum of muscle element fiber lengths.
            Vol0 ??= (1e-4*PCSA) * Lf0; // New calculation of the vol for the specific muscle branch
        };
        #endif

        #if BM_TRUNK_MUSCLES
        AnyMuscleModel MultifidusCervicisC7C4 = {
            AnyFolder& MuscleParameters = ....Data.unscaled.ModelParameters.Muscles.MultifidusCervicis.MultifidusCervicisC7C4;
            AnyIntVar MuscleElemNo = 1; ///< The number of this element of the muscle
            AnyIntVar MuscleElemAmount = MuscleParameters.MuscleElemAmount; ///< The total amount of elements for this muscle
            F0 ??= ...DefaultMusPar.PCSAfactor*PCSA; ///< Maximum force output at optimum fiber length
            Lf0 ??= MuscleParameters.OptimalFiberlength / cos(pi/180*MuscleParameters.Pennationangle); //< Optimal fiber length corrected by pennation angle
            AnyVar PCSA ??= 1e4*...StrengthScaleSpine*MuscleParameters.MuscleVolumeSIScaled/(Lf0); ///< PCSA (cm2) of the individual element is total volumen divided by the sum of muscle element fiber lengths.
            Vol0 ??= (1e-4*PCSA) * Lf0; // New calculation of the vol for the specific muscle branch
        };
        #endif

        #if BM_TRUNK_MUSCLES
        AnyMuscleModel MultifidusCervicisT1C4 = {
            AnyFolder& MuscleParameters = ....Data.unscaled.ModelParameters.Muscles.MultifidusCervicis.MultifidusCervicisT1C4;
            AnyIntVar MuscleElemNo = 1; ///< The number of this element of the muscle
            AnyIntVar MuscleElemAmount = MuscleParameters.MuscleElemAmount; ///< The total amount of elements for this muscle
            F0 ??= ...DefaultMusPar.PCSAfactor*PCSA; ///< Maximum force output at optimum fiber length
            Lf0 ??= MuscleParameters.OptimalFiberlength / cos(pi/180*MuscleParameters.Pennationangle); //< Optimal fiber length corrected by pennation angle
            AnyVar PCSA ??= 1e4*...StrengthScaleSpine*MuscleParameters.MuscleVolumeSIScaled/(Lf0); ///< PCSA (cm2) of the individual element is total volumen divided by the sum of muscle element fiber lengths.
            Vol0 ??= (1e-4*PCSA) * Lf0; // New calculation of the vol for the specific muscle branch
        };
        #endif

        #if BM_TRUNK_MUSCLES
        AnyMuscleModel MultifidusCervicisT1C5 = {
            AnyFolder& MuscleParameters = ....Data.unscaled.ModelParameters.Muscles.MultifidusCervicis.MultifidusCervicisT1C5;
            AnyIntVar MuscleElemNo = 1; ///< The number of this element of the muscle
            AnyIntVar MuscleElemAmount = MuscleParameters.MuscleElemAmount; ///< The total amount of elements for this muscle
            F0 ??= ...DefaultMusPar.PCSAfactor*PCSA; ///< Maximum force output at optimum fiber length
            Lf0 ??= MuscleParameters.OptimalFiberlength / cos(pi/180*MuscleParameters.Pennationangle); //< Optimal fiber length corrected by pennation angle
            AnyVar PCSA ??= 1e4*...StrengthScaleSpine*MuscleParameters.MuscleVolumeSIScaled/(Lf0); ///< PCSA (cm2) of the individual element is total volumen divided by the sum of muscle element fiber lengths.
            Vol0 ??= (1e-4*PCSA) * Lf0; // New calculation of the vol for the specific muscle branch
        };
        #endif

        #if BM_TRUNK_MUSCLES
        AnyMuscleModel MultifidusCervicisT2C5 = {
            AnyFolder& MuscleParameters = ....Data.unscaled.ModelParameters.Muscles.MultifidusCervicis.MultifidusCervicisT2C5;
            AnyIntVar MuscleElemNo = 1; ///< The number of this element of the muscle
            AnyIntVar MuscleElemAmount = MuscleParameters.MuscleElemAmount; ///< The total amount of elements for this muscle
            F0 ??= ...DefaultMusPar.PCSAfactor*PCSA; ///< Maximum force output at optimum fiber length
            Lf0 ??= MuscleParameters.OptimalFiberlength / cos(pi/180*MuscleParameters.Pennationangle); //< Optimal fiber length corrected by pennation angle
            AnyVar PCSA ??= 1e4*...StrengthScaleSpine*MuscleParameters.MuscleVolumeSIScaled/(Lf0); ///< PCSA (cm2) of the individual element is total volumen divided by the sum of muscle element fiber lengths.
            Vol0 ??= (1e-4*PCSA) * Lf0; // New calculation of the vol for the specific muscle branch
        };
        #endif

        #if BM_TRUNK_MUSCLES
        AnyMuscleModel MultifidusCervicisT2C6 = {
            AnyFolder& MuscleParameters = ....Data.unscaled.ModelParameters.Muscles.MultifidusCervicis.MultifidusCervicisT2C6;
            AnyIntVar MuscleElemNo = 1; ///< The number of this element of the muscle
            AnyIntVar MuscleElemAmount = MuscleParameters.MuscleElemAmount; ///< The total amount of elements for this muscle
            F0 ??= ...DefaultMusPar.PCSAfactor*PCSA; ///< Maximum force output at optimum fiber length
            Lf0 ??= MuscleParameters.OptimalFiberlength / cos(pi/180*MuscleParameters.Pennationangle); //< Optimal fiber length corrected by pennation angle
            AnyVar PCSA ??= 1e4*...StrengthScaleSpine*MuscleParameters.MuscleVolumeSIScaled/(Lf0); ///< PCSA (cm2) of the individual element is total volumen divided by the sum of muscle element fiber lengths.
            Vol0 ??= (1e-4*PCSA) * Lf0; // New calculation of the vol for the specific muscle branch
        };
        #endif

        #if BM_TRUNK_MUSCLES
        AnyMuscleModel MultifidusCervicisT3C6 = {
            AnyFolder& MuscleParameters = ....Data.unscaled.ModelParameters.Muscles.MultifidusCervicis.MultifidusCervicisT3C6;
            AnyIntVar MuscleElemNo = 1; ///< The number of this element of the muscle
            AnyIntVar MuscleElemAmount = MuscleParameters.MuscleElemAmount; ///< The total amount of elements for this muscle
            F0 ??= ...DefaultMusPar.PCSAfactor*PCSA; ///< Maximum force output at optimum fiber length
            Lf0 ??= MuscleParameters.OptimalFiberlength / cos(pi/180*MuscleParameters.Pennationangle); //< Optimal fiber length corrected by pennation angle
            AnyVar PCSA ??= 1e4*...StrengthScaleSpine*MuscleParameters.MuscleVolumeSIScaled/(Lf0); ///< PCSA (cm2) of the individual element is total volumen divided by the sum of muscle element fiber lengths.
            Vol0 ??= (1e-4*PCSA) * Lf0; // New calculation of the vol for the specific muscle branch
        };
        #endif

        #if BM_TRUNK_MUSCLES
        AnyMuscleModel MultifidusCervicisT3C7 = {
            AnyFolder& MuscleParameters = ....Data.unscaled.ModelParameters.Muscles.MultifidusCervicis.MultifidusCervicisT3C7;
            AnyIntVar MuscleElemNo = 1; ///< The number of this element of the muscle
            AnyIntVar MuscleElemAmount = MuscleParameters.MuscleElemAmount; ///< The total amount of elements for this muscle
            F0 ??= ...DefaultMusPar.PCSAfactor*PCSA; ///< Maximum force output at optimum fiber length
            Lf0 ??= MuscleParameters.OptimalFiberlength / cos(pi/180*MuscleParameters.Pennationangle); //< Optimal fiber length corrected by pennation angle
            AnyVar PCSA ??= 1e4*...StrengthScaleSpine*MuscleParameters.MuscleVolumeSIScaled/(Lf0); ///< PCSA (cm2) of the individual element is total volumen divided by the sum of muscle element fiber lengths.
            Vol0 ??= (1e-4*PCSA) * Lf0; // New calculation of the vol for the specific muscle branch
        };
        #endif

        #if BM_TRUNK_MUSCLES
        AnyMuscleModel MultifidusCervicisT4C7 = {
            AnyFolder& MuscleParameters = ....Data.unscaled.ModelParameters.Muscles.MultifidusCervicis.MultifidusCervicisT4C7;
            AnyIntVar MuscleElemNo = 1; ///< The number of this element of the muscle
            AnyIntVar MuscleElemAmount = MuscleParameters.MuscleElemAmount; ///< The total amount of elements for this muscle
            F0 ??= ...DefaultMusPar.PCSAfactor*PCSA; ///< Maximum force output at optimum fiber length
            Lf0 ??= MuscleParameters.OptimalFiberlength / cos(pi/180*MuscleParameters.Pennationangle); //< Optimal fiber length corrected by pennation angle
            AnyVar PCSA ??= 1e4*...StrengthScaleSpine*MuscleParameters.MuscleVolumeSIScaled/(Lf0); ///< PCSA (cm2) of the individual element is total volumen divided by the sum of muscle element fiber lengths.
            Vol0 ??= (1e-4*PCSA) * Lf0; // New calculation of the vol for the specific muscle branch
        };
        #endif

    };
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