  AnyReacForce LeftFootReaction = {

    AnyKinLinear LeftFootLinMeasure = {
      AnySeg &ref1=....BodyModel.BodyModel.Left.Leg.Segments.Foot;
      AnyFixedRefFrame &ref2 = ....Environment.GlobalRef;
    };
    AnyKinRotational LeftFootRotMeasure = {
      AnySeg &ref1=....BodyModel.BodyModel.Left.Leg.Segments.Foot;
      AnyFixedRefFrame &ref2 = ....Environment.GlobalRef;
      Type = RotVector;
    };
  };


  // Place the Left toe and heel on the ground
  AnyKinEqSimpleDriver LToeGroundConstraint ={
    AnyKinLinear ToePos = {
      AnyFixedRefFrame &Ground = ....Environment.GlobalRef;
      AnyRefNode &Ball = ....BodyModel.BodyModel.Left.Leg.Segments.Foot.Metatarsal1.ToeJoint;
    };
   MeasureOrganizer = {1};  // Only the y coordinate
    DriverPos = {0.0};
    DriverVel = {0};
    Reaction.Type = {Off};   // Provide ground reaction forces

  };

  AnyKinEqSimpleDriver LHeelGroundConstraint ={
    AnyKinLinear HeelPos = {
      AnyFixedRefFrame &Ground = ....Environment.GlobalRef;
      AnyRefNode &Ball = ....BodyModel.BodyModel.Left.Leg.Segments.Foot.Calcaneus.HeelContactNodeLow;
    };
    MeasureOrganizer = {1};  // Only the y coordinate
    DriverPos = {0.0};
    DriverVel = {0};
    Reaction.Type = {Off};   // Provide ground reaction forces
  };


    // Position the Ankles Left above the z axis
  AnyKinEqSimpleDriver LAnkleX = {
    AnyKinLinear AnklePos = {
      AnyFixedRefFrame &Ground = ....Environment.GlobalRef;
      AnyRefNode &Ankle = ....BodyModel.BodyModel.Left.Leg.Segments.Foot.AnkleJoint;
    };
    MeasureOrganizer = {0};  // Only the x coordinate
    DriverPos = {0.0};
    DriverVel = {0.0};
    Reaction.Type = {Off};
  };
