//import pytest
//ignore_errors = ["'Set Value' operation on", "'GHRot'  :  Close to singular position"]
//fatal_warnings = True
//pytest_markers=["slow"]
//ignore_errors=["_ST.anyset("]
//save_study=[
//  "Main.Studies.MarkerTracking",
//  "Main.Studies.InverseDynamicStudy",
//]


#include "../libdef.any"

#path MOCAP_PATH_MAINFILEDIR "<ANYMOCAP_EXAMPLES>/ADL_Gait_[beta]/Subjects/2014001/2014001_C1_01"
#path MOCAP_PATH_MAINFILE "<MOCAP_PATH_MAINFILEDIR>/Main.any"
#define MOCAP_NAME_MAINFILEDIR "2014001_C1_01"

#path TEMP_PATH "Output/"

#define N_STEP_KINEMATICS 80

#include "<MOCAP_PATH_MAINFILE>"

Main =
{

  AnyOperationSequence  RunTest =
  {
    AnyOperationMacro LoadParam = {

       MacroStr = {"classoperation Main " + strquote("Load Values") +" --file="
       + strquote("..\..\Application\MocapExamples\ADL_Gait_[beta]/Output/" + Main.ModelSetup.TrialSpecificData.LoadParametersFrom[0] + ".anyset")};
    };
    Template_OperationUpdateValues UpdateValues() = {};
    AnyOperation& MarkerTracking =  Main.RunAnalysis.MarkerTracking;
    AnyOperation& InverseDynamics =  Main.RunAnalysis.InverseDynamics;
  };

};
