//# Defintions for the python test framwork
//ignore_errors = ["'Set Value' operation on"]
//fatal_warnings = True
//pytest_markers=["slow"]
//save_study=[
//  "Main.Studies.ParameterIdentification",
//  "Main.Studies.MarkerTracking",
//  "Main.Studies.InverseDynamicStudy",
//]


#include "../libdef.any"

#path MOCAP_PATH_MAINFILEDIR "../../Application/Beta/Plug-in-gait_Simple_ToeFlex_GM"
#path MOCAP_PATH_MAINFILE "<MOCAP_PATH_MAINFILEDIR>/LowerExtremity.main.any"
#define MOCAP_NAME_MAINFILEDIR "Plug-in-gait_Simple_ToeFlex_GM"

//// Run Analysis with a reduced number of time steps
//// to make test go faster.
//#define N_STEP_KINEMATICS 20
//#define N_STEP 20

#ifdef TEST_NAME
#define  MOCAP_TEST_FILENAME_PREFIX  TEST_NAME + "_"
#else
#define  MOCAP_TEST_FILENAME_PREFIX  "GUI_"
#define BM_LEG_MODEL _LEG_MODEL_TLEM2_
#endif


#ifdef CREATE_IMAGE
#undef MOCAP_TEST_FILENAME_PREFIX
#define MOCAP_TEST_FILENAME_PREFIX "LowerExtremity_"
#path TEMP_PATH "<MOCAP_PATH_MAINFILEDIR>/Output"
#endif


#include "<MOCAP_PATH_MAINFILE>"

Main =
{

  AnyOperationSequence  TestRunApplication =
  {
    AnyOperation& ParameterId =  Main.RunParameterIdentification;
    AnyOperation& init = Main.Studies.MarkerTracking.InitialConditions;
    AnyOperation& RunAnalysis = Main.RunAnalysis;
  };

  #ifndef CREATE_IMAGE
    AnyOperation& RunTest = Main.TestRunApplication;
  #else
    Main.ModelSetup.TrialSpecificData.tStart = 2.87;
    Main.ModelSetup.TrialSpecificData.tEnd = 2.97;
    #include "../Cameras.any"
    AnyOperationSequence CameraInitPos =
    {
      AnyOperation& ref1 = Main.RunAnalysis.LoadParameters;
      AnyOperation& ref2 = Main.Studies.MarkerTracking.Kinematics;
      AnyOperation& ref3 = Main.Studies.InverseDynamicStudy.InitialConditions;
    };
    LoadTimeCam.CameraLookAtPoint = 0.5*(Main.HumanModel.BodyModel.Left.Leg.Seg.Foot.Toe1.DistalPhalange1.r+Main.HumanModel.BodyModel.Right.Leg.Seg.Foot.Toe1.DistalPhalange1.r);
    LoadTimeCam.CameraFieldOfView = DesignVar(1.0);
    LoadTimeCam.CameraDirection  = {-0.0,0.0,1};
  #endif
};
