//define = (
//  [
//    {'FOOT_MUSCLES_BOTH': '_MUSCLES_SIMPLE_'},
//    {'FOOT_MUSCLES_BOTH': '_MUSCLES_3E_HILL_'},
//  ],
//  [
//    {'BM_FOOT_MODEL': '_FOOT_MODEL_RIGID_GM_'},
//    {'BM_FOOT_MODEL': '_FOOT_MODEL_TOE_FLEX_GM_'},
//    {'BM_FOOT_MODEL': '_FOOT_MODEL_DETAILED_GM_'},
//  ],
//)

#include "../libdef.any"

#ifndef BM_FOOT_MODEL
  #define BM_FOOT_MODEL _FOOT_MODEL_TOE_FLEX_GM_
#endif
#ifndef FOOT_MUSCLES_BOTH
  #define FOOT_MUSCLES_BOTH _MUSCLES_SIMPLE_
#endif
#define BM_FOOT_MUSCLES_LEFT FOOT_MUSCLES_BOTH
#define BM_FOOT_MUSCLES_RIGHT FOOT_MUSCLES_BOTH

#include "../../Application/Beta/FreePostureGMFoot/FreePostureFullBodyStaticGMFoot.Main.any"


Main =
{
  #if BM_FOOT_MODEL == _FOOT_MODEL_DETAILED_GM_
  Study = {
    AnyMechObjectExcluder ExcludedLigDrivers = {
      Objects = arrcat(
      ObjSearch("Main.HumanModel.BodyModel.*.Leg.Ligaments.*.*.*.LigamentDriver.Driver","AnyKinEqSimpleDriver"),
      ObjSearch("Main.HumanModel.BodyModel.*.Leg.Ligaments.*.*.LigamentDriver.Driver","AnyKinEqSimpleDriver"),
      ObjSearch("Main.HumanModel.BodyModel.*.Leg.Ligaments.*.LigamentDriver.Driver","AnyKinEqSimpleDriver"),
      ObjSearch("Main.HumanModel.BodyModel.*.Leg.Ligaments.*.*.*.LigamentDriver.Driver.*","AnyReacForce"),
      ObjSearch("Main.HumanModel.BodyModel.*.Leg.Ligaments.*.*.LigamentDriver.Driver.*","AnyReacForce"),
      ObjSearch("Main.HumanModel.BodyModel.*.Leg.Ligaments.*.LigamentDriver.Driver.*","AnyReacForce")
     );
   };
 };
 #endif

#ifndef CREATE_IMAGE
  AnyOperation& RunTest = Main.RunApplication;
  Study = { FixTestStudyConfig TestStudyConfig = {  }; };
#else
  #include "../Cameras.any"
  AnyOperation& CameraInitPos = Main.Study.InitialConditions;
  LoadTimeCam.CameraLookAtPoint = {0,0.15,0};
  LoadTimeCam.CameraFieldOfView = DesignVar(0.55);
  LoadTimeCam.CameraDirection  = {1,0.2,1};
#endif
};
