//define = (
//  [
//    {'BM_ARM_MUSCLES_LEFT': 'OFF'},
//    {'BM_ARM_MUSCLES_LEFT': '_MUSCLES_SIMPLE_'},
//    {'BM_ARM_MUSCLES_LEFT': '_MUSCLES_3E_HILL_'},
//  ],
//  [
//    {'BM_ARM_MUSCLES_RIGHT': 'OFF'},
//    {'BM_ARM_MUSCLES_RIGHT': '_MUSCLES_SIMPLE_'},
//    {'BM_ARM_MUSCLES_RIGHT': '_MUSCLES_3E_HILL_'},
//  ],
//  [
//    {'BM_TRUNK_MUSCLES': 'OFF'},
//    {'BM_TRUNK_MUSCLES': '_MUSCLES_SIMPLE_'},
//  ],
//  [
//    {'BM_TRUNK_CERVICAL_MUSCLES': 'OFF'},
//    {'BM_TRUNK_CERVICAL_MUSCLES': '_MUSCLES_SIMPLE_'},
//  ],
//)
//ignore_errors = ['BodyModel.UnallowedCombination','Model loading skipped']
//

#include "libdef.any"

#ifndef TEST_NAME
  #define BM_ARM_MUSCLES_LEFT 0
  #define BM_ARM_MUSCLES_RIGHT 1
  #define BM_TRUNK_MUSCLES 0
  #define BM_TRUNK_CERVICAL_MUSCLES 0
  #define TEST_NAME "test_bm_arm_muscles_4"
#endif

Main =
{

  AnyInt test = assert(eqfun(Main.HumanModel.Config._AMMR_BETA_INFO_.GitInfo[0], "py314"), Main.HumanModel.Config._AMMR_BETA_INFO_.GitInfo[0] );
  // #path HTML_DOC "<AMMR_PATH_DOC>/bm_config/index.html"
  #include "<ANYBODY_PATH_BODY>\HumanModel.any"

  AnyOperationDummy RunApplication = {};
};
