//define = (
//  [
//    {'BM_LEG_MODEL':'OFF'},
//    {'BM_LEG_MODEL':'_LEG_MODEL_TLEM2_'},
//  ],
//  [
//    {'BM_TRUNK_THORACIC_MODEL': '_THORACIC_MODEL_RIGID_'},
//    {'BM_TRUNK_THORACIC_MODEL': '_THORACIC_MODEL_FLEXIBLE_'},
//    {'BM_TRUNK_THORACIC_MODEL': '_THORACIC_MODEL_FLEXIBLE_KINEMATIC_ONLY_'},
//  ],
//  [
//    {'BM_TRUNK_CAVITY_MODEL': '_CAVITY_MODEL_BUCKLE_'},
//    {'BM_TRUNK_CAVITY_MODEL': '_CAVITY_MODEL_VOLUME_'},
//  ],
//  [
//    {'BM_ARM_RIGHT': 'OFF'},
//    {'BM_ARM_RIGHT': 'ON'},
//  ],
//)
//ignore_errors = ['BodyModel.UnallowedCombination','Model loading skipped']
//
#include "libdef.any"
 #define BM_TRUNK_THORACIC_MODEL _THORACIC_MODEL_FLEXIBLE_KINEMATIC_ONLY_

#ifdef BM_ARM_RIGHT
#define BM_ARM_LEFT BM_ARM_RIGHT
#endif


Main =
{
  // #path HTML_DOC "<AMMR_PATH_DOC>/bm_config/index.html"
  #include "<ANYBODY_PATH_BODY>\HumanModel.any"

  AnyOperationDummy RunApplication = {};
};
