//define = [
//    {'BM_COMPATIBILITY_MUSCLE_STRUCTURE':'ON'},
//    {'BM_COMPATIBILITY_BODYMODEL_STRUCTURE':'ON'},
//    {'BM_COMPATIBILITY_24_TRUNK_SELECTED_OUTPUTS_JRF':'ON'},
//]

#include "libdef.any"

#ifndef TEST_NAME
// #define BM_COMPATIBILITY_24_TRUNK_SELECTED_OUTPUTS_JRF ON
 #define BM_COMPATIBILITY_MUSCLE_STRUCTURE OFF
 #define BM_COMPATIBILITY_BODYMODEL_STRUCTURE ON
#endif


Main = {
  #include "<ANYBODY_PATH_BODY>\HumanModel.any"

  AnyOperationDummy RunApplication = {};

  AnyObjectPtr trunk_24_compatibility = ObjSearch("Main.HumanModel.BodyModel.SelectedOutput.Trunk.JointReactionForce.C2C1FlexionExtensionMoment");

  #if BM_COMPATIBILITY_24_TRUNK_SELECTED_OUTPUTS_JRF
    AnyInt ShouldNotExist = assert(eqfun(NumElemOf(trunk_24_compatibility),1));
  #else
    AnyInt ShouldExist = assert(eqfun(NumElemOf(trunk_24_compatibility),0));
  #endif


  // the old structure is replaced with AnyRefObjects to the new muscle locations (which is inside the same folder)
  // so in order to check the locations without accidentally picking up the 'real muscle objects we do:
  // -search all members in the muscle folder
  // -select all references with a filter
  // -resolve the refernces into real objects
  // -filter only muscles objects
  // This allows us to check if any references (that points to muscles) exist in the folder

  // NB. could have been cool if ObjSearch could resolve references when applying class filter as argument...
  AnyObjectPtr arm_muscles_30_location = ObjFilterByClass(
    ObjRefResolve(
      ObjFilterByClass(
        ObjSearch("Main.HumanModel.BodyModel.Right.ShoulderArm.Muscles.*"), "AnyRefObject"
      )
    ),
    "AnyMuscle"
  );
  AnyInt OldStructure = bool(NumElemOf(arm_muscles_30_location));

  #if BM_COMPATIBILITY_MUSCLE_STRUCTURE == ON
      AnyInt testOldStructureFound = assert(OldStructure);
  #else
    AnyInt testOldStructureNotFound = assert(not(OldStructure));
  #endif


  #if BM_COMPATIBILITY_BODYMODEL_STRUCTURE == ON
    // check that both the old and new structure exists (not complete check)
    AnyFolder &bm = Main.HumanModel.BodyModel;
    AnyFolder &trunk = bm.Trunk;
    AnyFolder &rArm = bm.Right.ShoulderArm;
    AnyFolder &rLeg = bm.Right.Leg;

    // Segments folder
//    AnyFolder &seg_trunk_old = trunk.SegmentsThorax;
//    AnyFolder &seg_rArm_old = rArm.Seg;
//    AnyFolder &seg_rLeg_old = rLeg.Seg;

    AnyFolder &seg_trunk_new = trunk.Segments;
    AnyFolder &seg_rArm_new = rArm.Segments;
    AnyFolder &seg_rLeg_new = rLeg.Segments;
  #endif
};
