// This file creates a BodyModel folder in Main.HumanModel which doesn't have
// muscles.


Main.HumanModel = {
  AnyFolder BodyModelWithoutMuscles = {

    AnyMechObjectExcluder ExcludeUnneededSegments = {
     Objects = arrcat(
        ObjSearchRecursive("Main.HumanModel.BodyModel.Trunk.Abdominal", "*", "AnyMechObject"),
        ObjSearchRecursive("Main.HumanModel.BodyModel.Trunk.Buckle", "*", "AnyMechObject"),
        ObjSearchRecursive("Main.HumanModel.BodyModel.Right.ShoulderArm.Muscles", "*", "AnyMechObject"),
        ObjSearchRecursive("Main.HumanModel.BodyModel.Left.ShoulderArm.Muscles", "*", "AnyMechObject"),
     );
    };

    AnyFolder& SelectedOutput= Main.HumanModel.BodyModel.SelectedOutput;

    AnyFolder Trunk = {
      AnyFolder &Segments = Main.HumanModel.BodyModel.Trunk.Segments;
      AnyFolder &JointsLumbar = Main.HumanModel.BodyModel.Trunk.Joints;

    };

    AnyFolder Right = {
      #if BM_ARM_RIGHT
      AnyFolder ShoulderArm = {
        AnyFolder &Segments = Main.HumanModel.BodyModel.Right.ShoulderArm.Segments;
        AnyFolder &Joints = Main.HumanModel.BodyModel.Right.ShoulderArm.Joints;
        #if BM_ARM_DELTOID_WRAPPING == _DELTOID_WRAPPING_RAKE_
        AnyFolder &rake = Main.HumanModel.BodyModel.Right.ShoulderArm.Muscles.ArtificialRake;
        #else
        AnyFolder &DeltoidWrappingPosteriorRef = Main.HumanModel.BodyModel.Right.ShoulderArm.Muscles.WrappingSurfaces.DeltoidWrappingPosterior;
        AnyFolder &DeltoidWrappingLateralRef = Main.HumanModel.BodyModel.Right.ShoulderArm.Muscles.WrappingSurfaces.DeltoidWrappingLateral;
        AnyFolder &DeltoidWrappingAnteriorRef = Main.HumanModel.BodyModel.Right.ShoulderArm.Muscles.WrappingSurfaces.DeltoidWrappingAnterior;
        #endif
      };
      #endif
      #if BM_LEG_RIGHT
      AnyFolder Leg = {
        AnyFolder &Seg = Main.HumanModel.BodyModel.Right.Leg.Segments;
        AnyFolder &Jnt = Main.HumanModel.BodyModel.Right.Leg.Jnt;
      };
      #endif
    };
    AnyFolder Left = {
      #if BM_ARM_LEFT
      AnyFolder ShoulderArm = {
        AnyFolder &Segments = Main.HumanModel.BodyModel.Left.ShoulderArm.Segments;
        AnyFolder &Joints = Main.HumanModel.BodyModel.Left.ShoulderArm.Joints;
        #if BM_ARM_DELTOID_WRAPPING == _DELTOID_WRAPPING_RAKE_
        AnyFolder &rake = Main.HumanModel.BodyModel.Left.ShoulderArm.Muscles.ArtificialRake;
        #else
        AnyFolder &DeltoidWrappingPosteriorRef = Main.HumanModel.BodyModel.Left.ShoulderArm.Muscles.WrappingSurfaces.DeltoidWrappingPosterior;
        AnyFolder &DeltoidWrappingLateralRef = Main.HumanModel.BodyModel.Left.ShoulderArm.Muscles.WrappingSurfaces.DeltoidWrappingLateral;
        AnyFolder &DeltoidWrappingAnteriorRef = Main.HumanModel.BodyModel.Left.ShoulderArm.Muscles.WrappingSurfaces.DeltoidWrappingAnterior;
        #endif
      };
      #endif
      #if BM_LEG_LEFT
      AnyFolder Leg = {
        AnyFolder &Seg = Main.HumanModel.BodyModel.Left.Leg.Segments;
        AnyFolder &Jnt = Main.HumanModel.BodyModel.Left.Leg.Jnt;
      };
      #endif
    };

    AnyFolder& MannequinValuesFromModel = Main.HumanModel.BodyModel.MannequinValuesFromModel;
    AnyFolder &Interface = Main.HumanModel.BodyModel.Interface;
    AnyFolder& IndividualMasses= Main.HumanModel.BodyModel.IndividualMasses;
    AnyFolder& ScalingRef = .ScalingLaw;
    AnyVar TotalBodyMass = Main.HumanModel.BodyModel.TotalBodyMass;

  };

};
