ShoulderArm={
Segments={
Scapula={
//Markers definitions some of the positions are taken from above
  AnyRefNode AngulusInferiorMarker ={
    sRel=.ai.sRel;
    AnyDrawNode drw={
        ScaleXYZ= Main.HumanModel.DrawSettings.Marker.Radius*{1,1,1};
        RGB= Main.HumanModel.DrawSettings.Marker.Color;
    };
  };

  AnyRefNode AngulusAcromialisMarker ={
    sRel=.aa.sRel;
    AnyVar radius = Main.HumanModel.DrawSettings.Marker.Radius;
    AnyVec3 rgb = Main.HumanModel.DrawSettings.Marker.Color;
    AnyString Name="AngulusAcromialis";
    #include "../DimensionArrowWithText/SphereWithLabel.any"
  };

  AnyRefNode TrigonumScapulaeMarker ={
    sRel=.ts.sRel;
    AnyVar radius = Main.HumanModel.DrawSettings.Marker.Radius;
    AnyVec3 rgb = Main.HumanModel.DrawSettings.Marker.Color;
    AnyString Name="TrigonumScapulae";
    #include "../DimensionArrowWithText/SphereWithLabel.any"
  };

  AnyRefNode ArtAcromiocalviculareMarker ={
    sRel=.ac.sRel;
    AnyVar radius = Main.HumanModel.DrawSettings.Marker.Radius;
    AnyVec3 rgb = Main.HumanModel.DrawSettings.Marker.Color;
    AnyString Name="ArtAcromiocalviculare";
    #include "../DimensionArrowWithText/SphereWithLabel.any"
  };


}; //Scapula


Humerus={
  //Make markers
  AnyRefNode LateralEpicondyleMarker ={
    sRel=.el.sRel+.Scale({0.0,-0.04,-0.01})*.Mirror;
    AnyVar radius = Main.HumanModel.DrawSettings.Marker.Radius;
    AnyVec3 rgb = Main.HumanModel.DrawSettings.Marker.Color;
    AnyString Name="LateralEpicondyle";
    #include "../DimensionArrowWithText/SphereWithLabel.any"
  };

 AnyRefNode MedialEpicondyleMarker ={
    sRel=.em.sRel+.Scale({-0.01,-0.025,-0.01})*.Mirror;
    AnyVar radius = Main.HumanModel.DrawSettings.Marker.Radius;
    AnyVec3 rgb = Main.HumanModel.DrawSettings.Marker.Color;
    AnyString Name="MedialEpicondyle";
    #include "../DimensionArrowWithText/SphereWithLabel.any"
  };
}; // Humerus


Ulna={
//Makers
 AnyRefNode UlnaStyloidMarker ={
    sRel=.us.sRel;
    AnyVar radius = Main.HumanModel.DrawSettings.Marker.Radius;
    AnyVec3 rgb = Main.HumanModel.DrawSettings.Marker.Color;
    AnyString Name="UlnaStyloi";
    #include "../DimensionArrowWithText/SphereWithLabel.any"
  };

 AnyRefNode OleacronMarker ={
    sRel=.ol.sRel;
    AnyVar radius = Main.HumanModel.DrawSettings.Marker.Radius;
    AnyVec3 rgb = Main.HumanModel.DrawSettings.Marker.Color;
    AnyString Name="Oleacron";
    #include "../DimensionArrowWithText/SphereWithLabel.any"
  };

}; // Ulna


Radius={
 AnyRefNode RadialStyloidMarker ={
    sRel=.rs.sRel;
    AnyVar radius = Main.HumanModel.DrawSettings.Marker.Radius;
    AnyVec3 rgb = Main.HumanModel.DrawSettings.Marker.Color;
    AnyString Name="RadialStyloid";
    #include "../DimensionArrowWithText/SphereWithLabel.any"
  };


}; // Radius

Hand={
//Markers
  AnyRefNode  MetacarpophalangealJoint1Marker ={
    sRel=.Scale({-0.06,-0.065,0.0})*.Mirror;
    AnyVar radius = Main.HumanModel.DrawSettings.Marker.Radius;
    AnyVec3 rgb = Main.HumanModel.DrawSettings.Marker.Color;
    AnyString Name="MetacarpophalangealJoint1";
    #include "../DimensionArrowWithText/SphereWithLabel.any"
  };


 AnyRefNode  MetacarpophalangealJoint2Marker ={
    sRel=.Scale({-0.085,-0.035,0.01})*.Mirror;
    AnyVar radius = Main.HumanModel.DrawSettings.Marker.Radius;
    AnyVec3 rgb = Main.HumanModel.DrawSettings.Marker.Color;
    AnyString Name="MetacarpophalangealJoint1";
    #include "../DimensionArrowWithText/SphereWithLabel.any"
  };


   AnyRefNode  MetacarpophalangealJoint3Marker ={
    sRel=.Scale({-0.09,-0.015,0.01})*.Mirror;
    AnyVar radius = Main.HumanModel.DrawSettings.Marker.Radius;
    AnyVec3 rgb = Main.HumanModel.DrawSettings.Marker.Color;
    AnyString Name="MetacarpophalangealJoint1";
    #include "../DimensionArrowWithText/SphereWithLabel.any"
  };

   AnyRefNode  MetacarpophalangealJoint4Marker ={
    sRel=.Scale({-0.088,0.005,0.01})*.Mirror;
    AnyVar radius = Main.HumanModel.DrawSettings.Marker.Radius;
    AnyVec3 rgb = Main.HumanModel.DrawSettings.Marker.Color;
    AnyString Name="MetacarpophalangealJoint1";
    #include "../DimensionArrowWithText/SphereWithLabel.any"
  };

   AnyRefNode  MetacarpophalangealJoint5Marker ={
    sRel=.Scale({-0.08,0.02,0.01})*.Mirror;
    AnyVar radius = Main.HumanModel.DrawSettings.Marker.Radius;
    AnyVec3 rgb = Main.HumanModel.DrawSettings.Marker.Color;
    AnyString Name="MetacarpophalangealJoint1";
    #include "../DimensionArrowWithText/SphereWithLabel.any"
  };


};
};
};
