/*
Spherical RBF morphing
*/
#class_template Spherical_RBF_SURF (
__CLASS__ = AnySurfTriCylMesh ,
ADD_NODEGROUP = "Off" ,
CALCULATE_AREA="Off"
)
{

  #var AnyFloat Points_input;

  #var AnyInt   PointsNo=20;
  #var AnyInt   RotationNo=20;  //number of angle discretizations
  #var AnyFloat RGB={0,0,1};
  #var AnyFloat Opacity=1;

  #var AnyFloat Start_Surf_Angle_Theta=0;  //Allows cropping on angles... 0 to 2*pi gives full sweep
  #var AnyFloat End_Surf_Angle_Theta=pi;

  #var AnyFloat Start_Surf_Angle_Sigma=-pi;  //Allows cropping on angles... 0 to 2*pi gives full sweep
  #var AnyFloat End_Surf_Angle_Sigma=pi;

  #var AnySwitchVar Visible = On;

  #var AnyString NodeName="CCC";

  #var AnySurfTriDirectionType Sweep_Direction= RotCounterclockwise;


  AnyInt SweepDirection =iffun(eqfun(Sweep_Direction,RotCounterclockwise),1,-1);


  AnyFolder Calculations ={


    AnyFloat PP=(.Points_input);

    AnyFloat radius_ = vnorm(PP);


    AnyFloat theta_ = acos(PP'[2]/radius_);
    AnyFloat sgn = iffun(gtfun(PP'[1],0),1,iffun(ltfun(PP'[1],0),-1,1));

    AnyFloat sigma_= -0.5*(.SweepDirection-1)*pi+.SweepDirection*mult(sgn,acos(PP'[0]/sqrt(PP'[0]^2+PP'[1]^2)));


    AnyFloat DataSorted_theta= {ObjSort(radius_,&theta_),ObjSort(theta_),ObjSort(sigma_,&theta_)};

    AnyInt Size=SizesOf(.Points_input)[0];

    AnyFloat Closest_TopPolePoint = DataSorted_theta'[0];
    AnyFloat Closest_BottomPolePoint = DataSorted_theta'[Size-1];

    AnyFloat ExtraPolePoints =
    arrcat({repmat(.RotationNo,Closest_TopPolePoint[0]),zeros(.RotationNo),linspace(0,2*pi,.RotationNo)}',
    {repmat(.RotationNo,Closest_BottomPolePoint[0]),pi*ones(.RotationNo),linspace(0,2*pi,.RotationNo)}');


    AnyFloat theta__ = arrcat(theta_,ExtraPolePoints'[1]);
    AnyFloat radius__ = arrcat(radius_,ExtraPolePoints'[0]);
    AnyFloat sigma__ =arrcat(sigma_,ExtraPolePoints'[2]);


    AnyFloat theta=arrcat(theta__,theta__,theta__,);
    AnyFloat sigma=arrcat(sigma__,2*pi+sigma__,-2*pi+sigma__,);
    AnyFloat radius=arrcat(radius__,radius__,radius__,);


    AnyFloat Radius_0 = arrcat(mean(radius)+0*radius,2*mean(radius)+0*radius,0.1*mean(radius)+0*radius);
    AnyFloat Radius_1 = arrcat(radius,radius*2,radius*0.1);

    AnyFloat theta___ = arrcat(theta,theta,theta);
    AnyFloat sigma___= arrcat(sigma,sigma,sigma);


    AnyFunTransform3DRBF RBFTransform = {
      RBFDef.Type = RBF_Triharmonic;
      PolynomDegree = 1;
      Points0 = {.theta___,.sigma___,.Radius_0}';
      Points1 = {.theta___,.sigma___,.Radius_1,}';
      BoundingBox.Type = BB_Cartesian;
    };

    //use the RBF function in spherical coordinates to sweep a volume
    AnyFolder CreatePoints ={
      AnyFloat Theta_1 = linspace(..Start_Surf_Angle_Theta,..End_Surf_Angle_Theta,..PointsNo);
      AnyFloat Sigma_1 = linspace(..Start_Surf_Angle_Sigma,..End_Surf_Angle_Sigma,..RotationNo);

      AnyFloat r_1 = repmat(1,mean(.radius));
      AnyFloat test  =MESHGRID(Theta_1,Sigma_1,r_1);

      AnyFloat SphericalCoords =reshape(MESHGRID(Theta_1,Sigma_1,r_1),{3,..PointsNo*..RotationNo})';


      AnyFloat theta1 =SphericalCoords'[0];
      AnyFloat sigma1 =SphericalCoords'[1];
      AnyFloat r_=.RBFTransform({theta1,sigma1,sigma1*0+mean(.radius)}')'[2];
      AnyFloat x_ = ..SweepDirection*mult(mult(sin(theta1),cos(sigma1)),r_);
      AnyFloat y_ = mult(mult(sin(theta1),sin(sigma1)),r_);
      AnyFloat z_=mult(r_,cos(theta1));
      AnyFloat P=    {x_,y_,z_}';
    };


  };


////  Can be used for debug
//    AnyDrawPointCloud points_RBF ={
//      Points = .Calculations.CreatePoints.P;
//      Points3D =On;
//      PointStyle.Size=0.0051;
//      RGB={1,0,0};
////       PointNames= {
////        "0","1","2","3","4","5","6","7","8","9",
////        "10","11","12","13","14","15","16","17","18","19",
////        "20","21","22","23","24","25","26","27","28","29",
////        "30","31","32","33","34","35","36","37","38","39",
////        "40","41","42","43","44","45","46","47","48","49",
////        "50","51","52","53","54","55","56","57","58","59",
////        "60","61","62","63","64","65","66","67","68","69",
////        "70","71","72","73","74","75","76","77","78","79"
////      };
////
//
//    };
//
//    AnyDrawPointCloud points_RBF_input ={
//      Points = .Calculations.PP;
//      Points3D =On;
//      PointStyle.Size=0.011;
//      //    RGB={1,0,0};
//      PointNames= {
//        "0","1","2","3","4","5","6","7","8","9",
//        "10","11"};
////      ,"12","13","14","15","16","17","18","19",
////        "20","21","22","23","24","25","26","27","28","29",
////        "30","31","32","33","34","35","36","37","38","39",
////        "40","41","42","43","44","45","46","47","48","49",
////        "50","51","52","53","54","55","56","57","58","59",
////        "60","61","62","63","64","65","66","67","68","69",
////        "70","71","72","73","74","75","76","77","78","79"
////      };
//    };

  AnyDrawPointCloud points_Extra_At_Poles={
    AnyFloat r_=.Calculations.ExtraPolePoints'[0];
    AnyFloat theta1=.Calculations.ExtraPolePoints'[1];
    AnyFloat sigma1=.Calculations.ExtraPolePoints'[2];

    AnyFloat x_ = mult(mult(sin(theta1),cos(sigma1)),r_);
    AnyFloat y_ = mult(mult(sin(theta1),sin(sigma1)),r_);
    AnyFloat z_=mult(r_,cos(theta1));
    AnyFloat P=    {x_,y_,z_};
    Points = (P');

    Points3D =On;
    PointStyle.Size=0.011;
    RGB={0,1,0};
  };


  viewSurface.Face  =1;
  viewSurface.Visible=Visible;
  viewSurface.RGB=RGB;
  viewSurface.Opacity=Opacity;
  Points=Calculations.CreatePoints.P;

  AnyIntArray indicies_ = flip(iarr(0,RotationNo*PointsNo-1));
  CylMesh = reshape(indicies_,{RotationNo,PointsNo});


  TriangleDirection=Sweep_Direction;


  #if ADD_NODEGROUP =="On"
  AnyRefNodeGroup Nodes= {
    CreateMotionOutput.r=On;
    NodeDefaults.CreateMotionOutput.r=On;
    NodeAmount = .PointsNo*.RotationNo;
    NodeName = .NodeName; // base name for nodes in node group
    Node_sRels =  .Calculations.CreatePoints.P;
  };
  #endif


  #if CALCULATE_AREA == "On"

  //note incorrect for cropped surfaces due to cylmesh "is closing"
  AnyFolder AreaEstimation ={
    AnyInt size= SizesOf(.Quadrilaterals)[0]-1;
    AnyIntArray indicies= iarr(0,size);
    AnyIntArray A_indicies= repmat(size+1,0);
    AnyIntArray B_indicies= repmat(size+1,1);
    AnyIntArray C_indicies= repmat(size+1,2);
    AnyIntArray D_indicies= repmat(size+1,3);

    AnyInt i_A = .Quadrilaterals'[0];
    AnyInt i_B = .Quadrilaterals'[1];
    AnyInt i_C = .Quadrilaterals'[2];
    AnyInt i_D = .Quadrilaterals'[3];

    AnyFloat P_A = take(.Points,i_A,0);
    AnyFloat P_B = take(.Points,i_B,0);
    AnyFloat P_C = take(.Points,i_C,0);
    AnyFloat P_D = take(.Points,i_D,0);

    AnyFloat u = P_B-P_A;
    AnyFloat v = P_C-P_A;
    AnyFloat w = P_D-P_A;

    AnyFloat a1= 0.5*vnorm(cross(u,v),2);
    AnyFloat a2= 0.5*vnorm(cross(u,w),2);
    AnyFloat areas=(a1+a2);

    AnyFloat AreaTotal = sum(areas);

  };

  #endif


};
