#if (ANYBODY_V1 < 8) | (ANYBODY_V1  ==  8 & ANYBODY_V2 < 2)
  // AnyGUIPlugin is not supported in AnyBody Studio (introduced in version 8.2)
  //but we want to keep it for backwards compatibility with older versions of AnyBody.
  #if ANYBODY_BUILTIN_PYTHON_AVAILABLE
    AnyGUIPlugin ANSURPlugin = {
      PluginFile = "ANSUR_Plugin-1.2.2-py3.13.egg";
      ToolTip = "Change Model Scaling";
      Console = Off;
      Interactive = Off;
      DisplayName =  "ANSUR Configuration";
    };
  #endif
#endif
